! Reduced enabled lines.

New Line._virtual_line0_line1_line3_line5_line7_line9_line11_line14_line16_line18_line20_line22_line24_line26_line28_line30_line32_line34_line36_line39_line41_line43_line46_line48_line50_line52_line54_line56_line58_line61_line64_line67_line71_line75_line79_line82_line83_line84_line85_line86_line87_line88_line89_line90_line91_line92_line93_line94_line95_line96_line97_line98_line99 bus1=sourcebus.1.2.3.4 bus2=100.1.2.3.4 phases=4 linecode=LC8 length=47.441586 units=m
! reduced_from=line0,line1,line3,line5,line7,line9,line11,line14,line16,line18,line20,line22,line24,line26,line28,line30,line32,line34,line36,line39,line41,line43,line46,line48,line50,line52,line54,line56,line58,line61,line64,line67,line71,line75,line79,line82,line83,line84,line85,line86,line87,line88,line89,line90,line91,line92,line93,line94,line95,line96,line97,line98,line99
! eliminated_buses=1,2,4,6,8,10,12,15,17,19,21,23,25,27,29,31,33,35,37,40,42,44,47,49,51,53,55,57,59,62,65,68,72,76,80,83,84,85,86,87,88,89,90,91,92,93,94,95,96,97,98,99

New Line._virtual_line100_line103_line107_line112_line119_line127_line132_line138_line141_line144_line147_line149_line152_line157_line162_line166_line170_line174_line178_line181_line184_line187_line189 bus1=100.1.2.3.4 bus2=190.1.2.3.4 phases=4 linecode=LC8 length=38.57205 units=m
! reduced_from=line100,line103,line107,line112,line119,line127,line132,line138,line141,line144,line147,line149,line152,line157,line162,line166,line170,line174,line178,line181,line184,line187,line189
! eliminated_buses=101,104,108,113,120,128,133,139,142,145,148,150,153,158,163,167,171,175,179,182,185,188

New Line._virtual_line101_line105_line110 bus1=111.1.2.3.4 bus2=100.1.2.3.4 phases=4 linecode=LC8 length=11.3607 units=m
! reduced_from=line101,line105,line110
! eliminated_buses=102,106

New Line._virtual_line192_line195_line199_line205_line211_line217_line223_line227_line231_line235_line240_line245_line250_line255_line260_line265_line270_line275_line278_line281_line283_line285_line287_line289_line291_line293_line294_line295_line296_line297_line298_line299_line300_line302_line304_line306_line308_line310_line312_line315_line318_line321_line324_line327_line330_line333_line335_line337_line340_line343_line346_line349_line350_line351_line352_line353_line354_line355_line356_line357_line358_line359 bus1=190.1.2.3.4 bus2=360.1.2.3.4 phases=4 linecode=LC8 length=138.40801 units=m
! reduced_from=line192,line195,line199,line205,line211,line217,line223,line227,line231,line235,line240,line245,line250,line255,line260,line265,line270,line275,line278,line281,line283,line285,line287,line289,line291,line293,line294,line295,line296,line297,line298,line299,line300,line302,line304,line306,line308,line310,line312,line315,line318,line321,line324,line327,line330,line333,line335,line337,line340,line343,line346,line349,line350,line351,line352,line353,line354,line355,line356,line357,line358,line359
! eliminated_buses=193,196,200,206,212,218,224,228,232,236,241,246,251,256,261,266,271,276,279,282,284,286,288,290,292,294,295,296,297,298,299,300,301,303,305,307,309,311,313,316,319,322,325,328,331,334,336,338,341,344,347,350,351,352,353,354,355,356,357,358,359

New Line._virtual_line360_line363_line365_line367_line369_line371_line373_line375_line377_line379_line381_line383_line385_line387_line389_line392_line395_line399_line403_line408_line414_line420_line426_line433_line442_line453_line463_line474_line485_line496_line508_line519_line528_line536_line543_line550_line557_line565_line574_line581_line588_line597_line604_line612_line620_line629_line637_line645_line654_line662_line669_line676_line684 bus1=685.1.2.3.4 bus2=360.1.2.3.4 phases=4 linecode=LC8 length=120.855083 units=m
! reduced_from=line360,line363,line365,line367,line369,line371,line373,line375,line377,line379,line381,line383,line385,line387,line389,line392,line395,line399,line403,line408,line414,line420,line426,line433,line442,line453,line463,line474,line485,line496,line508,line519,line528,line536,line543,line550,line557,line565,line574,line581,line588,line597,line604,line612,line620,line629,line637,line645,line654,line662,line669,line676,line684
! eliminated_buses=361,364,366,368,370,372,374,376,378,380,382,384,386,388,390,393,396,400,404,409,415,421,427,434,443,454,464,475,486,497,509,520,529,537,544,551,558,566,575,582,589,598,605,613,621,630,638,646,655,663,670,677

New Line._virtual_line361_line364_line366_line368_line370_line372_line374_line376_line378_line380_line382_line384_line386_line388_line390_line393 bus1=360.1.2.3.4 bus2=394.1.2.3.4 phases=4 linecode=LC8 length=22.02132 units=m
! reduced_from=line361,line364,line366,line368,line370,line372,line374,line376,line378,line380,line382,line384,line386,line388,line390,line393
! eliminated_buses=362,365,367,369,371,373,375,377,379,381,383,385,387,389,391

New Line._virtual_line396_line400_line405 bus1=406.1.2.3.4 bus2=394.1.2.3.4 phases=4 linecode=LC8 length=10.135 units=m
! reduced_from=line396,line400,line405
! eliminated_buses=397,401

New Line._virtual_line397_line401_line406_line412_line418_line423_line428_line436_line446_line456_line467 bus1=394.1.2.3.4 bus2=468.1.2.3.4 phases=4 linecode=LC8 length=22.04415 units=m
! reduced_from=line397,line401,line406,line412,line418,line423,line428,line436,line446,line456,line467
! eliminated_buses=398,402,407,413,419,424,429,437,447,457

New Line._virtual_line416_line421_line427_line434_line443_line454_line464_line475_line486_line497_line510 bus1=412.1.2.3.4 bus2=511.1.2.3.4 phases=4 linecode=LC6 length=12.51082 units=m
! reduced_from=line416,line421,line427,line434,line443,line454,line464,line475,line486,line497,line510
! eliminated_buses=417,422,428,435,444,455,465,476,487,498

New Line._virtual_line478_line489 bus1=468.1.2.3.4 bus2=490.1.2.3.4 phases=4 linecode=LC8 length=4.974 units=m
! reduced_from=line478,line489
! eliminated_buses=479

New Line._virtual_line501_line513_line524_line533_line541_line548_line555_line563 bus1=564.1.2.3.4 bus2=490.1.2.3.4 phases=4 linecode=LC8 length=6.65299 units=m
! reduced_from=line501,line513,line524,line533,line541,line548,line555,line563
! eliminated_buses=502,514,525,534,542,549,556

New Line._virtual_line521_line530 bus1=511.1.2.3.4 bus2=531.1.2.3.4 phases=4 linecode=LC3 length=6.9824 units=m
! reduced_from=line521,line530
! eliminated_buses=522

New Line._virtual_line546_line553 bus1=554.1.2.3.4 bus2=540.1.2.3.4 phases=4 linecode=LC3 length=9.20921 units=m
! reduced_from=line546,line553
! eliminated_buses=547

New Line._virtual_line569_line577_line584_line591 bus1=592.1.2.3.4 bus2=562.1.2.3.4 phases=4 linecode=LC3 length=16.8374 units=m
! reduced_from=line569,line577,line584,line591
! eliminated_buses=570,578,585

New Line._virtual_line571_line579_line586_line593_line600_line608_line616_line624_line633_line640_line649_line658_line666_line673_line680_line687_line695_line701_line707_line713_line720_line728 bus1=564.1.2.3.4 bus2=729.1.2.3.4 phases=4 linecode=LC8 length=27.12 units=m
! reduced_from=line571,line579,line586,line593,line600,line608,line616,line624,line633,line640,line649,line658,line666,line673,line680,line687,line695,line701,line707,line713,line720,line728
! eliminated_buses=572,580,587,594,601,609,617,625,634,641,650,659,667,674,681,688,696,702,708,714,721

New Line._virtual_line580_line587_line594_line601_line609 bus1=573.1.2.3.4 bus2=610.1.2.3.4 phases=4 linecode=LC2 length=1.76724 units=m
! reduced_from=line580,line587,line594,line601,line609
! eliminated_buses=581,588,595,602

New Line._virtual_line617_line626_line634_line642_line651 bus1=610.1.2.3.4 bus2=652.1.2.3.4 phases=4 linecode=LC8 length=14.7871 units=m
! reduced_from=line617,line626,line634,line642,line651
! eliminated_buses=618,627,635,643

New Line._virtual_line660_line667_line674_line681_line688_line696_line702_line708_line714_line721_line729_line738_line745_line753_line761_line768_line778_line786_line794_line805_line818_line831_line843_line856_line869_line883_line894_line906_line917_line931_line944_line957_line968_line979_line991_line1003_line1015_line1027_line1040_line1054_line1069_line1089_line1111_line1135_line1159_line1182_line1204_line1226_line1247_line1267_line1287_line1305_line1323_line1343_line1363_line1385_line1407_line1430_line1453_line1478_line1501_line1528_line1556_line1586_line1617_line1648 bus1=652.1.2.3.4 bus2=1649.1.2.3.4 phases=4 linecode=LC8 length=135.172 units=m
! reduced_from=line660,line667,line674,line681,line688,line696,line702,line708,line714,line721,line729,line738,line745,line753,line761,line768,line778,line786,line794,line805,line818,line831,line843,line856,line869,line883,line894,line906,line917,line931,line944,line957,line968,line979,line991,line1003,line1015,line1027,line1040,line1054,line1069,line1089,line1111,line1135,line1159,line1182,line1204,line1226,line1247,line1267,line1287,line1305,line1323,line1343,line1363,line1385,line1407,line1430,line1453,line1478,line1501,line1528,line1556,line1586,line1617,line1648
! eliminated_buses=661,668,675,682,689,697,703,709,715,722,730,739,746,754,762,769,779,787,795,806,819,832,844,857,870,884,895,907,918,932,945,958,969,980,992,1004,1016,1028,1041,1055,1070,1090,1112,1136,1160,1183,1205,1227,1248,1268,1288,1306,1324,1344,1364,1386,1408,1431,1454,1479,1502,1529,1557,1587,1618

New Line._virtual_line661_line668_line675_line683_line691_line698_line704_line710_line717_line725_line733_line741_line748_line756_line763_line771_line781_line789 bus1=652.1.2.3.4 bus2=790.1.2.3.4 phases=4 linecode=LC9 length=17.570637 units=m
! reduced_from=line661,line668,line675,line683,line691,line698,line704,line710,line717,line725,line733,line741,line748,line756,line763,line771,line781,line789
! eliminated_buses=662,669,676,684,692,699,705,711,718,726,734,742,749,757,764,772,782

New Line._virtual_line692_line699_line705_line711_line718_line726_line734_line742_line749_line757_line764_line772_line782_line790_line800_line812_line824_line837_line849_line863_line877_line889_line901_line913_line927_line940_line954_line966_line977_line989_line1001_line1012_line1024 bus1=1025.1.2.3.4 bus2=685.1.2.3.4 phases=4 linecode=LC8 length=80.781123 units=m
! reduced_from=line692,line699,line705,line711,line718,line726,line734,line742,line749,line757,line764,line772,line782,line790,line800,line812,line824,line837,line849,line863,line877,line889,line901,line913,line927,line940,line954,line966,line977,line989,line1001,line1012,line1024
! eliminated_buses=693,700,706,712,719,727,735,743,750,758,765,773,783,791,801,813,825,838,850,864,878,890,902,914,928,941,955,967,978,990,1002,1013

New Line._virtual_line693_line700_line706_line712_line719_line727_line735_line743_line750_line758_line765 bus1=685.1.2.3.4 bus2=766.1.2.3.4 phases=4 linecode=LC8 length=5.04337 units=m
! reduced_from=line693,line700,line706,line712,line719,line727,line735,line743,line750,line758,line765
! eliminated_buses=694,701,707,713,720,728,736,744,751,759

New Line._virtual_line737_line744_line752_line760_line767_line777_line785_line793_line804_line817 bus1=818.1.2.3.4 bus2=729.1.2.3.4 phases=4 linecode=LC8 length=13.68474 units=m
! reduced_from=line737,line744,line752,line760,line767,line777,line785,line793,line804,line817
! eliminated_buses=738,745,753,761,768,778,786,794,805

New Line._virtual_line809_line821_line834_line846_line860 bus1=799.1.2.3.4 bus2=861.1.2.3.4 phases=4 linecode=LC9 length=11.9592 units=m
! reduced_from=line809,line821,line834,line846,line860
! eliminated_buses=810,822,835,847

New Line._virtual_line873_line886 bus1=861.1.2.3.4 bus2=887.1.2.3.4 phases=4 linecode=LC9 length=4.0685 units=m
! reduced_from=line873,line886
! eliminated_buses=874

New Line._virtual_line874_line887_line899_line910_line924_line937_line951_line963_line974_line986_line998 bus1=861.1.2.3.4 bus2=999.1.2.3.4 phases=4 linecode=LC2 length=15.74957 units=m
! reduced_from=line874,line887,line899,line910,line924,line937,line951,line963,line974,line986,line998
! eliminated_buses=875,888,900,911,925,938,952,964,975,987

New Line._virtual_line897_line908 bus1=909.1.2.3.4 bus2=887.1.2.3.4 phases=4 linecode=LC9 length=4.2436 units=m
! reduced_from=line897,line908
! eliminated_buses=898

New Line._virtual_line898_line909_line923_line936_line950_line962_line973_line985_line997_line1010_line1022_line1034_line1047_line1062 bus1=1063.1.2.3.4 bus2=887.1.2.3.4 phases=4 linecode=LC9 length=25.86806 units=m
! reduced_from=line898,line909,line923,line936,line950,line962,line973,line985,line997,line1010,line1022,line1034,line1047,line1062
! eliminated_buses=899,910,924,937,951,963,974,986,998,1011,1023,1035,1048

New Line._virtual_line920_line933_line946_line958_line969_line980_line992_line1004_line1016_line1028_line1041_line1055_line1071_line1091_line1113_line1137_line1161_line1184_line1207_line1229_line1250_line1269_line1289_line1307_line1325_line1345_line1365 bus1=909.1.2.3.4 bus2=1366.1.2.3.4 phases=4 linecode=LC2 length=25.514888 units=m
! reduced_from=line920,line933,line946,line958,line969,line980,line992,line1004,line1016,line1028,line1041,line1055,line1071,line1091,line1113,line1137,line1161,line1184,line1207,line1229,line1250,line1269,line1289,line1307,line1325,line1345,line1365
! eliminated_buses=921,934,947,959,970,981,993,1005,1017,1029,1042,1056,1072,1092,1114,1138,1162,1185,1208,1230,1251,1270,1290,1308,1326,1346

New Line._virtual_line921_line934_line947_line959_line970_line981_line993_line1005_line1017_line1029_line1042_line1056_line1072_line1092 bus1=1093.1.2.3.4 bus2=909.1.2.3.4 phases=4 linecode=LC2 length=23.300703 units=m
! reduced_from=line921,line934,line947,line959,line970,line981,line993,line1005,line1017,line1029,line1042,line1056,line1072,line1092
! eliminated_buses=922,935,948,960,971,982,994,1006,1018,1030,1043,1057,1073

New Line._virtual_line922_line935 bus1=909.1.2.3.4 bus2=936.1.2.3.4 phases=4 linecode=LC9 length=4.1706 units=m
! reduced_from=line922,line935
! eliminated_buses=923

New Line._virtual_line948_line960_line971_line982_line994_line1006_line1018_line1030_line1043_line1057_line1073_line1093_line1114_line1138_line1162_line1185 bus1=936.1.2.3.4 bus2=1186.1.2.3.4 phases=4 linecode=LC2 length=15.594303 units=m
! reduced_from=line948,line960,line971,line982,line994,line1006,line1018,line1030,line1043,line1057,line1073,line1093,line1114,line1138,line1162,line1185
! eliminated_buses=949,961,972,983,995,1007,1019,1031,1044,1058,1074,1094,1115,1139,1163

New Line._virtual_line949_line961_line972 bus1=936.1.2.3.4 bus2=973.1.2.3.4 phases=4 linecode=LC9 length=7.1837 units=m
! reduced_from=line949,line961,line972
! eliminated_buses=950,962

New Line._virtual_line983_line995_line1007_line1019_line1031_line1044_line1058_line1074_line1094_line1115_line1139_line1163_line1186_line1208_line1230 bus1=1231.1.2.3.4 bus2=973.1.2.3.4 phases=4 linecode=LC2 length=14.131048 units=m
! reduced_from=line983,line995,line1007,line1019,line1031,line1044,line1058,line1074,line1094,line1115,line1139,line1163,line1186,line1208,line1230
! eliminated_buses=984,996,1008,1020,1032,1045,1059,1075,1095,1116,1140,1164,1187,1209

New Line._virtual_line984_line996 bus1=973.1.2.3.4 bus2=997.1.2.3.4 phases=4 linecode=LC9 length=3.6298 units=m
! reduced_from=line984,line996
! eliminated_buses=985

New Line._virtual_line1008_line1020_line1032_line1045_line1060_line1076 bus1=1077.1.2.3.4 bus2=997.1.2.3.4 phases=4 linecode=LC9 length=10.6869 units=m
! reduced_from=line1008,line1020,line1032,line1045,line1060,line1076
! eliminated_buses=1009,1021,1033,1046,1061

New Line._virtual_line1009_line1021_line1033_line1046_line1061_line1077_line1098_line1119_line1145_line1169_line1193_line1214_line1236_line1256_line1275 bus1=997.1.2.3.4 bus2=1276.1.2.3.4 phases=4 linecode=LC2 length=18.523581 units=m
! reduced_from=line1009,line1021,line1033,line1046,line1061,line1077,line1098,line1119,line1145,line1169,line1193,line1214,line1236,line1256,line1275
! eliminated_buses=1010,1022,1034,1047,1062,1078,1099,1120,1146,1170,1194,1215,1237,1257

New Line._virtual_line1037_line1050_line1065_line1084_line1105 bus1=1106.1.2.3.4 bus2=1025.1.2.3.4 phases=4 linecode=LC8 length=6.3724 units=m
! reduced_from=line1037,line1050,line1065,line1084,line1105
! eliminated_buses=1038,1051,1066,1085

New Line._virtual_line1078_line1099_line1120_line1146_line1170_line1194_line1215_line1237_line1257_line1276_line1295_line1313 bus1=1063.1.2.3.4 bus2=1314.1.2.3.4 phases=4 linecode=LC2 length=14.63721 units=m
! reduced_from=line1078,line1099,line1120,line1146,line1170,line1194,line1215,line1237,line1257,line1276,line1295,line1313
! eliminated_buses=1079,1100,1121,1147,1171,1195,1216,1238,1258,1277,1296

New Line._virtual_line1079_line1100_line1121_line1147_line1171_line1195_line1216_line1238_line1258_line1277_line1296_line1314_line1333 bus1=1063.1.2.3.4 bus2=1334.1.2.3.4 phases=4 linecode=LC9 length=32.14599 units=m
! reduced_from=line1079,line1100,line1121,line1147,line1171,line1195,line1216,line1238,line1258,line1277,line1296,line1314,line1333
! eliminated_buses=1080,1101,1122,1148,1172,1196,1217,1239,1259,1278,1297,1315

New Line._virtual_line1080_line1101_line1122_line1148_line1172_line1196_line1217 bus1=1063.1.2.3.4 bus2=1218.1.2.3.4 phases=4 linecode=LC2 length=19.42926 units=m
! reduced_from=line1080,line1101,line1122,line1148,line1172,line1196,line1217
! eliminated_buses=1081,1102,1123,1149,1173,1197

New Line._virtual_line1081_line1102_line1123_line1149_line1173_line1197_line1218_line1239_line1259_line1278_line1297_line1315_line1335_line1355_line1376_line1396_line1418 bus1=1063.1.2.3.4 bus2=1419.1.2.3.4 phases=4 linecode=LC2 length=17.145571 units=m
! reduced_from=line1081,line1102,line1123,line1149,line1173,line1197,line1218,line1239,line1259,line1278,line1297,line1315,line1335,line1355,line1376,line1396,line1418
! eliminated_buses=1082,1103,1124,1150,1174,1198,1219,1240,1260,1279,1298,1316,1336,1356,1377,1397

New Line._virtual_line1096_line1117_line1141_line1165_line1188_line1209_line1231_line1251_line1270_line1290_line1308_line1326_line1346_line1366 bus1=1077.1.2.3.4 bus2=1367.1.2.3.4 phases=4 linecode=LC2 length=15.001442 units=m
! reduced_from=line1096,line1117,line1141,line1165,line1188,line1209,line1231,line1251,line1270,line1290,line1308,line1326,line1346,line1366
! eliminated_buses=1097,1118,1142,1166,1189,1210,1232,1252,1271,1291,1309,1327,1347

New Line._virtual_line1097_line1118 bus1=1077.1.2.3.4 bus2=1119.1.2.3.4 phases=4 linecode=LC9 length=4.088 units=m
! reduced_from=line1097,line1118
! eliminated_buses=1098

New Line._virtual_line1129_line1152_line1175_line1199_line1220_line1241_line1261_line1280_line1299_line1317_line1337_line1357_line1378_line1398_line1420_line1443 bus1=1444.1.2.3.4 bus2=1106.1.2.3.4 phases=4 linecode=LC8 length=34.26379 units=m
! reduced_from=line1129,line1152,line1175,line1199,line1220,line1241,line1261,line1280,line1299,line1317,line1337,line1357,line1378,line1398,line1420,line1443
! eliminated_buses=1130,1153,1176,1200,1221,1242,1262,1281,1300,1318,1338,1358,1379,1399,1421

New Line._virtual_line1142_line1166_line1189_line1210_line1232_line1252_line1271_line1291_line1309_line1327_line1347_line1367_line1387_line1409_line1432 bus1=1119.1.2.3.4 bus2=1433.1.2.3.4 phases=4 linecode=LC2 length=16.352315 units=m
! reduced_from=line1142,line1166,line1189,line1210,line1232,line1252,line1271,line1291,line1309,line1327,line1347,line1367,line1387,line1409,line1432
! eliminated_buses=1143,1167,1190,1211,1233,1253,1272,1292,1310,1328,1348,1368,1388,1410

New Line._virtual_line1143_line1167_line1190_line1211_line1233_line1253_line1272_line1292_line1310_line1328_line1348_line1368_line1388_line1410_line1433_line1455_line1480_line1504_line1530_line1559_line1590 bus1=1591.1.2.3.4 bus2=1119.1.2.3.4 phases=4 linecode=LC2 length=28.17998 units=m
! reduced_from=line1143,line1167,line1190,line1211,line1233,line1253,line1272,line1292,line1310,line1328,line1348,line1368,line1388,line1410,line1433,line1455,line1480,line1504,line1530,line1559,line1590
! eliminated_buses=1144,1168,1191,1212,1234,1254,1273,1293,1311,1329,1349,1369,1389,1411,1434,1456,1481,1505,1531,1560

New Line._virtual_line1144_line1168 bus1=1169.1.2.3.4 bus2=1119.1.2.3.4 phases=4 linecode=LC9 length=4.442 units=m
! reduced_from=line1144,line1168
! eliminated_buses=1145

New Line._virtual_line1191_line1212_line1234_line1254_line1273_line1293_line1311_line1329_line1349_line1369_line1389_line1411_line1434_line1456_line1481_line1505_line1531_line1560_line1591_line1622_line1652_line1681_line1707 bus1=1708.1.2.3.4 bus2=1169.1.2.3.4 phases=4 linecode=LC2 length=20.933805 units=m
! reduced_from=line1191,line1212,line1234,line1254,line1273,line1293,line1311,line1329,line1349,line1369,line1389,line1411,line1434,line1456,line1481,line1505,line1531,line1560,line1591,line1622,line1652,line1681,line1707
! eliminated_buses=1192,1213,1235,1255,1274,1294,1312,1330,1350,1370,1390,1412,1435,1457,1482,1506,1532,1561,1592,1623,1653,1682

New Line._virtual_line1192_line1213_line1235_line1255_line1274_line1294_line1312 bus1=1169.1.2.3.4 bus2=1313.1.2.3.4 phases=4 linecode=LC9 length=11.75484 units=m
! reduced_from=line1192,line1213,line1235,line1255,line1274,line1294,line1312
! eliminated_buses=1193,1214,1236,1256,1275,1295

New Line._virtual_line1331_line1351_line1371_line1390_line1412_line1435_line1457_line1482_line1506_line1532_line1561_line1592_line1623_line1653 bus1=1654.1.2.3.4 bus2=1313.1.2.3.4 phases=4 linecode=LC2 length=16.320373 units=m
! reduced_from=line1331,line1351,line1371,line1390,line1412,line1435,line1457,line1482,line1506,line1532,line1561,line1592,line1623,line1653
! eliminated_buses=1332,1352,1372,1391,1413,1436,1458,1483,1507,1533,1562,1593,1624

New Line._virtual_line1332_line1352 bus1=1313.1.2.3.4 bus2=1353.1.2.3.4 phases=4 linecode=LC9 length=5.2252 units=m
! reduced_from=line1332,line1352
! eliminated_buses=1333

New Line._virtual_line1353_line1374_line1394_line1416_line1440_line1465_line1490_line1517_line1543_line1572_line1603_line1635_line1666_line1692 bus1=1693.1.2.3.4 bus2=1334.1.2.3.4 phases=4 linecode=LC2 length=21.794287 units=m
! reduced_from=line1353,line1374,line1394,line1416,line1440,line1465,line1490,line1517,line1543,line1572,line1603,line1635,line1666,line1692
! eliminated_buses=1354,1375,1395,1417,1441,1466,1491,1518,1544,1573,1604,1636,1667

New Line._virtual_line1372_line1391_line1413_line1436_line1458_line1483_line1507_line1533_line1562_line1593_line1624_line1654 bus1=1353.1.2.3.4 bus2=1655.1.2.3.4 phases=4 linecode=LC2 length=15.52391 units=m
! reduced_from=line1372,line1391,line1413,line1436,line1458,line1483,line1507,line1533,line1562,line1593,line1624,line1654
! eliminated_buses=1373,1392,1414,1437,1459,1484,1508,1534,1563,1594,1625

New Line._virtual_line1373_line1393_line1415 bus1=1416.1.2.3.4 bus2=1353.1.2.3.4 phases=4 linecode=LC9 length=7.2709 units=m
! reduced_from=line1373,line1393,line1415
! eliminated_buses=1374,1394

New Line._virtual_line1439_line1464_line1489_line1516_line1542_line1571_line1602_line1634_line1665_line1691_line1717_line1745_line1768_line1791_line1815_line1837_line1860 bus1=1416.1.2.3.4 bus2=1861.1.2.3.4 phases=4 linecode=LC2 length=22.358568 units=m
! reduced_from=line1439,line1464,line1489,line1516,line1542,line1571,line1602,line1634,line1665,line1691,line1717,line1745,line1768,line1791,line1815,line1837,line1860
! eliminated_buses=1440,1465,1490,1517,1543,1572,1603,1635,1666,1692,1718,1746,1769,1792,1816,1838

New Line._virtual_line1460_line1485 bus1=1486.1.2.3.4 bus2=1439.1.2.3.4 phases=4 linecode=LC9 length=7.9096 units=m
! reduced_from=line1460,line1485
! eliminated_buses=1461

New Line._virtual_line1461_line1486_line1513_line1539_line1568_line1599_line1631_line1662_line1688_line1714_line1742_line1766_line1789_line1813_line1835_line1858_line1879 bus1=1439.1.2.3.4 bus2=1880.1.2.3.4 phases=4 linecode=LC2 length=14.2804 units=m
! reduced_from=line1461,line1486,line1513,line1539,line1568,line1599,line1631,line1662,line1688,line1714,line1742,line1766,line1789,line1813,line1835,line1858,line1879
! eliminated_buses=1462,1487,1514,1540,1569,1600,1632,1663,1689,1715,1743,1767,1790,1814,1836,1859

New Line._virtual_line1462_line1487_line1514_line1540_line1569_line1600_line1632_line1663_line1689_line1715_line1743 bus1=1439.1.2.3.4 bus2=1744.1.2.3.4 phases=4 linecode=LC2 length=17.680358 units=m
! reduced_from=line1462,line1487,line1514,line1540,line1569,line1600,line1632,line1663,line1689,line1715,line1743
! eliminated_buses=1463,1488,1515,1541,1570,1601,1633,1664,1690,1716

New Line._virtual_line1463_line1488_line1515_line1541_line1570_line1601_line1633_line1664_line1690_line1716_line1744_line1767_line1790_line1814_line1836_line1859_line1880_line1899 bus1=1900.1.2.3.4 bus2=1439.1.2.3.4 phases=4 linecode=LC2 length=19.095028 units=m
! reduced_from=line1463,line1488,line1515,line1541,line1570,line1601,line1633,line1664,line1690,line1716,line1744,line1767,line1790,line1814,line1836,line1859,line1880,line1899
! eliminated_buses=1464,1489,1516,1542,1571,1602,1634,1665,1691,1717,1745,1768,1791,1815,1837,1860,1881

New Line._virtual_line1469_line1493_line1520_line1546_line1575_line1606 bus1=1444.1.2.3.4 bus2=1607.1.2.3.4 phases=4 linecode=LC8 length=13.8283 units=m
! reduced_from=line1469,line1493,line1520,line1546,line1575,line1606
! eliminated_buses=1470,1494,1521,1547,1576

New Line._virtual_line1509_line1535_line1564_line1595_line1626_line1656_line1682_line1708_line1734_line1758_line1781_line1805_line1827_line1851_line1874_line1893 bus1=1486.1.2.3.4 bus2=1894.1.2.3.4 phases=4 linecode=LC2 length=14.687402 units=m
! reduced_from=line1509,line1535,line1564,line1595,line1626,line1656,line1682,line1708,line1734,line1758,line1781,line1805,line1827,line1851,line1874,line1893
! eliminated_buses=1510,1536,1565,1596,1627,1657,1683,1709,1735,1759,1782,1806,1828,1852,1875

New Line._virtual_line1510_line1536_line1565_line1596_line1627_line1657_line1683_line1709_line1735_line1759_line1782_line1806_line1828_line1852 bus1=1486.1.2.3.4 bus2=1853.1.2.3.4 phases=4 linecode=LC2 length=23.61694 units=m
! reduced_from=line1510,line1536,line1565,line1596,line1627,line1657,line1683,line1709,line1735,line1759,line1782,line1806,line1828,line1852
! eliminated_buses=1511,1537,1566,1597,1628,1658,1684,1710,1736,1760,1783,1807,1829

New Line._virtual_line1511_line1537_line1566_line1597_line1628_line1658_line1684_line1710_line1736_line1760_line1783_line1807_line1829 bus1=1486.1.2.3.4 bus2=1830.1.2.3.4 phases=4 linecode=LC2 length=23.943924 units=m
! reduced_from=line1511,line1537,line1566,line1597,line1628,line1658,line1684,line1710,line1736,line1760,line1783,line1807,line1829
! eliminated_buses=1512,1538,1567,1598,1629,1659,1685,1711,1737,1761,1784,1808

New Line._virtual_line1512_line1538_line1567_line1598_line1629 bus1=1630.1.2.3.4 bus2=1486.1.2.3.4 phases=4 linecode=LC9 length=9.27181 units=m
! reduced_from=line1512,line1538,line1567,line1598,line1629
! eliminated_buses=1513,1539,1568,1599

New Line._virtual_line1638_line1668_line1694_line1721_line1746_line1769_line1792_line1816_line1838_line1861_line1881_line1900_line1919_line1933_line1947_line1961_line1974_line1988_line1996_line2004_line2011_line2018_line2025_line2032_line2040_line2047_line2053_line2060_line2067_line2074_line2083_line2091_line2100_line2109_line2116_line2125_line2134_line2143_line2152_line2162_line2172 bus1=2173.1.2.3.4 bus2=1607.1.2.3.4 phases=4 linecode=LC8 length=42.98932 units=m
! reduced_from=line1638,line1668,line1694,line1721,line1746,line1769,line1792,line1816,line1838,line1861,line1881,line1900,line1919,line1933,line1947,line1961,line1974,line1988,line1996,line2004,line2011,line2018,line2025,line2032,line2040,line2047,line2053,line2060,line2067,line2074,line2083,line2091,line2100,line2109,line2116,line2125,line2134,line2143,line2152,line2162,line2172
! eliminated_buses=1639,1669,1695,1722,1747,1770,1793,1817,1839,1862,1882,1901,1920,1934,1948,1962,1975,1989,1997,2005,2012,2019,2026,2033,2041,2048,2054,2061,2068,2075,2084,2092,2101,2110,2117,2126,2135,2144,2153,2163

New Line._virtual_line1659_line1685_line1711 bus1=1630.1.2.3.4 bus2=1712.1.2.3.4 phases=4 linecode=LC9 length=4.7808 units=m
! reduced_from=line1659,line1685,line1711
! eliminated_buses=1660,1686

New Line._virtual_line1660_line1686_line1712_line1740_line1764_line1787_line1812_line1834_line1857_line1878_line1898_line1916_line1932_line1946_line1960_line1973 bus1=1630.1.2.3.4 bus2=1974.1.2.3.4 phases=4 linecode=LC2 length=16.529569 units=m
! reduced_from=line1660,line1686,line1712,line1740,line1764,line1787,line1812,line1834,line1857,line1878,line1898,line1916,line1932,line1946,line1960,line1973
! eliminated_buses=1661,1687,1713,1741,1765,1788,1813,1835,1858,1879,1899,1917,1933,1947,1961

New Line._virtual_line1677_line1703_line1728_line1753_line1776_line1799_line1822_line1845_line1868_line1888_line1907_line1924 bus1=1649.1.2.3.4 bus2=1925.1.2.3.4 phases=4 linecode=LC2 length=12.524367 units=m
! reduced_from=line1677,line1703,line1728,line1753,line1776,line1799,line1822,line1845,line1868,line1888,line1907,line1924
! eliminated_buses=1678,1704,1729,1754,1777,1800,1823,1846,1869,1889,1908

New Line._virtual_line1678_line1704 bus1=1705.1.2.3.4 bus2=1649.1.2.3.4 phases=4 linecode=LC8 length=17.4258 units=m
! reduced_from=line1678,line1704
! eliminated_buses=1679

New Line._virtual_line1730_line1756_line1779_line1802_line1824_line1847_line1870_line1890_line1908_line1925_line1939_line1953_line1966 bus1=1967.1.2.3.4 bus2=1705.1.2.3.4 phases=4 linecode=LC9 length=4.528885 units=m
! reduced_from=line1730,line1756,line1779,line1802,line1824,line1847,line1870,line1890,line1908,line1925,line1939,line1953,line1966
! eliminated_buses=1731,1757,1780,1803,1825,1848,1871,1891,1909,1926,1940,1954

New Line._virtual_line1737_line1761_line1784 bus1=1712.1.2.3.4 bus2=1785.1.2.3.4 phases=4 linecode=LC9 length=10.013 units=m
! reduced_from=line1737,line1761,line1784
! eliminated_buses=1738,1762

New Line._virtual_line1738_line1762_line1785_line1810_line1832_line1855_line1877_line1897_line1915_line1931_line1945_line1959_line1972_line1987_line1995_line2003_line2010_line2017 bus1=1712.1.2.3.4 bus2=2018.1.2.3.4 phases=4 linecode=LC2 length=20.892897 units=m
! reduced_from=line1738,line1762,line1785,line1810,line1832,line1855,line1877,line1897,line1915,line1931,line1945,line1959,line1972,line1987,line1995,line2003,line2010,line2017
! eliminated_buses=1739,1763,1786,1811,1833,1856,1878,1898,1916,1932,1946,1960,1973,1988,1996,2004,2011

New Line._virtual_line1739_line1763_line1786_line1811_line1833_line1856 bus1=1857.1.2.3.4 bus2=1712.1.2.3.4 phases=4 linecode=LC2 length=15.314524 units=m
! reduced_from=line1739,line1763,line1786,line1811,line1833,line1856
! eliminated_buses=1740,1764,1787,1812,1834

New Line._virtual_line1808_line1830_line1853_line1875_line1894_line1912_line1928_line1942_line1956_line1969_line1985_line1993 bus1=1785.1.2.3.4 bus2=1994.1.2.3.4 phases=4 linecode=LC2 length=19.4999 units=m
! reduced_from=line1808,line1830,line1853,line1875,line1894,line1912,line1928,line1942,line1956,line1969,line1985,line1993
! eliminated_buses=1809,1831,1854,1876,1895,1913,1929,1943,1957,1970,1986

New Line._virtual_line1809_line1831_line1854_line1876 bus1=1785.1.2.3.4 bus2=1877.1.2.3.4 phases=4 linecode=LC9 length=3.45952 units=m
! reduced_from=line1809,line1831,line1854,line1876
! eliminated_buses=1810,1832,1855

New Line._virtual_line1895_line1913_line1929_line1943_line1957_line1970_line1986_line1994_line2002_line2009_line2016_line2024_line2031_line2039_line2046_line2052 bus1=2053.1.2.3.4 bus2=1877.1.2.3.4 phases=4 linecode=LC9 length=12.38472 units=m
! reduced_from=line1895,line1913,line1929,line1943,line1957,line1970,line1986,line1994,line2002,line2009,line2016,line2024,line2031,line2039,line2046,line2052
! eliminated_buses=1896,1914,1930,1944,1958,1971,1987,1995,2003,2010,2017,2025,2032,2040,2047

New Line._virtual_line2058_line2065_line2072_line2078_line2086_line2095_line2104_line2111_line2118_line2127_line2136_line2145_line2154_line2164_line2174 bus1=2175.1.2.3.4 bus2=2053.1.2.3.4 phases=4 linecode=LC2 length=11.758227 units=m
! reduced_from=line2058,line2065,line2072,line2078,line2086,line2095,line2104,line2111,line2118,line2127,line2136,line2145,line2154,line2164,line2174
! eliminated_buses=2059,2066,2073,2079,2087,2096,2105,2112,2119,2128,2137,2146,2155,2165

New Line._virtual_line2059_line2066_line2073 bus1=2074.1.2.3.4 bus2=2053.1.2.3.4 phases=4 linecode=LC9 length=9.64142 units=m
! reduced_from=line2059,line2066,line2073
! eliminated_buses=2060,2067

New Line._virtual_line2079_line2087_line2096_line2105_line2112 bus1=2074.1.2.3.4 bus2=2113.1.2.3.4 phases=4 linecode=LC9 length=5.76098 units=m
! reduced_from=line2079,line2087,line2096,line2105,line2112
! eliminated_buses=2080,2088,2097,2106

New Line._virtual_line2080_line2088_line2097_line2106_line2113_line2122_line2131_line2140_line2149_line2158_line2168_line2178_line2190_line2202_line2214 bus1=2074.1.2.3.4 bus2=2215.1.2.3.4 phases=4 linecode=LC2 length=26.59138 units=m
! reduced_from=line2080,line2088,line2097,line2106,line2113,line2122,line2131,line2140,line2149,line2158,line2168,line2178,line2190,line2202,line2214
! eliminated_buses=2081,2089,2098,2107,2114,2123,2132,2141,2150,2159,2169,2179,2191,2203

New Line._virtual_line2081_line2089_line2098_line2107_line2114_line2123_line2132_line2141_line2150_line2159_line2169_line2179_line2191_line2203_line2215_line2225_line2236_line2246_line2256_line2265_line2273 bus1=2274.1.2.3.4 bus2=2074.1.2.3.4 phases=4 linecode=LC2 length=20.124332 units=m
! reduced_from=line2081,line2089,line2098,line2107,line2114,line2123,line2132,line2141,line2150,line2159,line2169,line2179,line2191,line2203,line2215,line2225,line2236,line2246,line2256,line2265,line2273
! eliminated_buses=2082,2090,2099,2108,2115,2124,2133,2142,2151,2160,2170,2180,2192,2204,2216,2226,2237,2247,2257,2266

New Line._virtual_line2082_line2090_line2099_line2108_line2115_line2124_line2133_line2142_line2151_line2160_line2170_line2180_line2192_line2204_line2216_line2226_line2237_line2247 bus1=2074.1.2.3.4 bus2=2248.1.2.3.4 phases=4 linecode=LC2 length=14.206587 units=m
! reduced_from=line2082,line2090,line2099,line2108,line2115,line2124,line2133,line2142,line2151,line2160,line2170,line2180,line2192,line2204,line2216,line2226,line2237,line2247
! eliminated_buses=2083,2091,2100,2109,2116,2125,2134,2143,2152,2161,2171,2181,2193,2205,2217,2227,2238

New Line._virtual_line2120_line2129_line2138_line2147_line2156_line2166_line2176_line2187_line2197_line2210_line2221_line2232_line2242_line2252_line2261 bus1=2113.1.2.3.4 bus2=2262.1.2.3.4 phases=4 linecode=LC2 length=19.559577 units=m
! reduced_from=line2120,line2129,line2138,line2147,line2156,line2166,line2176,line2187,line2197,line2210,line2221,line2232,line2242,line2252,line2261
! eliminated_buses=2121,2130,2139,2148,2157,2167,2177,2188,2198,2211,2222,2233,2243,2253

New Line._virtual_line2121_line2130_line2139_line2148_line2157_line2167_line2177_line2188 bus1=2113.1.2.3.4 bus2=2189.1.2.3.4 phases=4 linecode=LC9 length=5.60843 units=m
! reduced_from=line2121,line2130,line2139,line2148,line2157,line2167,line2177,line2188
! eliminated_buses=2122,2131,2140,2149,2158,2168,2178

New Line._virtual_line2184_line2194_line2207_line2218 bus1=2173.1.2.3.4 bus2=2219.1.2.3.4 phases=4 linecode=LC8 length=4.44417 units=m
! reduced_from=line2184,line2194,line2207,line2218
! eliminated_buses=2185,2195,2208

New Line._virtual_line2199_line2211_line2222_line2233_line2243_line2253_line2262_line2270_line2277_line2282_line2286_line2290_line2294 bus1=2189.1.2.3.4 bus2=2295.1.2.3.4 phases=4 linecode=LC2 length=8.896898 units=m
! reduced_from=line2199,line2211,line2222,line2233,line2243,line2253,line2262,line2270,line2277,line2282,line2286,line2290,line2294
! eliminated_buses=2200,2212,2223,2234,2244,2254,2263,2271,2278,2283,2287,2291

New Line._virtual_line2200_line2212_line2223_line2234_line2244_line2254_line2263_line2271_line2278_line2283_line2287_line2291_line2295_line2305 bus1=2306.1.2.3.4 bus2=2189.1.2.3.4 phases=4 linecode=LC2 length=22.99845 units=m
! reduced_from=line2200,line2212,line2223,line2234,line2244,line2254,line2263,line2271,line2278,line2283,line2287,line2291,line2295,line2305
! eliminated_buses=2201,2213,2224,2235,2245,2255,2264,2272,2279,2284,2288,2292,2296

New Line._virtual_line2229_line2239_line2249_line2258_line2267 bus1=2268.1.2.3.4 bus2=2219.1.2.3.4 phases=4 linecode=LC8 length=2.73507 units=m
! reduced_from=line2229,line2239,line2249,line2258,line2267
! eliminated_buses=2230,2240,2250,2259

New Line.LINE115 bus1=111.1.2.3.4 bus2=116.1.2.3.4 phases=4 linecode=LC1 length=7.4766 units=m

New Line.LINE191 bus1=190.1.2.3.4 bus2=192.1.2.3.4 phases=4 linecode=LC1 length=10.5952 units=m

New Line.LINE410 bus1=406.1.2.3.4 bus2=411.1.2.3.4 phases=4 linecode=LC1 length=11.462 units=m

New Line.LINE411 bus1=406.1.2.3.4 bus2=412.1.2.3.4 phases=4 linecode=LC8 length=1.6131 units=m

New Line.LINE477 bus1=468.1.2.3.4 bus2=478.1.2.3.4 phases=4 linecode=LC1 length=13.8201 units=m

New Line.LINE499 bus1=490.1.2.3.4 bus2=500.1.2.3.4 phases=4 linecode=LC1 length=13.9586 units=m

New Line.LINE538 bus1=531.1.2.3.4 bus2=539.1.2.3.4 phases=4 linecode=LC3 length=5.0749 units=m

New Line.LINE539 bus1=531.1.2.3.4 bus2=540.1.2.3.4 phases=4 linecode=LC3 length=3.9898 units=m

New Line.LINE545 bus1=540.1.2.3.4 bus2=546.1.2.3.4 phases=4 linecode=LC3 length=5.368 units=m

New Line.LINE560 bus1=554.1.2.3.4 bus2=561.1.2.3.4 phases=4 linecode=LC3 length=4.7603 units=m

New Line.LINE561 bus1=554.1.2.3.4 bus2=562.1.2.3.4 phases=4 linecode=LC3 length=3.9973 units=m

New Line.LINE568 bus1=562.1.2.3.4 bus2=569.1.2.3.4 phases=4 linecode=LC3 length=4.9223 units=m

New Line.LINE572 bus1=564.1.2.3.4 bus2=573.1.2.3.4 phases=4 linecode=LC8 length=5.7868 units=m

New Line.LINE736 bus1=729.1.2.3.4 bus2=737.1.2.3.4 phases=4 linecode=LC1 length=8.518 units=m

New Line.LINE773 bus1=766.1.2.3.4 bus2=774.1.2.3.4 phases=4 linecode=LC1 length=10.127 units=m

New Line.LINE797 bus1=790.1.2.3.4 bus2=798.1.2.3.4 phases=4 linecode=LC1 length=16.8978 units=m

New Line.LINE798 bus1=790.1.2.3.4 bus2=799.1.2.3.4 phases=4 linecode=LC9 length=3.0638 units=m

New Line.LINE808 bus1=799.1.2.3.4 bus2=809.1.2.3.4 phases=4 linecode=LC1 length=15.0613 units=m

New Line.LINE829 bus1=818.1.2.3.4 bus2=830.1.2.3.4 phases=4 linecode=LC1 length=9.34 units=m

New Line.LINE1036 bus1=1025.1.2.3.4 bus2=1037.1.2.3.4 phases=4 linecode=LC1 length=32.1266 units=m

New Line.LINE1126 bus1=1106.1.2.3.4 bus2=1127.1.2.3.4 phases=4 linecode=LC1 length=23.2493 units=m

New Line.LINE1127 bus1=1106.1.2.3.4 bus2=1128.1.2.3.4 phases=4 linecode=LC1 length=23.2493 units=m

New Line.LINE1128 bus1=1106.1.2.3.4 bus2=1129.1.2.3.4 phases=4 linecode=LC1 length=23.2493 units=m

New Line.LINE1438 bus1=1416.1.2.3.4 bus2=1439.1.2.3.4 phases=4 linecode=LC9 length=12.49 units=m

New Line.LINE1468 bus1=1444.1.2.3.4 bus2=1469.1.2.3.4 phases=4 linecode=LC1 length=4.0795 units=m

New Line.LINE1637 bus1=1607.1.2.3.4 bus2=1638.1.2.3.4 phases=4 linecode=LC1 length=6.6853 units=m

New Line.LINE1718 bus1=1693.1.2.3.4 bus2=1719.1.2.3.4 phases=4 linecode=LC2 length=12.4172 units=m

New Line.LINE1719 bus1=1693.1.2.3.4 bus2=1720.1.2.3.4 phases=4 linecode=LC2 length=3.4097 units=m

New Line.LINE1896 bus1=1877.1.2.3.4 bus2=1897.1.2.3.4 phases=4 linecode=LC1 length=0.13153 units=m

New Line.LINE1917 bus1=1900.1.2.3.4 bus2=1918.1.2.3.4 phases=4 linecode=LC2 length=6.1529 units=m

New Line.LINE1918 bus1=1900.1.2.3.4 bus2=1919.1.2.3.4 phases=4 linecode=LC2 length=3.9343 units=m

New Line.LINE1979 bus1=1967.1.2.3.4 bus2=1980.1.2.3.4 phases=4 linecode=LC1 length=13.5328 units=m

New Line.LINE1980 bus1=1967.1.2.3.4 bus2=1981.1.2.3.4 phases=4 linecode=LC1 length=13.5328 units=m

New Line.LINE1981 bus1=1967.1.2.3.4 bus2=1982.1.2.3.4 phases=4 linecode=LC1 length=13.5328 units=m

New Line.LINE1982 bus1=1967.1.2.3.4 bus2=1983.1.2.3.4 phases=4 linecode=LC1 length=13.5328 units=m

New Line.LINE2183 bus1=2173.1.2.3.4 bus2=2184.1.2.3.4 phases=4 linecode=LC1 length=2.1622 units=m

New Line.LINE2228 bus1=2219.1.2.3.4 bus2=2229.1.2.3.4 phases=4 linecode=LC1 length=3.0384 units=m

New Line.LINE2275 bus1=2268.1.2.3.4 bus2=2276.1.2.3.4 phases=4 linecode=LC1 length=4.3533 units=m

New Line.LINE2298 bus1=2295.1.2.3.4 bus2=2299.1.2.3.4 phases=4 linecode=LC2 length=6.452 units=m

New Line.LINE2299 bus1=2295.1.2.3.4 bus2=2300.1.2.3.4 phases=4 linecode=LC2 length=6.452 units=m

New Line.LINE2300 bus1=2295.1.2.3.4 bus2=2301.1.2.3.4 phases=4 linecode=LC2 length=6.452 units=m

New Line.LINE2301 bus1=2295.1.2.3.4 bus2=2302.1.2.3.4 phases=4 linecode=LC2 length=6.452 units=m

New Line.LINE2302 bus1=2295.1.2.3.4 bus2=2303.1.2.3.4 phases=4 linecode=LC2 length=6.452 units=m

New Line.LINE2303 bus1=2295.1.2.3.4 bus2=2304.1.2.3.4 phases=4 linecode=LC2 length=6.452 units=m

New Line.LINE2304 bus1=2295.1.2.3.4 bus2=2305.1.2.3.4 phases=4 linecode=LC2 length=6.452 units=m
