! Reduced enabled lines.

New Line._virtual_line0_line1_line3_line5_line7_line9_line11_line13_line15_line17_line19_line21_line23_line25_line27_line29_line31_line33_line35_line37_line39_line41_line43_line45_line47_line49_line51_line53_line55_line57_line59_line61_line63_line65_line68_line71_line74_line77_line79_line81_line83_line85_line87_line90 bus1=sourcebus.1.2.3.4 bus2=91.1.2.3.4 phases=4 linecode=LC8 length=51.834732 units=m
! reduced_from=line0,line1,line3,line5,line7,line9,line11,line13,line15,line17,line19,line21,line23,line25,line27,line29,line31,line33,line35,line37,line39,line41,line43,line45,line47,line49,line51,line53,line55,line57,line59,line61,line63,line65,line68,line71,line74,line77,line79,line81,line83,line85,line87,line90
! eliminated_buses=1,2,4,6,8,10,12,14,16,18,20,22,24,26,28,30,32,34,36,38,40,42,44,46,48,50,52,54,56,58,60,62,64,66,69,72,75,78,80,82,84,86,88

New Line.LINE92 bus1=91.1.2.3.4 bus2=93.1.2.3.4 phases=4 linecode=LC1 length=17.8582 units=m

New Line.LINE93 bus1=91.1.2.3.4 bus2=94.1.2.3.4 phases=4 linecode=LC1 length=17.8582 units=m

New Line.LINE94 bus1=91.1.2.3.4 bus2=95.1.2.3.4 phases=4 linecode=LC1 length=17.8582 units=m

New Line.LINE95 bus1=91.1.2.3.4 bus2=96.1.2.3.4 phases=4 linecode=LC1 length=17.8582 units=m

New Line.LINE96 bus1=91.1.2.3.4 bus2=97.1.2.3.4 phases=4 linecode=LC1 length=17.8582 units=m

New Line.LINE97 bus1=91.1.2.3.4 bus2=98.1.2.3.4 phases=4 linecode=LC1 length=17.8582 units=m

New Line.LINE98 bus1=91.1.2.3.4 bus2=99.1.2.3.4 phases=4 linecode=LC1 length=17.8582 units=m

New Line.LINE99 bus1=91.1.2.3.4 bus2=100.1.2.3.4 phases=4 linecode=LC1 length=17.8582 units=m

New Line.LINE100 bus1=91.1.2.3.4 bus2=101.1.2.3.4 phases=4 linecode=LC1 length=17.8582 units=m

New Line.LINE101 bus1=91.1.2.3.4 bus2=102.1.2.3.4 phases=4 linecode=LC1 length=17.8582 units=m

New Line.LINE102 bus1=91.1.2.3.4 bus2=103.1.2.3.4 phases=4 linecode=LC1 length=17.8582 units=m

New Line.LINE103 bus1=91.1.2.3.4 bus2=104.1.2.3.4 phases=4 linecode=LC1 length=17.8582 units=m

New Line.LINE104 bus1=91.1.2.3.4 bus2=105.1.2.3.4 phases=4 linecode=LC1 length=17.8582 units=m

New Line.LINE105 bus1=91.1.2.3.4 bus2=106.1.2.3.4 phases=4 linecode=LC1 length=17.8582 units=m

New Line.LINE106 bus1=91.1.2.3.4 bus2=107.1.2.3.4 phases=4 linecode=LC1 length=17.8582 units=m

New Line.LINE107 bus1=91.1.2.3.4 bus2=108.1.2.3.4 phases=4 linecode=LC1 length=17.8582 units=m

New Line.LINE108 bus1=91.1.2.3.4 bus2=109.1.2.3.4 phases=4 linecode=LC1 length=17.8582 units=m

New Line.LINE109 bus1=91.1.2.3.4 bus2=110.1.2.3.4 phases=4 linecode=LC1 length=17.8582 units=m

New Line.LINE110 bus1=91.1.2.3.4 bus2=111.1.2.3.4 phases=4 linecode=LC1 length=17.8582 units=m

New Line.LINE111 bus1=91.1.2.3.4 bus2=112.1.2.3.4 phases=4 linecode=LC1 length=17.8582 units=m

New Line.LINE112 bus1=91.1.2.3.4 bus2=113.1.2.3.4 phases=4 linecode=LC1 length=17.8582 units=m

New Line.LINE113 bus1=91.1.2.3.4 bus2=114.1.2.3.4 phases=4 linecode=LC1 length=17.8582 units=m

New Line.LINE114 bus1=91.1.2.3.4 bus2=115.1.2.3.4 phases=4 linecode=LC1 length=17.8582 units=m

New Line.LINE115 bus1=91.1.2.3.4 bus2=116.1.2.3.4 phases=4 linecode=LC1 length=17.8582 units=m

New Line.LINE116 bus1=91.1.2.3.4 bus2=117.1.2.3.4 phases=4 linecode=LC1 length=17.8582 units=m

New Line.LINE117 bus1=91.1.2.3.4 bus2=118.1.2.3.4 phases=4 linecode=LC1 length=17.8582 units=m

New Line.LINE118 bus1=91.1.2.3.4 bus2=119.1.2.3.4 phases=4 linecode=LC1 length=17.8582 units=m

New Line.LINE120 bus1=93.1.2.3.4 bus2=121.1.2.3.4 phases=4 linecode=LC1 length=16.2048 units=m

New Line.LINE121 bus1=93.1.2.3.4 bus2=122.1.2.3.4 phases=4 linecode=LC1 length=16.2048 units=m

New Line.LINE122 bus1=93.1.2.3.4 bus2=123.1.2.3.4 phases=4 linecode=LC1 length=16.2048 units=m

New Line.LINE123 bus1=93.1.2.3.4 bus2=124.1.2.3.4 phases=4 linecode=LC1 length=16.2048 units=m

New Line.LINE124 bus1=93.1.2.3.4 bus2=125.1.2.3.4 phases=4 linecode=LC1 length=16.2048 units=m

New Line.LINE125 bus1=93.1.2.3.4 bus2=126.1.2.3.4 phases=4 linecode=LC1 length=16.2048 units=m

New Line.LINE126 bus1=93.1.2.3.4 bus2=127.1.2.3.4 phases=4 linecode=LC1 length=16.2048 units=m

New Line.LINE127 bus1=93.1.2.3.4 bus2=128.1.2.3.4 phases=4 linecode=LC1 length=16.2048 units=m

New Line.LINE128 bus1=93.1.2.3.4 bus2=129.1.2.3.4 phases=4 linecode=LC1 length=16.2048 units=m

New Line.LINE129 bus1=93.1.2.3.4 bus2=130.1.2.3.4 phases=4 linecode=LC1 length=16.2048 units=m

New Line.LINE130 bus1=93.1.2.3.4 bus2=131.1.2.3.4 phases=4 linecode=LC1 length=16.2048 units=m

New Line.LINE131 bus1=93.1.2.3.4 bus2=132.1.2.3.4 phases=4 linecode=LC1 length=16.2048 units=m

New Line.LINE132 bus1=93.1.2.3.4 bus2=133.1.2.3.4 phases=4 linecode=LC1 length=16.2048 units=m

New Line.LINE133 bus1=93.1.2.3.4 bus2=134.1.2.3.4 phases=4 linecode=LC1 length=16.2048 units=m

New Line.LINE134 bus1=93.1.2.3.4 bus2=135.1.2.3.4 phases=4 linecode=LC1 length=16.2048 units=m

New Line.LINE135 bus1=93.1.2.3.4 bus2=136.1.2.3.4 phases=4 linecode=LC1 length=16.2048 units=m

New Line.LINE136 bus1=93.1.2.3.4 bus2=137.1.2.3.4 phases=4 linecode=LC1 length=16.2048 units=m

New Line.LINE137 bus1=93.1.2.3.4 bus2=138.1.2.3.4 phases=4 linecode=LC1 length=16.2048 units=m

New Line.LINE138 bus1=93.1.2.3.4 bus2=139.1.2.3.4 phases=4 linecode=LC1 length=16.2048 units=m

New Line.LINE139 bus1=93.1.2.3.4 bus2=140.1.2.3.4 phases=4 linecode=LC1 length=16.2048 units=m

New Line.LINE140 bus1=93.1.2.3.4 bus2=141.1.2.3.4 phases=4 linecode=LC1 length=16.2048 units=m

New Line.LINE141 bus1=93.1.2.3.4 bus2=142.1.2.3.4 phases=4 linecode=LC1 length=16.2048 units=m

New Line.LINE142 bus1=93.1.2.3.4 bus2=143.1.2.3.4 phases=4 linecode=LC1 length=16.2048 units=m

New Line.LINE143 bus1=93.1.2.3.4 bus2=144.1.2.3.4 phases=4 linecode=LC1 length=16.2048 units=m

New Line.LINE144 bus1=93.1.2.3.4 bus2=145.1.2.3.4 phases=4 linecode=LC1 length=16.2048 units=m

New Line.LINE145 bus1=93.1.2.3.4 bus2=146.1.2.3.4 phases=4 linecode=LC1 length=16.2048 units=m

New Line.LINE146 bus1=93.1.2.3.4 bus2=147.1.2.3.4 phases=4 linecode=LC1 length=16.2048 units=m

New Line.LINE147 bus1=93.1.2.3.4 bus2=148.1.2.3.4 phases=4 linecode=LC1 length=16.2048 units=m

New Line.LINE148 bus1=93.1.2.3.4 bus2=149.1.2.3.4 phases=4 linecode=LC1 length=16.2048 units=m

New Line.LINE149 bus1=93.1.2.3.4 bus2=150.1.2.3.4 phases=4 linecode=LC1 length=16.2048 units=m

New Line.LINE150 bus1=93.1.2.3.4 bus2=151.1.2.3.4 phases=4 linecode=LC1 length=16.2048 units=m

New Line.LINE151 bus1=93.1.2.3.4 bus2=152.1.2.3.4 phases=4 linecode=LC1 length=16.2048 units=m

New Line.LINE153 bus1=121.1.2.3.4 bus2=154.1.2.3.4 phases=4 linecode=LC1 length=16.6648 units=m
