! Reduced enabled lines.

New Line._virtual_line0_line1_line2_line3_line4_line5_line6_line7_line8_line9_line10_line11_line12_line13_line14_line15_line16_line17_line18_line19_line20_line21_line22_line23_line24_line25_line26_line27 bus1=sourcebus.1.2.3.4 bus2=28.1.2.3.4 phases=4 linecode=LC8 length=20.411215 units=m
! reduced_from=line0,line1,line2,line3,line4,line5,line6,line7,line8,line9,line10,line11,line12,line13,line14,line15,line16,line17,line18,line19,line20,line21,line22,line23,line24,line25,line26,line27
! eliminated_buses=1,2,3,4,5,6,7,8,9,10,11,12,13,14,15,16,17,18,19,20,21,22,23,24,25,26,27

New Line._virtual_line28_line30_line32_line36_line43_line49_line55_line61_line67 bus1=28.1.2.3.4 bus2=68.1.2.3.4 phases=4 linecode=LC2 length=10.44867 units=m
! reduced_from=line28,line30,line32,line36,line43,line49,line55,line61,line67
! eliminated_buses=29,31,33,37,44,50,56,62

New Line._virtual_line29_line31 bus1=32.1.2.3.4 bus2=28.1.2.3.4 phases=4 linecode=LC8 length=3.1009 units=m
! reduced_from=line29,line31
! eliminated_buses=30

New Line._virtual_line34_line38_line45_line51_line57_line63 bus1=64.1.2.3.4 bus2=32.1.2.3.4 phases=4 linecode=LC8 length=12.70022 units=m
! reduced_from=line34,line38,line45,line51,line57,line63
! eliminated_buses=35,39,46,52,58

New Line._virtual_line41_line47_line53_line59_line65_line72_line77_line82 bus1=36.1.2.3.4 bus2=83.1.2.3.4 phases=4 linecode=LC2 length=9.50959 units=m
! reduced_from=line41,line47,line53,line59,line65,line72,line77,line82
! eliminated_buses=42,48,54,60,66,73,78

New Line._virtual_line69_line74_line79_line83_line86_line89_line92_line95_line98_line100 bus1=101.1.2.3.4 bus2=64.1.2.3.4 phases=4 linecode=LC8 length=11.801441 units=m
! reduced_from=line69,line74,line79,line83,line86,line89,line92,line95,line98,line100
! eliminated_buses=70,75,80,84,87,90,93,96,99

New Line._virtual_line70_line76_line81_line85_line88_line91_line94_line97 bus1=64.1.2.3.4 bus2=98.1.2.3.4 phases=4 linecode=LC2 length=10.53809 units=m
! reduced_from=line70,line76,line81,line85,line88,line91,line94,line97
! eliminated_buses=71,77,82,86,89,92,95

New Line._virtual_line102_line105_line108_line111_line114_line117_line120_line123_line126 bus1=127.1.2.3.4 bus2=101.1.2.3.4 phases=4 linecode=LC8 length=12.1717 units=m
! reduced_from=line102,line105,line108,line111,line114,line117,line120,line123,line126
! eliminated_buses=103,106,109,112,115,118,121,124

New Line._virtual_line130_line134_line138_line140_line142 bus1=143.1.2.3.4 bus2=129.1.2.3.4 phases=4 linecode=LC8 length=10.89659 units=m
! reduced_from=line130,line134,line138,line140,line142
! eliminated_buses=131,135,139,141

New Line._virtual_line146_line152 bus1=145.1.2.3.4 bus2=153.1.2.3.4 phases=4 linecode=LC8 length=5.69663 units=m
! reduced_from=line146,line152
! eliminated_buses=147

New Line._virtual_line147_line154_line161_line167_line173_line179_line186_line192_line198_line204_line210_line219_line227_line235_line243_line251_line259_line267_line275_line283_line291_line299_line310_line317_line324_line331_line338_line344_line350_line356_line362_line368_line374_line380_line386_line391_line396_line402_line407_line412_line417_line422_line427_line434_line441_line449_line457_line466_line475_line485_line496_line507_line518_line531_line542_line553_line567_line582_line598_line612_line626_line638_line650_line663_line673_line682_line690_line700 bus1=701.1.2.3.4 bus2=145.1.2.3.4 phases=4 linecode=LC2 length=25.631106 units=m
! reduced_from=line147,line154,line161,line167,line173,line179,line186,line192,line198,line204,line210,line219,line227,line235,line243,line251,line259,line267,line275,line283,line291,line299,line310,line317,line324,line331,line338,line344,line350,line356,line362,line368,line374,line380,line386,line391,line396,line402,line407,line412,line417,line422,line427,line434,line441,line449,line457,line466,line475,line485,line496,line507,line518,line531,line542,line553,line567,line582,line598,line612,line626,line638,line650,line663,line673,line682,line690,line700
! eliminated_buses=148,155,162,168,174,180,187,193,199,205,211,220,228,236,244,252,260,268,276,284,292,300,311,318,325,332,339,345,351,357,363,369,375,381,387,392,397,403,408,413,418,423,428,435,442,450,458,467,476,486,497,508,519,532,543,554,568,583,599,613,627,639,651,664,674,683,691

New Line._virtual_line151_line156_line163_line169_line175_line181_line188_line194_line200_line206_line212_line221_line229_line237_line245_line253_line261_line269_line277_line285_line293_line301_line312_line319_line326_line333_line340_line346_line352_line358_line364_line370_line376_line382_line388_line393_line398_line404_line409_line414_line419_line424_line429_line436_line443_line451_line459_line468_line477_line487_line498_line509 bus1=510.1.2.3.4 bus2=146.1.2.3.4 phases=4 linecode=LC2 length=22.46335 units=m
! reduced_from=line151,line156,line163,line169,line175,line181,line188,line194,line200,line206,line212,line221,line229,line237,line245,line253,line261,line269,line277,line285,line293,line301,line312,line319,line326,line333,line340,line346,line352,line358,line364,line370,line376,line382,line388,line393,line398,line404,line409,line414,line419,line424,line429,line436,line443,line451,line459,line468,line477,line487,line498,line509
! eliminated_buses=152,157,164,170,176,182,189,195,201,207,213,222,230,238,246,254,262,270,278,286,294,302,313,320,327,334,341,347,353,359,365,371,377,383,389,394,399,405,410,415,420,425,430,437,444,452,460,469,478,488,499

New Line._virtual_line157_line164_line170_line176 bus1=153.1.2.3.4 bus2=177.1.2.3.4 phases=4 linecode=LC8 length=8.8626 units=m
! reduced_from=line157,line164,line170,line176
! eliminated_buses=158,165,171

New Line._virtual_line160_line166_line172_line178_line185_line191_line197_line203_line209_line218_line226_line234_line242_line250_line258_line266_line274_line282_line290_line298 bus1=153.1.2.3.4 bus2=299.1.2.3.4 phases=4 linecode=LC2 length=12.302615 units=m
! reduced_from=line160,line166,line172,line178,line185,line191,line197,line203,line209,line218,line226,line234,line242,line250,line258,line266,line274,line282,line290,line298
! eliminated_buses=161,167,173,179,186,192,198,204,210,219,227,235,243,251,259,267,275,283,291

New Line._virtual_line183_line189_line195_line201_line207 bus1=177.1.2.3.4 bus2=208.1.2.3.4 phases=4 linecode=LC8 length=8.19899 units=m
! reduced_from=line183,line189,line195,line201,line207
! eliminated_buses=184,190,196,202

New Line._virtual_line213_line222_line230_line238_line246_line254_line262_line270_line278_line286_line294_line302_line313_line320_line327_line334_line341_line347_line353_line359_line365_line371 bus1=208.1.2.3.4 bus2=372.1.2.3.4 phases=4 linecode=LC8 length=10.795776 units=m
! reduced_from=line213,line222,line230,line238,line246,line254,line262,line270,line278,line286,line294,line302,line313,line320,line327,line334,line341,line347,line353,line359,line365,line371
! eliminated_buses=214,223,231,239,247,255,263,271,279,287,295,303,314,321,328,335,342,348,354,360,366

New Line._virtual_line215_line224_line232_line240_line248_line256_line264_line272_line280_line288_line296_line304_line315_line322_line329_line336_line343_line349_line355_line361_line367_line373_line379_line385 bus1=386.1.2.3.4 bus2=208.1.2.3.4 phases=4 linecode=LC2 length=19.730584 units=m
! reduced_from=line215,line224,line232,line240,line248,line256,line264,line272,line280,line288,line296,line304,line315,line322,line329,line336,line343,line349,line355,line361,line367,line373,line379,line385
! eliminated_buses=216,225,233,241,249,257,265,273,281,289,297,305,316,323,330,337,344,350,356,362,368,374,380

New Line._virtual_line216_line225_line233_line241_line249_line257_line265_line273_line281_line289_line297_line305_line316_line323_line330_line337 bus1=208.1.2.3.4 bus2=338.1.2.3.4 phases=4 linecode=LC2 length=19.56731 units=m
! reduced_from=line216,line225,line233,line241,line249,line257,line265,line273,line281,line289,line297,line305,line316,line323,line330,line337
! eliminated_buses=217,226,234,242,250,258,266,274,282,290,298,306,317,324,331

New Line._virtual_line377_line383_line389_line394_line399_line405_line410_line415_line420_line425_line430_line437_line444_line452_line460_line469 bus1=372.1.2.3.4 bus2=470.1.2.3.4 phases=4 linecode=LC8 length=12.18538 units=m
! reduced_from=line377,line383,line389,line394,line399,line405,line410,line415,line420,line425,line430,line437,line444,line452,line460,line469
! eliminated_buses=378,384,390,395,400,406,411,416,421,426,431,438,445,453,461

New Line._virtual_line378_line384_line390_line395 bus1=396.1.2.3.4 bus2=372.1.2.3.4 phases=4 linecode=LC8 length=6.36369 units=m
! reduced_from=line378,line384,line390,line395
! eliminated_buses=379,385,391

New Line._virtual_line401_line406_line411_line416_line421_line426 bus1=396.1.2.3.4 bus2=427.1.2.3.4 phases=4 linecode=LC8 length=12.78658 units=m
! reduced_from=line401,line406,line411,line416,line421,line426
! eliminated_buses=402,407,412,417,422

New Line._virtual_line431_line438 bus1=427.1.2.3.4 bus2=439.1.2.3.4 phases=4 linecode=LC8 length=7.1072 units=m
! reduced_from=line431,line438
! eliminated_buses=432

New Line._virtual_line432_line439_line447_line455_line464_line473_line483_line494_line505_line516_line529_line540_line551_line565_line580_line596_line611 bus1=612.1.2.3.4 bus2=427.1.2.3.4 phases=4 linecode=LC2 length=13.948708 units=m
! reduced_from=line432,line439,line447,line455,line464,line473,line483,line494,line505,line516,line529,line540,line551,line565,line580,line596,line611
! eliminated_buses=433,440,448,456,465,474,484,495,506,517,530,541,552,566,581,597

New Line._virtual_line433_line440_line448_line456_line465_line474_line484_line495_line506_line517_line530_line541_line552_line566_line581_line597 bus1=427.1.2.3.4 bus2=598.1.2.3.4 phases=4 linecode=LC2 length=19.518154 units=m
! reduced_from=line433,line440,line448,line456,line465,line474,line484,line495,line506,line517,line530,line541,line552,line566,line581,line597
! eliminated_buses=434,441,449,457,466,475,485,496,507,518,531,542,553,567,582

New Line._virtual_line445_line453 bus1=454.1.2.3.4 bus2=439.1.2.3.4 phases=4 linecode=LC8 length=7.381 units=m
! reduced_from=line445,line453
! eliminated_buses=446

New Line._virtual_line446_line454_line463_line472_line482_line493_line504_line515_line528_line539_line550_line564_line579 bus1=439.1.2.3.4 bus2=580.1.2.3.4 phases=4 linecode=LC2 length=11.027509 units=m
! reduced_from=line446,line454,line463,line472,line482,line493,line504,line515,line528,line539,line550,line564,line579
! eliminated_buses=447,455,464,473,483,494,505,516,529,540,551,565

New Line._virtual_line461_line470_line480 bus1=481.1.2.3.4 bus2=454.1.2.3.4 phases=4 linecode=LC8 length=9.6415 units=m
! reduced_from=line461,line470,line480
! eliminated_buses=462,471

New Line._virtual_line462_line471_line481_line492_line503_line514_line527_line538_line549_line563_line578_line593_line610_line623_line637_line649 bus1=650.1.2.3.4 bus2=454.1.2.3.4 phases=4 linecode=LC2 length=16.890857 units=m
! reduced_from=line462,line471,line481,line492,line503,line514,line527,line538,line549,line563,line578,line593,line610,line623,line637,line649
! eliminated_buses=463,472,482,493,504,515,528,539,550,564,579,594,611,624,638

New Line._virtual_line478_line488_line499_line510_line523_line533_line544 bus1=470.1.2.3.4 bus2=545.1.2.3.4 phases=4 linecode=LC8 length=1.600844 units=m
! reduced_from=line478,line488,line499,line510,line523,line533,line544
! eliminated_buses=479,489,500,511,524,534

New Line._virtual_line479_line489_line500_line511_line524_line534_line545_line558_line572_line587_line603_line617_line631_line643_line656_line667_line677_line686_line694_line703_line711 bus1=712.1.2.3.4 bus2=470.1.2.3.4 phases=4 linecode=LC2 length=16.624518 units=m
! reduced_from=line479,line489,line500,line511,line524,line534,line545,line558,line572,line587,line603,line617,line631,line643,line656,line667,line677,line686,line694,line703,line711
! eliminated_buses=480,490,501,512,525,535,546,559,573,588,604,618,632,644,657,668,678,687,695,704

New Line._virtual_line490_line501_line512_line525 bus1=481.1.2.3.4 bus2=526.1.2.3.4 phases=4 linecode=LC8 length=9.5101 units=m
! reduced_from=line490,line501,line512,line525
! eliminated_buses=491,502,513

New Line._virtual_line491_line502_line513_line526_line537_line548_line562_line577_line592_line609_line622_line636_line648_line662_line672 bus1=481.1.2.3.4 bus2=673.1.2.3.4 phases=4 linecode=LC2 length=17.687284 units=m
! reduced_from=line491,line502,line513,line526,line537,line548,line562,line577,line592,line609,line622,line636,line648,line662,line672
! eliminated_buses=492,503,514,527,538,549,563,578,593,610,623,637,649,663

New Line._virtual_line535_line546 bus1=526.1.2.3.4 bus2=547.1.2.3.4 phases=4 linecode=LC8 length=3.9025 units=m
! reduced_from=line535,line546
! eliminated_buses=536

New Line._virtual_line536_line547_line561_line576_line591_line608_line621_line635_line647_line661_line671_line681_line689_line699_line708_line716_line725 bus1=726.1.2.3.4 bus2=526.1.2.3.4 phases=4 linecode=LC2 length=17.9127 units=m
! reduced_from=line536,line547,line561,line576,line591,line608,line621,line635,line647,line661,line671,line681,line689,line699,line708,line716,line725
! eliminated_buses=537,548,562,577,592,609,622,636,648,662,672,682,690,700,709,717

New Line._virtual_line555_line569_line584_line600_line614_line628_line640_line652_line665_line675_line684_line692_line701_line709_line717_line726_line734_line742_line750_line758_line767_line778_line789_line801_line813_line824_line835_line847_line858_line869_line879 bus1=545.1.2.3.4 bus2=880.1.2.3.4 phases=4 linecode=LC2 length=26.31733 units=m
! reduced_from=line555,line569,line584,line600,line614,line628,line640,line652,line665,line675,line684,line692,line701,line709,line717,line726,line734,line742,line750,line758,line767,line778,line789,line801,line813,line824,line835,line847,line858,line869,line879
! eliminated_buses=556,570,585,601,615,629,641,653,666,676,685,693,702,710,718,727,735,743,751,759,768,779,790,802,814,825,836,848,859,870

New Line._virtual_line556_line570_line585_line601_line615_line629_line641 bus1=642.1.2.3.4 bus2=545.1.2.3.4 phases=4 linecode=LC2 length=14.23111 units=m
! reduced_from=line556,line570,line585,line601,line615,line629,line641
! eliminated_buses=557,571,586,602,616,630

New Line._virtual_line557_line571_line586_line602_line616_line630_line642_line655_line666_line676_line685_line693_line702_line710_line718_line727_line735_line743 bus1=744.1.2.3.4 bus2=545.1.2.3.4 phases=4 linecode=LC8 length=32.5888 units=m
! reduced_from=line557,line571,line586,line602,line616,line630,line642,line655,line666,line676,line685,line693,line702,line710,line718,line727,line735,line743
! eliminated_buses=558,572,587,603,617,631,643,656,667,677,686,694,703,711,719,728,736

New Line._virtual_line573_line588 bus1=589.1.2.3.4 bus2=561.1.2.3.4 phases=4 linecode=LC8 length=2.16358 units=m
! reduced_from=line573,line588
! eliminated_buses=574

New Line._virtual_line574_line589_line606_line619_line633_line645_line659_line670_line680 bus1=561.1.2.3.4 bus2=681.1.2.3.4 phases=4 linecode=LC2 length=16.939174 units=m
! reduced_from=line574,line589,line606,line619,line633,line645,line659,line670,line680
! eliminated_buses=575,590,607,620,634,646,660,671

New Line._virtual_line605_line618_line632_line644 bus1=589.1.2.3.4 bus2=645.1.2.3.4 phases=4 linecode=LC8 length=9.1873 units=m
! reduced_from=line605,line618,line632,line644
! eliminated_buses=606,619,633

New Line._virtual_line657_line668_line678_line687 bus1=688.1.2.3.4 bus2=645.1.2.3.4 phases=4 linecode=LC8 length=9.1021 units=m
! reduced_from=line657,line668,line678,line687
! eliminated_buses=658,669,679

New Line._virtual_line658_line669_line679_line688_line698_line707_line715_line724_line733_line741_line749_line757_line766_line777_line788_line800_line812_line823_line834_line846_line857_line868_line878_line887_line896_line905 bus1=645.1.2.3.4 bus2=906.1.2.3.4 phases=4 linecode=LC2 length=19.179393 units=m
! reduced_from=line658,line669,line679,line688,line698,line707,line715,line724,line733,line741,line749,line757,line766,line777,line788,line800,line812,line823,line834,line846,line857,line868,line878,line887,line896,line905
! eliminated_buses=659,670,680,689,699,708,716,725,734,742,750,758,767,778,789,801,813,824,835,847,858,869,879,888,897

New Line._virtual_line695_line704_line712 bus1=713.1.2.3.4 bus2=688.1.2.3.4 phases=4 linecode=LC8 length=8.0999 units=m
! reduced_from=line695,line704,line712
! eliminated_buses=696,705

New Line._virtual_line696_line705_line713_line722_line731_line739_line747_line756_line765_line776_line787_line799_line811 bus1=812.1.2.3.4 bus2=688.1.2.3.4 phases=4 linecode=LC2 length=16.078906 units=m
! reduced_from=line696,line705,line713,line722,line731,line739,line747,line756,line765,line776,line787,line799,line811
! eliminated_buses=697,706,714,723,732,740,748,757,766,777,788,800

New Line._virtual_line697_line706_line714_line723_line732_line740_line748 bus1=749.1.2.3.4 bus2=688.1.2.3.4 phases=4 linecode=LC2 length=15.617014 units=m
! reduced_from=line697,line706,line714,line723,line732,line740,line748
! eliminated_buses=698,707,715,724,733,741

New Line._virtual_line719_line728_line736_line744_line753_line762 bus1=713.1.2.3.4 bus2=763.1.2.3.4 phases=4 linecode=LC8 length=10.69192 units=m
! reduced_from=line719,line728,line736,line744,line753,line762
! eliminated_buses=720,729,737,745,754

New Line._virtual_line720_line729_line737_line745_line754_line763_line774_line785_line797_line809_line821_line832_line844_line855_line866 bus1=713.1.2.3.4 bus2=867.1.2.3.4 phases=4 linecode=LC2 length=17.11876 units=m
! reduced_from=line720,line729,line737,line745,line754,line763,line774,line785,line797,line809,line821,line832,line844,line855,line866
! eliminated_buses=721,730,738,746,755,764,775,786,798,810,822,833,845,856

New Line._virtual_line721_line730_line738_line746_line755_line764_line775_line786_line798_line810_line822_line833_line845_line856_line867_line877 bus1=878.1.2.3.4 bus2=713.1.2.3.4 phases=4 linecode=LC2 length=14.437947 units=m
! reduced_from=line721,line730,line738,line746,line755,line764,line775,line786,line798,line810,line822,line833,line845,line856,line867,line877
! eliminated_buses=722,731,739,747,756,765,776,787,799,811,823,834,846,857,868

New Line._virtual_line751_line759_line768_line779_line791_line803_line815_line826_line837_line848_line859_line870_line880_line888_line897_line906_line914_line922_line930_line938_line948_line960_line972_line984_line996_line1008_line1020_line1034_line1047 bus1=744.1.2.3.4 bus2=1048.1.2.3.4 phases=4 linecode=LC5 length=13.928599 units=m
! reduced_from=line751,line759,line768,line779,line791,line803,line815,line826,line837,line848,line859,line870,line880,line888,line897,line906,line914,line922,line930,line938,line948,line960,line972,line984,line996,line1008,line1020,line1034,line1047
! eliminated_buses=752,760,769,780,792,804,816,827,838,849,860,871,881,889,898,907,915,923,931,939,949,961,973,985,997,1009,1021,1035

New Line._virtual_line752_line761_line770_line781_line793_line805_line817_line828_line840_line851_line862_line873_line883 bus1=744.1.2.3.4 bus2=884.1.2.3.4 phases=4 linecode=LC5 length=30.4157 units=m
! reduced_from=line752,line761,line770,line781,line793,line805,line817,line828,line840,line851,line862,line873,line883
! eliminated_buses=753,762,771,782,794,806,818,829,841,852,863,874

New Line._virtual_line771_line782_line794_line806_line818_line829_line841_line852_line863_line874_line884_line894_line903_line912_line920_line929_line937_line947_line959_line971_line983_line995_line1007_line1019 bus1=763.1.2.3.4 bus2=1020.1.2.3.4 phases=4 linecode=LC8 length=18.70931 units=m
! reduced_from=line771,line782,line794,line806,line818,line829,line841,line852,line863,line874,line884,line894,line903,line912,line920,line929,line937,line947,line959,line971,line983,line995,line1007,line1019
! eliminated_buses=772,783,795,807,819,830,842,853,864,875,885,895,904,913,921,930,938,948,960,972,984,996,1008

New Line._virtual_line772_line783_line795_line807_line819_line830_line842_line853_line864_line875_line885_line895_line904_line913_line921 bus1=763.1.2.3.4 bus2=922.1.2.3.4 phases=4 linecode=LC2 length=15.7351 units=m
! reduced_from=line772,line783,line795,line807,line819,line830,line842,line853,line864,line875,line885,line895,line904,line913,line921
! eliminated_buses=773,784,796,808,820,831,843,854,865,876,886,896,905,914

New Line._virtual_line773_line784_line796_line808_line820_line831_line843_line854_line865_line876_line886 bus1=887.1.2.3.4 bus2=763.1.2.3.4 phases=4 linecode=LC2 length=14.096408 units=m
! reduced_from=line773,line784,line796,line808,line820,line831,line843,line854,line865,line876,line886
! eliminated_buses=774,785,797,809,821,832,844,855,866,877

New Line._virtual_line891_line900_line909_line917_line924_line932_line940_line950_line962_line974_line986_line998_line1010_line1022_line1035_line1048_line1062_line1077_line1090_line1102_line1122_line1143_line1164_line1182_line1199_line1220_line1245_line1266_line1282_line1296 bus1=884.1.2.3.4 bus2=1297.1.2.3.4 phases=4 linecode=LC2 length=23.212143 units=m
! reduced_from=line891,line900,line909,line917,line924,line932,line940,line950,line962,line974,line986,line998,line1010,line1022,line1035,line1048,line1062,line1077,line1090,line1102,line1122,line1143,line1164,line1182,line1199,line1220,line1245,line1266,line1282,line1296
! eliminated_buses=892,901,910,918,925,933,941,951,963,975,987,999,1011,1023,1036,1049,1063,1078,1091,1103,1123,1144,1165,1183,1200,1221,1246,1267,1283

New Line._virtual_line892_line901_line910_line918_line925_line933_line941_line951_line963_line975_line987_line999_line1011_line1023_line1036_line1049_line1063_line1078_line1091_line1103_line1123_line1144 bus1=884.1.2.3.4 bus2=1145.1.2.3.4 phases=4 linecode=LC2 length=21.260021 units=m
! reduced_from=line892,line901,line910,line918,line925,line933,line941,line951,line963,line975,line987,line999,line1011,line1023,line1036,line1049,line1063,line1078,line1091,line1103,line1123,line1144
! eliminated_buses=893,902,911,919,926,934,942,952,964,976,988,1000,1012,1024,1037,1050,1064,1079,1092,1104,1124

New Line._virtual_line893_line902_line911_line919 bus1=884.1.2.3.4 bus2=920.1.2.3.4 phases=4 linecode=LC5 length=10.44002 units=m
! reduced_from=line893,line902,line911,line919
! eliminated_buses=894,903,912

New Line._virtual_line926_line934_line942_line952_line964_line976_line988_line1000_line1012_line1024_line1037_line1050_line1064 bus1=920.1.2.3.4 bus2=1065.1.2.3.4 phases=4 linecode=LC2 length=15.03012 units=m
! reduced_from=line926,line934,line942,line952,line964,line976,line988,line1000,line1012,line1024,line1037,line1050,line1064
! eliminated_buses=927,935,943,953,965,977,989,1001,1013,1025,1038,1051

New Line._virtual_line928_line936 bus1=937.1.2.3.4 bus2=920.1.2.3.4 phases=4 linecode=LC5 length=3.09705 units=m
! reduced_from=line928,line936
! eliminated_buses=929

New Line._virtual_line945_line955_line967_line979_line991_line1003_line1015_line1027_line1040_line1053_line1066_line1080_line1093_line1105_line1125_line1146_line1166_line1184_line1200 bus1=937.1.2.3.4 bus2=1201.1.2.3.4 phases=4 linecode=LC2 length=22.895078 units=m
! reduced_from=line945,line955,line967,line979,line991,line1003,line1015,line1027,line1040,line1053,line1066,line1080,line1093,line1105,line1125,line1146,line1166,line1184,line1200
! eliminated_buses=946,956,968,980,992,1004,1016,1028,1041,1054,1067,1081,1094,1106,1126,1147,1167,1185

New Line._virtual_line956_line968_line980_line992_line1004_line1016_line1028_line1041_line1054_line1067_line1081 bus1=1082.1.2.3.4 bus2=947.1.2.3.4 phases=4 linecode=LC2 length=24.863043 units=m
! reduced_from=line956,line968,line980,line992,line1004,line1016,line1028,line1041,line1054,line1067,line1081
! eliminated_buses=957,969,981,993,1005,1017,1029,1042,1055,1068

New Line._virtual_line958_line970_line982_line994_line1006_line1018_line1030_line1043_line1056_line1069_line1082_line1094_line1106_line1126_line1147_line1167_line1185 bus1=947.1.2.3.4 bus2=1186.1.2.3.4 phases=4 linecode=LC5 length=32.593361 units=m
! reduced_from=line958,line970,line982,line994,line1006,line1018,line1030,line1043,line1056,line1069,line1082,line1094,line1106,line1126,line1147,line1167,line1185
! eliminated_buses=959,971,983,995,1007,1019,1031,1044,1057,1070,1083,1095,1107,1127,1148,1168

New Line._virtual_line1031_line1044_line1057_line1070_line1083_line1095_line1107_line1127_line1148_line1168_line1186_line1206_line1233_line1251_line1272_line1288_line1302_line1315_line1327_line1341_line1354_line1366_line1378_line1388_line1396_line1404_line1412_line1419_line1426_line1433_line1440_line1447_line1456_line1461_line1465 bus1=1466.1.2.3.4 bus2=1020.1.2.3.4 phases=4 linecode=LC8 length=34.4882 units=m
! reduced_from=line1031,line1044,line1057,line1070,line1083,line1095,line1107,line1127,line1148,line1168,line1186,line1206,line1233,line1251,line1272,line1288,line1302,line1315,line1327,line1341,line1354,line1366,line1378,line1388,line1396,line1404,line1412,line1419,line1426,line1433,line1440,line1447,line1456,line1461,line1465
! eliminated_buses=1032,1045,1058,1071,1084,1096,1108,1128,1149,1169,1187,1207,1234,1252,1273,1289,1303,1316,1328,1342,1355,1367,1379,1389,1397,1405,1413,1420,1427,1434,1441,1448,1457,1462

New Line._virtual_line1032_line1045_line1058_line1071_line1084_line1096_line1108_line1128_line1149_line1169_line1187_line1207 bus1=1208.1.2.3.4 bus2=1020.1.2.3.4 phases=4 linecode=LC2 length=8.20494 units=m
! reduced_from=line1032,line1045,line1058,line1071,line1084,line1096,line1108,line1128,line1149,line1169,line1187,line1207
! eliminated_buses=1033,1046,1059,1072,1085,1097,1109,1129,1150,1170,1188

New Line._virtual_line1033_line1046_line1059_line1072_line1085_line1097_line1109_line1129_line1150_line1170_line1188_line1208_line1234_line1252_line1273_line1289_line1303_line1316_line1328_line1342 bus1=1020.1.2.3.4 bus2=1343.1.2.3.4 phases=4 linecode=LC2 length=9.85926 units=m
! reduced_from=line1033,line1046,line1059,line1072,line1085,line1097,line1109,line1129,line1150,line1170,line1188,line1208,line1234,line1252,line1273,line1289,line1303,line1316,line1328,line1342
! eliminated_buses=1034,1047,1060,1073,1086,1098,1110,1130,1151,1171,1189,1209,1235,1253,1274,1290,1304,1317,1329

New Line._virtual_line1073_line1086 bus1=1087.1.2.3.4 bus2=1062.1.2.3.4 phases=4 linecode=LC5 length=0.103851 units=m
! reduced_from=line1073,line1086
! eliminated_buses=1074

New Line._virtual_line1110_line1130_line1151_line1171_line1189_line1209_line1235_line1253_line1274_line1290_line1304_line1317_line1329_line1343_line1355_line1367_line1379_line1389_line1397_line1405_line1413_line1420_line1427_line1434_line1441 bus1=1099.1.2.3.4 bus2=1442.1.2.3.4 phases=4 linecode=LC2 length=17.01398 units=m
! reduced_from=line1110,line1130,line1151,line1171,line1189,line1209,line1235,line1253,line1274,line1290,line1304,line1317,line1329,line1343,line1355,line1367,line1379,line1389,line1397,line1405,line1413,line1420,line1427,line1434,line1441
! eliminated_buses=1111,1131,1152,1172,1190,1210,1236,1254,1275,1291,1305,1318,1330,1344,1356,1368,1380,1390,1398,1406,1414,1421,1428,1435

New Line._virtual_line1111_line1131_line1152_line1172_line1190_line1210_line1236_line1254_line1275_line1291_line1305_line1318_line1330_line1344_line1356_line1368_line1380 bus1=1381.1.2.3.4 bus2=1099.1.2.3.4 phases=4 linecode=LC2 length=19.95774 units=m
! reduced_from=line1111,line1131,line1152,line1172,line1190,line1210,line1236,line1254,line1275,line1291,line1305,line1318,line1330,line1344,line1356,line1368,line1380
! eliminated_buses=1112,1132,1153,1173,1191,1211,1237,1255,1276,1292,1306,1319,1331,1345,1357,1369

New Line._virtual_line1115_line1137_line1158_line1176_line1193_line1214_line1239_line1260_line1277_line1293_line1307_line1320_line1332_line1346_line1358_line1370_line1381_line1390_line1398_line1406_line1414_line1421_line1428_line1435_line1442_line1451_line1457_line1462_line1466_line1472_line1479_line1488_line1499_line1512_line1524_line1536_line1548 bus1=1100.1.2.3.4 bus2=1549.1.2.3.4 phases=4 linecode=LC2 length=19.596788 units=m
! reduced_from=line1115,line1137,line1158,line1176,line1193,line1214,line1239,line1260,line1277,line1293,line1307,line1320,line1332,line1346,line1358,line1370,line1381,line1390,line1398,line1406,line1414,line1421,line1428,line1435,line1442,line1451,line1457,line1462,line1466,line1472,line1479,line1488,line1499,line1512,line1524,line1536,line1548
! eliminated_buses=1116,1138,1159,1177,1194,1215,1240,1261,1278,1294,1308,1321,1333,1347,1359,1371,1382,1391,1399,1407,1415,1422,1429,1436,1443,1452,1458,1463,1467,1473,1480,1489,1500,1513,1525,1537

New Line._virtual_line1116_line1139_line1160_line1178_line1195_line1216_line1241_line1262_line1278_line1294_line1308_line1321_line1333_line1347_line1359_line1371_line1382_line1391_line1399_line1407_line1415_line1422_line1429_line1436_line1443_line1452_line1458_line1463 bus1=1100.1.2.3.4 bus2=1464.1.2.3.4 phases=4 linecode=LC2 length=47.099595 units=m
! reduced_from=line1116,line1139,line1160,line1178,line1195,line1216,line1241,line1262,line1278,line1294,line1308,line1321,line1333,line1347,line1359,line1371,line1382,line1391,line1399,line1407,line1415,line1422,line1429,line1436,line1443,line1452,line1458,line1463
! eliminated_buses=1117,1140,1161,1179,1196,1217,1242,1263,1279,1295,1309,1322,1334,1348,1360,1372,1383,1392,1400,1408,1416,1423,1430,1437,1444,1453,1459

New Line._virtual_line1201_line1221_line1246_line1267_line1283_line1297_line1310_line1323_line1335_line1349_line1361_line1373_line1384 bus1=1186.1.2.3.4 bus2=1385.1.2.3.4 phases=4 linecode=LC2 length=17.1927 units=m
! reduced_from=line1201,line1221,line1246,line1267,line1283,line1297,line1310,line1323,line1335,line1349,line1361,line1373,line1384
! eliminated_buses=1202,1222,1247,1268,1284,1298,1311,1324,1336,1350,1362,1374

New Line._virtual_line1202_line1224_line1248_line1269_line1285_line1299_line1312_line1325 bus1=1186.1.2.3.4 bus2=1326.1.2.3.4 phases=4 linecode=LC2 length=27.91899 units=m
! reduced_from=line1202,line1224,line1248,line1269,line1285,line1299,line1312,line1325
! eliminated_buses=1203,1225,1249,1270,1286,1300,1313

New Line._virtual_line1205_line1232_line1250_line1271_line1287_line1301_line1314_line1326_line1340_line1353_line1365_line1377_line1387_line1395_line1403_line1411_line1418_line1425_line1432_line1439_line1446_line1455_line1460_line1464_line1468_line1475_line1482_line1491_line1502_line1515_line1527_line1539_line1551_line1564_line1575_line1586_line1597_line1608_line1618_line1625 bus1=1186.1.2.3.4 bus2=1626.1.2.3.4 phases=4 linecode=LC5 length=33.80069 units=m
! reduced_from=line1205,line1232,line1250,line1271,line1287,line1301,line1314,line1326,line1340,line1353,line1365,line1377,line1387,line1395,line1403,line1411,line1418,line1425,line1432,line1439,line1446,line1455,line1460,line1464,line1468,line1475,line1482,line1491,line1502,line1515,line1527,line1539,line1551,line1564,line1575,line1586,line1597,line1608,line1618,line1625
! eliminated_buses=1206,1233,1251,1272,1288,1302,1315,1327,1341,1354,1366,1378,1388,1396,1404,1412,1419,1426,1433,1440,1447,1456,1461,1465,1469,1476,1483,1492,1503,1516,1528,1540,1552,1565,1576,1587,1598,1609,1619

New Line._virtual_line1337_line1351_line1363_line1375_line1385_line1393_line1401_line1409_line1417_line1424_line1431_line1438_line1445_line1454 bus1=1326.1.2.3.4 bus2=1455.1.2.3.4 phases=4 linecode=LC2 length=17.03885 units=m
! reduced_from=line1337,line1351,line1363,line1375,line1385,line1393,line1401,line1409,line1417,line1424,line1431,line1438,line1445,line1454
! eliminated_buses=1338,1352,1364,1376,1386,1394,1402,1410,1418,1425,1432,1439,1446

New Line._virtual_line1338_line1352_line1364_line1376_line1386_line1394_line1402_line1410 bus1=1411.1.2.3.4 bus2=1326.1.2.3.4 phases=4 linecode=LC2 length=17.329703 units=m
! reduced_from=line1338,line1352,line1364,line1376,line1386,line1394,line1402,line1410
! eliminated_buses=1339,1353,1365,1377,1387,1395,1403

New Line._virtual_line1469_line1476_line1483_line1492_line1503_line1516_line1528_line1540_line1552_line1565_line1576_line1587_line1598_line1609_line1619_line1626_line1634_line1642_line1650 bus1=1651.1.2.3.4 bus2=1466.1.2.3.4 phases=4 linecode=LC2 length=10.460545 units=m
! reduced_from=line1469,line1476,line1483,line1492,line1503,line1516,line1528,line1540,line1552,line1565,line1576,line1587,line1598,line1609,line1619,line1626,line1634,line1642,line1650
! eliminated_buses=1470,1477,1484,1493,1504,1517,1529,1541,1553,1566,1577,1588,1599,1610,1620,1627,1635,1643

New Line._virtual_line1470_line1477_line1484_line1493_line1504_line1517_line1529_line1541_line1553_line1566_line1577 bus1=1466.1.2.3.4 bus2=1578.1.2.3.4 phases=4 linecode=LC2 length=11.08031 units=m
! reduced_from=line1470,line1477,line1484,line1493,line1504,line1517,line1529,line1541,line1553,line1566,line1577
! eliminated_buses=1471,1478,1485,1494,1505,1518,1530,1542,1554,1567

New Line._virtual_line1471_line1478 bus1=1479.1.2.3.4 bus2=1466.1.2.3.4 phases=4 linecode=LC8 length=7.3705 units=m
! reduced_from=line1471,line1478
! eliminated_buses=1472

New Line._virtual_line1473_line1480_line1489_line1500_line1513_line1525_line1537_line1549_line1562_line1573_line1584_line1595_line1606_line1616_line1623_line1629_line1637_line1645_line1653_line1660_line1667_line1671_line1675 bus1=1468.1.2.3.4 bus2=1676.1.2.3.4 phases=4 linecode=LC2 length=28.21023 units=m
! reduced_from=line1473,line1480,line1489,line1500,line1513,line1525,line1537,line1549,line1562,line1573,line1584,line1595,line1606,line1616,line1623,line1629,line1637,line1645,line1653,line1660,line1667,line1671,line1675
! eliminated_buses=1474,1481,1490,1501,1514,1526,1538,1550,1563,1574,1585,1596,1607,1617,1624,1630,1638,1646,1654,1661,1668,1672

New Line._virtual_line1485_line1494_line1505_line1518_line1530_line1542_line1554_line1567_line1578_line1588_line1599 bus1=1479.1.2.3.4 bus2=1600.1.2.3.4 phases=4 linecode=LC2 length=5.58749 units=m
! reduced_from=line1485,line1494,line1505,line1518,line1530,line1542,line1554,line1567,line1578,line1588,line1599
! eliminated_buses=1486,1495,1506,1519,1531,1543,1555,1568,1579,1589

New Line._virtual_line1486_line1495_line1506_line1519_line1531_line1543_line1555_line1568_line1579_line1589_line1600_line1612 bus1=1479.1.2.3.4 bus2=1613.1.2.3.4 phases=4 linecode=LC2 length=9.5774 units=m
! reduced_from=line1486,line1495,line1506,line1519,line1531,line1543,line1555,line1568,line1579,line1589,line1600,line1612
! eliminated_buses=1487,1496,1507,1520,1532,1544,1556,1569,1580,1590,1601

New Line._virtual_line1496_line1507_line1520_line1532_line1544_line1556_line1569_line1580_line1591_line1602_line1614_line1621_line1628_line1636_line1644_line1652_line1659_line1666 bus1=1667.1.2.3.4 bus2=1488.1.2.3.4 phases=4 linecode=LC2 length=12.030128 units=m
! reduced_from=line1496,line1507,line1520,line1532,line1544,line1556,line1569,line1580,line1591,line1602,line1614,line1621,line1628,line1636,line1644,line1652,line1659,line1666
! eliminated_buses=1497,1508,1521,1533,1545,1557,1570,1581,1592,1603,1615,1622,1629,1637,1645,1653,1660

New Line._virtual_line1497_line1508_line1521_line1533_line1545_line1557_line1570_line1581_line1592_line1603 bus1=1488.1.2.3.4 bus2=1604.1.2.3.4 phases=4 linecode=LC2 length=9.46278 units=m
! reduced_from=line1497,line1508,line1521,line1533,line1545,line1557,line1570,line1581,line1592,line1603
! eliminated_buses=1498,1509,1522,1534,1546,1558,1571,1582,1593

New Line._virtual_line1509_line1522_line1534_line1546_line1558_line1571_line1582_line1593_line1604 bus1=1605.1.2.3.4 bus2=1499.1.2.3.4 phases=4 linecode=LC2 length=10.47792 units=m
! reduced_from=line1509,line1522,line1534,line1546,line1558,line1571,line1582,line1593,line1604
! eliminated_buses=1510,1523,1535,1547,1559,1572,1583,1594

New Line._virtual_line1510_line1523_line1535_line1547_line1559_line1572_line1583_line1594_line1605_line1615_line1622 bus1=1623.1.2.3.4 bus2=1499.1.2.3.4 phases=4 linecode=LC2 length=11.18807 units=m
! reduced_from=line1510,line1523,line1535,line1547,line1559,line1572,line1583,line1594,line1605,line1615,line1622
! eliminated_buses=1511,1524,1536,1548,1560,1573,1584,1595,1606,1616

New Line._virtual_line1631_line1639_line1647_line1655_line1662 bus1=1626.1.2.3.4 bus2=1663.1.2.3.4 phases=4 linecode=LC2 length=11.08343 units=m
! reduced_from=line1631,line1639,line1647,line1655,line1662
! eliminated_buses=1632,1640,1648,1656

New Line._virtual_line1632_line1640_line1648_line1656_line1663 bus1=1626.1.2.3.4 bus2=1664.1.2.3.4 phases=4 linecode=LC2 length=12.02999 units=m
! reduced_from=line1632,line1640,line1648,line1656,line1663
! eliminated_buses=1633,1641,1649,1657

New Line._virtual_line1633_line1641_line1649_line1657_line1664_line1669_line1673_line1676 bus1=1626.1.2.3.4 bus2=1677.1.2.3.4 phases=4 linecode=LC5 length=8.05086 units=m
! reduced_from=line1633,line1641,line1649,line1657,line1664,line1669,line1673,line1676
! eliminated_buses=1634,1642,1650,1658,1665,1670,1674

New Line._virtual_line1678_line1681_line1682_line1683_line1684_line1685_line1686_line1687_line1688_line1689_line1690_line1691_line1692 bus1=1677.1.2.3.4 bus2=1693.1.2.3.4 phases=4 linecode=LC2 length=26.539257 units=m
! reduced_from=line1678,line1681,line1682,line1683,line1684,line1685,line1686,line1687,line1688,line1689,line1690,line1691,line1692
! eliminated_buses=1679,1682,1683,1684,1685,1686,1687,1688,1689,1690,1691,1692

New Line.LINE35 bus1=32.1.2.3.4 bus2=36.1.2.3.4 phases=4 linecode=LC8 length=2.7029 units=m

New Line.LINE104 bus1=101.1.2.3.4 bus2=105.1.2.3.4 phases=4 linecode=LC1 length=0.1118 units=m

New Line.LINE128 bus1=127.1.2.3.4 bus2=129.1.2.3.4 phases=4 linecode=LC8 length=3.9756 units=m

New Line.LINE129 bus1=127.1.2.3.4 bus2=130.1.2.3.4 phases=4 linecode=LC8 length=0.38589 units=m

New Line.LINE131 bus1=129.1.2.3.4 bus2=132.1.2.3.4 phases=4 linecode=LC8 length=2.2951 units=m

New Line.LINE133 bus1=130.1.2.3.4 bus2=134.1.2.3.4 phases=4 linecode=LC1 length=7.9454 units=m

New Line.LINE137 bus1=132.1.2.3.4 bus2=138.1.2.3.4 phases=4 linecode=LC1 length=10.7837 units=m

New Line.LINE144 bus1=143.1.2.3.4 bus2=145.1.2.3.4 phases=4 linecode=LC8 length=9.5894 units=m

New Line.LINE145 bus1=143.1.2.3.4 bus2=146.1.2.3.4 phases=4 linecode=LC8 length=0.035247 units=m

New Line.LINE182 bus1=177.1.2.3.4 bus2=183.1.2.3.4 phases=4 linecode=LC1 length=12.0806 units=m

New Line.LINE306 bus1=299.1.2.3.4 bus2=307.1.2.3.4 phases=4 linecode=LC2 length=10.1187 units=m

New Line.LINE307 bus1=299.1.2.3.4 bus2=308.1.2.3.4 phases=4 linecode=LC2 length=5.59 units=m

New Line.LINE308 bus1=299.1.2.3.4 bus2=309.1.2.3.4 phases=4 linecode=LC2 length=4.8526 units=m

New Line.LINE309 bus1=299.1.2.3.4 bus2=310.1.2.3.4 phases=4 linecode=LC2 length=5.4377 units=m

New Line.LINE400 bus1=396.1.2.3.4 bus2=401.1.2.3.4 phases=4 linecode=LC1 length=14.9665 units=m

New Line.LINE520 bus1=510.1.2.3.4 bus2=521.1.2.3.4 phases=4 linecode=LC2 length=3.3304 units=m

New Line.LINE521 bus1=510.1.2.3.4 bus2=522.1.2.3.4 phases=4 linecode=LC2 length=12.5009 units=m

New Line.LINE522 bus1=510.1.2.3.4 bus2=523.1.2.3.4 phases=4 linecode=LC2 length=9.0825 units=m

New Line.LINE559 bus1=547.1.2.3.4 bus2=560.1.2.3.4 phases=4 linecode=LC1 length=23.1614 units=m

New Line.LINE560 bus1=547.1.2.3.4 bus2=561.1.2.3.4 phases=4 linecode=LC8 length=3.5388 units=m

New Line.LINE594 bus1=580.1.2.3.4 bus2=595.1.2.3.4 phases=4 linecode=LC2 length=15.4974 units=m

New Line.LINE595 bus1=580.1.2.3.4 bus2=596.1.2.3.4 phases=4 linecode=LC2 length=5.1077 units=m

New Line.LINE604 bus1=589.1.2.3.4 bus2=605.1.2.3.4 phases=4 linecode=LC1 length=24.3711 units=m

New Line.LINE624 bus1=612.1.2.3.4 bus2=625.1.2.3.4 phases=4 linecode=LC2 length=5.0663 units=m

New Line.LINE625 bus1=612.1.2.3.4 bus2=626.1.2.3.4 phases=4 linecode=LC2 length=8.5643 units=m

New Line.LINE653 bus1=642.1.2.3.4 bus2=654.1.2.3.4 phases=4 linecode=LC2 length=4.8889 units=m

New Line.LINE654 bus1=642.1.2.3.4 bus2=655.1.2.3.4 phases=4 linecode=LC2 length=10.65 units=m

New Line.LINE946 bus1=937.1.2.3.4 bus2=947.1.2.3.4 phases=4 linecode=LC5 length=0.50486 units=m

New Line.LINE1061 bus1=1048.1.2.3.4 bus2=1062.1.2.3.4 phases=4 linecode=LC1 length=0.60374 units=m

New Line.LINE1098 bus1=1087.1.2.3.4 bus2=1099.1.2.3.4 phases=4 linecode=LC5 length=12.4128 units=m

New Line.LINE1099 bus1=1087.1.2.3.4 bus2=1100.1.2.3.4 phases=4 linecode=LC5 length=2.7995 units=m

New Line.LINE1112 bus1=1099.1.2.3.4 bus2=1113.1.2.3.4 phases=4 linecode=LC5 length=2.7654 units=m

New Line.LINE1113 bus1=1099.1.2.3.4 bus2=1114.1.2.3.4 phases=4 linecode=LC5 length=6.2737 units=m

New Line.LINE1114 bus1=1099.1.2.3.4 bus2=1115.1.2.3.4 phases=4 linecode=LC5 length=12.89 units=m

New Line.LINE1132 bus1=1113.1.2.3.4 bus2=1133.1.2.3.4 phases=4 linecode=LC1 length=13.1648 units=m

New Line.LINE1133 bus1=1113.1.2.3.4 bus2=1134.1.2.3.4 phases=4 linecode=LC5 length=12.9101 units=m

New Line.LINE1134 bus1=1114.1.2.3.4 bus2=1135.1.2.3.4 phases=4 linecode=LC1 length=12.4323 units=m

New Line.LINE1135 bus1=1115.1.2.3.4 bus2=1136.1.2.3.4 phases=4 linecode=LC1 length=11.9482 units=m

New Line.LINE1153 bus1=1134.1.2.3.4 bus2=1154.1.2.3.4 phases=4 linecode=LC1 length=10.9044 units=m

New Line.LINE1154 bus1=1134.1.2.3.4 bus2=1155.1.2.3.4 phases=4 linecode=LC5 length=8.259 units=m

New Line.LINE1173 bus1=1155.1.2.3.4 bus2=1174.1.2.3.4 phases=4 linecode=LC1 length=11.8064 units=m

New Line.LINE1339 bus1=1326.1.2.3.4 bus2=1340.1.2.3.4 phases=4 linecode=LC2 length=24.8792 units=m

New Line.LINE1448 bus1=1442.1.2.3.4 bus2=1449.1.2.3.4 phases=4 linecode=LC2 length=15.0683 units=m

New Line.LINE1449 bus1=1442.1.2.3.4 bus2=1450.1.2.3.4 phases=4 linecode=LC2 length=4.9883 units=m

New Line.LINE1450 bus1=1442.1.2.3.4 bus2=1451.1.2.3.4 phases=4 linecode=LC2 length=18.7745 units=m

New Line.LINE1467 bus1=1464.1.2.3.4 bus2=1468.1.2.3.4 phases=4 linecode=LC2 length=4.7353 units=m

New Line.LINE1487 bus1=1479.1.2.3.4 bus2=1488.1.2.3.4 phases=4 linecode=LC8 length=7.3746 units=m

New Line.LINE1498 bus1=1488.1.2.3.4 bus2=1499.1.2.3.4 phases=4 linecode=LC8 length=10.8455 units=m

New Line.LINE1560 bus1=1549.1.2.3.4 bus2=1561.1.2.3.4 phases=4 linecode=LC2 length=4.3422 units=m

New Line.LINE1561 bus1=1549.1.2.3.4 bus2=1562.1.2.3.4 phases=4 linecode=LC2 length=3.6952 units=m

New Line.LINE1610 bus1=1600.1.2.3.4 bus2=1611.1.2.3.4 phases=4 linecode=LC2 length=22.5576 units=m

New Line.LINE1611 bus1=1600.1.2.3.4 bus2=1612.1.2.3.4 phases=4 linecode=LC2 length=4.1936 units=m
