! Reduced enabled lines.

New Line._virtual_line0_line1_line2_line3_line4_line5_line6_line7_line8_line9_line10_line11_line12_line13_line14_line15_line16_line17_line18_line19_line20_line21_line22_line23_line24 bus1=sourcebus.1.2.3.4 bus2=25.1.2.3.4 phases=4 linecode=LC3 length=55.636444 units=m
! reduced_from=line0,line1,line2,line3,line4,line5,line6,line7,line8,line9,line10,line11,line12,line13,line14,line15,line16,line17,line18,line19,line20,line21,line22,line23,line24
! eliminated_buses=1,2,3,4,5,6,7,8,9,10,11,12,13,14,15,16,17,18,19,20,21,22,23,24

New Line._virtual_line26_line29_line32_line34_line36 bus1=37.1.2.3.4 bus2=25.1.2.3.4 phases=4 linecode=LC3 length=19.8543 units=m
! reduced_from=line26,line29,line32,line34,line36
! eliminated_buses=27,30,33,35

New Line._virtual_line27_line30_line33_line35_line38_line42_line46 bus1=26.1.2.3.4 bus2=47.1.2.3.4 phases=4 linecode=LC1 length=3.24638 units=m
! reduced_from=line27,line30,line33,line35,line38,line42,line46
! eliminated_buses=28,31,34,36,39,43

New Line._virtual_line28_line31 bus1=32.1.2.3.4 bus2=26.1.2.3.4 phases=4 linecode=LC1 length=6.8569 units=m
! reduced_from=line28,line31
! eliminated_buses=29

New Line._virtual_line39_line43 bus1=44.1.2.3.4 bus2=37.1.2.3.4 phases=4 linecode=LC3 length=13.2286 units=m
! reduced_from=line39,line43
! eliminated_buses=40

New Line._virtual_line40_line44_line49 bus1=50.1.2.3.4 bus2=37.1.2.3.4 phases=4 linecode=LC1 length=8.62003 units=m
! reduced_from=line40,line44,line49
! eliminated_buses=41,45

New Line._virtual_line47_line53_line58_line63_line67_line71_line75_line77_line79 bus1=44.1.2.3.4 bus2=80.1.2.3.4 phases=4 linecode=LC3 length=12.70951 units=m
! reduced_from=line47,line53,line58,line63,line67,line71,line75,line77,line79
! eliminated_buses=48,54,59,64,68,72,76,78

New Line._virtual_line48_line54_line59_line64_line68_line72_line76_line78_line80_line83 bus1=84.1.2.3.4 bus2=44.1.2.3.4 phases=4 linecode=LC8 length=35.85086 units=m
! reduced_from=line48,line54,line59,line64,line68,line72,line76,line78,line80,line83
! eliminated_buses=49,55,60,65,69,73,77,79,81

New Line._virtual_line55_line60 bus1=50.1.2.3.4 bus2=61.1.2.3.4 phases=4 linecode=LC1 length=8.6888 units=m
! reduced_from=line55,line60
! eliminated_buses=56

New Line._virtual_line56_line61_line65_line69 bus1=50.1.2.3.4 bus2=70.1.2.3.4 phases=4 linecode=LC1 length=2.53242 units=m
! reduced_from=line56,line61,line65,line69
! eliminated_buses=57,62,66

New Line._virtual_line81_line84_line88_line92 bus1=80.1.2.3.4 bus2=93.1.2.3.4 phases=4 linecode=LC3 length=11.54 units=m
! reduced_from=line81,line84,line88,line92
! eliminated_buses=82,85,89

New Line._virtual_line82_line85_line89_line93_line98_line103_line109_line115 bus1=116.1.2.3.4 bus2=80.1.2.3.4 phases=4 linecode=LC3 length=26.91034 units=m
! reduced_from=line82,line85,line89,line93,line98,line103,line109,line115
! eliminated_buses=83,86,90,94,99,104,110

New Line._virtual_line86_line90_line94_line99_line104_line110_line116_line123_line130_line137_line144_line152 bus1=153.1.2.3.4 bus2=84.1.2.3.4 phases=4 linecode=LC1 length=10.45979 units=m
! reduced_from=line86,line90,line94,line99,line104,line110,line116,line123,line130,line137,line144,line152
! eliminated_buses=87,91,95,100,105,111,117,124,131,138,145

New Line._virtual_line87_line91_line95_line100 bus1=84.1.2.3.4 bus2=101.1.2.3.4 phases=4 linecode=LC8 length=15.5199 units=m
! reduced_from=line87,line91,line95,line100
! eliminated_buses=88,92,96

New Line._virtual_line96_line101_line107_line113_line119_line126_line133_line140_line148 bus1=149.1.2.3.4 bus2=93.1.2.3.4 phases=4 linecode=LC3 length=21.0089 units=m
! reduced_from=line96,line101,line107,line113,line119,line126,line133,line140,line148
! eliminated_buses=97,102,108,114,120,127,134,141

New Line._virtual_line97_line102_line108_line114_line120_line127_line134_line141_line149_line159 bus1=160.1.2.3.4 bus2=93.1.2.3.4 phases=4 linecode=LC2 length=10.25682 units=m
! reduced_from=line97,line102,line108,line114,line120,line127,line134,line141,line149,line159
! eliminated_buses=98,103,109,115,121,128,135,142,150

New Line._virtual_line105_line111_line117_line124_line131_line138 bus1=139.1.2.3.4 bus2=101.1.2.3.4 phases=4 linecode=LC8 length=16.564 units=m
! reduced_from=line105,line111,line117,line124,line131,line138
! eliminated_buses=106,112,118,125,132

New Line._virtual_line106_line112_line118_line125_line132_line139_line147_line156_line167_line180 bus1=181.1.2.3.4 bus2=101.1.2.3.4 phases=4 linecode=LC1 length=13.21182 units=m
! reduced_from=line106,line112,line118,line125,line132,line139,line147,line156,line167,line180
! eliminated_buses=107,113,119,126,133,140,148,157,168

New Line._virtual_line121_line128_line135_line142_line150_line160_line173 bus1=116.1.2.3.4 bus2=174.1.2.3.4 phases=4 linecode=LC1 length=15.80622 units=m
! reduced_from=line121,line128,line135,line142,line150,line160,line173
! eliminated_buses=122,129,136,143,151,161

New Line._virtual_line122_line129_line136_line143_line151_line161 bus1=162.1.2.3.4 bus2=116.1.2.3.4 phases=4 linecode=LC3 length=23.34418 units=m
! reduced_from=line122,line129,line136,line143,line151,line161
! eliminated_buses=123,130,137,144,152

New Line._virtual_line145_line153_line164_line178_line191_line203_line215 bus1=216.1.2.3.4 bus2=139.1.2.3.4 phases=4 linecode=LC8 length=13.77928 units=m
! reduced_from=line145,line153,line164,line178,line191,line203,line215
! eliminated_buses=146,154,165,179,192,204

New Line._virtual_line154_line165_line179_line192_line204_line216_line228_line240_line255_line266_line279 bus1=280.1.2.3.4 bus2=147.1.2.3.4 phases=4 linecode=LC1 length=8.95362 units=m
! reduced_from=line154,line165,line179,line192,line204,line216,line228,line240,line255,line266,line279
! eliminated_buses=155,166,180,193,205,217,229,241,256,267

New Line._virtual_line155_line166 bus1=147.1.2.3.4 bus2=167.1.2.3.4 phases=4 linecode=LC1 length=6.2108 units=m
! reduced_from=line155,line166
! eliminated_buses=156

New Line._virtual_line157_line168_line181_line195_line207_line218_line230 bus1=149.1.2.3.4 bus2=231.1.2.3.4 phases=4 linecode=LC3 length=15.8569 units=m
! reduced_from=line157,line168,line181,line195,line207,line218,line230
! eliminated_buses=158,169,182,196,208,219

New Line._virtual_line162_line176_line189 bus1=190.1.2.3.4 bus2=153.1.2.3.4 phases=4 linecode=LC1 length=5.84477 units=m
! reduced_from=line162,line176,line189
! eliminated_buses=163,177

New Line._virtual_line163_line177_line190_line202_line214_line225_line238_line253_line264_line277_line291 bus1=292.1.2.3.4 bus2=153.1.2.3.4 phases=4 linecode=LC1 length=8.868836 units=m
! reduced_from=line163,line177,line190,line202,line214,line225,line238,line253,line264,line277,line291
! eliminated_buses=164,178,191,203,215,226,239,254,265,278

New Line._virtual_line169_line183 bus1=184.1.2.3.4 bus2=159.1.2.3.4 phases=4 linecode=LC1 length=4.9572 units=m
! reduced_from=line169,line183
! eliminated_buses=170

New Line._virtual_line170_line184_line197_line209_line220_line232_line245 bus1=246.1.2.3.4 bus2=159.1.2.3.4 phases=4 linecode=LC1 length=6.90775 units=m
! reduced_from=line170,line184,line197,line209,line220,line232,line245
! eliminated_buses=171,185,198,210,221,233

New Line._virtual_line171_line185_line198_line210_line221_line233 bus1=160.1.2.3.4 bus2=234.1.2.3.4 phases=4 linecode=LC2 length=4.20504 units=m
! reduced_from=line171,line185,line198,line210,line221,line233
! eliminated_buses=172,186,199,211,222

New Line._virtual_line172_line186_line199_line211_line222_line234_line248 bus1=249.1.2.3.4 bus2=160.1.2.3.4 phases=4 linecode=LC2 length=9.51421 units=m
! reduced_from=line172,line186,line199,line211,line222,line234,line248
! eliminated_buses=173,187,200,212,223,235

New Line._virtual_line174_line187_line200_line212_line223_line235_line249_line260_line273 bus1=162.1.2.3.4 bus2=274.1.2.3.4 phases=4 linecode=LC1 length=12.621488 units=m
! reduced_from=line174,line187,line200,line212,line223,line235,line249,line260,line273
! eliminated_buses=175,188,201,213,224,236,250,261

New Line._virtual_line175_line188_line201_line213_line224 bus1=162.1.2.3.4 bus2=225.1.2.3.4 phases=4 linecode=LC3 length=10.7353 units=m
! reduced_from=line175,line188,line201,line213,line224
! eliminated_buses=176,189,202,214

New Line._virtual_line193_line205 bus1=206.1.2.3.4 bus2=181.1.2.3.4 phases=4 linecode=LC1 length=6.0979 units=m
! reduced_from=line193,line205
! eliminated_buses=194

New Line._virtual_line194_line206_line217_line229_line241_line256_line267_line280_line293 bus1=181.1.2.3.4 bus2=294.1.2.3.4 phases=4 linecode=LC1 length=8.25 units=m
! reduced_from=line194,line206,line217,line229,line241,line256,line267,line280,line293
! eliminated_buses=195,207,218,230,242,257,268,281

New Line._virtual_line227_line239_line254_line265_line278_line292_line307_line319_line331_line345_line359_line372_line385_line402_line419_line432_line445_line457_line467 bus1=468.1.2.3.4 bus2=216.1.2.3.4 phases=4 linecode=LC1 length=20.147936 units=m
! reduced_from=line227,line239,line254,line265,line278,line292,line307,line319,line331,line345,line359,line372,line385,line402,line419,line432,line445,line457,line467
! eliminated_buses=228,240,255,266,279,293,308,320,332,346,360,373,386,403,420,433,446,458

New Line._virtual_line236_line250_line261_line274_line288_line303_line315_line327_line340_line354_line369_line381 bus1=225.1.2.3.4 bus2=382.1.2.3.4 phases=4 linecode=LC1 length=14.505165 units=m
! reduced_from=line236,line250,line261,line274,line288,line303,line315,line327,line340,line354,line369,line381
! eliminated_buses=237,251,262,275,289,304,316,328,341,355,370

New Line._virtual_line237_line252_line263_line276_line290 bus1=225.1.2.3.4 bus2=291.1.2.3.4 phases=4 linecode=LC3 length=16.0809 units=m
! reduced_from=line237,line252,line263,line276,line290
! eliminated_buses=238,253,264,277

New Line._virtual_line242_line257 bus1=231.1.2.3.4 bus2=258.1.2.3.4 phases=4 linecode=LC3 length=3.93754 units=m
! reduced_from=line242,line257
! eliminated_buses=243

New Line._virtual_line243_line258_line271_line284_line299_line313_line325_line338_line352_line367_line379 bus1=231.1.2.3.4 bus2=380.1.2.3.4 phases=4 linecode=LC1 length=15.53551 units=m
! reduced_from=line243,line258,line271,line284,line299,line313,line325,line338,line352,line367,line379
! eliminated_buses=244,259,272,285,300,314,326,339,353,368

New Line._virtual_line268_line281_line294_line308_line320_line332_line346_line360_line373_line386_line403_line420_line433 bus1=258.1.2.3.4 bus2=434.1.2.3.4 phases=4 linecode=LC6 length=26.07368 units=m
! reduced_from=line268,line281,line294,line308,line320,line332,line346,line360,line373,line386,line403,line420,line433
! eliminated_buses=269,282,295,309,321,333,347,361,374,387,404,421

New Line._virtual_line270_line283 bus1=258.1.2.3.4 bus2=284.1.2.3.4 phases=4 linecode=LC3 length=3.4968 units=m
! reduced_from=line270,line283
! eliminated_buses=271

New Line._virtual_line296_line310 bus1=284.1.2.3.4 bus2=311.1.2.3.4 phases=4 linecode=LC6 length=20.5954 units=m
! reduced_from=line296,line310
! eliminated_buses=297

New Line._virtual_line305_line317_line329 bus1=330.1.2.3.4 bus2=291.1.2.3.4 phases=4 linecode=LC1 length=10.22234 units=m
! reduced_from=line305,line317,line329
! eliminated_buses=306,318

New Line._virtual_line306_line318_line330_line344_line358_line371 bus1=291.1.2.3.4 bus2=372.1.2.3.4 phases=4 linecode=LC3 length=16.9026 units=m
! reduced_from=line306,line318,line330,line344,line358,line371
! eliminated_buses=307,319,331,345,359

New Line._virtual_line311_line322_line334 bus1=299.1.2.3.4 bus2=335.1.2.3.4 phases=4 linecode=LC4 length=10.471 units=m
! reduced_from=line311,line322,line334
! eliminated_buses=312,323

New Line._virtual_line342_line356_line370_line382_line397_line414_line428_line441_line453_line463_line474_line483 bus1=484.1.2.3.4 bus2=330.1.2.3.4 phases=4 linecode=LC1 length=7.00036 units=m
! reduced_from=line342,line356,line370,line382,line397,line414,line428,line441,line453,line463,line474,line483
! eliminated_buses=343,357,371,383,398,415,429,442,454,464,475

New Line._virtual_line343_line357 bus1=330.1.2.3.4 bus2=358.1.2.3.4 phases=4 linecode=LC1 length=6.4466 units=m
! reduced_from=line343,line357
! eliminated_buses=344

New Line._virtual_line349_line365 bus1=335.1.2.3.4 bus2=366.1.2.3.4 phases=4 linecode=LC6 length=15.8841 units=m
! reduced_from=line349,line365
! eliminated_buses=350

New Line._virtual_line362_line375_line388_line405_line422_line435_line448_line458 bus1=349.1.2.3.4 bus2=459.1.2.3.4 phases=4 linecode=LC4 length=15.4385 units=m
! reduced_from=line362,line375,line388,line405,line422,line435,line448,line458
! eliminated_buses=363,376,389,406,423,436,449

New Line._virtual_line363_line377_line390_line408_line424_line437_line450_line460_line471_line481_line491 bus1=492.1.2.3.4 bus2=349.1.2.3.4 phases=4 linecode=LC6 length=19.76837 units=m
! reduced_from=line363,line377,line390,line408,line424,line437,line450,line460,line471,line481,line491
! eliminated_buses=364,378,391,409,425,438,451,461,472,482

New Line._virtual_line384_line401_line418_line431_line444_line456_line466_line477_line485_line493_line500_line507_line514_line522_line529_line535_line541_line547_line554_line560_line566_line572_line578_line584 bus1=372.1.2.3.4 bus2=585.1.2.3.4 phases=4 linecode=LC3 length=25.655544 units=m
! reduced_from=line384,line401,line418,line431,line444,line456,line466,line477,line485,line493,line500,line507,line514,line522,line529,line535,line541,line547,line554,line560,line566,line572,line578,line584
! eliminated_buses=385,402,419,432,445,457,467,478,486,494,501,508,515,523,530,536,542,548,555,561,567,573,579

New Line._virtual_line392_line410 bus1=411.1.2.3.4 bus2=380.1.2.3.4 phases=4 linecode=LC1 length=4.5837 units=m
! reduced_from=line392,line410
! eliminated_buses=393

New Line._virtual_line393_line411_line426_line439_line451_line461_line472 bus1=473.1.2.3.4 bus2=380.1.2.3.4 phases=4 linecode=LC1 length=8.663245 units=m
! reduced_from=line393,line411,line426,line439,line451,line461,line472
! eliminated_buses=394,412,427,440,452,462

New Line._virtual_line395_line413 bus1=382.1.2.3.4 bus2=414.1.2.3.4 phases=4 linecode=LC1 length=9.9679 units=m
! reduced_from=line395,line413
! eliminated_buses=396

New Line._virtual_line398_line415 bus1=384.1.2.3.4 bus2=416.1.2.3.4 phases=4 linecode=LC1 length=7.5079 units=m
! reduced_from=line398,line415
! eliminated_buses=399

New Line._virtual_line399_line416_line429_line442_line454_line464_line475_line484_line492_line499_line506_line513_line521 bus1=384.1.2.3.4 bus2=522.1.2.3.4 phases=4 linecode=LC1 length=4.726182 units=m
! reduced_from=line399,line416,line429,line442,line454,line464,line475,line484,line492,line499,line506,line513,line521
! eliminated_buses=400,417,430,443,455,465,476,485,493,500,507,514

New Line._virtual_line468_line478_line486_line494_line501_line508 bus1=509.1.2.3.4 bus2=459.1.2.3.4 phases=4 linecode=LC4 length=14.4004 units=m
! reduced_from=line468,line478,line486,line494,line501,line508
! eliminated_buses=469,479,487,495,502

New Line._virtual_line469_line480 bus1=481.1.2.3.4 bus2=459.1.2.3.4 phases=4 linecode=LC6 length=10.690048 units=m
! reduced_from=line469,line480
! eliminated_buses=470

New Line._virtual_line489_line497_line504_line511_line519 bus1=481.1.2.3.4 bus2=520.1.2.3.4 phases=4 linecode=LC6 length=9.174508 units=m
! reduced_from=line489,line497,line504,line511,line519
! eliminated_buses=490,498,505,512

New Line._virtual_line490_line498_line505_line512_line520_line528_line534_line540_line546_line553 bus1=554.1.2.3.4 bus2=481.1.2.3.4 phases=4 linecode=LC6 length=5.05037 units=m
! reduced_from=line490,line498,line505,line512,line520,line528,line534,line540,line546,line553
! eliminated_buses=491,499,506,513,521,529,535,541,547

New Line._virtual_line516_line526 bus1=527.1.2.3.4 bus2=509.1.2.3.4 phases=4 linecode=LC6 length=12.8795 units=m
! reduced_from=line516,line526
! eliminated_buses=517

New Line._virtual_line523_line530_line536_line542_line548 bus1=516.1.2.3.4 bus2=549.1.2.3.4 phases=4 linecode=LC4 length=10.2965 units=m
! reduced_from=line523,line530,line536,line542,line548
! eliminated_buses=524,531,537,543

New Line._virtual_line524_line532_line538_line544_line551_line559_line565_line571_line577_line583 bus1=516.1.2.3.4 bus2=584.1.2.3.4 phases=4 linecode=LC6 length=10.31015 units=m
! reduced_from=line524,line532,line538,line544,line551,line559,line565,line571,line577,line583
! eliminated_buses=525,533,539,545,552,560,566,572,578

New Line._virtual_line555_line561_line567_line573_line579_line585_line593_line599_line605_line612_line619_line626_line632_line640_line649_line657_line665_line673_line681_line687_line695_line702_line709_line715_line721_line727_line734_line741_line749_line756_line763_line772_line779_line786_line792_line798 bus1=799.1.2.3.4 bus2=549.1.2.3.4 phases=4 linecode=LC4 length=40.1683 units=m
! reduced_from=line555,line561,line567,line573,line579,line585,line593,line599,line605,line612,line619,line626,line632,line640,line649,line657,line665,line673,line681,line687,line695,line702,line709,line715,line721,line727,line734,line741,line749,line756,line763,line772,line779,line786,line792,line798
! eliminated_buses=556,562,568,574,580,586,594,600,606,613,620,627,633,641,650,658,666,674,682,688,696,703,710,716,722,728,735,742,750,757,764,773,780,787,793

New Line._virtual_line556_line563_line569_line575_line581_line587_line595_line601_line607_line614_line621 bus1=622.1.2.3.4 bus2=549.1.2.3.4 phases=4 linecode=LC6 length=25.24848 units=m
! reduced_from=line556,line563,line569,line575,line581,line587,line595,line601,line607,line614,line621
! eliminated_buses=557,564,570,576,582,588,596,602,608,615

New Line._virtual_line591_line597_line603_line609_line616_line623_line629_line635 bus1=636.1.2.3.4 bus2=585.1.2.3.4 phases=4 linecode=LC1 length=5.13646 units=m
! reduced_from=line591,line597,line603,line609,line616,line623,line629,line635
! eliminated_buses=592,598,604,610,617,624,630

New Line._virtual_line592_line598_line604 bus1=605.1.2.3.4 bus2=585.1.2.3.4 phases=4 linecode=LC3 length=12.2941 units=m
! reduced_from=line592,line598,line604
! eliminated_buses=593,599

New Line._virtual_line610_line617_line624_line630 bus1=605.1.2.3.4 bus2=631.1.2.3.4 phases=4 linecode=LC1 length=9.25759 units=m
! reduced_from=line610,line617,line624,line630
! eliminated_buses=611,618,625

New Line._virtual_line611_line618_line625_line631 bus1=605.1.2.3.4 bus2=632.1.2.3.4 phases=4 linecode=LC3 length=8.25821 units=m
! reduced_from=line611,line618,line625,line631
! eliminated_buses=612,619,626

New Line._virtual_line636_line645_line653_line661_line669_line677_line684_line691 bus1=692.1.2.3.4 bus2=631.1.2.3.4 phases=4 linecode=LC1 length=5.251367 units=m
! reduced_from=line636,line645,line653,line661,line669,line677,line684,line691
! eliminated_buses=637,646,654,662,670,678,685

New Line._virtual_line637_line646_line654_line662_line670_line678 bus1=679.1.2.3.4 bus2=631.1.2.3.4 phases=4 linecode=LC1 length=6.00783 units=m
! reduced_from=line637,line646,line654,line662,line670,line678
! eliminated_buses=638,647,655,663,671

New Line._virtual_line638_line647_line655_line663_line671_line679_line685_line692_line699_line706_line713_line719_line725_line731_line738 bus1=632.1.2.3.4 bus2=739.1.2.3.4 phases=4 linecode=LC1 length=10.90506 units=m
! reduced_from=line638,line647,line655,line663,line671,line679,line685,line692,line699,line706,line713,line719,line725,line731,line738
! eliminated_buses=639,648,656,664,672,680,686,693,700,707,714,720,726,732

New Line._virtual_line639_line648_line656_line664_line672_line680_line686 bus1=632.1.2.3.4 bus2=687.1.2.3.4 phases=4 linecode=LC3 length=4.78075 units=m
! reduced_from=line639,line648,line656,line664,line672,line680,line686
! eliminated_buses=640,649,657,665,673,681

New Line._virtual_line643_line652_line660_line668_line676_line683_line690_line698_line705_line712_line718_line724_line730_line737_line744_line752_line759_line768_line775_line782 bus1=636.1.2.3.4 bus2=783.1.2.3.4 phases=4 linecode=LC1 length=12.11021 units=m
! reduced_from=line643,line652,line660,line668,line676,line683,line690,line698,line705,line712,line718,line724,line730,line737,line744,line752,line759,line768,line775,line782
! eliminated_buses=644,653,661,669,677,684,691,699,706,713,719,725,731,738,745,753,760,769,776

New Line._virtual_line693_line700_line707 bus1=687.1.2.3.4 bus2=708.1.2.3.4 phases=4 linecode=LC1 length=12.069 units=m
! reduced_from=line693,line700,line707
! eliminated_buses=694,701

New Line._virtual_line694_line701_line708_line714_line720_line726 bus1=687.1.2.3.4 bus2=727.1.2.3.4 phases=4 linecode=LC3 length=10.95893 units=m
! reduced_from=line694,line701,line708,line714,line720,line726
! eliminated_buses=695,702,709,715,721

New Line._virtual_line732_line739_line747 bus1=727.1.2.3.4 bus2=748.1.2.3.4 phases=4 linecode=LC1 length=12.2605 units=m
! reduced_from=line732,line739,line747
! eliminated_buses=733,740

New Line._virtual_line733_line740_line748_line755_line762_line771_line778_line785_line791_line797 bus1=798.1.2.3.4 bus2=727.1.2.3.4 phases=4 linecode=LC3 length=13.72713 units=m
! reduced_from=line733,line740,line748,line755,line762,line771,line778,line785,line791,line797
! eliminated_buses=734,741,749,756,763,772,779,786,792

New Line._virtual_line745_line753_line760_line769_line776_line783_line789_line795_line801 bus1=802.1.2.3.4 bus2=739.1.2.3.4 phases=4 linecode=LC1 length=3.24856 units=m
! reduced_from=line745,line753,line760,line769,line776,line783,line789,line795,line801
! eliminated_buses=746,754,761,770,777,784,790,796

New Line._virtual_line746_line754_line761_line770_line777_line784_line790_line796_line802_line809_line817_line823_line830 bus1=739.1.2.3.4 bus2=831.1.2.3.4 phases=4 linecode=LC1 length=14.50815 units=m
! reduced_from=line746,line754,line761,line770,line777,line784,line790,line796,line802,line809,line817,line823,line830
! eliminated_buses=747,755,762,771,778,785,791,797,803,810,818,824

New Line._virtual_line803_line810_line818_line824_line831_line837_line843_line850_line856_line861_line866_line871_line877_line883_line890_line896 bus1=798.1.2.3.4 bus2=897.1.2.3.4 phases=4 linecode=LC1 length=10.10608 units=m
! reduced_from=line803,line810,line818,line824,line831,line837,line843,line850,line856,line861,line866,line871,line877,line883,line890,line896
! eliminated_buses=804,811,819,825,832,838,844,851,857,862,867,872,878,884,891

New Line._virtual_line805_line812_line819 bus1=799.1.2.3.4 bus2=820.1.2.3.4 phases=4 linecode=LC4 length=10.9981 units=m
! reduced_from=line805,line812,line819
! eliminated_buses=806,813

New Line._virtual_line806_line815 bus1=816.1.2.3.4 bus2=799.1.2.3.4 phases=4 linecode=LC6 length=14.4331 units=m
! reduced_from=line806,line815
! eliminated_buses=807

New Line._virtual_line825_line832 bus1=820.1.2.3.4 bus2=833.1.2.3.4 phases=4 linecode=LC6 length=16.5379 units=m
! reduced_from=line825,line832
! eliminated_buses=826

New Line._virtual_line826_line833 bus1=834.1.2.3.4 bus2=820.1.2.3.4 phases=4 linecode=LC4 length=3.24018 units=m
! reduced_from=line826,line833
! eliminated_buses=827

New Line._virtual_line839_line845_line852_line858_line863_line868_line873_line879_line885 bus1=834.1.2.3.4 bus2=886.1.2.3.4 phases=4 linecode=LC6 length=17.78346 units=m
! reduced_from=line839,line845,line852,line858,line863,line868,line873,line879,line885
! eliminated_buses=840,846,853,859,864,869,874,880

New Line._virtual_line846_line853 bus1=841.1.2.3.4 bus2=854.1.2.3.4 phases=4 linecode=LC6 length=16.7391 units=m
! reduced_from=line846,line853
! eliminated_buses=847

New Line._virtual_line847_line854_line859_line864_line869_line874 bus1=841.1.2.3.4 bus2=875.1.2.3.4 phases=4 linecode=LC4 length=10.09443 units=m
! reduced_from=line847,line854,line859,line864,line869,line874
! eliminated_buses=848,855,860,865,870

New Line._virtual_line881_line888 bus1=875.1.2.3.4 bus2=889.1.2.3.4 phases=4 linecode=LC6 length=16.5615 units=m
! reduced_from=line881,line888
! eliminated_buses=882

New Line._virtual_line887_line894_line900_line908_line916_line924_line933_line942_line951_line959 bus1=881.1.2.3.4 bus2=960.1.2.3.4 phases=4 linecode=LC6 length=18.548293 units=m
! reduced_from=line887,line894,line900,line908,line916,line924,line933,line942,line951,line959
! eliminated_buses=888,895,901,909,917,925,934,943,952

New Line._virtual_line892_line897 bus1=887.1.2.3.4 bus2=898.1.2.3.4 phases=4 linecode=LC4 length=5.63356 units=m
! reduced_from=line892,line897
! eliminated_buses=893

New Line._virtual_line893_line899_line907_line915_line923_line932_line941_line950_line958_line966_line974_line982_line991_line999 bus1=887.1.2.3.4 bus2=1000.1.2.3.4 phases=4 linecode=LC6 length=13.06953 units=m
! reduced_from=line893,line899,line907,line915,line923,line932,line941,line950,line958,line966,line974,line982,line991,line999
! eliminated_buses=894,900,908,916,924,933,942,951,959,967,975,983,992

New Line._virtual_line902_line910_line918_line926_line935_line944 bus1=897.1.2.3.4 bus2=945.1.2.3.4 phases=4 linecode=LC1 length=3.762047 units=m
! reduced_from=line902,line910,line918,line926,line935,line944
! eliminated_buses=903,911,919,927,936

New Line._virtual_line903_line911_line919_line927_line936_line945_line953_line960_line967_line975_line983_line992_line1000_line1007_line1014_line1021 bus1=897.1.2.3.4 bus2=1022.1.2.3.4 phases=4 linecode=LC1 length=11.42522 units=m
! reduced_from=line903,line911,line919,line927,line936,line945,line953,line960,line967,line975,line983,line992,line1000,line1007,line1014,line1021
! eliminated_buses=904,912,920,928,937,946,954,961,968,976,984,993,1001,1008,1015

New Line._virtual_line904_line912_line920 bus1=898.1.2.3.4 bus2=921.1.2.3.4 phases=4 linecode=LC4 length=11.4748 units=m
! reduced_from=line904,line912,line920
! eliminated_buses=905,913

New Line._virtual_line905_line913_line921_line930_line939_line948_line956_line964_line971_line979_line988 bus1=898.1.2.3.4 bus2=989.1.2.3.4 phases=4 linecode=LC6 length=10.59284 units=m
! reduced_from=line905,line913,line921,line930,line939,line948,line956,line964,line971,line979,line988
! eliminated_buses=906,914,922,931,940,949,957,965,972,980

New Line._virtual_line928_line937 bus1=921.1.2.3.4 bus2=938.1.2.3.4 phases=4 linecode=LC4 length=6.0046 units=m
! reduced_from=line928,line937
! eliminated_buses=929

New Line._virtual_line929_line938 bus1=921.1.2.3.4 bus2=939.1.2.3.4 phases=4 linecode=LC6 length=12.5136 units=m
! reduced_from=line929,line938
! eliminated_buses=930

New Line._virtual_line946_line954_line961_line968_line976 bus1=977.1.2.3.4 bus2=938.1.2.3.4 phases=4 linecode=LC4 length=16.49433 units=m
! reduced_from=line946,line954,line961,line968,line976
! eliminated_buses=947,955,962,969

New Line._virtual_line947_line955_line963_line970_line978_line987_line996_line1004_line1011_line1018_line1025_line1031_line1037_line1043_line1049 bus1=1050.1.2.3.4 bus2=938.1.2.3.4 phases=4 linecode=LC6 length=17.67265 units=m
! reduced_from=line947,line955,line963,line970,line978,line987,line996,line1004,line1011,line1018,line1025,line1031,line1037,line1043,line1049
! eliminated_buses=948,956,964,971,979,988,997,1005,1012,1019,1026,1032,1038,1044

New Line._virtual_line984_line993_line1001_line1008_line1015_line1022_line1028_line1034_line1040_line1046_line1052_line1056_line1060_line1064 bus1=977.1.2.3.4 bus2=1065.1.2.3.4 phases=4 linecode=LC4 length=20.67172 units=m
! reduced_from=line984,line993,line1001,line1008,line1015,line1022,line1028,line1034,line1040,line1046,line1052,line1056,line1060,line1064
! eliminated_buses=985,994,1002,1009,1016,1023,1029,1035,1041,1047,1053,1057,1061

New Line._virtual_line985_line994_line1002_line1009_line1016_line1023_line1029_line1035 bus1=1036.1.2.3.4 bus2=977.1.2.3.4 phases=4 linecode=LC3 length=14.39261 units=m
! reduced_from=line985,line994,line1002,line1009,line1016,line1023,line1029,line1035
! eliminated_buses=986,995,1003,1010,1017,1024,1030

New Line._virtual_line1041_line1047_line1053_line1057_line1061_line1066_line1072_line1079_line1086_line1092_line1097_line1101_line1105_line1109_line1113_line1117_line1121_line1125_line1129_line1133 bus1=1036.1.2.3.4 bus2=1134.1.2.3.4 phases=4 linecode=LC9 length=243.26118 units=m
! reduced_from=line1041,line1047,line1053,line1057,line1061,line1066,line1072,line1079,line1086,line1092,line1097,line1101,line1105,line1109,line1113,line1117,line1121,line1125,line1129,line1133
! eliminated_buses=1042,1048,1054,1058,1062,1067,1073,1080,1087,1093,1098,1102,1106,1110,1114,1118,1122,1126,1130

New Line._virtual_line1070_line1077 bus1=1078.1.2.3.4 bus2=1065.1.2.3.4 phases=4 linecode=LC6 length=10.411 units=m
! reduced_from=line1070,line1077
! eliminated_buses=1071

New Line._virtual_line1076_line1084 bus1=1085.1.2.3.4 bus2=1070.1.2.3.4 phases=4 linecode=LC6 length=10.1473 units=m
! reduced_from=line1076,line1084
! eliminated_buses=1077

New Line._virtual_line1082_line1089_line1095_line1099 bus1=1076.1.2.3.4 bus2=1100.1.2.3.4 phases=4 linecode=LC4 length=7.574 units=m
! reduced_from=line1082,line1089,line1095,line1099
! eliminated_buses=1083,1090,1096

New Line._virtual_line1083_line1090 bus1=1076.1.2.3.4 bus2=1091.1.2.3.4 phases=4 linecode=LC6 length=10.4884 units=m
! reduced_from=line1083,line1090
! eliminated_buses=1084

New Line._virtual_line1102_line1106_line1110_line1114_line1118_line1122_line1126_line1130_line1136_line1143 bus1=1100.1.2.3.4 bus2=1144.1.2.3.4 phases=4 linecode=LC6 length=13.15101 units=m
! reduced_from=line1102,line1106,line1110,line1114,line1118,line1122,line1126,line1130,line1136,line1143
! eliminated_buses=1103,1107,1111,1115,1119,1123,1127,1131,1137

New Line._virtual_line1103_line1107_line1111_line1115_line1119_line1123_line1127_line1131_line1137_line1144_line1148_line1150_line1151_line1152_line1153_line1154_line1155 bus1=1100.1.2.3.4 bus2=1156.1.2.3.4 phases=4 linecode=LC4 length=9.99956 units=m
! reduced_from=line1103,line1107,line1111,line1115,line1119,line1123,line1127,line1131,line1137,line1144,line1148,line1150,line1151,line1152,line1153,line1154,line1155
! eliminated_buses=1104,1108,1112,1116,1120,1124,1128,1132,1138,1145,1149,1151,1152,1153,1154,1155

New Line._virtual_line1139_line1145_line1149 bus1=1134.1.2.3.4 bus2=1150.1.2.3.4 phases=4 linecode=LC9 length=52.2331 units=m
! reduced_from=line1139,line1145,line1149
! eliminated_buses=1140,1146

New Line._virtual_line1140_line1146 bus1=1147.1.2.3.4 bus2=1134.1.2.3.4 phases=4 linecode=LC9 length=17.7683 units=m
! reduced_from=line1140,line1146
! eliminated_buses=1141

New Line._virtual_line1157_line1160 bus1=1156.1.2.3.4 bus2=1161.1.2.3.4 phases=4 linecode=LC6 length=13.6364 units=m
! reduced_from=line1157,line1160
! eliminated_buses=1158

New Line._virtual_line1158_line1161_line1163_line1165 bus1=1166.1.2.3.4 bus2=1157.1.2.3.4 phases=4 linecode=LC4 length=10.77682 units=m
! reduced_from=line1158,line1161,line1163,line1165
! eliminated_buses=1159,1162,1164

New Line._virtual_line1159_line1162 bus1=1157.1.2.3.4 bus2=1163.1.2.3.4 phases=4 linecode=LC6 length=13.8329 units=m
! reduced_from=line1159,line1162
! eliminated_buses=1160

New Line._virtual_line1167_line1170_line1173_line1175_line1177_line1179_line1181_line1183 bus1=1166.1.2.3.4 bus2=1184.1.2.3.4 phases=4 linecode=LC4 length=12.11178 units=m
! reduced_from=line1167,line1170,line1173,line1175,line1177,line1179,line1181,line1183
! eliminated_buses=1168,1171,1174,1176,1178,1180,1182

New Line._virtual_line1168_line1171 bus1=1166.1.2.3.4 bus2=1172.1.2.3.4 phases=4 linecode=LC6 length=13.332 units=m
! reduced_from=line1168,line1171
! eliminated_buses=1169

New Line._virtual_line1185_line1188_line1192_line1196_line1198 bus1=1184.1.2.3.4 bus2=1199.1.2.3.4 phases=4 linecode=LC4 length=12.1851 units=m
! reduced_from=line1185,line1188,line1192,line1196,line1198
! eliminated_buses=1186,1189,1193,1197

New Line._virtual_line1189_line1193 bus1=1187.1.2.3.4 bus2=1194.1.2.3.4 phases=4 linecode=LC6 length=10.9111 units=m
! reduced_from=line1189,line1193
! eliminated_buses=1190

New Line._virtual_line1190_line1194_line1197_line1200_line1204_line1208_line1211 bus1=1212.1.2.3.4 bus2=1187.1.2.3.4 phases=4 linecode=LC6 length=7.2967 units=m
! reduced_from=line1190,line1194,line1197,line1200,line1204,line1208,line1211
! eliminated_buses=1191,1195,1198,1201,1205,1209

New Line._virtual_line1201_line1205_line1209 bus1=1199.1.2.3.4 bus2=1210.1.2.3.4 phases=4 linecode=LC4 length=6.4832 units=m
! reduced_from=line1201,line1205,line1209
! eliminated_buses=1202,1206

New Line._virtual_line1202_line1206 bus1=1199.1.2.3.4 bus2=1207.1.2.3.4 phases=4 linecode=LC6 length=11.4721 units=m
! reduced_from=line1202,line1206
! eliminated_buses=1203

New Line._virtual_line1212_line1215 bus1=1216.1.2.3.4 bus2=1210.1.2.3.4 phases=4 linecode=LC6 length=17.4098 units=m
! reduced_from=line1212,line1215
! eliminated_buses=1213

New Line._virtual_line1213_line1216_line1218_line1220 bus1=1221.1.2.3.4 bus2=1210.1.2.3.4 phases=4 linecode=LC4 length=7.89909 units=m
! reduced_from=line1213,line1216,line1218,line1220
! eliminated_buses=1214,1217,1219

New Line._virtual_line1222_line1223_line1224_line1225_line1226_line1227_line1228_line1229 bus1=1230.1.2.3.4 bus2=1221.1.2.3.4 phases=4 linecode=LC6 length=16.58105 units=m
! reduced_from=line1222,line1223,line1224,line1225,line1226,line1227,line1228,line1229
! eliminated_buses=1223,1224,1225,1226,1227,1228,1229

New Line.LINE25 bus1=25.1.2.3.4 bus2=26.1.2.3.4 phases=4 linecode=LC1 length=10.1369 units=m

New Line.LINE51 bus1=47.1.2.3.4 bus2=52.1.2.3.4 phases=4 linecode=LC1 length=5.4578 units=m

New Line.LINE52 bus1=47.1.2.3.4 bus2=53.1.2.3.4 phases=4 linecode=LC1 length=5.4578 units=m

New Line.LINE73 bus1=70.1.2.3.4 bus2=74.1.2.3.4 phases=4 linecode=LC1 length=7.0789 units=m

New Line.LINE74 bus1=70.1.2.3.4 bus2=75.1.2.3.4 phases=4 linecode=LC1 length=7.0789 units=m

New Line.LINE146 bus1=139.1.2.3.4 bus2=147.1.2.3.4 phases=4 linecode=LC1 length=12.2672 units=m

New Line.LINE158 bus1=149.1.2.3.4 bus2=159.1.2.3.4 phases=4 linecode=LC1 length=11.3628 units=m

New Line.LINE246 bus1=234.1.2.3.4 bus2=247.1.2.3.4 phases=4 linecode=LC2 length=4.6779 units=m

New Line.LINE247 bus1=234.1.2.3.4 bus2=248.1.2.3.4 phases=4 linecode=LC2 length=4.6779 units=m

New Line.LINE286 bus1=274.1.2.3.4 bus2=287.1.2.3.4 phases=4 linecode=LC1 length=6.2806 units=m

New Line.LINE287 bus1=274.1.2.3.4 bus2=288.1.2.3.4 phases=4 linecode=LC1 length=0.65928 units=m

New Line.LINE298 bus1=284.1.2.3.4 bus2=299.1.2.3.4 phases=4 linecode=LC3 length=2.3625 units=m

New Line.LINE301 bus1=287.1.2.3.4 bus2=302.1.2.3.4 phases=4 linecode=LC1 length=8.3858 units=m

New Line.LINE302 bus1=287.1.2.3.4 bus2=303.1.2.3.4 phases=4 linecode=LC1 length=3.0457 units=m

New Line.LINE348 bus1=335.1.2.3.4 bus2=349.1.2.3.4 phases=4 linecode=LC4 length=3.0977 units=m

New Line.LINE383 bus1=372.1.2.3.4 bus2=384.1.2.3.4 phases=4 linecode=LC1 length=10.1257 units=m

New Line.LINE396 bus1=382.1.2.3.4 bus2=397.1.2.3.4 phases=4 linecode=LC1 length=4.8984 units=m

New Line.LINE446 bus1=434.1.2.3.4 bus2=447.1.2.3.4 phases=4 linecode=LC6 length=4.5589 units=m

New Line.LINE447 bus1=434.1.2.3.4 bus2=448.1.2.3.4 phases=4 linecode=LC6 length=4.5589 units=m

New Line.LINE515 bus1=509.1.2.3.4 bus2=516.1.2.3.4 phases=4 linecode=LC4 length=2.6435 units=m

New Line.LINE589 bus1=584.1.2.3.4 bus2=590.1.2.3.4 phases=4 linecode=LC6 length=5.4565 units=m

New Line.LINE590 bus1=584.1.2.3.4 bus2=591.1.2.3.4 phases=4 linecode=LC6 length=5.4565 units=m

New Line.LINE644 bus1=636.1.2.3.4 bus2=645.1.2.3.4 phases=4 linecode=LC1 length=5.1742 units=m

New Line.LINE840 bus1=834.1.2.3.4 bus2=841.1.2.3.4 phases=4 linecode=LC4 length=7.903 units=m

New Line.LINE880 bus1=875.1.2.3.4 bus2=881.1.2.3.4 phases=4 linecode=LC4 length=6.8244 units=m

New Line.LINE886 bus1=881.1.2.3.4 bus2=887.1.2.3.4 phases=4 linecode=LC4 length=7.2792 units=m

New Line.LINE1069 bus1=1065.1.2.3.4 bus2=1070.1.2.3.4 phases=4 linecode=LC4 length=9.7646 units=m

New Line.LINE1075 bus1=1070.1.2.3.4 bus2=1076.1.2.3.4 phases=4 linecode=LC4 length=5.8051 units=m

New Line.LINE1156 bus1=1156.1.2.3.4 bus2=1157.1.2.3.4 phases=4 linecode=LC4 length=2.8873 units=m

New Line.LINE1186 bus1=1184.1.2.3.4 bus2=1187.1.2.3.4 phases=4 linecode=LC6 length=8.2247 units=m
