! Reduced enabled lines.

New Line._virtual_line0_line1_line2_line3_line4_line5_line6_line7_line8_line9_line10_line11_line12_line13_line14_line15_line16_line17_line18_line19_line20_line21_line22_line23_line24_line25_line26_line27_line28_line29_line30_line31_line32_line33_line34_line35_line36_line37_line38_line39_line40_line41_line42_line43_line44_line45 bus1=sourcebus.1.2.3.4 bus2=46.1.2.3.4 phases=4 linecode=LC8 length=21.929081 units=m
! reduced_from=line0,line1,line2,line3,line4,line5,line6,line7,line8,line9,line10,line11,line12,line13,line14,line15,line16,line17,line18,line19,line20,line21,line22,line23,line24,line25,line26,line27,line28,line29,line30,line31,line32,line33,line34,line35,line36,line37,line38,line39,line40,line41,line42,line43,line44,line45
! eliminated_buses=1,2,3,4,5,6,7,8,9,10,11,12,13,14,15,16,17,18,19,20,21,22,23,24,25,26,27,28,29,30,31,32,33,34,35,36,37,38,39,40,41,42,43,44,45

New Line._virtual_line46_line49_line57_line60_line63_line66_line69_line72_line75_line78_line81_line84_line87_line90_line93_line96_line99_line102_line105_line108_line111_line114_line117_line130_line132_line135_line138_line141_line144_line147_line150_line153_line156_line159_line162_line165_line168_line171_line174_line177_line180_line184_line188_line191_line195_line199_line203_line207_line214_line221_line228_line234 bus1=235.1.2.3.4 bus2=46.1.2.3.4 phases=4 linecode=LC8 length=65.327966 units=m
! reduced_from=line46,line49,line57,line60,line63,line66,line69,line72,line75,line78,line81,line84,line87,line90,line93,line96,line99,line102,line105,line108,line111,line114,line117,line130,line132,line135,line138,line141,line144,line147,line150,line153,line156,line159,line162,line165,line168,line171,line174,line177,line180,line184,line188,line191,line195,line199,line203,line207,line214,line221,line228,line234
! eliminated_buses=47,50,58,61,64,67,70,73,76,79,82,85,88,91,94,97,100,103,106,109,112,115,118,131,133,136,139,142,145,148,151,154,157,160,163,166,169,172,175,178,181,185,189,192,196,200,204,208,215,222,229

New Line._virtual_line47_line50_line58_line61_line64_line67_line70_line73_line76_line79_line82_line85_line88_line91_line94_line97_line100_line103_line106_line109_line112_line115 bus1=116.1.2.3.4 bus2=46.1.2.3.4 phases=4 linecode=LC8 length=47.323946 units=m
! reduced_from=line47,line50,line58,line61,line64,line67,line70,line73,line76,line79,line82,line85,line88,line91,line94,line97,line100,line103,line106,line109,line112,line115
! eliminated_buses=48,51,59,62,65,68,71,74,77,80,83,86,89,92,95,98,101,104,107,110,113

New Line.LINE118 bus1=116.1.2.3.4 bus2=119.1.2.3.4 phases=4 linecode=LC1 length=6.4739 units=m

New Line.LINE119 bus1=116.1.2.3.4 bus2=120.1.2.3.4 phases=4 linecode=LC1 length=9.0685 units=m

New Line.LINE120 bus1=116.1.2.3.4 bus2=121.1.2.3.4 phases=4 linecode=LC1 length=9.0685 units=m

New Line.LINE121 bus1=116.1.2.3.4 bus2=122.1.2.3.4 phases=4 linecode=LC1 length=9.0685 units=m

New Line.LINE122 bus1=116.1.2.3.4 bus2=123.1.2.3.4 phases=4 linecode=LC1 length=9.0685 units=m

New Line.LINE123 bus1=116.1.2.3.4 bus2=124.1.2.3.4 phases=4 linecode=LC1 length=9.0685 units=m

New Line.LINE124 bus1=116.1.2.3.4 bus2=125.1.2.3.4 phases=4 linecode=LC1 length=9.0685 units=m

New Line.LINE125 bus1=116.1.2.3.4 bus2=126.1.2.3.4 phases=4 linecode=LC1 length=9.0685 units=m

New Line.LINE126 bus1=116.1.2.3.4 bus2=127.1.2.3.4 phases=4 linecode=LC1 length=9.0685 units=m

New Line.LINE127 bus1=116.1.2.3.4 bus2=128.1.2.3.4 phases=4 linecode=LC1 length=9.0685 units=m

New Line.LINE128 bus1=116.1.2.3.4 bus2=129.1.2.3.4 phases=4 linecode=LC1 length=9.0685 units=m

New Line.LINE129 bus1=116.1.2.3.4 bus2=130.1.2.3.4 phases=4 linecode=LC1 length=9.0685 units=m

New Line.LINE131 bus1=120.1.2.3.4 bus2=132.1.2.3.4 phases=4 linecode=LC1 length=10.4913 units=m

New Line.LINE240 bus1=235.1.2.3.4 bus2=241.1.2.3.4 phases=4 linecode=LC1 length=36.3848 units=m

New Line.LINE241 bus1=235.1.2.3.4 bus2=242.1.2.3.4 phases=4 linecode=LC1 length=36.3848 units=m

New Line.LINE242 bus1=235.1.2.3.4 bus2=243.1.2.3.4 phases=4 linecode=LC1 length=36.3848 units=m

New Line.LINE243 bus1=235.1.2.3.4 bus2=244.1.2.3.4 phases=4 linecode=LC1 length=36.3848 units=m

New Line.LINE244 bus1=235.1.2.3.4 bus2=245.1.2.3.4 phases=4 linecode=LC1 length=36.3848 units=m

New Line.LINE245 bus1=235.1.2.3.4 bus2=246.1.2.3.4 phases=4 linecode=LC1 length=36.3848 units=m

New Line.LINE246 bus1=235.1.2.3.4 bus2=247.1.2.3.4 phases=4 linecode=LC1 length=36.3848 units=m

New Line.LINE247 bus1=235.1.2.3.4 bus2=248.1.2.3.4 phases=4 linecode=LC1 length=15.8156 units=m
