! Reduced enabled lines.

New Line._virtual_line0_line1_line2_line3_line4_line5_line6_line7_line8_line9_line10_line11_line12_line13_line14_line15_line16_line17_line18_line19_line20_line21_line22_line23_line24_line25_line26_line27_line28_line29_line30_line31_line32_line33_line34_line35_line36_line37_line38_line39_line40_line41_line42_line43_line44_line45_line46_line47_line48_line49_line50_line51_line52_line53_line54_line55_line56_line57_line58_line59_line60_line61_line62_line63_line64_line65_line66_line67_line68_line69_line70_line71_line72_line73_line74_line75_line76_line77_line78_line79_line80_line81_line82 bus1=sourcebus.1.2.3.4 bus2=83.1.2.3.4 phases=4 linecode=LC8 length=98.08969 units=m
! reduced_from=line0,line1,line2,line3,line4,line5,line6,line7,line8,line9,line10,line11,line12,line13,line14,line15,line16,line17,line18,line19,line20,line21,line22,line23,line24,line25,line26,line27,line28,line29,line30,line31,line32,line33,line34,line35,line36,line37,line38,line39,line40,line41,line42,line43,line44,line45,line46,line47,line48,line49,line50,line51,line52,line53,line54,line55,line56,line57,line58,line59,line60,line61,line62,line63,line64,line65,line66,line67,line68,line69,line70,line71,line72,line73,line74,line75,line76,line77,line78,line79,line80,line81,line82
! eliminated_buses=1,2,3,4,5,6,7,8,9,10,11,12,13,14,15,16,17,18,19,20,21,22,23,24,25,26,27,28,29,30,31,32,33,34,35,36,37,38,39,40,41,42,43,44,45,46,47,48,49,50,51,52,53,54,55,56,57,58,59,60,61,62,63,64,65,66,67,68,69,70,71,72,73,74,75,76,77,78,79,80,81,82

New Line._virtual_line83_line85_line89_line93_line97_line101_line105_line108_line111_line114_line117_line120_line123_line126_line129_line132_line135_line138_line141_line144_line147_line150_line153_line156_line159_line162_line165_line170_line175_line181_line187_line192_line196_line200_line204_line208_line212_line216_line220_line224_line228_line232_line236_line240_line244_line249_line255 bus1=83.1.2.3.4 bus2=256.1.2.3.4 phases=4 linecode=LC8 length=41.083618 units=m
! reduced_from=line83,line85,line89,line93,line97,line101,line105,line108,line111,line114,line117,line120,line123,line126,line129,line132,line135,line138,line141,line144,line147,line150,line153,line156,line159,line162,line165,line170,line175,line181,line187,line192,line196,line200,line204,line208,line212,line216,line220,line224,line228,line232,line236,line240,line244,line249,line255
! eliminated_buses=84,86,90,94,98,102,106,109,112,115,118,121,124,127,130,133,136,139,142,145,148,151,154,157,160,163,166,171,176,182,188,193,197,201,205,209,213,217,221,225,229,233,237,241,245,250

New Line._virtual_line86_line90_line94_line98_line102_line106_line109_line112_line115_line118_line121_line124_line127_line130_line133_line136_line139_line142_line145_line148_line151_line154_line157_line160_line163_line167_line172_line178 bus1=179.1.2.3.4 bus2=85.1.2.3.4 phases=4 linecode=LC9 length=31.123422 units=m
! reduced_from=line86,line90,line94,line98,line102,line106,line109,line112,line115,line118,line121,line124,line127,line130,line133,line136,line139,line142,line145,line148,line151,line154,line157,line160,line163,line167,line172,line178
! eliminated_buses=87,91,95,99,103,107,110,113,116,119,122,125,128,131,134,137,140,143,146,149,152,155,158,161,164,168,173

New Line._virtual_line88_line92_line96_line100_line104_line107_line110_line113_line116_line119_line122_line125_line128_line131_line134_line137_line140_line143_line146_line149_line152_line155_line158_line161_line164 bus1=85.1.2.3.4 bus2=165.1.2.3.4 phases=4 linecode=LC8 length=49.43965 units=m
! reduced_from=line88,line92,line96,line100,line104,line107,line110,line113,line116,line119,line122,line125,line128,line131,line134,line137,line140,line143,line146,line149,line152,line155,line158,line161,line164
! eliminated_buses=89,93,97,101,105,108,111,114,117,120,123,126,129,132,135,138,141,144,147,150,153,156,159,162

New Line._virtual_line169_line173_line179_line185_line190_line194_line198_line202_line206_line210_line214_line218_line222_line226_line230_line234_line238_line242_line247_line252_line258_line265_line274_line281_line290_line296_line300_line304_line308_line312_line316_line319_line322_line325_line328_line331_line334_line337_line340_line343_line346_line349_line352_line357_line362_line367_line372_line377_line383_line389_line394_line398_line402_line406_line410_line414_line418_line423_line427_line431_line435_line439_line443_line447_line451_line456_line461 bus1=165.1.2.3.4 bus2=462.1.2.3.4 phases=4 linecode=LC8 length=95.5604 units=m
! reduced_from=line169,line173,line179,line185,line190,line194,line198,line202,line206,line210,line214,line218,line222,line226,line230,line234,line238,line242,line247,line252,line258,line265,line274,line281,line290,line296,line300,line304,line308,line312,line316,line319,line322,line325,line328,line331,line334,line337,line340,line343,line346,line349,line352,line357,line362,line367,line372,line377,line383,line389,line394,line398,line402,line406,line410,line414,line418,line423,line427,line431,line435,line439,line443,line447,line451,line456,line461
! eliminated_buses=170,174,180,186,191,195,199,203,207,211,215,219,223,227,231,235,239,243,248,253,259,266,275,282,291,297,301,305,309,313,317,320,323,326,329,332,335,338,341,344,347,350,353,358,363,368,373,378,384,390,395,399,403,407,411,415,419,424,428,432,436,440,444,448,452,457

New Line._virtual_line262_line269_line279 bus1=280.1.2.3.4 bus2=256.1.2.3.4 phases=4 linecode=LC8 length=20.9681 units=m
! reduced_from=line262,line269,line279
! eliminated_buses=263,270

New Line._virtual_line466_line472_line478_line484_line489 bus1=462.1.2.3.4 bus2=490.1.2.3.4 phases=4 linecode=LC3 length=0.718127 units=m
! reduced_from=line466,line472,line478,line484,line489
! eliminated_buses=467,473,479,485

New Line.LINE84 bus1=83.1.2.3.4 bus2=85.1.2.3.4 phases=4 linecode=LC8 length=1.658 units=m

New Line.LINE168 bus1=165.1.2.3.4 bus2=169.1.2.3.4 phases=4 linecode=LC1 length=5.6614 units=m

New Line.LINE184 bus1=179.1.2.3.4 bus2=185.1.2.3.4 phases=4 linecode=LC1 length=21.259 units=m

New Line.LINE263 bus1=256.1.2.3.4 bus2=264.1.2.3.4 phases=4 linecode=LC8 length=1.7656 units=m

New Line.LINE272 bus1=264.1.2.3.4 bus2=273.1.2.3.4 phases=4 linecode=LC1 length=9.6855 units=m

New Line.LINE288 bus1=280.1.2.3.4 bus2=289.1.2.3.4 phases=4 linecode=LC1 length=7.0918 units=m

New Line.LINE494 bus1=490.1.2.3.4 bus2=495.1.2.3.4 phases=4 linecode=LC1 length=6.3095 units=m

New Line.LINE495 bus1=490.1.2.3.4 bus2=496.1.2.3.4 phases=4 linecode=LC1 length=7.2825 units=m

New Line.LINE496 bus1=490.1.2.3.4 bus2=497.1.2.3.4 phases=4 linecode=LC1 length=7.2825 units=m
