! Reduced enabled lines.

New Line._virtual_line0_line1_line2_line3_line4_line5_line6_line7_line8_line9_line10_line11_line12_line13_line14_line15_line16_line17_line18_line19_line20_line21_line22_line23_line24_line25_line26_line27_line28_line29_line30_line31_line32_line33_line34_line35_line36_line37_line38_line39_line40_line41_line42_line43_line44_line45_line46_line47_line48_line49_line50_line51_line52_line53_line54_line55_line56_line57_line58_line60_line62_line65_line68_line71_line74_line78_line82_line86_line91_line95_line98_line101_line104_line107_line110_line113_line116_line119_line121_line123_line125_line127_line129_line131_line133_line135_line137_line139_line141_line143_line144_line145 bus1=sourcebus.1.2.3.4 bus2=146.1.2.3.4 phases=4 linecode=LC8 length=157.151798 units=m
! reduced_from=line0,line1,line2,line3,line4,line5,line6,line7,line8,line9,line10,line11,line12,line13,line14,line15,line16,line17,line18,line19,line20,line21,line22,line23,line24,line25,line26,line27,line28,line29,line30,line31,line32,line33,line34,line35,line36,line37,line38,line39,line40,line41,line42,line43,line44,line45,line46,line47,line48,line49,line50,line51,line52,line53,line54,line55,line56,line57,line58,line60,line62,line65,line68,line71,line74,line78,line82,line86,line91,line95,line98,line101,line104,line107,line110,line113,line116,line119,line121,line123,line125,line127,line129,line131,line133,line135,line137,line139,line141,line143,line144,line145
! eliminated_buses=1,2,3,4,5,6,7,8,9,10,11,12,13,14,15,16,17,18,19,20,21,22,23,24,25,26,27,28,29,30,31,32,33,34,35,36,37,38,39,40,41,42,43,44,45,46,47,48,49,50,51,52,53,54,55,56,57,58,59,61,63,66,69,72,75,79,83,87,92,96,99,102,105,108,111,114,117,120,122,124,126,128,130,132,134,136,138,140,142,144,145

New Line._virtual_line146_line148_line150_line152_line154_line156_line158_line160_line162_line164_line166_line168_line172_line176_line180_line185_line190_line197_line204_line211_line218_line225_line232_line238_line245_line252_line260 bus1=146.1.2.3.4 bus2=261.1.2.3.4 phases=4 linecode=LC4 length=22.512366 units=m
! reduced_from=line146,line148,line150,line152,line154,line156,line158,line160,line162,line164,line166,line168,line172,line176,line180,line185,line190,line197,line204,line211,line218,line225,line232,line238,line245,line252,line260
! eliminated_buses=147,149,151,153,155,157,159,161,163,165,167,169,173,177,181,186,191,198,205,212,219,226,233,239,246,253

New Line._virtual_line266_line277_line282_line287_line292 bus1=293.1.2.3.4 bus2=261.1.2.3.4 phases=4 linecode=LC4 length=25.16154 units=m
! reduced_from=line266,line277,line282,line287,line292
! eliminated_buses=267,278,283,288

New Line._virtual_line301_line306 bus1=293.1.2.3.4 bus2=307.1.2.3.4 phases=4 linecode=LC4 length=14.944 units=m
! reduced_from=line301,line306
! eliminated_buses=302

New Line.LINE265 bus1=261.1.2.3.4 bus2=266.1.2.3.4 phases=4 linecode=LC5 length=0.945 units=m

New Line.LINE270 bus1=266.1.2.3.4 bus2=271.1.2.3.4 phases=4 linecode=LC1 length=22.0878 units=m

New Line.LINE271 bus1=266.1.2.3.4 bus2=272.1.2.3.4 phases=4 linecode=LC1 length=17.8821 units=m

New Line.LINE272 bus1=266.1.2.3.4 bus2=273.1.2.3.4 phases=4 linecode=LC1 length=17.8821 units=m

New Line.LINE273 bus1=266.1.2.3.4 bus2=274.1.2.3.4 phases=4 linecode=LC1 length=17.8821 units=m

New Line.LINE274 bus1=266.1.2.3.4 bus2=275.1.2.3.4 phases=4 linecode=LC1 length=17.8821 units=m

New Line.LINE275 bus1=266.1.2.3.4 bus2=276.1.2.3.4 phases=4 linecode=LC1 length=17.8821 units=m

New Line.LINE297 bus1=293.1.2.3.4 bus2=298.1.2.3.4 phases=4 linecode=LC1 length=16.7103 units=m

New Line.LINE298 bus1=293.1.2.3.4 bus2=299.1.2.3.4 phases=4 linecode=LC1 length=16.7103 units=m

New Line.LINE299 bus1=293.1.2.3.4 bus2=300.1.2.3.4 phases=4 linecode=LC1 length=16.7103 units=m

New Line.LINE300 bus1=293.1.2.3.4 bus2=301.1.2.3.4 phases=4 linecode=LC1 length=16.7103 units=m

New Line.LINE311 bus1=307.1.2.3.4 bus2=312.1.2.3.4 phases=4 linecode=LC1 length=7.4638 units=m
