! Reduced enabled lines.

New Line._virtual_line0_line1_line2_line3_line4_line5_line6_line7_line8_line9_line10_line11_line12_line13_line14_line15_line16_line17_line18_line19_line20_line21_line22_line23_line24_line25_line26_line27_line28_line29_line30_line31_line32_line33_line34_line35_line36_line37_line38_line39_line40_line41_line42_line43_line44_line45_line46_line47_line48_line49_line50_line51_line52_line53_line54_line55_line56_line57_line58_line59_line60_line61_line62 bus1=sourcebus.1.2.3.4 bus2=63.1.2.3.4 phases=4 linecode=LC8 length=96.002937 units=m
! reduced_from=line0,line1,line2,line3,line4,line5,line6,line7,line8,line9,line10,line11,line12,line13,line14,line15,line16,line17,line18,line19,line20,line21,line22,line23,line24,line25,line26,line27,line28,line29,line30,line31,line32,line33,line34,line35,line36,line37,line38,line39,line40,line41,line42,line43,line44,line45,line46,line47,line48,line49,line50,line51,line52,line53,line54,line55,line56,line57,line58,line59,line60,line61,line62
! eliminated_buses=1,2,3,4,5,6,7,8,9,10,11,12,13,14,15,16,17,18,19,20,21,22,23,24,25,26,27,28,29,30,31,32,33,34,35,36,37,38,39,40,41,42,43,44,45,46,47,48,49,50,51,52,53,54,55,56,57,58,59,60,61,62

New Line._virtual_line64_line65_line66_line68_line70_line72_line74_line76_line78_line81_line84_line87_line90_line93_line96_line98_line99_line100_line101_line102_line103_line104_line105_line106_line107_line108_line109_line111_line113_line116_line120_line123_line127_line131_line135_line140_line145_line149_line152_line156_line161_line166_line170_line174_line178_line182_line186_line190_line193_line196_line199_line202_line205_line207_line209_line211_line212_line213_line214_line215_line216_line217_line218_line219_line220_line222_line224_line226 bus1=227.1.2.3.4 bus2=63.1.2.3.4 phases=4 linecode=LC8 length=132.791073 units=m
! reduced_from=line64,line65,line66,line68,line70,line72,line74,line76,line78,line81,line84,line87,line90,line93,line96,line98,line99,line100,line101,line102,line103,line104,line105,line106,line107,line108,line109,line111,line113,line116,line120,line123,line127,line131,line135,line140,line145,line149,line152,line156,line161,line166,line170,line174,line178,line182,line186,line190,line193,line196,line199,line202,line205,line207,line209,line211,line212,line213,line214,line215,line216,line217,line218,line219,line220,line222,line224,line226
! eliminated_buses=65,66,67,69,71,73,75,77,79,82,85,88,91,94,97,99,100,101,102,103,104,105,106,107,108,109,110,112,114,117,121,124,128,132,136,141,146,150,153,157,162,167,171,175,179,183,187,191,194,197,200,203,206,208,210,212,213,214,215,216,217,218,219,220,221,223,225

New Line._virtual_line229_line233_line237_line241_line245_line249_line252_line255_line258_line261_line264_line267_line270_line273_line276_line279_line282_line285 bus1=227.1.2.3.4 bus2=286.1.2.3.4 phases=4 linecode=LC3 length=17.780656 units=m
! reduced_from=line229,line233,line237,line241,line245,line249,line252,line255,line258,line261,line264,line267,line270,line273,line276,line279,line282,line285
! eliminated_buses=230,234,238,242,246,250,253,256,259,262,265,268,271,274,277,280,283

New Line._virtual_line230_line234_line238_line242_line246_line250_line253_line256_line259_line262_line265_line268_line271_line274_line277_line280_line283_line286_line288_line289_line290_line291_line292_line294 bus1=295.1.2.3.4 bus2=227.1.2.3.4 phases=4 linecode=LC8 length=14.168687 units=m
! reduced_from=line230,line234,line238,line242,line246,line250,line253,line256,line259,line262,line265,line268,line271,line274,line277,line280,line283,line286,line288,line289,line290,line291,line292,line294
! eliminated_buses=231,235,239,243,247,251,254,257,260,263,266,269,272,275,278,281,284,287,289,290,291,292,293

New Line._virtual_line296_line299_line302_line307_line312_line318_line324_line330_line337 bus1=295.1.2.3.4 bus2=338.1.2.3.4 phases=4 linecode=LC8 length=3.130674 units=m
! reduced_from=line296,line299,line302,line307,line312,line318,line324,line330,line337
! eliminated_buses=297,300,303,308,313,319,325,331

New Line._virtual_line297_line300 bus1=301.1.2.3.4 bus2=295.1.2.3.4 phases=4 linecode=LC8 length=4.5553 units=m
! reduced_from=line297,line300
! eliminated_buses=298

New Line._virtual_line303_line308_line313_line319_line325_line331_line338_line347_line357_line366 bus1=301.1.2.3.4 bus2=367.1.2.3.4 phases=4 linecode=LC1 length=10.65744 units=m
! reduced_from=line303,line308,line313,line319,line325,line331,line338,line347,line357,line366
! eliminated_buses=304,309,314,320,326,332,339,348,358

New Line._virtual_line305_line310_line316_line322_line328_line335_line343_line352_line362_line371_line379_line386_line393_line399_line403_line407_line411_line415_line420_line424_line428 bus1=429.1.2.3.4 bus2=301.1.2.3.4 phases=4 linecode=LC8 length=37.27934 units=m
! reduced_from=line305,line310,line316,line322,line328,line335,line343,line352,line362,line371,line379,line386,line393,line399,line403,line407,line411,line415,line420,line424,line428
! eliminated_buses=306,311,317,323,329,336,344,353,363,372,380,387,394,400,404,408,412,416,421,425

New Line._virtual_line345_line355_line364_line373_line381_line388_line394_line400_line404_line408_line412_line416_line421_line425_line429_line434_line438_line441 bus1=442.1.2.3.4 bus2=338.1.2.3.4 phases=4 linecode=LC6 length=15.089282 units=m
! reduced_from=line345,line355,line364,line373,line381,line388,line394,line400,line404,line408,line412,line416,line421,line425,line429,line434,line438,line441
! eliminated_buses=346,356,365,374,382,389,395,401,405,409,413,417,422,426,430,435,439

New Line._virtual_line432_line436_line440_line443_line445_line447_line449_line451_line453_line455_line457_line458 bus1=429.1.2.3.4 bus2=459.1.2.3.4 phases=4 linecode=LC6 length=6.657766 units=m
! reduced_from=line432,line436,line440,line443,line445,line447,line449,line451,line453,line455,line457,line458
! eliminated_buses=433,437,441,444,446,448,450,452,454,456,458

New Line.LINE63 bus1=63.1.2.3.4 bus2=64.1.2.3.4 phases=4 linecode=LC1 length=7.0492 units=m
