! Reduced enabled lines.

New Line._virtual_line0_line1_line2_line3_line4_line5_line6_line7_line8_line9_line10_line11_line12_line13_line14_line15_line16_line17_line18_line19_line20_line21_line22_line23_line24_line25_line26_line27_line28_line29_line30_line31_line32_line33_line34_line35_line36_line37_line38_line39_line40_line41_line42_line43_line44_line45_line46_line47_line48_line49_line50_line51_line52_line53_line54_line55_line56_line57_line58_line59_line60_line61_line62_line63_line64_line65_line66_line67_line68_line69_line70_line71_line72 bus1=73.1.2.3.4 bus2=sourcebus.1.2.3.4 phases=4 linecode=LC8 length=126.065554 units=m
! reduced_from=line0,line1,line2,line3,line4,line5,line6,line7,line8,line9,line10,line11,line12,line13,line14,line15,line16,line17,line18,line19,line20,line21,line22,line23,line24,line25,line26,line27,line28,line29,line30,line31,line32,line33,line34,line35,line36,line37,line38,line39,line40,line41,line42,line43,line44,line45,line46,line47,line48,line49,line50,line51,line52,line53,line54,line55,line56,line57,line58,line59,line60,line61,line62,line63,line64,line65,line66,line67,line68,line69,line70,line71,line72
! eliminated_buses=1,2,3,4,5,6,7,8,9,10,11,12,13,14,15,16,17,18,19,20,21,22,23,24,25,26,27,28,29,30,31,32,33,34,35,36,37,38,39,40,41,42,43,44,45,46,47,48,49,50,51,52,53,54,55,56,57,58,59,60,61,62,63,64,65,66,67,68,69,70,71,72

New Line._virtual_line73_line75 bus1=76.1.2.3.4 bus2=73.1.2.3.4 phases=4 linecode=LC8 length=5.7629 units=m
! reduced_from=line73,line75
! eliminated_buses=74

New Line._virtual_line74_line77_line81_line84 bus1=85.1.2.3.4 bus2=73.1.2.3.4 phases=4 linecode=LC8 length=12.16857 units=m
! reduced_from=line74,line77,line81,line84
! eliminated_buses=75,78,82

New Line._virtual_line78_line82_line85_line89_line92_line96 bus1=97.1.2.3.4 bus2=76.1.2.3.4 phases=4 linecode=LC8 length=20.081 units=m
! reduced_from=line78,line82,line85,line89,line92,line96
! eliminated_buses=79,83,86,90,93

New Line._virtual_line79_line83_line86_line90_line93_line97_line102_line107_line110_line113_line116 bus1=76.1.2.3.4 bus2=117.1.2.3.4 phases=4 linecode=LC5 length=1.92247 units=m
! reduced_from=line79,line83,line86,line90,line93,line97,line102,line107,line110,line113,line116
! eliminated_buses=80,84,87,91,94,98,103,108,111,114

New Line._virtual_line100_line105_line108_line111_line114_line117_line128_line130_line132_line135_line142_line145_line147_line149_line151_line153_line155_line157_line159_line160_line161_line162_line163_line164_line165_line166_line167_line168_line169_line170_line171_line172_line173_line175 bus1=97.1.2.3.4 bus2=176.1.2.3.4 phases=4 linecode=LC5 length=17.012457 units=m
! reduced_from=line100,line105,line108,line111,line114,line117,line128,line130,line132,line135,line142,line145,line147,line149,line151,line153,line155,line157,line159,line160,line161,line162,line163,line164,line165,line166,line167,line168,line169,line170,line171,line172,line173,line175
! eliminated_buses=101,106,109,112,115,118,129,131,133,136,143,146,148,150,152,154,156,158,160,161,162,163,164,165,166,167,168,169,170,171,172,173,174

New Line._virtual_line101_line106_line109_line112_line115_line118_line129_line131 bus1=132.1.2.3.4 bus2=97.1.2.3.4 phases=4 linecode=LC8 length=53.0957 units=m
! reduced_from=line101,line106,line109,line112,line115,line118,line129,line131
! eliminated_buses=102,107,110,113,116,119,130

New Line._virtual_line177_line179_line181_line183_line185_line186_line187_line188_line189_line190_line191_line192_line193_line194_line195_line196_line197 bus1=198.1.2.3.4 bus2=176.1.2.3.4 phases=4 linecode=LC9 length=4.70454 units=m
! reduced_from=line177,line179,line181,line183,line185,line186,line187,line188,line189,line190,line191,line192,line193,line194,line195,line196,line197
! eliminated_buses=178,180,182,184,186,187,188,189,190,191,192,193,194,195,196,197

New Line.LINE87 bus1=85.1.2.3.4 bus2=88.1.2.3.4 phases=4 linecode=LC1 length=2.2769 units=m

New Line.LINE119 bus1=117.1.2.3.4 bus2=120.1.2.3.4 phases=4 linecode=LC1 length=9.0533 units=m

New Line.LINE120 bus1=117.1.2.3.4 bus2=121.1.2.3.4 phases=4 linecode=LC1 length=10.4718 units=m

New Line.LINE121 bus1=117.1.2.3.4 bus2=122.1.2.3.4 phases=4 linecode=LC1 length=11.9 units=m

New Line.LINE122 bus1=117.1.2.3.4 bus2=123.1.2.3.4 phases=4 linecode=LC1 length=4.9244 units=m

New Line.LINE123 bus1=117.1.2.3.4 bus2=124.1.2.3.4 phases=4 linecode=LC1 length=14.9739 units=m

New Line.LINE124 bus1=117.1.2.3.4 bus2=125.1.2.3.4 phases=4 linecode=LC1 length=6.096 units=m

New Line.LINE125 bus1=117.1.2.3.4 bus2=126.1.2.3.4 phases=4 linecode=LC1 length=27.4616 units=m

New Line.LINE126 bus1=117.1.2.3.4 bus2=127.1.2.3.4 phases=4 linecode=LC1 length=13.2608 units=m

New Line.LINE127 bus1=117.1.2.3.4 bus2=128.1.2.3.4 phases=4 linecode=LC1 length=10.3256 units=m

New Line.LINE134 bus1=132.1.2.3.4 bus2=135.1.2.3.4 phases=4 linecode=LC2 length=1.0085 units=m

New Line.LINE137 bus1=135.1.2.3.4 bus2=138.1.2.3.4 phases=4 linecode=LC2 length=24.0119 units=m

New Line.LINE138 bus1=135.1.2.3.4 bus2=139.1.2.3.4 phases=4 linecode=LC2 length=36.5321 units=m

New Line.LINE139 bus1=135.1.2.3.4 bus2=140.1.2.3.4 phases=4 linecode=LC2 length=30.6986 units=m

New Line.LINE140 bus1=135.1.2.3.4 bus2=141.1.2.3.4 phases=4 linecode=LC2 length=38.7971 units=m

New Line.LINE141 bus1=135.1.2.3.4 bus2=142.1.2.3.4 phases=4 linecode=LC2 length=45.2103 units=m

New Line.LINE198 bus1=198.1.2.3.4 bus2=199.1.2.3.4 phases=4 linecode=LC1 length=13.8556 units=m

New Line.LINE199 bus1=198.1.2.3.4 bus2=200.1.2.3.4 phases=4 linecode=LC1 length=14.791 units=m

New Line.LINE200 bus1=198.1.2.3.4 bus2=201.1.2.3.4 phases=4 linecode=LC1 length=11.1304 units=m

New Line.LINE201 bus1=198.1.2.3.4 bus2=202.1.2.3.4 phases=4 linecode=LC1 length=9.7898 units=m

New Line.LINE202 bus1=198.1.2.3.4 bus2=203.1.2.3.4 phases=4 linecode=LC1 length=13.244 units=m

New Line.LINE203 bus1=198.1.2.3.4 bus2=204.1.2.3.4 phases=4 linecode=LC1 length=11.0741 units=m

New Line.LINE204 bus1=198.1.2.3.4 bus2=205.1.2.3.4 phases=4 linecode=LC1 length=7.1936 units=m

New Line.LINE205 bus1=198.1.2.3.4 bus2=206.1.2.3.4 phases=4 linecode=LC1 length=5.9751 units=m

New Line.LINE206 bus1=198.1.2.3.4 bus2=207.1.2.3.4 phases=4 linecode=LC1 length=5.9751 units=m

New Line.LINE207 bus1=198.1.2.3.4 bus2=208.1.2.3.4 phases=4 linecode=LC1 length=9.8623 units=m

New Line.LINE208 bus1=198.1.2.3.4 bus2=209.1.2.3.4 phases=4 linecode=LC1 length=4.8637 units=m

New Line.LINE209 bus1=198.1.2.3.4 bus2=210.1.2.3.4 phases=4 linecode=LC1 length=3.9509 units=m

New Line.LINE210 bus1=198.1.2.3.4 bus2=211.1.2.3.4 phases=4 linecode=LC1 length=7.4248 units=m

New Line.LINE211 bus1=198.1.2.3.4 bus2=212.1.2.3.4 phases=4 linecode=LC1 length=9.2305 units=m

New Line.LINE212 bus1=198.1.2.3.4 bus2=213.1.2.3.4 phases=4 linecode=LC1 length=6.1898 units=m

New Line.LINE213 bus1=202.1.2.3.4 bus2=214.1.2.3.4 phases=4 linecode=LC1 length=5.7952 units=m
