! Reduced enabled lines.

New Line._virtual_line0_line1_line2_line3_line4_line5_line6_line7_line8_line9_line10_line11_line12_line13_line14_line15_line16_line17_line18_line19_line20_line21_line22_line23_line24_line25_line26_line27_line28_line29_line30_line31_line32_line33_line34_line35_line36_line37_line38_line39_line40_line41_line42_line43_line44_line45_line46_line47_line48_line49_line50_line51_line52_line53_line54_line55_line56_line57_line58_line59_line60_line61_line62_line63_line64_line65_line66_line67_line68_line69_line70_line71_line72_line73_line74_line75_line76 bus1=sourcebus.1.2.3.4 bus2=77.1.2.3.4 phases=4 linecode=LC8 length=126.127328 units=m
! reduced_from=line0,line1,line2,line3,line4,line5,line6,line7,line8,line9,line10,line11,line12,line13,line14,line15,line16,line17,line18,line19,line20,line21,line22,line23,line24,line25,line26,line27,line28,line29,line30,line31,line32,line33,line34,line35,line36,line37,line38,line39,line40,line41,line42,line43,line44,line45,line46,line47,line48,line49,line50,line51,line52,line53,line54,line55,line56,line57,line58,line59,line60,line61,line62,line63,line64,line65,line66,line67,line68,line69,line70,line71,line72,line73,line74,line75,line76
! eliminated_buses=1,2,3,4,5,6,7,8,9,10,11,12,13,14,15,16,17,18,19,20,21,22,23,24,25,26,27,28,29,30,31,32,33,34,35,36,37,38,39,40,41,42,43,44,45,46,47,48,49,50,51,52,53,54,55,56,57,58,59,60,61,62,63,64,65,66,67,68,69,70,71,72,73,74,75,76

New Line._virtual_line77_line79_line82_line86_line93_line100_line107_line114_line120_line125_line129_line133_line138_line143_line148_line154_line159_line165_line171 bus1=77.1.2.3.4 bus2=172.1.2.3.4 phases=4 linecode=LC8 length=45.02089 units=m
! reduced_from=line77,line79,line82,line86,line93,line100,line107,line114,line120,line125,line129,line133,line138,line143,line148,line154,line159,line165,line171
! eliminated_buses=78,80,83,87,94,101,108,115,121,126,130,134,139,144,149,155,160,166

New Line._virtual_line78_line81_line84 bus1=85.1.2.3.4 bus2=77.1.2.3.4 phases=4 linecode=LC8 length=9.0156 units=m
! reduced_from=line78,line81,line84
! eliminated_buses=79,82

New Line._virtual_line91_line98_line105_line113_line119_line124_line128_line132_line136_line141_line146_line152_line157_line163 bus1=164.1.2.3.4 bus2=85.1.2.3.4 phases=4 linecode=LC1 length=4.920798 units=m
! reduced_from=line91,line98,line105,line113,line119,line124,line128,line132,line136,line141,line146,line152,line157,line163
! eliminated_buses=92,99,106,114,120,125,129,133,137,142,147,153,158

New Line._virtual_line175_line178_line181_line184_line186_line188_line190_line192_line194_line198_line203_line208_line213 bus1=172.1.2.3.4 bus2=214.1.2.3.4 phases=4 linecode=LC1 length=47.10239 units=m
! reduced_from=line175,line178,line181,line184,line186,line188,line190,line192,line194,line198,line203,line208,line213
! eliminated_buses=176,179,182,185,187,189,191,193,195,199,204,209

New Line.LINE168 bus1=164.1.2.3.4 bus2=169.1.2.3.4 phases=4 linecode=LC1 length=8.1758 units=m

New Line.LINE169 bus1=164.1.2.3.4 bus2=170.1.2.3.4 phases=4 linecode=LC1 length=17.1299 units=m
