! Reduced enabled lines.

New Line._virtual_line0_line1_line2_line3_line4_line5_line6_line7_line8_line9_line10_line11_line12_line13_line14_line15_line16_line17_line18_line19_line20_line21_line22_line23_line24_line25_line26_line27_line28_line29_line30_line31_line32_line33_line34_line35_line36_line37_line38_line39_line40_line41_line42_line43_line44_line45_line46_line47_line48_line49_line50_line51_line52_line53_line54_line55_line56_line57_line58_line59_line60_line61_line62_line63_line64_line66_line68_line70 bus1=71.1.2.3.4 bus2=sourcebus.1.2.3.4 phases=4 linecode=LC8 length=103.118026 units=m
! reduced_from=line0,line1,line2,line3,line4,line5,line6,line7,line8,line9,line10,line11,line12,line13,line14,line15,line16,line17,line18,line19,line20,line21,line22,line23,line24,line25,line26,line27,line28,line29,line30,line31,line32,line33,line34,line35,line36,line37,line38,line39,line40,line41,line42,line43,line44,line45,line46,line47,line48,line49,line50,line51,line52,line53,line54,line55,line56,line57,line58,line59,line60,line61,line62,line63,line64,line66,line68,line70
! eliminated_buses=1,2,3,4,5,6,7,8,9,10,11,12,13,14,15,16,17,18,19,20,21,22,23,24,25,26,27,28,29,30,31,32,33,34,35,36,37,38,39,40,41,42,43,44,45,46,47,48,49,50,51,52,53,54,55,56,57,58,59,60,61,62,63,64,65,67,69

New Line._virtual_line72_line75_line79_line81_line83_line85_line87_line89_line91 bus1=92.1.2.3.4 bus2=71.1.2.3.4 phases=4 linecode=LC8 length=20.98401 units=m
! reduced_from=line72,line75,line79,line81,line83,line85,line87,line89,line91
! eliminated_buses=73,76,80,82,84,86,88,90

New Line._virtual_line93_line96_line99_line102_line104_line106_line108_line110_line112_line114 bus1=115.1.2.3.4 bus2=92.1.2.3.4 phases=4 linecode=LC2 length=7.465883 units=m
! reduced_from=line93,line96,line99,line102,line104,line106,line108,line110,line112,line114
! eliminated_buses=94,97,100,103,105,107,109,111,113

New Line._virtual_line94_line97_line100_line103_line105_line107_line109_line111_line113_line115_line116_line117_line118_line119_line120_line121_line122_line123_line124_line125_line126_line127_line128_line129_line130_line131_line132_line133_line134_line135_line136_line137_line138_line139_line140_line141_line142_line143_line144_line145_line146_line147_line148_line149_line150_line151_line152 bus1=153.1.2.3.4 bus2=92.1.2.3.4 phases=4 linecode=LC8 length=33.564471 units=m
! reduced_from=line94,line97,line100,line103,line105,line107,line109,line111,line113,line115,line116,line117,line118,line119,line120,line121,line122,line123,line124,line125,line126,line127,line128,line129,line130,line131,line132,line133,line134,line135,line136,line137,line138,line139,line140,line141,line142,line143,line144,line145,line146,line147,line148,line149,line150,line151,line152
! eliminated_buses=95,98,101,104,106,108,110,112,114,116,117,118,119,120,121,122,123,124,125,126,127,128,129,130,131,132,133,134,135,136,137,138,139,140,141,142,143,144,145,146,147,148,149,150,151,152

New Line._virtual_line153_line155_line157_line159_line161_line163_line165_line167_line169_line171_line173_line175_line177_line179_line181_line183_line185_line187_line189_line191_line193_line195_line197_line199_line201_line203_line205_line207_line209_line211_line213_line215_line217_line219_line221_line223_line225_line227_line229_line231_line233_line235_line237_line239_line241_line243_line245_line247_line249_line251_line253_line255_line257_line259_line261_line263_line265_line267_line270_line273_line277_line282_line288_line294_line300_line305_line310_line314_line317_line321_line325_line330_line335_line340_line345_line351_line356_line361_line367_line374_line381_line389_line395_line400_line404_line409_line413_line418_line423 bus1=424.1.2.3.4 bus2=153.1.2.3.4 phases=4 linecode=LC8 length=125.941361 units=m
! reduced_from=line153,line155,line157,line159,line161,line163,line165,line167,line169,line171,line173,line175,line177,line179,line181,line183,line185,line187,line189,line191,line193,line195,line197,line199,line201,line203,line205,line207,line209,line211,line213,line215,line217,line219,line221,line223,line225,line227,line229,line231,line233,line235,line237,line239,line241,line243,line245,line247,line249,line251,line253,line255,line257,line259,line261,line263,line265,line267,line270,line273,line277,line282,line288,line294,line300,line305,line310,line314,line317,line321,line325,line330,line335,line340,line345,line351,line356,line361,line367,line374,line381,line389,line395,line400,line404,line409,line413,line418,line423
! eliminated_buses=154,156,158,160,162,164,166,168,170,172,174,176,178,180,182,184,186,188,190,192,194,196,198,200,202,204,206,208,210,212,214,216,218,220,222,224,226,228,230,232,234,236,238,240,242,244,246,248,250,252,254,256,258,260,262,264,266,268,271,274,278,283,289,295,301,306,311,315,318,322,326,331,336,341,346,352,357,362,368,375,382,390,396,401,405,410,414,419

New Line._virtual_line154_line156_line158_line160_line162_line164_line166_line168_line170_line172_line174_line176_line178_line180_line182_line184_line186_line188_line190_line192_line194_line196_line198_line200_line202_line204_line206_line208_line210_line212_line214_line216_line218_line220_line222_line224_line226_line228_line230_line232_line234_line236_line238_line240_line242_line244_line246_line248_line250_line252_line254_line256_line258_line260_line262_line264_line266 bus1=267.1.2.3.4 bus2=153.1.2.3.4 phases=4 linecode=LC8 length=49.984751 units=m
! reduced_from=line154,line156,line158,line160,line162,line164,line166,line168,line170,line172,line174,line176,line178,line180,line182,line184,line186,line188,line190,line192,line194,line196,line198,line200,line202,line204,line206,line208,line210,line212,line214,line216,line218,line220,line222,line224,line226,line228,line230,line232,line234,line236,line238,line240,line242,line244,line246,line248,line250,line252,line254,line256,line258,line260,line262,line264,line266
! eliminated_buses=155,157,159,161,163,165,167,169,171,173,175,177,179,181,183,185,187,189,191,193,195,197,199,201,203,205,207,209,211,213,215,217,219,221,223,225,227,229,231,233,235,237,239,241,243,245,247,249,251,253,255,257,259,261,263,265

New Line._virtual_line268_line271_line274_line278_line283_line289_line295_line301_line306 bus1=267.1.2.3.4 bus2=307.1.2.3.4 phases=4 linecode=LC9 length=4.40055 units=m
! reduced_from=line268,line271,line274,line278,line283,line289,line295,line301,line306
! eliminated_buses=269,272,275,279,284,290,296,302

New Line._virtual_line269_line272_line275_line279_line284_line290_line296_line302_line307_line313_line316_line319_line323_line328_line333_line338_line343_line349_line355_line360_line366_line373_line380_line388_line394_line399_line403_line408_line412_line417_line422_line428_line436_line447_line457_line464_line474_line483_line492_line501_line509_line518_line528_line537_line546_line557_line565_line576_line590_line602_line616_line628_line640_line651_line662_line673_line684_line693_line703_line712_line721_line729_line736_line744_line750_line756 bus1=757.1.2.3.4 bus2=267.1.2.3.4 phases=4 linecode=LC8 length=162.86802 units=m
! reduced_from=line269,line272,line275,line279,line284,line290,line296,line302,line307,line313,line316,line319,line323,line328,line333,line338,line343,line349,line355,line360,line366,line373,line380,line388,line394,line399,line403,line408,line412,line417,line422,line428,line436,line447,line457,line464,line474,line483,line492,line501,line509,line518,line528,line537,line546,line557,line565,line576,line590,line602,line616,line628,line640,line651,line662,line673,line684,line693,line703,line712,line721,line729,line736,line744,line750,line756
! eliminated_buses=270,273,276,280,285,291,297,303,308,314,317,320,324,329,334,339,344,350,356,361,367,374,381,389,395,400,404,409,413,418,423,429,437,448,458,465,475,484,493,502,510,519,529,538,547,558,566,577,591,603,617,629,641,652,663,674,685,694,704,713,722,730,737,745,751

New Line._virtual_line429_line437_line448_line458_line465 bus1=424.1.2.3.4 bus2=466.1.2.3.4 phases=4 linecode=LC4 length=2.8203 units=m
! reduced_from=line429,line437,line448,line458,line465
! eliminated_buses=430,438,449,459

New Line._virtual_line440_line450 bus1=431.1.2.3.4 bus2=451.1.2.3.4 phases=4 linecode=LC8 length=8.1866 units=m
! reduced_from=line440,line450
! eliminated_buses=441

New Line._virtual_line460_line467_line478_line487_line494_line503_line511_line520_line530 bus1=531.1.2.3.4 bus2=451.1.2.3.4 phases=4 linecode=LC8 length=31.87548 units=m
! reduced_from=line460,line467,line478,line487,line494,line503,line511,line520,line530
! eliminated_buses=461,468,479,488,495,504,512,521

New Line._virtual_line475_line484_line493_line502_line510_line519_line529_line538_line547_line559_line567_line580_line594 bus1=595.1.2.3.4 bus2=466.1.2.3.4 phases=4 linecode=LC4 length=16.62106 units=m
! reduced_from=line475,line484,line493,line502,line510,line519,line529,line538,line547,line559,line567,line580,line594
! eliminated_buses=476,485,494,503,511,520,530,539,548,560,568,581

New Line._virtual_line549_line560_line569 bus1=540.1.2.3.4 bus2=570.1.2.3.4 phases=4 linecode=LC8 length=7.90322 units=m
! reduced_from=line549,line560,line569
! eliminated_buses=550,561

New Line._virtual_line607_line619_line632_line643_line654_line665_line676_line687_line698_line707_line717 bus1=595.1.2.3.4 bus2=718.1.2.3.4 phases=4 linecode=LC6 length=11.748491 units=m
! reduced_from=line607,line619,line632,line643,line654,line665,line676,line687,line698,line707,line717
! eliminated_buses=608,620,633,644,655,666,677,688,699,708

New Line._virtual_line762_line770_line779_line787_line796_line804_line812_line819_line824_line829_line834_line839_line844_line849_line855_line861_line868_line875_line882_line890_line899_line907_line915_line924_line932_line939_line944_line949_line957_line964_line971_line978_line985_line990_line995_line1000_line1005_line1010_line1015_line1020_line1025_line1029_line1033_line1035_line1037_line1039_line1041_line1043_line1045_line1047_line1049_line1051_line1053_line1055 bus1=757.1.2.3.4 bus2=1056.1.2.3.4 phases=4 linecode=LC9 length=89.49309 units=m
! reduced_from=line762,line770,line779,line787,line796,line804,line812,line819,line824,line829,line834,line839,line844,line849,line855,line861,line868,line875,line882,line890,line899,line907,line915,line924,line932,line939,line944,line949,line957,line964,line971,line978,line985,line990,line995,line1000,line1005,line1010,line1015,line1020,line1025,line1029,line1033,line1035,line1037,line1039,line1041,line1043,line1045,line1047,line1049,line1051,line1053,line1055
! eliminated_buses=763,771,780,788,797,805,813,820,825,830,835,840,845,850,856,862,869,876,883,891,900,908,916,925,933,940,945,950,958,965,972,979,986,991,996,1001,1006,1011,1016,1021,1026,1030,1034,1036,1038,1040,1042,1044,1046,1048,1050,1052,1054

New Line.LINE73 bus1=71.1.2.3.4 bus2=74.1.2.3.4 phases=4 linecode=LC2 length=1.3999 units=m

New Line.LINE76 bus1=74.1.2.3.4 bus2=77.1.2.3.4 phases=4 linecode=LC2 length=9.9425 units=m

New Line.LINE77 bus1=74.1.2.3.4 bus2=78.1.2.3.4 phases=4 linecode=LC2 length=9.9425 units=m

New Line.LINE311 bus1=307.1.2.3.4 bus2=312.1.2.3.4 phases=4 linecode=LC1 length=11.9451 units=m

New Line.LINE430 bus1=424.1.2.3.4 bus2=431.1.2.3.4 phases=4 linecode=LC8 length=6.6238 units=m

New Line.LINE438 bus1=431.1.2.3.4 bus2=439.1.2.3.4 phases=4 linecode=LC1 length=7.3382 units=m

New Line.LINE439 bus1=431.1.2.3.4 bus2=440.1.2.3.4 phases=4 linecode=LC1 length=7.3382 units=m

New Line.LINE461 bus1=451.1.2.3.4 bus2=462.1.2.3.4 phases=4 linecode=LC8 length=2.8339 units=m

New Line.LINE471 bus1=462.1.2.3.4 bus2=472.1.2.3.4 phases=4 linecode=LC1 length=6.209 units=m

New Line.LINE476 bus1=466.1.2.3.4 bus2=477.1.2.3.4 phases=4 linecode=LC8 length=0.076655 units=m

New Line.LINE485 bus1=477.1.2.3.4 bus2=486.1.2.3.4 phases=4 linecode=LC1 length=4.2425 units=m

New Line.LINE539 bus1=531.1.2.3.4 bus2=540.1.2.3.4 phases=4 linecode=LC8 length=13.3086 units=m

New Line.LINE540 bus1=531.1.2.3.4 bus2=541.1.2.3.4 phases=4 linecode=LC8 length=16.1335 units=m

New Line.LINE548 bus1=540.1.2.3.4 bus2=549.1.2.3.4 phases=4 linecode=LC1 length=4.2672 units=m

New Line.LINE550 bus1=541.1.2.3.4 bus2=551.1.2.3.4 phases=4 linecode=LC1 length=4.1122 units=m

New Line.LINE583 bus1=570.1.2.3.4 bus2=584.1.2.3.4 phases=4 linecode=LC1 length=4.7707 units=m

New Line.LINE726 bus1=718.1.2.3.4 bus2=727.1.2.3.4 phases=4 linecode=LC6 length=2.7589 units=m

New Line.LINE1057 bus1=1056.1.2.3.4 bus2=1058.1.2.3.4 phases=4 linecode=LC1 length=38.8686 units=m

New Line.LINE1058 bus1=1056.1.2.3.4 bus2=1059.1.2.3.4 phases=4 linecode=LC1 length=38.859 units=m

New Line.LINE1059 bus1=1056.1.2.3.4 bus2=1060.1.2.3.4 phases=4 linecode=LC1 length=36.0426 units=m

New Line.LINE1060 bus1=1056.1.2.3.4 bus2=1061.1.2.3.4 phases=4 linecode=LC1 length=39.0547 units=m

New Line.LINE1061 bus1=1056.1.2.3.4 bus2=1062.1.2.3.4 phases=4 linecode=LC1 length=36.0322 units=m

New Line.LINE1062 bus1=1056.1.2.3.4 bus2=1063.1.2.3.4 phases=4 linecode=LC1 length=33.2057 units=m

New Line.LINE1063 bus1=1056.1.2.3.4 bus2=1064.1.2.3.4 phases=4 linecode=LC1 length=30.3919 units=m

New Line.LINE1064 bus1=1056.1.2.3.4 bus2=1065.1.2.3.4 phases=4 linecode=LC1 length=36.2433 units=m

New Line.LINE1065 bus1=1056.1.2.3.4 bus2=1066.1.2.3.4 phases=4 linecode=LC1 length=31.7926 units=m

New Line.LINE1066 bus1=1056.1.2.3.4 bus2=1067.1.2.3.4 phases=4 linecode=LC1 length=33.4346 units=m

New Line.LINE1067 bus1=1056.1.2.3.4 bus2=1068.1.2.3.4 phases=4 linecode=LC1 length=27.5675 units=m

New Line.LINE1068 bus1=1056.1.2.3.4 bus2=1069.1.2.3.4 phases=4 linecode=LC1 length=28.9667 units=m

New Line.LINE1069 bus1=1056.1.2.3.4 bus2=1070.1.2.3.4 phases=4 linecode=LC1 length=30.6296 units=m

New Line.LINE1070 bus1=1056.1.2.3.4 bus2=1071.1.2.3.4 phases=4 linecode=LC1 length=27.554 units=m

New Line.LINE1071 bus1=1056.1.2.3.4 bus2=1072.1.2.3.4 phases=4 linecode=LC1 length=24.7441 units=m

New Line.LINE1072 bus1=1056.1.2.3.4 bus2=1073.1.2.3.4 phases=4 linecode=LC1 length=29.2288 units=m

New Line.LINE1073 bus1=1056.1.2.3.4 bus2=1074.1.2.3.4 phases=4 linecode=LC1 length=24.729 units=m

New Line.LINE1074 bus1=1056.1.2.3.4 bus2=1075.1.2.3.4 phases=4 linecode=LC1 length=27.0321 units=m

New Line.LINE1075 bus1=1056.1.2.3.4 bus2=1076.1.2.3.4 phases=4 linecode=LC1 length=22.5817 units=m

New Line.LINE1076 bus1=1056.1.2.3.4 bus2=1077.1.2.3.4 phases=4 linecode=LC1 length=24.2288 units=m
