! Reduced enabled lines.

New Line._virtual_line0_line1_line2_line3_line4_line5_line6_line7_line8_line9_line10_line11_line12_line13_line14_line15_line16_line17_line18_line19_line20_line21_line22_line23_line24_line25_line26_line27_line28_line29_line30_line31_line32_line33_line34_line35_line36_line37_line38_line39_line40_line41_line42_line43_line44_line45_line46_line47_line48_line49_line50_line51_line52_line53_line54_line55_line56_line57_line58_line59_line60_line61_line62_line63_line64_line65_line66_line67_line68_line69_line70_line71_line72_line73_line74_line75_line76_line77_line78_line79_line80_line81_line82_line83_line84_line85_line86_line87_line88_line89 bus1=sourcebus.1.2.3.4 bus2=90.1.2.3.4 phases=4 linecode=LC8 length=75.381377 units=m
! reduced_from=line0,line1,line2,line3,line4,line5,line6,line7,line8,line9,line10,line11,line12,line13,line14,line15,line16,line17,line18,line19,line20,line21,line22,line23,line24,line25,line26,line27,line28,line29,line30,line31,line32,line33,line34,line35,line36,line37,line38,line39,line40,line41,line42,line43,line44,line45,line46,line47,line48,line49,line50,line51,line52,line53,line54,line55,line56,line57,line58,line59,line60,line61,line62,line63,line64,line65,line66,line67,line68,line69,line70,line71,line72,line73,line74,line75,line76,line77,line78,line79,line80,line81,line82,line83,line84,line85,line86,line87,line88,line89
! eliminated_buses=1,2,3,4,5,6,7,8,9,10,11,12,13,14,15,16,17,18,19,20,21,22,23,24,25,26,27,28,29,30,31,32,33,34,35,36,37,38,39,40,41,42,43,44,45,46,47,48,49,50,51,52,53,54,55,56,57,58,59,60,61,62,63,64,65,66,67,68,69,70,71,72,73,74,75,76,77,78,79,80,81,82,83,84,85,86,87,88,89

New Line._virtual_line90_line92_line94_line96_line98_line100 bus1=101.1.2.3.4 bus2=90.1.2.3.4 phases=4 linecode=LC8 length=43.99387 units=m
! reduced_from=line90,line92,line94,line96,line98,line100
! eliminated_buses=91,93,95,97,99

New Line._virtual_line91_line93_line95_line97_line99_line101_line104_line107_line110 bus1=90.1.2.3.4 bus2=111.1.2.3.4 phases=4 linecode=LC8 length=4.35505 units=m
! reduced_from=line91,line93,line95,line97,line99,line101,line104,line107,line110
! eliminated_buses=92,94,96,98,100,102,105,108

New Line._virtual_line102_line105_line108_line111_line115_line119_line122_line125_line128_line131_line134_line137_line140_line144_line148_line152 bus1=153.1.2.3.4 bus2=101.1.2.3.4 phases=4 linecode=LC8 length=12.033561 units=m
! reduced_from=line102,line105,line108,line111,line115,line119,line122,line125,line128,line131,line134,line137,line140,line144,line148,line152
! eliminated_buses=103,106,109,112,116,120,123,126,129,132,135,138,141,145,149

New Line._virtual_line103_line106_line109_line112_line116_line120_line123_line126_line129_line132_line135_line138_line141_line145_line149_line153_line158_line162_line166 bus1=101.1.2.3.4 bus2=167.1.2.3.4 phases=4 linecode=LC8 length=37.24771 units=m
! reduced_from=line103,line106,line109,line112,line116,line120,line123,line126,line129,line132,line135,line138,line141,line145,line149,line153,line158,line162,line166
! eliminated_buses=104,107,110,113,117,121,124,127,130,133,136,139,142,146,150,154,159,163

New Line._virtual_line114_line118_line121_line124_line127_line130_line133_line136_line139_line143_line147_line151_line155_line160_line164_line169_line174_line180_line185_line190_line196_line203_line210_line218_line227_line236_line246_line257_line268_line278_line286_line295_line304_line314_line325 bus1=326.1.2.3.4 bus2=111.1.2.3.4 phases=4 linecode=LC9 length=54.677583 units=m
! reduced_from=line114,line118,line121,line124,line127,line130,line133,line136,line139,line143,line147,line151,line155,line160,line164,line169,line174,line180,line185,line190,line196,line203,line210,line218,line227,line236,line246,line257,line268,line278,line286,line295,line304,line314,line325
! eliminated_buses=115,119,122,125,128,131,134,137,140,144,148,152,156,161,165,170,175,181,186,191,197,204,211,219,228,237,247,258,269,279,287,296,305,315

New Line._virtual_line176_line182_line187_line192 bus1=172.1.2.3.4 bus2=193.1.2.3.4 phases=4 linecode=LC8 length=7.09856 units=m
! reduced_from=line176,line182,line187,line192
! eliminated_buses=177,183,188

New Line._virtual_line198_line205_line212_line220_line229 bus1=193.1.2.3.4 bus2=230.1.2.3.4 phases=4 linecode=LC8 length=34.9064 units=m
! reduced_from=line198,line205,line212,line220,line229
! eliminated_buses=199,206,213,221

New Line._virtual_line199_line206_line213_line222_line231_line242_line253_line264_line275_line284_line293_line302_line312_line323_line333_line369_line378_line386_line393_line400_line406_line412_line418_line423_line428_line433_line438_line442_line447_line451_line455 bus1=193.1.2.3.4 bus2=456.1.2.3.4 phases=4 linecode=LC8 length=38.449119 units=m
! reduced_from=line199,line206,line213,line222,line231,line242,line253,line264,line275,line284,line293,line302,line312,line323,line333,line369,line378,line386,line393,line400,line406,line412,line418,line423,line428,line433,line438,line442,line447,line451,line455
! eliminated_buses=200,207,214,223,232,243,254,265,276,285,294,303,313,324,334,370,379,387,394,401,407,413,419,424,429,434,439,443,448,452

New Line._virtual_line239_line250_line261_line272_line282_line290_line299_line309_line319 bus1=230.1.2.3.4 bus2=320.1.2.3.4 phases=4 linecode=LC8 length=41.1327 units=m
! reduced_from=line239,line250,line261,line272,line282,line290,line299,line309,line319
! eliminated_buses=240,251,262,273,283,291,300,310

New Line._virtual_line240_line251_line262_line273_line283_line292_line301_line311 bus1=230.1.2.3.4 bus2=312.1.2.3.4 phases=4 linecode=LC6 length=2.33908 units=m
! reduced_from=line240,line251,line262,line273,line283,line292,line301,line311
! eliminated_buses=241,252,263,274,284,293,302

New Line._virtual_line330_line367_line376_line384_line390_line397 bus1=320.1.2.3.4 bus2=398.1.2.3.4 phases=4 linecode=LC2 length=2.265909 units=m
! reduced_from=line330,line367,line376,line384,line390,line397
! eliminated_buses=331,368,377,385,391

New Line._virtual_line331_line368_line377_line385_line392_line399_line405_line411_line417_line422_line427_line432_line437_line441_line446 bus1=320.1.2.3.4 bus2=447.1.2.3.4 phases=4 linecode=LC8 length=50.26779 units=m
! reduced_from=line331,line368,line377,line385,line392,line399,line405,line411,line417,line422,line427,line432,line437,line441,line446
! eliminated_buses=332,369,378,386,393,400,406,412,418,423,428,433,438,442

New Line._virtual_line449_line453_line457_line462_line466_line471_line476_line483 bus1=447.1.2.3.4 bus2=484.1.2.3.4 phases=4 linecode=LC1 length=3.36912 units=m
! reduced_from=line449,line453,line457,line462,line466,line471,line476,line483
! eliminated_buses=450,454,458,463,467,472,477

New Line._virtual_line450_line454_line458_line463_line467_line472_line477_line484_line493_line500_line506 bus1=507.1.2.3.4 bus2=447.1.2.3.4 phases=4 linecode=LC8 length=38.32624 units=m
! reduced_from=line450,line454,line458,line463,line467,line472,line477,line484,line493,line500,line506
! eliminated_buses=451,455,459,464,468,473,478,485,494,501

New Line._virtual_line459_line464 bus1=456.1.2.3.4 bus2=465.1.2.3.4 phases=4 linecode=LC8 length=17.9821 units=m
! reduced_from=line459,line464
! eliminated_buses=460

New Line._virtual_line460_line465_line470_line475_line482 bus1=483.1.2.3.4 bus2=456.1.2.3.4 phases=4 linecode=LC2 length=1.34009 units=m
! reduced_from=line460,line465,line470,line475,line482
! eliminated_buses=461,466,471,476

New Line._virtual_line468_line473_line478_line485_line494_line501_line507 bus1=508.1.2.3.4 bus2=465.1.2.3.4 phases=4 linecode=LC2 length=1.66267 units=m
! reduced_from=line468,line473,line478,line485,line494,line501,line507
! eliminated_buses=469,474,479,486,495,502

New Line._virtual_line469_line474 bus1=465.1.2.3.4 bus2=475.1.2.3.4 phases=4 linecode=LC8 length=10.4997 units=m
! reduced_from=line469,line474
! eliminated_buses=470

New Line._virtual_line480_line487_line496_line502_line508 bus1=475.1.2.3.4 bus2=509.1.2.3.4 phases=4 linecode=LC2 length=2.79486 units=m
! reduced_from=line480,line487,line496,line502,line508
! eliminated_buses=481,488,497,503

New Line._virtual_line481_line488 bus1=475.1.2.3.4 bus2=489.1.2.3.4 phases=4 linecode=LC8 length=7.46521 units=m
! reduced_from=line481,line488
! eliminated_buses=482

New Line._virtual_line489_line499_line505_line512_line523_line532_line543_line553_line563_line573_line584 bus1=483.1.2.3.4 bus2=585.1.2.3.4 phases=4 linecode=LC1 length=14.55799 units=m
! reduced_from=line489,line499,line505,line512,line523,line532,line543,line553,line563,line573,line584
! eliminated_buses=490,500,506,513,524,533,544,554,564,574

New Line._virtual_line503_line509_line520_line528_line538_line550_line560_line570_line582 bus1=499.1.2.3.4 bus2=583.1.2.3.4 phases=4 linecode=LC1 length=3.5158 units=m
! reduced_from=line503,line509,line520,line528,line538,line550,line560,line570,line582
! eliminated_buses=504,510,521,529,539,551,561,571

New Line._virtual_line504_line510_line521 bus1=522.1.2.3.4 bus2=499.1.2.3.4 phases=4 linecode=LC8 length=16.9045 units=m
! reduced_from=line504,line510,line521
! eliminated_buses=505,511

New Line._virtual_line513_line524_line533_line544_line554_line564 bus1=565.1.2.3.4 bus2=507.1.2.3.4 phases=4 linecode=LC3 length=2.73513 units=m
! reduced_from=line513,line524,line533,line544,line554,line564
! eliminated_buses=514,525,534,545,555

New Line._virtual_line514_line525_line534_line545_line555_line565_line577_line586_line598_line608_line625_line635_line645_line653_line661_line669_line677_line686_line694_line701_line707_line713_line720_line727_line733_line738_line742_line746_line750_line753_line758_line762_line766_line770_line774_line778_line782_line786_line789 bus1=507.1.2.3.4 bus2=790.1.2.3.4 phases=4 linecode=LC8 length=133.40852 units=m
! reduced_from=line514,line525,line534,line545,line555,line565,line577,line586,line598,line608,line625,line635,line645,line653,line661,line669,line677,line686,line694,line701,line707,line713,line720,line727,line733,line738,line742,line746,line750,line753,line758,line762,line766,line770,line774,line778,line782,line786,line789
! eliminated_buses=515,526,535,546,556,566,578,587,599,609,626,636,646,654,662,670,678,687,695,702,708,714,721,728,734,739,743,747,751,754,759,763,767,771,775,779,783,787

New Line._virtual_line518_line526_line535 bus1=536.1.2.3.4 bus2=509.1.2.3.4 phases=4 linecode=LC8 length=9.10941 units=m
! reduced_from=line518,line526,line535
! eliminated_buses=519,527

New Line._virtual_line519_line527 bus1=509.1.2.3.4 bus2=528.1.2.3.4 phases=4 linecode=LC8 length=17.4742 units=m
! reduced_from=line519,line527
! eliminated_buses=520

New Line._virtual_line530_line541 bus1=522.1.2.3.4 bus2=542.1.2.3.4 phases=4 linecode=LC2 length=12.7629 units=m
! reduced_from=line530,line541
! eliminated_buses=531

New Line._virtual_line536_line548_line558_line568_line580_line591_line604_line621_line632_line642_line651_line659_line667_line675 bus1=676.1.2.3.4 bus2=528.1.2.3.4 phases=4 linecode=LC8 length=50.34382 units=m
! reduced_from=line536,line548,line558,line568,line580,line591,line604,line621,line632,line642,line651,line659,line667,line675
! eliminated_buses=537,549,559,569,581,592,605,622,633,643,652,660,668

New Line._virtual_line537_line549_line559_line569_line581_line592_line605_line622 bus1=528.1.2.3.4 bus2=623.1.2.3.4 phases=4 linecode=LC2 length=7.91012 units=m
! reduced_from=line537,line549,line559,line569,line581,line592,line605,line622
! eliminated_buses=538,550,560,570,582,593,606

New Line._virtual_line546_line556_line566_line578_line589_line601 bus1=602.1.2.3.4 bus2=536.1.2.3.4 phases=4 linecode=LC5 length=4.38249 units=m
! reduced_from=line546,line556,line566,line578,line589,line601
! eliminated_buses=547,557,567,579,590

New Line._virtual_line547_line557_line567_line579_line590_line602_line619_line630 bus1=631.1.2.3.4 bus2=536.1.2.3.4 phases=4 linecode=LC8 length=27.1339 units=m
! reduced_from=line547,line557,line567,line579,line590,line602,line619,line630
! eliminated_buses=548,558,568,580,591,603,620

New Line._virtual_line640_line650_line658_line666_line674_line683_line689 bus1=631.1.2.3.4 bus2=690.1.2.3.4 phases=4 linecode=LC9 length=2.53064 units=m
! reduced_from=line640,line650,line658,line666,line674,line683,line689
! eliminated_buses=641,651,659,667,675,684

New Line._virtual_line685_line692_line699_line705_line711_line717_line724_line731_line736_line741_line745_line749_line752_line757 bus1=758.1.2.3.4 bus2=676.1.2.3.4 phases=4 linecode=LC1 length=16.75071 units=m
! reduced_from=line685,line692,line699,line705,line711,line717,line724,line731,line736,line741,line745,line749,line752,line757
! eliminated_buses=686,693,700,706,712,718,725,732,737,742,746,750,753

New Line._virtual_line792_line796_line802_line807_line812 bus1=790.1.2.3.4 bus2=813.1.2.3.4 phases=4 linecode=LC8 length=19.1798 units=m
! reduced_from=line792,line796,line802,line807,line812
! eliminated_buses=793,797,803,808

New Line._virtual_line794_line800_line805_line810_line815_line821_line829 bus1=830.1.2.3.4 bus2=790.1.2.3.4 phases=4 linecode=LC1 length=15.19559 units=m
! reduced_from=line794,line800,line805,line810,line815,line821,line829
! eliminated_buses=795,801,806,811,816,822

New Line._virtual_line801_line806_line811_line816_line822_line830_line836_line842_line848_line854 bus1=796.1.2.3.4 bus2=855.1.2.3.4 phases=4 linecode=LC1 length=8.044422 units=m
! reduced_from=line801,line806,line811,line816,line822,line830,line836,line842,line848,line854
! eliminated_buses=802,807,812,817,823,831,837,843,849

New Line._virtual_line817_line823_line831_line837_line843_line849_line855_line860_line863_line866_line869_line872_line875_line878_line882_line886_line890_line894_line897_line900_line903_line904_line905_line906_line907_line908 bus1=813.1.2.3.4 bus2=909.1.2.3.4 phases=4 linecode=LC8 length=98.20416 units=m
! reduced_from=line817,line823,line831,line837,line843,line849,line855,line860,line863,line866,line869,line872,line875,line878,line882,line886,line890,line894,line897,line900,line903,line904,line905,line906,line907,line908
! eliminated_buses=818,824,832,838,844,850,856,861,864,867,870,873,876,879,883,887,891,895,898,901,904,905,906,907,908

New Line._virtual_line819_line827_line834_line840_line846_line852 bus1=813.1.2.3.4 bus2=853.1.2.3.4 phases=4 linecode=LC2 length=2.27452 units=m
! reduced_from=line819,line827,line834,line840,line846,line852
! eliminated_buses=820,828,835,841,847

New Line._virtual_line910_line912_line914_line915_line916_line917_line918_line919_line920_line921 bus1=909.1.2.3.4 bus2=922.1.2.3.4 phases=4 linecode=LC3 length=2.112814 units=m
! reduced_from=line910,line912,line914,line915,line916,line917,line918,line919,line920,line921
! eliminated_buses=911,913,915,916,917,918,919,920,921

New Line.LINE156 bus1=153.1.2.3.4 bus2=157.1.2.3.4 phases=4 linecode=LC1 length=4.3758 units=m

New Line.LINE171 bus1=167.1.2.3.4 bus2=172.1.2.3.4 phases=4 linecode=LC1 length=1.0512 units=m

New Line.LINE321 bus1=312.1.2.3.4 bus2=322.1.2.3.4 phases=4 linecode=LC1 length=6.9445 units=m

New Line.LINE322 bus1=312.1.2.3.4 bus2=323.1.2.3.4 phases=4 linecode=LC1 length=6.9445 units=m

New Line.LINE336 bus1=326.1.2.3.4 bus2=337.1.2.3.4 phases=4 linecode=LC1 length=19.1366 units=m

New Line.LINE337 bus1=326.1.2.3.4 bus2=338.1.2.3.4 phases=4 linecode=LC1 length=19.2864 units=m

New Line.LINE338 bus1=326.1.2.3.4 bus2=339.1.2.3.4 phases=4 linecode=LC1 length=18.9378 units=m

New Line.LINE339 bus1=326.1.2.3.4 bus2=340.1.2.3.4 phases=4 linecode=LC1 length=19.0083 units=m

New Line.LINE340 bus1=326.1.2.3.4 bus2=341.1.2.3.4 phases=4 linecode=LC1 length=11.1715 units=m

New Line.LINE341 bus1=326.1.2.3.4 bus2=342.1.2.3.4 phases=4 linecode=LC1 length=20.0268 units=m

New Line.LINE342 bus1=326.1.2.3.4 bus2=343.1.2.3.4 phases=4 linecode=LC1 length=9.7713 units=m

New Line.LINE343 bus1=326.1.2.3.4 bus2=344.1.2.3.4 phases=4 linecode=LC1 length=20.7786 units=m

New Line.LINE344 bus1=326.1.2.3.4 bus2=345.1.2.3.4 phases=4 linecode=LC1 length=8.0712 units=m

New Line.LINE345 bus1=326.1.2.3.4 bus2=346.1.2.3.4 phases=4 linecode=LC1 length=9.7248 units=m

New Line.LINE346 bus1=326.1.2.3.4 bus2=347.1.2.3.4 phases=4 linecode=LC1 length=6.6197 units=m

New Line.LINE347 bus1=326.1.2.3.4 bus2=348.1.2.3.4 phases=4 linecode=LC1 length=6.1764 units=m

New Line.LINE348 bus1=326.1.2.3.4 bus2=349.1.2.3.4 phases=4 linecode=LC1 length=5.0484 units=m

New Line.LINE349 bus1=326.1.2.3.4 bus2=350.1.2.3.4 phases=4 linecode=LC1 length=10.0622 units=m

New Line.LINE350 bus1=326.1.2.3.4 bus2=351.1.2.3.4 phases=4 linecode=LC1 length=6.2045 units=m

New Line.LINE351 bus1=326.1.2.3.4 bus2=352.1.2.3.4 phases=4 linecode=LC1 length=5.2108 units=m

New Line.LINE352 bus1=326.1.2.3.4 bus2=353.1.2.3.4 phases=4 linecode=LC1 length=12.3864 units=m

New Line.LINE353 bus1=326.1.2.3.4 bus2=354.1.2.3.4 phases=4 linecode=LC1 length=4.3866 units=m

New Line.LINE354 bus1=326.1.2.3.4 bus2=355.1.2.3.4 phases=4 linecode=LC1 length=2.4142 units=m

New Line.LINE355 bus1=326.1.2.3.4 bus2=356.1.2.3.4 phases=4 linecode=LC1 length=7.0123 units=m

New Line.LINE356 bus1=326.1.2.3.4 bus2=357.1.2.3.4 phases=4 linecode=LC1 length=4.233 units=m

New Line.LINE357 bus1=326.1.2.3.4 bus2=358.1.2.3.4 phases=4 linecode=LC1 length=0.71013 units=m

New Line.LINE358 bus1=326.1.2.3.4 bus2=359.1.2.3.4 phases=4 linecode=LC1 length=5.7091 units=m

New Line.LINE359 bus1=326.1.2.3.4 bus2=360.1.2.3.4 phases=4 linecode=LC1 length=8.7091 units=m

New Line.LINE360 bus1=326.1.2.3.4 bus2=361.1.2.3.4 phases=4 linecode=LC1 length=3.8312 units=m

New Line.LINE361 bus1=326.1.2.3.4 bus2=362.1.2.3.4 phases=4 linecode=LC1 length=6.4307 units=m

New Line.LINE362 bus1=326.1.2.3.4 bus2=363.1.2.3.4 phases=4 linecode=LC1 length=8.3434 units=m

New Line.LINE363 bus1=326.1.2.3.4 bus2=364.1.2.3.4 phases=4 linecode=LC1 length=11.1485 units=m

New Line.LINE403 bus1=398.1.2.3.4 bus2=404.1.2.3.4 phases=4 linecode=LC1 length=12.3715 units=m

New Line.LINE490 bus1=483.1.2.3.4 bus2=491.1.2.3.4 phases=4 linecode=LC1 length=7.59 units=m

New Line.LINE491 bus1=484.1.2.3.4 bus2=492.1.2.3.4 phases=4 linecode=LC1 length=4.94 units=m

New Line.LINE492 bus1=484.1.2.3.4 bus2=493.1.2.3.4 phases=4 linecode=LC1 length=13.221 units=m

New Line.LINE497 bus1=489.1.2.3.4 bus2=498.1.2.3.4 phases=4 linecode=LC1 length=3.2927 units=m

New Line.LINE498 bus1=489.1.2.3.4 bus2=499.1.2.3.4 phases=4 linecode=LC8 length=1.5977 units=m

New Line.LINE515 bus1=508.1.2.3.4 bus2=516.1.2.3.4 phases=4 linecode=LC2 length=11.7776 units=m

New Line.LINE516 bus1=508.1.2.3.4 bus2=517.1.2.3.4 phases=4 linecode=LC2 length=11.6119 units=m

New Line.LINE517 bus1=508.1.2.3.4 bus2=518.1.2.3.4 phases=4 linecode=LC2 length=12.3863 units=m

New Line.LINE574 bus1=565.1.2.3.4 bus2=575.1.2.3.4 phases=4 linecode=LC1 length=15.4924 units=m

New Line.LINE575 bus1=565.1.2.3.4 bus2=576.1.2.3.4 phases=4 linecode=LC1 length=15.4924 units=m

New Line.LINE593 bus1=583.1.2.3.4 bus2=594.1.2.3.4 phases=4 linecode=LC1 length=11.772 units=m

New Line.LINE594 bus1=583.1.2.3.4 bus2=595.1.2.3.4 phases=4 linecode=LC1 length=7.5601 units=m

New Line.LINE595 bus1=583.1.2.3.4 bus2=596.1.2.3.4 phases=4 linecode=LC1 length=5.1091 units=m

New Line.LINE611 bus1=602.1.2.3.4 bus2=612.1.2.3.4 phases=4 linecode=LC1 length=12.9933 units=m

New Line.LINE612 bus1=602.1.2.3.4 bus2=613.1.2.3.4 phases=4 linecode=LC1 length=12.9392 units=m

New Line.LINE613 bus1=602.1.2.3.4 bus2=614.1.2.3.4 phases=4 linecode=LC1 length=11.7241 units=m

New Line.LINE614 bus1=602.1.2.3.4 bus2=615.1.2.3.4 phases=4 linecode=LC1 length=11.1383 units=m

New Line.LINE615 bus1=602.1.2.3.4 bus2=616.1.2.3.4 phases=4 linecode=LC1 length=12.6504 units=m

New Line.LINE616 bus1=602.1.2.3.4 bus2=617.1.2.3.4 phases=4 linecode=LC1 length=9.8634 units=m

New Line.LINE617 bus1=602.1.2.3.4 bus2=618.1.2.3.4 phases=4 linecode=LC1 length=10.3868 units=m

New Line.LINE618 bus1=602.1.2.3.4 bus2=619.1.2.3.4 phases=4 linecode=LC1 length=5.402 units=m

New Line.LINE696 bus1=690.1.2.3.4 bus2=697.1.2.3.4 phases=4 linecode=LC1 length=9.0063 units=m

New Line.LINE795 bus1=790.1.2.3.4 bus2=796.1.2.3.4 phases=4 linecode=LC8 length=1.0011 units=m

New Line.LINE858 bus1=853.1.2.3.4 bus2=859.1.2.3.4 phases=4 linecode=LC1 length=22.9952 units=m

New Line.LINE922 bus1=922.1.2.3.4 bus2=923.1.2.3.4 phases=4 linecode=LC1 length=17.1139 units=m
