! Reduced enabled lines.

New Line._virtual_line0_line1_line2_line3_line4_line5_line6_line7_line8_line9_line10_line11_line12_line13_line14_line15_line16 bus1=sourcebus.1.2.3.4 bus2=17.1.2.3.4 phases=4 linecode=LC5 length=6.473724 units=m
! reduced_from=line0,line1,line2,line3,line4,line5,line6,line7,line8,line9,line10,line11,line12,line13,line14,line15,line16
! eliminated_buses=1,2,3,4,5,6,7,8,9,10,11,12,13,14,15,16

New Line._virtual_line17_line20_line23_line27_line31_line35_line39_line43_line47_line51_line55_line59_line63_line67_line71_line75_line79_line83_line87_line92_line96_line100_line105_line109_line113_line117_line122_line127_line132_line139_line147 bus1=17.1.2.3.4 bus2=148.1.2.3.4 phases=4 linecode=LC9 length=87.99213 units=m
! reduced_from=line17,line20,line23,line27,line31,line35,line39,line43,line47,line51,line55,line59,line63,line67,line71,line75,line79,line83,line87,line92,line96,line100,line105,line109,line113,line117,line122,line127,line132,line139,line147
! eliminated_buses=18,21,24,28,32,36,40,44,48,52,56,60,64,68,72,76,80,84,88,93,97,101,106,110,114,118,123,128,133,140

New Line._virtual_line18_line21 bus1=22.1.2.3.4 bus2=17.1.2.3.4 phases=4 linecode=LC5 length=24.7705 units=m
! reduced_from=line18,line21
! eliminated_buses=19

New Line._virtual_line24_line28_line32_line36_line40_line44_line48_line52_line56_line60_line64_line68_line72_line76_line80_line84_line88_line93_line97_line101_line106_line110_line114_line118_line123_line128_line133_line140_line148_line183 bus1=184.1.2.3.4 bus2=22.1.2.3.4 phases=4 linecode=LC9 length=55.817629 units=m
! reduced_from=line24,line28,line32,line36,line40,line44,line48,line52,line56,line60,line64,line68,line72,line76,line80,line84,line88,line93,line97,line101,line106,line110,line114,line118,line123,line128,line133,line140,line148,line183
! eliminated_buses=25,29,33,37,41,45,49,53,57,61,65,69,73,77,81,85,89,94,98,102,107,111,115,119,124,129,134,141,149

New Line._virtual_line25_line29_line33_line37_line41_line45_line49_line53_line57_line61_line65_line69_line73_line77_line81_line85 bus1=86.1.2.3.4 bus2=22.1.2.3.4 phases=4 linecode=LC5 length=90.204393 units=m
! reduced_from=line25,line29,line33,line37,line41,line45,line49,line53,line57,line61,line65,line69,line73,line77,line81,line85
! eliminated_buses=26,30,34,38,42,46,50,54,58,62,66,70,74,78,82

New Line._virtual_line90_line94_line98_line102_line107_line111_line115 bus1=86.1.2.3.4 bus2=116.1.2.3.4 phases=4 linecode=LC5 length=9.04992 units=m
! reduced_from=line90,line94,line98,line102,line107,line111,line115
! eliminated_buses=91,95,99,103,108,112

New Line._virtual_line119_line124_line129_line135_line142 bus1=143.1.2.3.4 bus2=116.1.2.3.4 phases=4 linecode=LC9 length=9.45963 units=m
! reduced_from=line119,line124,line129,line135,line142
! eliminated_buses=120,125,130,136

New Line._virtual_line120_line125_line130_line136 bus1=116.1.2.3.4 bus2=137.1.2.3.4 phases=4 linecode=LC9 length=2.18228 units=m
! reduced_from=line120,line125,line130,line136
! eliminated_buses=121,126,131

New Line._virtual_line143_line153_line190_line236_line249_line261_line274 bus1=137.1.2.3.4 bus2=275.1.2.3.4 phases=4 linecode=LC5 length=25.77999 units=m
! reduced_from=line143,line153,line190,line236,line249,line261,line274
! eliminated_buses=144,154,191,237,250,262

New Line._virtual_line144_line154_line191 bus1=192.1.2.3.4 bus2=137.1.2.3.4 phases=4 linecode=LC9 length=5.76474 units=m
! reduced_from=line144,line154,line191
! eliminated_buses=145,155

New Line._virtual_line150_line185_line230_line244_line257_line270_line282_line295 bus1=143.1.2.3.4 bus2=296.1.2.3.4 phases=4 linecode=LC2 length=10.19379 units=m
! reduced_from=line150,line185,line230,line244,line257,line270,line282,line295
! eliminated_buses=151,186,231,245,258,271,283

New Line._virtual_line151_line186_line231_line245_line258_line271_line283_line296_line310_line326 bus1=327.1.2.3.4 bus2=143.1.2.3.4 phases=4 linecode=LC2 length=12.827549 units=m
! reduced_from=line151,line186,line231,line245,line258,line271,line283,line296,line310,line326
! eliminated_buses=152,187,232,246,259,272,284,297,311

New Line._virtual_line187_line232_line246_line259_line272 bus1=153.1.2.3.4 bus2=273.1.2.3.4 phases=4 linecode=LC2 length=12.38413 units=m
! reduced_from=line187,line232,line246,line259,line272
! eliminated_buses=188,233,247,260

New Line._virtual_line188_line233_line247_line260_line273_line284_line297 bus1=298.1.2.3.4 bus2=153.1.2.3.4 phases=4 linecode=LC2 length=15.93223 units=m
! reduced_from=line188,line233,line247,line260,line273,line284,line297
! eliminated_buses=189,234,248,261,274,285

New Line._virtual_line237_line250_line262_line275_line287_line300_line315 bus1=192.1.2.3.4 bus2=316.1.2.3.4 phases=4 linecode=LC2 length=13.4337 units=m
! reduced_from=line237,line250,line262,line275,line287,line300,line315
! eliminated_buses=238,251,263,276,288,301

New Line._virtual_line251_line263_line276_line288_line301_line316_line330 bus1=331.1.2.3.4 bus2=239.1.2.3.4 phases=4 linecode=LC2 length=10.87717 units=m
! reduced_from=line251,line263,line276,line288,line301,line316,line330
! eliminated_buses=252,264,277,289,302,317

New Line._virtual_line264_line277_line289_line302_line317_line331 bus1=253.1.2.3.4 bus2=332.1.2.3.4 phases=4 linecode=LC2 length=13.71491 units=m
! reduced_from=line264,line277,line289,line302,line317,line331
! eliminated_buses=265,278,290,303,318

New Line._virtual_line265_line278 bus1=279.1.2.3.4 bus2=253.1.2.3.4 phases=4 linecode=LC9 length=5.12531 units=m
! reduced_from=line265,line278
! eliminated_buses=266

New Line._virtual_line285_line298_line313_line328_line342_line355_line368 bus1=275.1.2.3.4 bus2=369.1.2.3.4 phases=4 linecode=LC8 length=40.51535 units=m
! reduced_from=line285,line298,line313,line328,line342,line355,line368
! eliminated_buses=286,299,314,329,343,356

New Line._virtual_line290_line303_line318_line332_line344_line357_line370 bus1=279.1.2.3.4 bus2=371.1.2.3.4 phases=4 linecode=LC2 length=13.41323 units=m
! reduced_from=line290,line303,line318,line332,line344,line357,line370
! eliminated_buses=291,304,319,333,345,358

New Line._virtual_line304_line319_line333_line345_line358_line371 bus1=292.1.2.3.4 bus2=372.1.2.3.4 phases=4 linecode=LC2 length=13.65001 units=m
! reduced_from=line304,line319,line333,line345,line358,line371
! eliminated_buses=305,320,334,346,359

New Line._virtual_line320_line334_line346_line359_line372_line384_line398_line412_line427 bus1=428.1.2.3.4 bus2=306.1.2.3.4 phases=4 linecode=LC2 length=11.91943 units=m
! reduced_from=line320,line334,line346,line359,line372,line384,line398,line412,line427
! eliminated_buses=321,335,347,360,373,385,399,413

New Line._virtual_line335_line347_line360_line373_line385_line399_line413_line428 bus1=322.1.2.3.4 bus2=429.1.2.3.4 phases=4 linecode=LC2 length=15.47855 units=m
! reduced_from=line335,line347,line360,line373,line385,line399,line413,line428
! eliminated_buses=336,348,361,374,386,400,414

New Line._virtual_line348_line361_line374_line386_line400_line414_line429_line442_line457_line470_line482_line494_line507_line521_line533_line543_line553 bus1=554.1.2.3.4 bus2=337.1.2.3.4 phases=4 linecode=LC2 length=15.37067 units=m
! reduced_from=line348,line361,line374,line386,line400,line414,line429,line442,line457,line470,line482,line494,line507,line521,line533,line543,line553
! eliminated_buses=349,362,375,387,401,415,430,443,458,471,483,495,508,522,534,544

New Line._virtual_line381_line393_line406_line421_line436_line451_line464_line476_line487 bus1=369.1.2.3.4 bus2=488.1.2.3.4 phases=4 linecode=LC9 length=20.830634 units=m
! reduced_from=line381,line393,line406,line421,line436,line451,line464,line476,line487
! eliminated_buses=382,394,407,422,437,452,465,477

New Line._virtual_line499_line512_line525_line535_line545_line555_line563_line571_line578_line585 bus1=488.1.2.3.4 bus2=586.1.2.3.4 phases=4 linecode=LC2 length=19.38473 units=m
! reduced_from=line499,line512,line525,line535,line545,line555,line563,line571,line578,line585
! eliminated_buses=500,513,526,536,546,556,564,572,579

New Line._virtual_line500_line513_line526_line536_line546 bus1=488.1.2.3.4 bus2=547.1.2.3.4 phases=4 linecode=LC2 length=10.26368 units=m
! reduced_from=line500,line513,line526,line536,line546
! eliminated_buses=501,514,527,537

New Line._virtual_line515_line527_line537_line547_line556_line564_line572_line579_line586_line592_line598_line604_line610_line614_line618_line622_line627_line632_line637_line641_line645_line650_line655_line659_line663_line667_line671_line675_line679_line685_line691_line696_line700_line704_line708_line713_line718_line723_line728_line732_line736_line740 bus1=741.1.2.3.4 bus2=502.1.2.3.4 phases=4 linecode=LC9 length=38.223199 units=m
! reduced_from=line515,line527,line537,line547,line556,line564,line572,line579,line586,line592,line598,line604,line610,line614,line618,line622,line627,line632,line637,line641,line645,line650,line655,line659,line663,line667,line671,line675,line679,line685,line691,line696,line700,line704,line708,line713,line718,line723,line728,line732,line736,line740
! eliminated_buses=516,528,538,548,557,565,573,580,587,593,599,605,611,615,619,623,628,633,638,642,646,651,656,660,664,668,672,676,680,686,692,697,701,705,709,714,719,724,729,733,737

New Line._virtual_line744_line749_line754_line759_line764_line769_line774_line778_line782_line786_line790_line794 bus1=795.1.2.3.4 bus2=741.1.2.3.4 phases=4 linecode=LC9 length=18.79482 units=m
! reduced_from=line744,line749,line754,line759,line764,line769,line774,line778,line782,line786,line790,line794
! eliminated_buses=745,750,755,760,765,770,775,779,783,787,791

New Line._virtual_line745_line750_line755_line760_line765_line770_line775_line779_line783_line787_line791_line795_line800_line807_line814_line820_line826_line832_line841_line851_line862_line873_line884_line895_line905_line917_line928_line942_line958_line975_line991 bus1=992.1.2.3.4 bus2=741.1.2.3.4 phases=4 linecode=LC9 length=84.20289 units=m
! reduced_from=line745,line750,line755,line760,line765,line770,line775,line779,line783,line787,line791,line795,line800,line807,line814,line820,line826,line832,line841,line851,line862,line873,line884,line895,line905,line917,line928,line942,line958,line975,line991
! eliminated_buses=746,751,756,761,766,771,776,780,784,788,792,796,801,808,815,821,827,833,842,852,863,874,885,896,906,918,929,943,959,976

New Line._virtual_line799_line806_line813_line819_line825_line831_line840 bus1=841.1.2.3.4 bus2=795.1.2.3.4 phases=4 linecode=LC2 length=8.75016 units=m
! reduced_from=line799,line806,line813,line819,line825,line831,line840
! eliminated_buses=800,807,814,820,826,832

New Line._virtual_line804_line811_line817_line823_line829 bus1=830.1.2.3.4 bus2=799.1.2.3.4 phases=4 linecode=LC9 length=18.5904 units=m
! reduced_from=line804,line811,line817,line823,line829
! eliminated_buses=805,812,818,824

New Line._virtual_line805_line812_line818_line824_line830_line839_line848_line860_line871_line882_line893_line903 bus1=904.1.2.3.4 bus2=799.1.2.3.4 phases=4 linecode=LC2 length=14.97297 units=m
! reduced_from=line805,line812,line818,line824,line830,line839,line848,line860,line871,line882,line893,line903
! eliminated_buses=806,813,819,825,831,840,849,861,872,883,894

New Line._virtual_line836_line845 bus1=830.1.2.3.4 bus2=846.1.2.3.4 phases=4 linecode=LC9 length=3.514 units=m
! reduced_from=line836,line845
! eliminated_buses=837

New Line._virtual_line837_line846_line858_line869_line880_line891_line901_line912_line924_line938_line954_line971_line987_line1004_line1023_line1042_line1062_line1084_line1104_line1124_line1148_line1174_line1199_line1225_line1252_line1278_line1301_line1325_line1350_line1375_line1401 bus1=830.1.2.3.4 bus2=1402.1.2.3.4 phases=4 linecode=LC2 length=24.296725 units=m
! reduced_from=line837,line846,line858,line869,line880,line891,line901,line912,line924,line938,line954,line971,line987,line1004,line1023,line1042,line1062,line1084,line1104,line1124,line1148,line1174,line1199,line1225,line1252,line1278,line1301,line1325,line1350,line1375,line1401
! eliminated_buses=838,847,859,870,881,892,902,913,925,939,955,972,988,1005,1024,1043,1063,1085,1105,1125,1149,1175,1200,1226,1253,1279,1302,1326,1351,1376

New Line._virtual_line838_line847_line859_line870_line881_line892_line902_line913_line925_line939_line955_line972_line988_line1005_line1024_line1043_line1063_line1085_line1106_line1126_line1150_line1176_line1201_line1227_line1253_line1279_line1302_line1326_line1351_line1376_line1402_line1427_line1452_line1475_line1499_line1521 bus1=1522.1.2.3.4 bus2=830.1.2.3.4 phases=4 linecode=LC2 length=23.67897 units=m
! reduced_from=line838,line847,line859,line870,line881,line892,line902,line913,line925,line939,line955,line972,line988,line1005,line1024,line1043,line1063,line1085,line1106,line1126,line1150,line1176,line1201,line1227,line1253,line1279,line1302,line1326,line1351,line1376,line1402,line1427,line1452,line1475,line1499,line1521
! eliminated_buses=839,848,860,871,882,893,903,914,926,940,956,973,989,1006,1025,1044,1064,1086,1107,1127,1151,1177,1202,1228,1254,1280,1303,1327,1352,1377,1403,1428,1453,1476,1500

New Line._virtual_line849_line861_line872_line883_line894_line904_line916_line927_line941_line957_line974_line990_line1007_line1026_line1045_line1065 bus1=841.1.2.3.4 bus2=1066.1.2.3.4 phases=4 linecode=LC2 length=20.55671 units=m
! reduced_from=line849,line861,line872,line883,line894,line904,line916,line927,line941,line957,line974,line990,line1007,line1026,line1045,line1065
! eliminated_buses=850,862,873,884,895,905,917,928,942,958,975,991,1008,1027,1046

New Line._virtual_line855_line866_line877_line888_line898_line909_line921 bus1=922.1.2.3.4 bus2=846.1.2.3.4 phases=4 linecode=LC9 length=25.6901 units=m
! reduced_from=line855,line866,line877,line888,line898,line909,line921
! eliminated_buses=856,867,878,889,899,910

New Line._virtual_line856_line867_line878_line889_line899_line910_line922_line936_line952_line969_line985_line1002_line1021_line1040_line1060_line1082_line1102_line1122_line1146_line1171_line1197_line1223 bus1=846.1.2.3.4 bus2=1224.1.2.3.4 phases=4 linecode=LC2 length=12.439326 units=m
! reduced_from=line856,line867,line878,line889,line899,line910,line922,line936,line952,line969,line985,line1002,line1021,line1040,line1060,line1082,line1102,line1122,line1146,line1171,line1197,line1223
! eliminated_buses=857,868,879,890,900,911,923,937,953,970,986,1003,1022,1041,1061,1083,1103,1123,1147,1172,1198

New Line._virtual_line857_line868_line879_line890_line900_line911_line923_line937_line953_line970_line986_line1003_line1022_line1041_line1061_line1083_line1103_line1123_line1147 bus1=846.1.2.3.4 bus2=1148.1.2.3.4 phases=4 linecode=LC2 length=15.043867 units=m
! reduced_from=line857,line868,line879,line890,line900,line911,line923,line937,line953,line970,line986,line1003,line1022,line1041,line1061,line1083,line1103,line1123,line1147
! eliminated_buses=858,869,880,891,901,912,924,938,954,971,987,1004,1023,1042,1062,1084,1104,1124

New Line._virtual_line914_line926_line940_line956_line973_line989_line1006_line1025_line1044_line1064_line1086_line1107_line1127_line1151_line1177_line1202_line1228_line1254_line1280_line1303_line1327 bus1=1328.1.2.3.4 bus2=904.1.2.3.4 phases=4 linecode=LC2 length=22.438929 units=m
! reduced_from=line914,line926,line940,line956,line973,line989,line1006,line1025,line1044,line1064,line1086,line1107,line1127,line1151,line1177,line1202,line1228,line1254,line1280,line1303,line1327
! eliminated_buses=915,927,941,957,974,990,1007,1026,1045,1065,1087,1108,1128,1152,1178,1203,1229,1255,1281,1304

New Line._virtual_line934_line950_line967_line983_line1000_line1019_line1038_line1058_line1080_line1100_line1120_line1144_line1169_line1195_line1221_line1247_line1274_line1297_line1321_line1346_line1371_line1397_line1421 bus1=1422.1.2.3.4 bus2=922.1.2.3.4 phases=4 linecode=LC2 length=9.129481 units=m
! reduced_from=line934,line950,line967,line983,line1000,line1019,line1038,line1058,line1080,line1100,line1120,line1144,line1169,line1195,line1221,line1247,line1274,line1297,line1321,line1346,line1371,line1397,line1421
! eliminated_buses=935,951,968,984,1001,1020,1039,1059,1081,1101,1121,1145,1170,1196,1222,1248,1275,1298,1322,1347,1372,1398

New Line._virtual_line935_line951_line968_line984_line1001_line1020_line1039_line1059_line1081_line1101_line1121_line1145_line1170_line1196_line1222_line1248_line1275_line1298_line1322_line1347_line1372_line1398_line1422_line1448_line1471_line1495_line1517_line1539_line1561_line1580_line1598_line1616_line1634 bus1=922.1.2.3.4 bus2=1635.1.2.3.4 phases=4 linecode=LC2 length=12.182479 units=m
! reduced_from=line935,line951,line968,line984,line1001,line1020,line1039,line1059,line1081,line1101,line1121,line1145,line1170,line1196,line1222,line1248,line1275,line1298,line1322,line1347,line1372,line1398,line1422,line1448,line1471,line1495,line1517,line1539,line1561,line1580,line1598,line1616,line1634
! eliminated_buses=936,952,969,985,1002,1021,1040,1060,1082,1102,1122,1146,1171,1197,1223,1249,1276,1299,1323,1348,1373,1399,1423,1449,1472,1496,1518,1540,1562,1581,1599,1617

New Line._virtual_line947_line964_line980_line997_line1016_line1035_line1055 bus1=934.1.2.3.4 bus2=1056.1.2.3.4 phases=4 linecode=LC9 length=18.9448 units=m
! reduced_from=line947,line964,line980,line997,line1016,line1035,line1055
! eliminated_buses=948,965,981,998,1017,1036

New Line._virtual_line948_line965_line981_line998_line1017_line1036_line1056_line1078_line1098_line1118_line1142_line1167_line1193_line1219_line1245_line1272_line1295_line1319_line1344_line1369_line1395_line1419_line1444_line1468_line1492_line1514_line1536_line1558_line1577_line1595_line1613_line1631_line1650_line1668_line1687_line1703_line1718_line1733_line1747_line1767_line1785_line1803_line1821 bus1=934.1.2.3.4 bus2=1822.1.2.3.4 phases=4 linecode=LC2 length=27.498886 units=m
! reduced_from=line948,line965,line981,line998,line1017,line1036,line1056,line1078,line1098,line1118,line1142,line1167,line1193,line1219,line1245,line1272,line1295,line1319,line1344,line1369,line1395,line1419,line1444,line1468,line1492,line1514,line1536,line1558,line1577,line1595,line1613,line1631,line1650,line1668,line1687,line1703,line1718,line1733,line1747,line1767,line1785,line1803,line1821
! eliminated_buses=949,966,982,999,1018,1037,1057,1079,1099,1119,1143,1168,1194,1220,1246,1273,1296,1320,1345,1370,1396,1420,1445,1469,1493,1515,1537,1559,1578,1596,1614,1632,1651,1669,1688,1704,1719,1734,1748,1768,1786,1804

New Line._virtual_line949_line966_line982_line999_line1018_line1037_line1057_line1079_line1099_line1119_line1143_line1168_line1194_line1220_line1246_line1273_line1296_line1320_line1345_line1370_line1396_line1420_line1445_line1469_line1493_line1515_line1537_line1559_line1578_line1596_line1614_line1632_line1651_line1669_line1688_line1704_line1719_line1734_line1748_line1768_line1786_line1804_line1822_line1840 bus1=1841.1.2.3.4 bus2=934.1.2.3.4 phases=4 linecode=LC2 length=28.842418 units=m
! reduced_from=line949,line966,line982,line999,line1018,line1037,line1057,line1079,line1099,line1119,line1143,line1168,line1194,line1220,line1246,line1273,line1296,line1320,line1345,line1370,line1396,line1420,line1445,line1469,line1493,line1515,line1537,line1559,line1578,line1596,line1614,line1632,line1651,line1669,line1688,line1704,line1719,line1734,line1748,line1768,line1786,line1804,line1822,line1840
! eliminated_buses=950,967,983,1000,1019,1038,1058,1080,1100,1120,1144,1169,1195,1221,1247,1274,1297,1321,1346,1371,1397,1421,1446,1470,1494,1516,1538,1560,1579,1597,1615,1633,1652,1670,1689,1705,1720,1735,1749,1769,1787,1805,1823

New Line._virtual_line1008_line1027_line1046_line1066_line1087_line1108 bus1=992.1.2.3.4 bus2=1109.1.2.3.4 phases=4 linecode=LC9 length=16.4329 units=m
! reduced_from=line1008,line1027,line1046,line1066,line1087,line1108
! eliminated_buses=1009,1028,1047,1067,1088

New Line._virtual_line1009_line1028_line1047_line1067_line1088_line1109_line1133_line1157_line1183_line1208_line1234_line1260_line1286_line1309_line1333_line1357_line1382_line1408_line1433_line1458_line1483_line1506_line1529_line1551_line1572_line1590_line1608_line1626 bus1=1627.1.2.3.4 bus2=992.1.2.3.4 phases=4 linecode=LC6 length=15.30021 units=m
! reduced_from=line1009,line1028,line1047,line1067,line1088,line1109,line1133,line1157,line1183,line1208,line1234,line1260,line1286,line1309,line1333,line1357,line1382,line1408,line1433,line1458,line1483,line1506,line1529,line1551,line1572,line1590,line1608,line1626
! eliminated_buses=1010,1029,1048,1068,1089,1110,1134,1158,1184,1209,1235,1261,1287,1310,1334,1358,1383,1409,1434,1459,1484,1507,1530,1552,1573,1591,1609

New Line._virtual_line1010_line1029_line1048_line1068_line1089_line1110_line1134_line1158_line1184_line1209_line1235 bus1=992.1.2.3.4 bus2=1236.1.2.3.4 phases=4 linecode=LC6 length=6.083965 units=m
! reduced_from=line1010,line1029,line1048,line1068,line1089,line1110,line1134,line1158,line1184,line1209,line1235
! eliminated_buses=1011,1030,1049,1069,1090,1111,1135,1159,1185,1210

New Line._virtual_line1075_line1095_line1115_line1139_line1164_line1190_line1216_line1242_line1269_line1292_line1316_line1341_line1366_line1392_line1416_line1441_line1465_line1489_line1511_line1533_line1555_line1574_line1592_line1610_line1628_line1647_line1665_line1684_line1700_line1715_line1730_line1744_line1763_line1781_line1799_line1817_line1834_line1852_line1869_line1885_line1901_line1918_line1933_line1947_line1961_line1974_line1987_line1999_line2010_line2021_line2031_line2041_line2051_line2062_line2075_line2086_line2097_line2107 bus1=2108.1.2.3.4 bus2=1056.1.2.3.4 phases=4 linecode=LC2 length=30.971915 units=m
! reduced_from=line1075,line1095,line1115,line1139,line1164,line1190,line1216,line1242,line1269,line1292,line1316,line1341,line1366,line1392,line1416,line1441,line1465,line1489,line1511,line1533,line1555,line1574,line1592,line1610,line1628,line1647,line1665,line1684,line1700,line1715,line1730,line1744,line1763,line1781,line1799,line1817,line1834,line1852,line1869,line1885,line1901,line1918,line1933,line1947,line1961,line1974,line1987,line1999,line2010,line2021,line2031,line2041,line2051,line2062,line2075,line2086,line2097,line2107
! eliminated_buses=1076,1096,1116,1140,1165,1191,1217,1243,1270,1293,1317,1342,1367,1393,1417,1442,1466,1490,1512,1534,1556,1575,1593,1611,1629,1648,1666,1685,1701,1716,1731,1745,1764,1782,1800,1818,1835,1853,1870,1886,1902,1919,1934,1948,1962,1975,1988,2000,2011,2022,2032,2042,2052,2063,2076,2087,2098

New Line._virtual_line1076_line1096_line1116_line1140_line1165_line1191_line1217_line1243_line1270_line1293_line1317_line1342_line1367_line1393_line1417_line1442_line1466_line1490_line1512_line1534_line1556_line1575_line1593_line1611_line1629_line1648_line1666_line1685_line1701_line1716_line1731_line1745_line1765_line1783_line1801_line1819_line1836_line1854_line1871_line1887 bus1=1888.1.2.3.4 bus2=1056.1.2.3.4 phases=4 linecode=LC2 length=14.138615 units=m
! reduced_from=line1076,line1096,line1116,line1140,line1165,line1191,line1217,line1243,line1270,line1293,line1317,line1342,line1367,line1393,line1417,line1442,line1466,line1490,line1512,line1534,line1556,line1575,line1593,line1611,line1629,line1648,line1666,line1685,line1701,line1716,line1731,line1745,line1765,line1783,line1801,line1819,line1836,line1854,line1871,line1887
! eliminated_buses=1077,1097,1117,1141,1166,1192,1218,1244,1271,1294,1318,1343,1368,1394,1418,1443,1467,1491,1513,1535,1557,1576,1594,1612,1630,1649,1667,1686,1702,1717,1732,1746,1766,1784,1802,1820,1837,1855,1872

New Line._virtual_line1077_line1097_line1117_line1141_line1166_line1192_line1218_line1244_line1271_line1294_line1318_line1343_line1368_line1394_line1418_line1443_line1467_line1491_line1513_line1535_line1557_line1576_line1594_line1612_line1630_line1649_line1667_line1686_line1702_line1717_line1732_line1746_line1766_line1784_line1802_line1820_line1837_line1855_line1872_line1888 bus1=1056.1.2.3.4 bus2=1889.1.2.3.4 phases=4 linecode=LC2 length=19.312807 units=m
! reduced_from=line1077,line1097,line1117,line1141,line1166,line1192,line1218,line1244,line1271,line1294,line1318,line1343,line1368,line1394,line1418,line1443,line1467,line1491,line1513,line1535,line1557,line1576,line1594,line1612,line1630,line1649,line1667,line1686,line1702,line1717,line1732,line1746,line1766,line1784,line1802,line1820,line1837,line1855,line1872,line1888
! eliminated_buses=1078,1098,1118,1142,1167,1193,1219,1245,1272,1295,1319,1344,1369,1395,1419,1444,1468,1492,1514,1536,1558,1577,1595,1613,1631,1650,1668,1687,1703,1718,1733,1747,1767,1785,1803,1821,1838,1856,1873

New Line._virtual_line1128_line1152_line1178_line1203_line1229_line1255_line1281_line1304_line1328_line1352_line1377_line1403_line1428_line1453_line1476_line1500_line1522_line1545_line1566_line1584_line1602_line1620_line1638_line1658_line1675_line1693_line1709_line1724_line1738 bus1=1109.1.2.3.4 bus2=1739.1.2.3.4 phases=4 linecode=LC9 length=36.81556 units=m
! reduced_from=line1128,line1152,line1178,line1203,line1229,line1255,line1281,line1304,line1328,line1352,line1377,line1403,line1428,line1453,line1476,line1500,line1522,line1545,line1566,line1584,line1602,line1620,line1638,line1658,line1675,line1693,line1709,line1724,line1738
! eliminated_buses=1129,1153,1179,1204,1230,1256,1282,1305,1329,1353,1378,1404,1429,1454,1477,1501,1523,1546,1567,1585,1603,1621,1639,1659,1676,1694,1710,1725

New Line._virtual_line1129_line1153_line1179_line1204_line1230_line1256_line1282_line1305_line1329_line1353_line1378_line1404_line1429_line1454_line1478_line1502_line1524_line1546_line1567_line1585_line1603_line1621_line1639_line1659_line1676_line1694_line1710_line1725_line1739 bus1=1740.1.2.3.4 bus2=1109.1.2.3.4 phases=4 linecode=LC2 length=27.508499 units=m
! reduced_from=line1129,line1153,line1179,line1204,line1230,line1256,line1282,line1305,line1329,line1353,line1378,line1404,line1429,line1454,line1478,line1502,line1524,line1546,line1567,line1585,line1603,line1621,line1639,line1659,line1676,line1694,line1710,line1725,line1739
! eliminated_buses=1130,1154,1180,1205,1231,1257,1283,1306,1330,1354,1379,1405,1430,1455,1479,1503,1525,1547,1568,1586,1604,1622,1640,1660,1677,1695,1711,1726

New Line._virtual_line1130_line1154_line1180_line1205_line1231_line1257_line1283_line1306_line1330_line1354_line1379_line1405_line1430_line1455_line1479_line1503_line1525_line1547_line1568_line1586_line1604_line1622_line1640_line1660 bus1=1109.1.2.3.4 bus2=1661.1.2.3.4 phases=4 linecode=LC2 length=24.357621 units=m
! reduced_from=line1130,line1154,line1180,line1205,line1231,line1257,line1283,line1306,line1330,line1354,line1379,line1405,line1430,line1455,line1479,line1503,line1525,line1547,line1568,line1586,line1604,line1622,line1640,line1660
! eliminated_buses=1131,1155,1181,1206,1232,1258,1284,1307,1331,1355,1380,1406,1431,1456,1480,1504,1526,1548,1569,1587,1605,1623,1641

New Line._virtual_line1131_line1155_line1181_line1206_line1232_line1258_line1284_line1307_line1331_line1355_line1380_line1406_line1431_line1456_line1480_line1504_line1527_line1549_line1570_line1588_line1606_line1624_line1642_line1662 bus1=1109.1.2.3.4 bus2=1663.1.2.3.4 phases=4 linecode=LC2 length=14.538329 units=m
! reduced_from=line1131,line1155,line1181,line1206,line1232,line1258,line1284,line1307,line1331,line1355,line1380,line1406,line1431,line1456,line1480,line1504,line1527,line1549,line1570,line1588,line1606,line1624,line1642,line1662
! eliminated_buses=1132,1156,1182,1207,1233,1259,1285,1308,1332,1356,1381,1407,1432,1457,1481,1505,1528,1550,1571,1589,1607,1625,1643

New Line._virtual_line1132_line1156_line1182_line1207_line1233_line1259_line1285_line1308_line1332_line1356_line1381_line1407_line1432_line1457 bus1=1458.1.2.3.4 bus2=1109.1.2.3.4 phases=4 linecode=LC2 length=22.927643 units=m
! reduced_from=line1132,line1156,line1182,line1207,line1233,line1259,line1285,line1308,line1332,line1356,line1381,line1407,line1432,line1457
! eliminated_buses=1133,1157,1183,1208,1234,1260,1286,1309,1333,1357,1382,1408,1433

New Line._virtual_line1172_line1198_line1224_line1251_line1277_line1300_line1324_line1349_line1374_line1400_line1424_line1450_line1473_line1497_line1519_line1541_line1563 bus1=1564.1.2.3.4 bus2=1148.1.2.3.4 phases=4 linecode=LC2 length=23.36809 units=m
! reduced_from=line1172,line1198,line1224,line1251,line1277,line1300,line1324,line1349,line1374,line1400,line1424,line1450,line1473,line1497,line1519,line1541,line1563
! eliminated_buses=1173,1199,1225,1252,1278,1301,1325,1350,1375,1401,1425,1451,1474,1498,1520,1542

New Line._virtual_line1249_line1276_line1299_line1323_line1348_line1373_line1399_line1423_line1449_line1472_line1496_line1518_line1540_line1562_line1581_line1599_line1617_line1635_line1655_line1672 bus1=1224.1.2.3.4 bus2=1673.1.2.3.4 phases=4 linecode=LC2 length=23.54748 units=m
! reduced_from=line1249,line1276,line1299,line1323,line1348,line1373,line1399,line1423,line1449,line1472,line1496,line1518,line1540,line1562,line1581,line1599,line1617,line1635,line1655,line1672
! eliminated_buses=1250,1277,1300,1324,1349,1374,1400,1424,1450,1473,1497,1519,1541,1563,1582,1600,1618,1636,1656

New Line._virtual_line1261_line1287_line1310_line1334_line1358_line1383_line1409_line1434_line1459_line1484_line1507_line1530_line1552_line1573_line1591_line1609_line1627_line1646 bus1=1647.1.2.3.4 bus2=1236.1.2.3.4 phases=4 linecode=LC6 length=22.90514 units=m
! reduced_from=line1261,line1287,line1310,line1334,line1358,line1383,line1409,line1434,line1459,line1484,line1507,line1530,line1552,line1573,line1591,line1609,line1627,line1646
! eliminated_buses=1262,1288,1311,1335,1359,1384,1410,1435,1460,1485,1508,1531,1553,1574,1592,1610,1628

New Line._virtual_line1425_line1451_line1474_line1498_line1520_line1542_line1564_line1582_line1600_line1618_line1636_line1656_line1673_line1691_line1707_line1722 bus1=1723.1.2.3.4 bus2=1402.1.2.3.4 phases=4 linecode=LC2 length=23.24538 units=m
! reduced_from=line1425,line1451,line1474,line1498,line1520,line1542,line1564,line1582,line1600,line1618,line1636,line1656,line1673,line1691,line1707,line1722
! eliminated_buses=1426,1452,1475,1499,1521,1543,1565,1583,1601,1619,1637,1657,1674,1692,1708

New Line._virtual_line1446_line1470_line1494_line1516_line1538_line1560_line1579_line1597_line1615_line1633_line1652_line1670_line1689_line1705_line1720_line1735_line1749_line1769_line1787_line1805 bus1=1422.1.2.3.4 bus2=1806.1.2.3.4 phases=4 linecode=LC2 length=21.50323 units=m
! reduced_from=line1446,line1470,line1494,line1516,line1538,line1560,line1579,line1597,line1615,line1633,line1652,line1670,line1689,line1705,line1720,line1735,line1749,line1769,line1787,line1805
! eliminated_buses=1447,1471,1495,1517,1539,1561,1580,1598,1616,1634,1653,1671,1690,1706,1721,1736,1750,1770,1788

New Line._virtual_line1481_line1505_line1528_line1550_line1571_line1589_line1607_line1625_line1643_line1663_line1682_line1698_line1713_line1728_line1742_line1761 bus1=1762.1.2.3.4 bus2=1458.1.2.3.4 phases=4 linecode=LC2 length=22.330203 units=m
! reduced_from=line1481,line1505,line1528,line1550,line1571,line1589,line1607,line1625,line1643,line1663,line1682,line1698,line1713,line1728,line1742,line1761
! eliminated_buses=1482,1506,1529,1551,1572,1590,1608,1626,1644,1664,1683,1699,1714,1729,1743

New Line._virtual_line1543_line1565_line1583_line1601_line1619_line1637_line1657_line1674_line1692_line1708_line1723_line1737_line1751_line1771_line1789_line1807_line1824_line1842 bus1=1522.1.2.3.4 bus2=1843.1.2.3.4 phases=4 linecode=LC2 length=21.75686 units=m
! reduced_from=line1543,line1565,line1583,line1601,line1619,line1637,line1657,line1674,line1692,line1708,line1723,line1737,line1751,line1771,line1789,line1807,line1824,line1842
! eliminated_buses=1544,1566,1584,1602,1620,1638,1658,1675,1693,1709,1724,1738,1752,1772,1790,1808,1825

New Line._virtual_line1644_line1664_line1683_line1699_line1714_line1729_line1743_line1762_line1780_line1798_line1816_line1833_line1851_line1868_line1884_line1900_line1917_line1932_line1946_line1960 bus1=1627.1.2.3.4 bus2=1961.1.2.3.4 phases=4 linecode=LC6 length=25.36196 units=m
! reduced_from=line1644,line1664,line1683,line1699,line1714,line1729,line1743,line1762,line1780,line1798,line1816,line1833,line1851,line1868,line1884,line1900,line1917,line1932,line1946,line1960
! eliminated_buses=1645,1665,1684,1700,1715,1730,1744,1763,1781,1799,1817,1834,1852,1869,1885,1901,1918,1933,1947

New Line._virtual_line1653_line1671_line1690_line1706_line1721_line1736_line1750_line1770_line1788_line1806_line1823_line1841_line1859_line1875_line1891_line1909_line1924_line1938_line1952_line1966_line1979_line1992_line2004_line2015 bus1=1635.1.2.3.4 bus2=2016.1.2.3.4 phases=4 linecode=LC2 length=21.826771 units=m
! reduced_from=line1653,line1671,line1690,line1706,line1721,line1736,line1750,line1770,line1788,line1806,line1823,line1841,line1859,line1875,line1891,line1909,line1924,line1938,line1952,line1966,line1979,line1992,line2004,line2015
! eliminated_buses=1654,1672,1691,1707,1722,1737,1751,1771,1789,1807,1824,1842,1860,1876,1892,1910,1925,1939,1953,1967,1980,1993,2005

New Line._virtual_line1677_line1695_line1711_line1726_line1740_line1759_line1778_line1796_line1814_line1831_line1849_line1866_line1882_line1898_line1916_line1931_line1945_line1959_line1973_line1986_line1998 bus1=1661.1.2.3.4 bus2=1999.1.2.3.4 phases=4 linecode=LC2 length=20.479331 units=m
! reduced_from=line1677,line1695,line1711,line1726,line1740,line1759,line1778,line1796,line1814,line1831,line1849,line1866,line1882,line1898,line1916,line1931,line1945,line1959,line1973,line1986,line1998
! eliminated_buses=1678,1696,1712,1727,1741,1760,1779,1797,1815,1832,1850,1867,1883,1899,1917,1932,1946,1960,1974,1987

New Line._virtual_line1680_line1697_line1712_line1727_line1741_line1760_line1779_line1797_line1815_line1832_line1850_line1867_line1883_line1899 bus1=1900.1.2.3.4 bus2=1663.1.2.3.4 phases=4 linecode=LC2 length=20.80065 units=m
! reduced_from=line1680,line1697,line1712,line1727,line1741,line1760,line1779,line1797,line1815,line1832,line1850,line1867,line1883,line1899
! eliminated_buses=1681,1698,1713,1728,1742,1761,1780,1798,1816,1833,1851,1868,1884

New Line._virtual_line1752_line1772_line1790_line1808_line1825_line1843_line1860_line1876_line1892_line1910_line1925_line1939_line1953_line1967_line1980_line1993_line2005_line2016_line2026_line2036_line2046_line2056_line2067_line2080_line2091_line2101_line2111_line2122_line2132_line2144_line2156_line2168_line2180_line2191_line2202_line2213_line2224_line2235_line2246_line2257_line2269_line2280_line2291_line2299_line2307_line2316_line2324_line2330_line2336_line2343_line2353 bus1=1739.1.2.3.4 bus2=2354.1.2.3.4 phases=4 linecode=LC2 length=28.241529 units=m
! reduced_from=line1752,line1772,line1790,line1808,line1825,line1843,line1860,line1876,line1892,line1910,line1925,line1939,line1953,line1967,line1980,line1993,line2005,line2016,line2026,line2036,line2046,line2056,line2067,line2080,line2091,line2101,line2111,line2122,line2132,line2144,line2156,line2168,line2180,line2191,line2202,line2213,line2224,line2235,line2246,line2257,line2269,line2280,line2291,line2299,line2307,line2316,line2324,line2330,line2336,line2343,line2353
! eliminated_buses=1753,1773,1791,1809,1826,1844,1861,1877,1893,1911,1926,1940,1954,1968,1981,1994,2006,2017,2027,2037,2047,2057,2068,2081,2092,2102,2112,2123,2133,2145,2157,2169,2181,2192,2203,2214,2225,2236,2247,2258,2270,2281,2292,2300,2308,2317,2325,2331,2337,2344

New Line._virtual_line1753_line1773_line1791_line1809_line1826_line1844_line1861_line1877_line1893_line1911_line1926_line1940_line1954_line1968_line1981_line1994_line2006_line2017_line2027_line2037_line2047_line2057_line2068_line2081_line2092_line2102_line2112_line2123 bus1=1739.1.2.3.4 bus2=2124.1.2.3.4 phases=4 linecode=LC2 length=25.751436 units=m
! reduced_from=line1753,line1773,line1791,line1809,line1826,line1844,line1861,line1877,line1893,line1911,line1926,line1940,line1954,line1968,line1981,line1994,line2006,line2017,line2027,line2037,line2047,line2057,line2068,line2081,line2092,line2102,line2112,line2123
! eliminated_buses=1754,1774,1792,1810,1827,1845,1862,1878,1894,1912,1927,1941,1955,1969,1982,1995,2007,2018,2028,2038,2048,2058,2069,2082,2093,2103,2113

New Line._virtual_line1754_line1774_line1792_line1810_line1827_line1845_line1862_line1878_line1894_line1912_line1927_line1941_line1955_line1969_line1982_line1995_line2007_line2018_line2028_line2038_line2048_line2058_line2069_line2082_line2093_line2103_line2113_line2124_line2135_line2146_line2158 bus1=1739.1.2.3.4 bus2=2159.1.2.3.4 phases=4 linecode=LC2 length=37.273704 units=m
! reduced_from=line1754,line1774,line1792,line1810,line1827,line1845,line1862,line1878,line1894,line1912,line1927,line1941,line1955,line1969,line1982,line1995,line2007,line2018,line2028,line2038,line2048,line2058,line2069,line2082,line2093,line2103,line2113,line2124,line2135,line2146,line2158
! eliminated_buses=1755,1775,1793,1811,1828,1846,1863,1879,1895,1913,1928,1942,1956,1970,1983,1996,2008,2019,2029,2039,2049,2059,2070,2083,2094,2104,2114,2125,2136,2147

New Line._virtual_line1755_line1775_line1793_line1811_line1828_line1846_line1863_line1879_line1895_line1913_line1928_line1942_line1956_line1970_line1983_line1996_line2008_line2019_line2029_line2039_line2049_line2060_line2071_line2084_line2095_line2105_line2115_line2126 bus1=1739.1.2.3.4 bus2=2127.1.2.3.4 phases=4 linecode=LC9 length=28.782635 units=m
! reduced_from=line1755,line1775,line1793,line1811,line1828,line1846,line1863,line1879,line1895,line1913,line1928,line1942,line1956,line1970,line1983,line1996,line2008,line2019,line2029,line2039,line2049,line2060,line2071,line2084,line2095,line2105,line2115,line2126
! eliminated_buses=1756,1776,1794,1812,1829,1847,1864,1880,1896,1914,1929,1943,1957,1971,1984,1997,2009,2020,2030,2040,2050,2061,2072,2085,2096,2106,2116

New Line._virtual_line1756_line1776_line1794_line1812_line1829_line1847_line1864_line1880_line1896_line1914_line1929_line1943_line1957_line1971_line1984_line1997_line2009_line2020_line2030_line2040_line2050_line2061 bus1=2062.1.2.3.4 bus2=1739.1.2.3.4 phases=4 linecode=LC2 length=13.580891 units=m
! reduced_from=line1756,line1776,line1794,line1812,line1829,line1847,line1864,line1880,line1896,line1914,line1929,line1943,line1957,line1971,line1984,line1997,line2009,line2020,line2030,line2040,line2050,line2061
! eliminated_buses=1757,1777,1795,1813,1830,1848,1865,1881,1897,1915,1930,1944,1958,1972,1985,1998,2010,2021,2031,2041,2051

New Line._virtual_line1757_line1777_line1795_line1813_line1830_line1848_line1865_line1881_line1897_line1915_line1930_line1944_line1958_line1972_line1985 bus1=1740.1.2.3.4 bus2=1986.1.2.3.4 phases=4 linecode=LC2 length=24.093066 units=m
! reduced_from=line1757,line1777,line1795,line1813,line1830,line1848,line1865,line1881,line1897,line1915,line1930,line1944,line1958,line1972,line1985
! eliminated_buses=1758,1778,1796,1814,1831,1849,1866,1882,1898,1916,1931,1945,1959,1973

New Line._virtual_line1838_line1856_line1873_line1889_line1907_line1922_line1936_line1950_line1964_line1977_line1990_line2002_line2013_line2024_line2034_line2044_line2054_line2065_line2078_line2089_line2100_line2110_line2121_line2131_line2143_line2155_line2167_line2179_line2190_line2201_line2212_line2223_line2234_line2245_line2256_line2268_line2279_line2290_line2298_line2306_line2315_line2323 bus1=2324.1.2.3.4 bus2=1822.1.2.3.4 phases=4 linecode=LC2 length=20.864348 units=m
! reduced_from=line1838,line1856,line1873,line1889,line1907,line1922,line1936,line1950,line1964,line1977,line1990,line2002,line2013,line2024,line2034,line2044,line2054,line2065,line2078,line2089,line2100,line2110,line2121,line2131,line2143,line2155,line2167,line2179,line2190,line2201,line2212,line2223,line2234,line2245,line2256,line2268,line2279,line2290,line2298,line2306,line2315,line2323
! eliminated_buses=1839,1857,1874,1890,1908,1923,1937,1951,1965,1978,1991,2003,2014,2025,2035,2045,2055,2066,2079,2090,2101,2111,2122,2132,2144,2156,2168,2180,2191,2202,2213,2224,2235,2246,2257,2269,2280,2291,2299,2307,2316

New Line._virtual_line1857_line1874_line1890_line1908_line1923_line1937_line1951_line1965_line1978_line1991_line2003_line2014_line2025_line2035_line2045_line2055_line2066_line2079_line2090 bus1=2091.1.2.3.4 bus2=1841.1.2.3.4 phases=4 linecode=LC2 length=22.301751 units=m
! reduced_from=line1857,line1874,line1890,line1908,line1923,line1937,line1951,line1965,line1978,line1991,line2003,line2014,line2025,line2035,line2045,line2055,line2066,line2079,line2090
! eliminated_buses=1858,1875,1891,1909,1924,1938,1952,1966,1979,1992,2004,2015,2026,2036,2046,2056,2067,2080

New Line._virtual_line1903_line1920_line1934_line1948_line1962_line1975_line1988_line2000_line2011_line2022_line2032_line2042_line2052_line2063_line2076_line2087_line2098_line2108_line2119_line2129_line2141_line2153_line2165_line2177_line2188_line2199_line2210_line2221_line2232_line2243_line2254_line2266_line2277_line2288 bus1=1888.1.2.3.4 bus2=2289.1.2.3.4 phases=4 linecode=LC2 length=21.053779 units=m
! reduced_from=line1903,line1920,line1934,line1948,line1962,line1975,line1988,line2000,line2011,line2022,line2032,line2042,line2052,line2063,line2076,line2087,line2098,line2108,line2119,line2129,line2141,line2153,line2165,line2177,line2188,line2199,line2210,line2221,line2232,line2243,line2254,line2266,line2277,line2288
! eliminated_buses=1904,1921,1935,1949,1963,1976,1989,2001,2012,2023,2033,2043,2053,2064,2077,2088,2099,2109,2120,2130,2142,2154,2166,2178,2189,2200,2211,2222,2233,2244,2255,2267,2278

New Line._virtual_line1905_line1921_line1935_line1949_line1963_line1976_line1989_line2001_line2012_line2023_line2033_line2043_line2053_line2064_line2077_line2088_line2099_line2109_line2120_line2130_line2142_line2154_line2166_line2178_line2189_line2200_line2211_line2222_line2233_line2244_line2255_line2267_line2278_line2289 bus1=1889.1.2.3.4 bus2=2290.1.2.3.4 phases=4 linecode=LC2 length=21.502515 units=m
! reduced_from=line1905,line1921,line1935,line1949,line1963,line1976,line1989,line2001,line2012,line2023,line2033,line2043,line2053,line2064,line2077,line2088,line2099,line2109,line2120,line2130,line2142,line2154,line2166,line2178,line2189,line2200,line2211,line2222,line2233,line2244,line2255,line2267,line2278,line2289
! eliminated_buses=1906,1922,1936,1950,1964,1977,1990,2002,2013,2024,2034,2044,2054,2065,2078,2089,2100,2110,2121,2131,2143,2155,2167,2179,2190,2201,2212,2223,2234,2245,2256,2268,2279

New Line._virtual_line2073_line2085_line2096_line2106_line2116_line2127_line2139_line2151_line2163_line2175_line2186_line2197_line2208_line2219_line2230_line2241_line2252_line2264 bus1=2265.1.2.3.4 bus2=2062.1.2.3.4 phases=4 linecode=LC2 length=25.749667 units=m
! reduced_from=line2073,line2085,line2096,line2106,line2116,line2127,line2139,line2151,line2163,line2175,line2186,line2197,line2208,line2219,line2230,line2241,line2252,line2264
! eliminated_buses=2074,2086,2097,2107,2117,2128,2140,2152,2164,2176,2187,2198,2209,2220,2231,2242,2253

New Line._virtual_line2117_line2128_line2140_line2152_line2164_line2176_line2187_line2198_line2209_line2220_line2231_line2242_line2253_line2265_line2276_line2287_line2297_line2305_line2314_line2322_line2329_line2335_line2342_line2352_line2363_line2375_line2386_line2397_line2411_line2425_line2438_line2451_line2464 bus1=2108.1.2.3.4 bus2=2465.1.2.3.4 phases=4 linecode=LC2 length=21.979648 units=m
! reduced_from=line2117,line2128,line2140,line2152,line2164,line2176,line2187,line2198,line2209,line2220,line2231,line2242,line2253,line2265,line2276,line2287,line2297,line2305,line2314,line2322,line2329,line2335,line2342,line2352,line2363,line2375,line2386,line2397,line2411,line2425,line2438,line2451,line2464
! eliminated_buses=2118,2129,2141,2153,2165,2177,2188,2199,2210,2221,2232,2243,2254,2266,2277,2288,2298,2306,2315,2323,2330,2336,2343,2353,2364,2376,2387,2398,2412,2426,2439,2452

New Line._virtual_line2133_line2145_line2157_line2169_line2181_line2192_line2203_line2214_line2225_line2236_line2247_line2258_line2270_line2281 bus1=2282.1.2.3.4 bus2=2124.1.2.3.4 phases=4 linecode=LC2 length=25.93693 units=m
! reduced_from=line2133,line2145,line2157,line2169,line2181,line2192,line2203,line2214,line2225,line2236,line2247,line2258,line2270,line2281
! eliminated_buses=2134,2146,2158,2170,2182,2193,2204,2215,2226,2237,2248,2259,2271

New Line._virtual_line2137_line2148_line2160_line2172_line2183_line2194_line2205_line2216_line2227_line2238_line2249_line2260_line2272_line2283_line2293_line2301 bus1=2302.1.2.3.4 bus2=2127.1.2.3.4 phases=4 linecode=LC2 length=10.646566 units=m
! reduced_from=line2137,line2148,line2160,line2172,line2183,line2194,line2205,line2216,line2227,line2238,line2249,line2260,line2272,line2283,line2293,line2301
! eliminated_buses=2138,2149,2161,2173,2184,2195,2206,2217,2228,2239,2250,2261,2273,2284,2294

New Line._virtual_line2149_line2161_line2173_line2184_line2195_line2206_line2217_line2228_line2239_line2250_line2261_line2273_line2284_line2294_line2302_line2311_line2319_line2326_line2332_line2338 bus1=2339.1.2.3.4 bus2=2139.1.2.3.4 phases=4 linecode=LC9 length=36.360764 units=m
! reduced_from=line2149,line2161,line2173,line2184,line2195,line2206,line2217,line2228,line2239,line2250,line2261,line2273,line2284,line2294,line2302,line2311,line2319,line2326,line2332,line2338
! eliminated_buses=2150,2162,2174,2185,2196,2207,2218,2229,2240,2251,2262,2274,2285,2295,2303,2312,2320,2327,2333

New Line._virtual_line2150_line2162_line2174_line2185_line2196_line2207_line2218_line2229_line2240_line2251 bus1=2252.1.2.3.4 bus2=2139.1.2.3.4 phases=4 linecode=LC9 length=13.726743 units=m
! reduced_from=line2150,line2162,line2174,line2185,line2196,line2207,line2218,line2229,line2240,line2251
! eliminated_buses=2151,2163,2175,2186,2197,2208,2219,2230,2241

New Line._virtual_line2170_line2182_line2193_line2204_line2215_line2226_line2237_line2248_line2259_line2271_line2282_line2292_line2300_line2308_line2317 bus1=2159.1.2.3.4 bus2=2318.1.2.3.4 phases=4 linecode=LC2 length=21.0195 units=m
! reduced_from=line2170,line2182,line2193,line2204,line2215,line2226,line2237,line2248,line2259,line2271,line2282,line2292,line2300,line2308,line2317
! eliminated_buses=2171,2183,2194,2205,2216,2227,2238,2249,2260,2272,2283,2293,2301,2309

New Line._virtual_line2262_line2274_line2285_line2295_line2303_line2312_line2320_line2327_line2333_line2339_line2349_line2360_line2372_line2383_line2394_line2408_line2422_line2436_line2449_line2462_line2474_line2486_line2497_line2508_line2520_line2530_line2542_line2555_line2568_line2580_line2593_line2604_line2615_line2626_line2637_line2648_line2659_line2670_line2682_line2694_line2704_line2714_line2722_line2730_line2738_line2745 bus1=2252.1.2.3.4 bus2=2746.1.2.3.4 phases=4 linecode=LC2 length=24.944635 units=m
! reduced_from=line2262,line2274,line2285,line2295,line2303,line2312,line2320,line2327,line2333,line2339,line2349,line2360,line2372,line2383,line2394,line2408,line2422,line2436,line2449,line2462,line2474,line2486,line2497,line2508,line2520,line2530,line2542,line2555,line2568,line2580,line2593,line2604,line2615,line2626,line2637,line2648,line2659,line2670,line2682,line2694,line2704,line2714,line2722,line2730,line2738,line2745
! eliminated_buses=2263,2275,2286,2296,2304,2313,2321,2328,2334,2340,2350,2361,2373,2384,2395,2409,2423,2437,2450,2463,2475,2487,2498,2509,2521,2531,2543,2556,2569,2581,2594,2605,2616,2627,2638,2649,2660,2671,2683,2695,2705,2715,2723,2731,2739

New Line._virtual_line2263_line2275_line2286_line2296_line2304_line2313_line2321_line2328_line2334_line2340_line2350_line2361_line2373_line2384_line2395_line2409_line2423_line2437_line2450_line2463 bus1=2464.1.2.3.4 bus2=2252.1.2.3.4 phases=4 linecode=LC2 length=11.819327 units=m
! reduced_from=line2263,line2275,line2286,line2296,line2304,line2313,line2321,line2328,line2334,line2340,line2350,line2361,line2373,line2384,line2395,line2409,line2423,line2437,line2450,line2463
! eliminated_buses=2264,2276,2287,2297,2305,2314,2322,2329,2335,2341,2351,2362,2374,2385,2396,2410,2424,2438,2451

New Line._virtual_line2309_line2318_line2325_line2331_line2337_line2344_line2354_line2366_line2377_line2388_line2399_line2413_line2427_line2440_line2453 bus1=2302.1.2.3.4 bus2=2454.1.2.3.4 phases=4 linecode=LC2 length=25.57195 units=m
! reduced_from=line2309,line2318,line2325,line2331,line2337,line2344,line2354,line2366,line2377,line2388,line2399,line2413,line2427,line2440,line2453
! eliminated_buses=2310,2319,2326,2332,2338,2345,2355,2367,2378,2389,2400,2414,2428,2441

New Line._virtual_line2346_line2357_line2369_line2380_line2391_line2405_line2419_line2433_line2446_line2459_line2471_line2483_line2494_line2505_line2517_line2528_line2540_line2552_line2566_line2578_line2591_line2602_line2613_line2624_line2635_line2646_line2657_line2668_line2680 bus1=2339.1.2.3.4 bus2=2681.1.2.3.4 phases=4 linecode=LC2 length=32.968892 units=m
! reduced_from=line2346,line2357,line2369,line2380,line2391,line2405,line2419,line2433,line2446,line2459,line2471,line2483,line2494,line2505,line2517,line2528,line2540,line2552,line2566,line2578,line2591,line2602,line2613,line2624,line2635,line2646,line2657,line2668,line2680
! eliminated_buses=2347,2358,2370,2381,2392,2406,2420,2434,2447,2460,2472,2484,2495,2506,2518,2529,2541,2553,2567,2579,2592,2603,2614,2625,2636,2647,2658,2669

New Line._virtual_line2347_line2358_line2370_line2381_line2392_line2406_line2420_line2434_line2447_line2460_line2472_line2484_line2495_line2506_line2518_line2529_line2541 bus1=2339.1.2.3.4 bus2=2542.1.2.3.4 phases=4 linecode=LC2 length=21.15915 units=m
! reduced_from=line2347,line2358,line2370,line2381,line2392,line2406,line2420,line2434,line2447,line2460,line2472,line2484,line2495,line2506,line2518,line2529,line2541
! eliminated_buses=2348,2359,2371,2382,2393,2407,2421,2435,2448,2461,2473,2485,2496,2507,2519,2530

New Line._virtual_line2355_line2367_line2378_line2389 bus1=2346.1.2.3.4 bus2=2390.1.2.3.4 phases=4 linecode=LC9 length=5.80531 units=m
! reduced_from=line2355,line2367,line2378,line2389
! eliminated_buses=2356,2368,2379

New Line._virtual_line2356_line2368_line2379_line2390_line2404_line2418_line2432_line2445_line2458_line2470_line2482_line2493_line2504_line2516_line2527_line2539_line2551_line2565_line2577 bus1=2578.1.2.3.4 bus2=2346.1.2.3.4 phases=4 linecode=LC2 length=28.93615 units=m
! reduced_from=line2356,line2368,line2379,line2390,line2404,line2418,line2432,line2445,line2458,line2470,line2482,line2493,line2504,line2516,line2527,line2539,line2551,line2565,line2577
! eliminated_buses=2357,2369,2380,2391,2405,2419,2433,2446,2459,2471,2483,2494,2505,2517,2528,2540,2552,2566

New Line._virtual_line2364_line2376_line2387_line2398_line2412_line2426_line2439_line2452_line2465_line2477_line2488_line2499_line2510 bus1=2354.1.2.3.4 bus2=2511.1.2.3.4 phases=4 linecode=LC2 length=25.84908 units=m
! reduced_from=line2364,line2376,line2387,line2398,line2412,line2426,line2439,line2452,line2465,line2477,line2488,line2499,line2510
! eliminated_buses=2365,2377,2388,2399,2413,2427,2440,2453,2466,2478,2489,2500

New Line._virtual_line2400_line2414_line2428_line2441_line2454_line2466_line2478_line2489_line2500_line2511_line2522 bus1=2390.1.2.3.4 bus2=2523.1.2.3.4 phases=4 linecode=LC2 length=20.85931 units=m
! reduced_from=line2400,line2414,line2428,line2441,line2454,line2466,line2478,line2489,line2500,line2511,line2522
! eliminated_buses=2401,2415,2429,2442,2455,2467,2479,2490,2501,2512

New Line._virtual_line2401_line2415_line2429_line2442_line2455_line2467_line2479_line2490_line2501_line2512_line2523_line2534_line2545_line2558_line2571_line2583_line2596_line2607_line2618_line2629_line2640_line2651_line2662 bus1=2663.1.2.3.4 bus2=2390.1.2.3.4 phases=4 linecode=LC2 length=15.036588 units=m
! reduced_from=line2401,line2415,line2429,line2442,line2455,line2467,line2479,line2490,line2501,line2512,line2523,line2534,line2545,line2558,line2571,line2583,line2596,line2607,line2618,line2629,line2640,line2651,line2662
! eliminated_buses=2402,2416,2430,2443,2456,2468,2480,2491,2502,2513,2524,2535,2546,2559,2572,2584,2597,2608,2619,2630,2641,2652

New Line._virtual_line2402_line2416_line2430_line2443_line2456_line2468_line2480_line2491_line2502 bus1=2503.1.2.3.4 bus2=2390.1.2.3.4 phases=4 linecode=LC9 length=21.8482 units=m
! reduced_from=line2402,line2416,line2430,line2443,line2456,line2468,line2480,line2491,line2502
! eliminated_buses=2403,2417,2431,2444,2457,2469,2481,2492

New Line._virtual_line2403_line2417_line2431_line2444_line2457_line2469_line2481_line2492_line2503_line2515_line2526_line2538_line2550 bus1=2551.1.2.3.4 bus2=2390.1.2.3.4 phases=4 linecode=LC2 length=13.973789 units=m
! reduced_from=line2403,line2417,line2431,line2444,line2457,line2469,line2481,line2492,line2503,line2515,line2526,line2538,line2550
! eliminated_buses=2404,2418,2432,2445,2458,2470,2482,2493,2504,2516,2527,2539

New Line._virtual_line2475_line2487_line2498_line2509_line2521_line2531_line2543_line2556_line2569_line2581_line2594_line2605_line2616_line2627_line2638_line2649_line2660_line2671_line2683_line2695 bus1=2696.1.2.3.4 bus2=2464.1.2.3.4 phases=4 linecode=LC2 length=22.668432 units=m
! reduced_from=line2475,line2487,line2498,line2509,line2521,line2531,line2543,line2556,line2569,line2581,line2594,line2605,line2616,line2627,line2638,line2649,line2660,line2671,line2683,line2695
! eliminated_buses=2476,2488,2499,2510,2522,2532,2544,2557,2570,2582,2595,2606,2617,2628,2639,2650,2661,2672,2684

New Line._virtual_line2513_line2524_line2535_line2546_line2559_line2572_line2584_line2597_line2608_line2619_line2630_line2641_line2652_line2663_line2675 bus1=2503.1.2.3.4 bus2=2676.1.2.3.4 phases=4 linecode=LC2 length=8.214462 units=m
! reduced_from=line2513,line2524,line2535,line2546,line2559,line2572,line2584,line2597,line2608,line2619,line2630,line2641,line2652,line2663,line2675
! eliminated_buses=2514,2525,2536,2547,2560,2573,2585,2598,2609,2620,2631,2642,2653,2664

New Line._virtual_line2514_line2525 bus1=2526.1.2.3.4 bus2=2503.1.2.3.4 phases=4 linecode=LC9 length=12.8049 units=m
! reduced_from=line2514,line2525
! eliminated_buses=2515

New Line._virtual_line2532_line2544_line2557_line2570_line2582_line2595_line2606_line2617_line2628_line2639_line2650_line2661_line2672 bus1=2673.1.2.3.4 bus2=2523.1.2.3.4 phases=4 linecode=LC2 length=24.60002 units=m
! reduced_from=line2532,line2544,line2557,line2570,line2582,line2595,line2606,line2617,line2628,line2639,line2650,line2661,line2672
! eliminated_buses=2533,2545,2558,2571,2583,2596,2607,2618,2629,2640,2651,2662

New Line._virtual_line2536_line2547_line2560_line2573_line2585_line2598_line2609_line2620_line2631_line2642_line2653_line2664_line2676_line2687_line2698 bus1=2526.1.2.3.4 bus2=2699.1.2.3.4 phases=4 linecode=LC2 length=10.232647 units=m
! reduced_from=line2536,line2547,line2560,line2573,line2585,line2598,line2609,line2620,line2631,line2642,line2653,line2664,line2676,line2687,line2698
! eliminated_buses=2537,2548,2561,2574,2586,2599,2610,2621,2632,2643,2654,2665,2677,2688

New Line._virtual_line2537_line2549_line2562_line2575_line2587_line2599_line2610_line2621_line2632_line2643_line2654_line2665_line2677_line2688_line2699_line2709_line2718_line2726_line2734_line2742_line2749_line2757 bus1=2758.1.2.3.4 bus2=2526.1.2.3.4 phases=4 linecode=LC9 length=33.08516 units=m
! reduced_from=line2537,line2549,line2562,line2575,line2587,line2599,line2610,line2621,line2632,line2643,line2654,line2665,line2677,line2688,line2699,line2709,line2718,line2726,line2734,line2742,line2749,line2757
! eliminated_buses=2538,2550,2563,2576,2588,2600,2611,2622,2633,2644,2655,2666,2678,2689,2700,2710,2719,2727,2735,2743,2750

New Line._virtual_line2553_line2567_line2579_line2592_line2603_line2614_line2625_line2636_line2647_line2658_line2669_line2681_line2693_line2703_line2713_line2721_line2729_line2737_line2744_line2751 bus1=2752.1.2.3.4 bus2=2542.1.2.3.4 phases=4 linecode=LC2 length=20.700155 units=m
! reduced_from=line2553,line2567,line2579,line2592,line2603,line2614,line2625,line2636,line2647,line2658,line2669,line2681,line2693,line2703,line2713,line2721,line2729,line2737,line2744,line2751
! eliminated_buses=2554,2568,2580,2593,2604,2615,2626,2637,2648,2659,2670,2682,2694,2704,2714,2722,2730,2738,2745

New Line._virtual_line2563_line2576_line2588_line2600_line2611_line2622_line2633_line2644_line2655_line2666_line2678_line2689_line2700_line2710 bus1=2711.1.2.3.4 bus2=2551.1.2.3.4 phases=4 linecode=LC2 length=25.777174 units=m
! reduced_from=line2563,line2576,line2588,line2600,line2611,line2622,line2633,line2644,line2655,line2666,line2678,line2689,line2700,line2710
! eliminated_buses=2564,2577,2589,2601,2612,2623,2634,2645,2656,2667,2679,2690,2701

New Line._virtual_line2589_line2601_line2612_line2623_line2634_line2645_line2656_line2667_line2679_line2690_line2701_line2711_line2719_line2727_line2735 bus1=2736.1.2.3.4 bus2=2578.1.2.3.4 phases=4 linecode=LC2 length=25.03168 units=m
! reduced_from=line2589,line2601,line2612,line2623,line2634,line2645,line2656,line2667,line2679,line2690,line2701,line2711,line2719,line2727,line2735
! eliminated_buses=2590,2602,2613,2624,2635,2646,2657,2668,2680,2691,2702,2712,2720,2728

New Line._virtual_line2673_line2684_line2696_line2705_line2715_line2723_line2731_line2739_line2746_line2754_line2760_line2767_line2774_line2783_line2792_line2801_line2810_line2819_line2828_line2837_line2846_line2855_line2864_line2873_line2881_line2891_line2900_line2910_line2920_line2928_line2937_line2945_line2953_line2961_line2969_line2977_line2987_line2995_line3003 bus1=3004.1.2.3.4 bus2=2663.1.2.3.4 phases=4 linecode=LC2 length=29.655321 units=m
! reduced_from=line2673,line2684,line2696,line2705,line2715,line2723,line2731,line2739,line2746,line2754,line2760,line2767,line2774,line2783,line2792,line2801,line2810,line2819,line2828,line2837,line2846,line2855,line2864,line2873,line2881,line2891,line2900,line2910,line2920,line2928,line2937,line2945,line2953,line2961,line2969,line2977,line2987,line2995,line3003
! eliminated_buses=2674,2685,2697,2706,2716,2724,2732,2740,2747,2755,2761,2768,2775,2784,2793,2802,2811,2820,2829,2838,2847,2856,2865,2874,2882,2892,2901,2911,2921,2929,2938,2946,2954,2962,2970,2978,2988,2996

New Line._virtual_line2685_line2697_line2706_line2716_line2724_line2732_line2740_line2747_line2755_line2761_line2768_line2775_line2784_line2793_line2802_line2811_line2820_line2829_line2838_line2847_line2856 bus1=2676.1.2.3.4 bus2=2857.1.2.3.4 phases=4 linecode=LC2 length=20.408845 units=m
! reduced_from=line2685,line2697,line2706,line2716,line2724,line2732,line2740,line2747,line2755,line2761,line2768,line2775,line2784,line2793,line2802,line2811,line2820,line2829,line2838,line2847,line2856
! eliminated_buses=2686,2698,2707,2717,2725,2733,2741,2748,2756,2762,2769,2776,2785,2794,2803,2812,2821,2830,2839,2848

New Line._virtual_line2691_line2702_line2712_line2720_line2728_line2736_line2743_line2750_line2758_line2765_line2772_line2781_line2790_line2799_line2808_line2817_line2826_line2835 bus1=2836.1.2.3.4 bus2=2681.1.2.3.4 phases=4 linecode=LC2 length=22.37306 units=m
! reduced_from=line2691,line2702,line2712,line2720,line2728,line2736,line2743,line2750,line2758,line2765,line2772,line2781,line2790,line2799,line2808,line2817,line2826,line2835
! eliminated_buses=2692,2703,2713,2721,2729,2737,2744,2751,2759,2766,2773,2782,2791,2800,2809,2818,2827

New Line._virtual_line2707_line2717_line2725_line2733_line2741_line2748_line2756_line2762_line2769_line2776_line2785_line2794_line2803_line2812_line2821_line2830_line2839_line2848_line2857_line2865_line2874_line2882_line2892_line2901_line2911_line2921_line2929_line2938_line2946_line2954_line2962_line2970_line2978 bus1=2699.1.2.3.4 bus2=2979.1.2.3.4 phases=4 linecode=LC2 length=21.714284 units=m
! reduced_from=line2707,line2717,line2725,line2733,line2741,line2748,line2756,line2762,line2769,line2776,line2785,line2794,line2803,line2812,line2821,line2830,line2839,line2848,line2857,line2865,line2874,line2882,line2892,line2901,line2911,line2921,line2929,line2938,line2946,line2954,line2962,line2970,line2978
! eliminated_buses=2708,2718,2726,2734,2742,2749,2757,2763,2770,2777,2786,2795,2804,2813,2822,2831,2840,2849,2858,2866,2875,2883,2893,2902,2912,2922,2930,2939,2947,2955,2963,2971

New Line._virtual_line2752_line2759_line2766_line2773_line2782_line2791_line2800_line2809_line2818_line2827_line2836_line2845_line2854_line2863_line2872 bus1=2746.1.2.3.4 bus2=2873.1.2.3.4 phases=4 linecode=LC2 length=21.70064 units=m
! reduced_from=line2752,line2759,line2766,line2773,line2782,line2791,line2800,line2809,line2818,line2827,line2836,line2845,line2854,line2863,line2872
! eliminated_buses=2753,2760,2767,2774,2783,2792,2801,2810,2819,2828,2837,2846,2855,2864

New Line._virtual_line2763_line2770 bus1=2758.1.2.3.4 bus2=2771.1.2.3.4 phases=4 linecode=LC9 length=2.8578 units=m
! reduced_from=line2763,line2770
! eliminated_buses=2764

New Line._virtual_line2764_line2771_line2780_line2789_line2798_line2807_line2816_line2825_line2834_line2844_line2853_line2862_line2871_line2880 bus1=2758.1.2.3.4 bus2=2881.1.2.3.4 phases=4 linecode=LC2 length=8.054359 units=m
! reduced_from=line2764,line2771,line2780,line2789,line2798,line2807,line2816,line2825,line2834,line2844,line2853,line2862,line2871,line2880
! eliminated_buses=2765,2772,2781,2790,2799,2808,2817,2826,2835,2845,2854,2863,2872

New Line._virtual_line2777_line2786_line2795_line2804_line2813_line2822_line2831_line2840_line2849_line2858 bus1=2859.1.2.3.4 bus2=2771.1.2.3.4 phases=4 linecode=LC2 length=11.12669 units=m
! reduced_from=line2777,line2786,line2795,line2804,line2813,line2822,line2831,line2840,line2849,line2858
! eliminated_buses=2778,2787,2796,2805,2814,2823,2832,2841,2850

New Line._virtual_line2778_line2787_line2796_line2805_line2814_line2823_line2832_line2841_line2850_line2859_line2868_line2877_line2885_line2895 bus1=2896.1.2.3.4 bus2=2771.1.2.3.4 phases=4 linecode=LC2 length=17.69909 units=m
! reduced_from=line2778,line2787,line2796,line2805,line2814,line2823,line2832,line2841,line2850,line2859,line2868,line2877,line2885,line2895
! eliminated_buses=2779,2788,2797,2806,2815,2824,2833,2842,2851,2860,2869,2878,2886

New Line._virtual_line2779_line2788_line2797_line2806_line2815_line2824_line2833 bus1=2834.1.2.3.4 bus2=2771.1.2.3.4 phases=4 linecode=LC9 length=16.33542 units=m
! reduced_from=line2779,line2788,line2797,line2806,line2815,line2824,line2833
! eliminated_buses=2780,2789,2798,2807,2816,2825

New Line._virtual_line2842_line2851_line2860_line2869_line2878_line2886_line2896_line2906 bus1=2907.1.2.3.4 bus2=2834.1.2.3.4 phases=4 linecode=LC2 length=10.83104 units=m
! reduced_from=line2842,line2851,line2860,line2869,line2878,line2886,line2896,line2906
! eliminated_buses=2843,2852,2861,2870,2879,2887,2897

New Line._virtual_line2843_line2852_line2861_line2870_line2879_line2888_line2898_line2908_line2918_line2926 bus1=2927.1.2.3.4 bus2=2834.1.2.3.4 phases=4 linecode=LC9 length=12.24695 units=m
! reduced_from=line2843,line2852,line2861,line2870,line2879,line2888,line2898,line2908,line2918,line2926
! eliminated_buses=2844,2853,2862,2871,2880,2889,2899,2909,2919

New Line._virtual_line2866_line2875_line2883_line2893_line2902_line2912_line2922_line2930_line2939_line2947_line2955_line2963_line2971_line2979_line2988_line2996_line3004_line3011_line3018_line3025 bus1=2859.1.2.3.4 bus2=3026.1.2.3.4 phases=4 linecode=LC2 length=22.080271 units=m
! reduced_from=line2866,line2875,line2883,line2893,line2902,line2912,line2922,line2930,line2939,line2947,line2955,line2963,line2971,line2979,line2988,line2996,line3004,line3011,line3018,line3025
! eliminated_buses=2867,2876,2884,2894,2903,2913,2923,2931,2940,2948,2956,2964,2972,2980,2989,2997,3005,3012,3019

New Line._virtual_line2867_line2876_line2884_line2894_line2903_line2913 bus1=2859.1.2.3.4 bus2=2914.1.2.3.4 phases=4 linecode=LC2 length=6.58884 units=m
! reduced_from=line2867,line2876,line2884,line2894,line2903,line2913
! eliminated_buses=2868,2877,2885,2895,2904

New Line._virtual_line2889_line2899_line2909_line2919_line2927_line2936_line2944_line2952_line2960_line2968_line2976_line2986_line2994_line3002_line3010_line3017_line3024_line3031_line3037_line3043_line3049_line3055_line3062_line3068_line3074_line3080_line3086_line3091_line3096_line3101_line3106_line3111_line3116 bus1=2881.1.2.3.4 bus2=3117.1.2.3.4 phases=4 linecode=LC2 length=24.497709 units=m
! reduced_from=line2889,line2899,line2909,line2919,line2927,line2936,line2944,line2952,line2960,line2968,line2976,line2986,line2994,line3002,line3010,line3017,line3024,line3031,line3037,line3043,line3049,line3055,line3062,line3068,line3074,line3080,line3086,line3091,line3096,line3101,line3106,line3111,line3116
! eliminated_buses=2890,2900,2910,2920,2928,2937,2945,2953,2961,2969,2977,2987,2995,3003,3011,3018,3025,3032,3038,3044,3050,3056,3063,3069,3075,3081,3087,3092,3097,3102,3107,3112

New Line._virtual_line2904_line2914_line2923_line2931_line2940_line2948_line2956_line2964_line2972_line2980_line2989_line2997_line3005_line3012_line3019_line3026_line3032_line3038_line3044_line3050_line3056_line3063_line3069 bus1=3070.1.2.3.4 bus2=2896.1.2.3.4 phases=4 linecode=LC2 length=28.723757 units=m
! reduced_from=line2904,line2914,line2923,line2931,line2940,line2948,line2956,line2964,line2972,line2980,line2989,line2997,line3005,line3012,line3019,line3026,line3032,line3038,line3044,line3050,line3056,line3063,line3069
! eliminated_buses=2905,2915,2924,2932,2941,2949,2957,2965,2973,2981,2990,2998,3006,3013,3020,3027,3033,3039,3045,3051,3057,3064

New Line._virtual_line2915_line2924_line2932_line2941_line2949_line2957_line2965_line2973_line2981_line2990_line2998_line3006_line3013_line3020_line3027_line3033_line3039_line3045_line3051_line3057_line3064_line3070_line3075_line3081_line3087_line3092_line3097_line3102_line3107_line3112_line3117_line3121_line3125_line3129_line3133_line3137 bus1=3138.1.2.3.4 bus2=2907.1.2.3.4 phases=4 linecode=LC2 length=28.243161 units=m
! reduced_from=line2915,line2924,line2932,line2941,line2949,line2957,line2965,line2973,line2981,line2990,line2998,line3006,line3013,line3020,line3027,line3033,line3039,line3045,line3051,line3057,line3064,line3070,line3075,line3081,line3087,line3092,line3097,line3102,line3107,line3112,line3117,line3121,line3125,line3129,line3133,line3137
! eliminated_buses=2916,2925,2933,2942,2950,2958,2966,2974,2982,2991,2999,3007,3014,3021,3028,3034,3040,3046,3052,3058,3065,3071,3076,3082,3088,3093,3098,3103,3108,3113,3118,3122,3126,3130,3134

New Line._virtual_line2934_line2942_line2950_line2958_line2966_line2974_line2982_line2991_line2999_line3007_line3014_line3021_line3028_line3034_line3040_line3046_line3052_line3058_line3065_line3071 bus1=2927.1.2.3.4 bus2=3072.1.2.3.4 phases=4 linecode=LC2 length=14.521372 units=m
! reduced_from=line2934,line2942,line2950,line2958,line2966,line2974,line2982,line2991,line2999,line3007,line3014,line3021,line3028,line3034,line3040,line3046,line3052,line3058,line3065,line3071
! eliminated_buses=2935,2943,2951,2959,2967,2975,2983,2992,3000,3008,3015,3022,3029,3035,3041,3047,3053,3059,3066

New Line._virtual_line2935_line2943_line2951_line2959_line2967_line2975 bus1=2976.1.2.3.4 bus2=2927.1.2.3.4 phases=4 linecode=LC9 length=7.10924 units=m
! reduced_from=line2935,line2943,line2951,line2959,line2967,line2975
! eliminated_buses=2936,2944,2952,2960,2968

New Line._virtual_line2983_line2992_line3000_line3008_line3015_line3022_line3029_line3035_line3041_line3047_line3053 bus1=3054.1.2.3.4 bus2=2976.1.2.3.4 phases=4 linecode=LC2 length=13.33239 units=m
! reduced_from=line2983,line2992,line3000,line3008,line3015,line3022,line3029,line3035,line3041,line3047,line3053
! eliminated_buses=2984,2993,3001,3009,3016,3023,3030,3036,3042,3048

New Line._virtual_line2984_line2993_line3001_line3009_line3016_line3023_line3030_line3036_line3042_line3048_line3054_line3061_line3067_line3073_line3079 bus1=3080.1.2.3.4 bus2=2976.1.2.3.4 phases=4 linecode=LC2 length=15.318298 units=m
! reduced_from=line2984,line2993,line3001,line3009,line3016,line3023,line3030,line3036,line3042,line3048,line3054,line3061,line3067,line3073,line3079
! eliminated_buses=2985,2994,3002,3010,3017,3024,3031,3037,3043,3049,3055,3062,3068,3074

New Line._virtual_line3059_line3066_line3072_line3078_line3083_line3089_line3094_line3099_line3104_line3109_line3114_line3119_line3123_line3127_line3131_line3135_line3139 bus1=3140.1.2.3.4 bus2=3054.1.2.3.4 phases=4 linecode=LC2 length=24.55989 units=m
! reduced_from=line3059,line3066,line3072,line3078,line3083,line3089,line3094,line3099,line3104,line3109,line3114,line3119,line3123,line3127,line3131,line3135,line3139
! eliminated_buses=3060,3067,3073,3079,3084,3090,3095,3100,3105,3110,3115,3120,3124,3128,3132,3136

New Line._virtual_line3076_line3082_line3088_line3093_line3098_line3103_line3108_line3113_line3118_line3122_line3126_line3130_line3134_line3138_line3141_line3143_line3145_line3147_line3149_line3151_line3153_line3154 bus1=3072.1.2.3.4 bus2=3155.1.2.3.4 phases=4 linecode=LC2 length=23.559965 units=m
! reduced_from=line3076,line3082,line3088,line3093,line3098,line3103,line3108,line3113,line3118,line3122,line3126,line3130,line3134,line3138,line3141,line3143,line3145,line3147,line3149,line3151,line3153,line3154
! eliminated_buses=3077,3083,3089,3094,3099,3104,3109,3114,3119,3123,3127,3131,3135,3139,3142,3144,3146,3148,3150,3152,3154

New Line._virtual_line3084_line3090_line3095_line3100_line3105_line3110_line3115_line3120_line3124_line3128_line3132_line3136_line3140_line3142_line3144_line3146_line3148_line3150_line3152 bus1=3153.1.2.3.4 bus2=3080.1.2.3.4 phases=4 linecode=LC2 length=23.8854 units=m
! reduced_from=line3084,line3090,line3095,line3100,line3105,line3110,line3115,line3120,line3124,line3128,line3132,line3136,line3140,line3142,line3144,line3146,line3148,line3150,line3152
! eliminated_buses=3085,3091,3096,3101,3106,3111,3116,3121,3125,3129,3133,3137,3141,3143,3145,3147,3149,3151

New Line.LINE89 bus1=86.1.2.3.4 bus2=90.1.2.3.4 phases=4 linecode=LC1 length=0.61185 units=m

New Line.LINE152 bus1=143.1.2.3.4 bus2=153.1.2.3.4 phases=4 linecode=LC9 length=7.8704 units=m

New Line.LINE158 bus1=148.1.2.3.4 bus2=159.1.2.3.4 phases=4 linecode=LC1 length=11.6877 units=m

New Line.LINE159 bus1=148.1.2.3.4 bus2=160.1.2.3.4 phases=4 linecode=LC1 length=10.3452 units=m

New Line.LINE160 bus1=148.1.2.3.4 bus2=161.1.2.3.4 phases=4 linecode=LC1 length=9.7695 units=m

New Line.LINE161 bus1=148.1.2.3.4 bus2=162.1.2.3.4 phases=4 linecode=LC1 length=7.9172 units=m

New Line.LINE162 bus1=148.1.2.3.4 bus2=163.1.2.3.4 phases=4 linecode=LC1 length=12.4291 units=m

New Line.LINE163 bus1=148.1.2.3.4 bus2=164.1.2.3.4 phases=4 linecode=LC1 length=8.0822 units=m

New Line.LINE164 bus1=148.1.2.3.4 bus2=165.1.2.3.4 phases=4 linecode=LC1 length=6.9096 units=m

New Line.LINE165 bus1=148.1.2.3.4 bus2=166.1.2.3.4 phases=4 linecode=LC1 length=8.7591 units=m

New Line.LINE166 bus1=148.1.2.3.4 bus2=167.1.2.3.4 phases=4 linecode=LC1 length=10.149 units=m

New Line.LINE167 bus1=148.1.2.3.4 bus2=168.1.2.3.4 phases=4 linecode=LC1 length=10.045 units=m

New Line.LINE168 bus1=148.1.2.3.4 bus2=169.1.2.3.4 phases=4 linecode=LC1 length=5.0122 units=m

New Line.LINE169 bus1=148.1.2.3.4 bus2=170.1.2.3.4 phases=4 linecode=LC1 length=9.2305 units=m

New Line.LINE170 bus1=148.1.2.3.4 bus2=171.1.2.3.4 phases=4 linecode=LC1 length=8.4524 units=m

New Line.LINE171 bus1=148.1.2.3.4 bus2=172.1.2.3.4 phases=4 linecode=LC1 length=12.0326 units=m

New Line.LINE172 bus1=148.1.2.3.4 bus2=173.1.2.3.4 phases=4 linecode=LC1 length=4.0227 units=m

New Line.LINE173 bus1=148.1.2.3.4 bus2=174.1.2.3.4 phases=4 linecode=LC1 length=6.6047 units=m

New Line.LINE174 bus1=148.1.2.3.4 bus2=175.1.2.3.4 phases=4 linecode=LC1 length=5.0895 units=m

New Line.LINE175 bus1=148.1.2.3.4 bus2=176.1.2.3.4 phases=4 linecode=LC1 length=0.87321 units=m

New Line.LINE176 bus1=148.1.2.3.4 bus2=177.1.2.3.4 phases=4 linecode=LC1 length=6.4748 units=m

New Line.LINE177 bus1=148.1.2.3.4 bus2=178.1.2.3.4 phases=4 linecode=LC1 length=5.6216 units=m

New Line.LINE178 bus1=148.1.2.3.4 bus2=179.1.2.3.4 phases=4 linecode=LC1 length=12.4532 units=m

New Line.LINE179 bus1=148.1.2.3.4 bus2=180.1.2.3.4 phases=4 linecode=LC1 length=2.68 units=m

New Line.LINE180 bus1=148.1.2.3.4 bus2=181.1.2.3.4 phases=4 linecode=LC1 length=3.5132 units=m

New Line.LINE181 bus1=148.1.2.3.4 bus2=182.1.2.3.4 phases=4 linecode=LC1 length=9.4606 units=m

New Line.LINE182 bus1=148.1.2.3.4 bus2=183.1.2.3.4 phases=4 linecode=LC1 length=11.6569 units=m

New Line.LINE189 bus1=153.1.2.3.4 bus2=190.1.2.3.4 phases=4 linecode=LC9 length=4.967 units=m

New Line.LINE196 bus1=184.1.2.3.4 bus2=197.1.2.3.4 phases=4 linecode=LC1 length=11.8284 units=m

New Line.LINE197 bus1=184.1.2.3.4 bus2=198.1.2.3.4 phases=4 linecode=LC1 length=14.8745 units=m

New Line.LINE198 bus1=184.1.2.3.4 bus2=199.1.2.3.4 phases=4 linecode=LC1 length=17.0842 units=m

New Line.LINE199 bus1=184.1.2.3.4 bus2=200.1.2.3.4 phases=4 linecode=LC1 length=12.9858 units=m

New Line.LINE200 bus1=184.1.2.3.4 bus2=201.1.2.3.4 phases=4 linecode=LC1 length=11.5763 units=m

New Line.LINE201 bus1=184.1.2.3.4 bus2=202.1.2.3.4 phases=4 linecode=LC1 length=22.4973 units=m

New Line.LINE202 bus1=184.1.2.3.4 bus2=203.1.2.3.4 phases=4 linecode=LC1 length=10.6335 units=m

New Line.LINE203 bus1=184.1.2.3.4 bus2=204.1.2.3.4 phases=4 linecode=LC1 length=8.8572 units=m

New Line.LINE204 bus1=184.1.2.3.4 bus2=205.1.2.3.4 phases=4 linecode=LC1 length=18.9333 units=m

New Line.LINE205 bus1=184.1.2.3.4 bus2=206.1.2.3.4 phases=4 linecode=LC1 length=12.8721 units=m

New Line.LINE206 bus1=184.1.2.3.4 bus2=207.1.2.3.4 phases=4 linecode=LC1 length=7.8632 units=m

New Line.LINE207 bus1=184.1.2.3.4 bus2=208.1.2.3.4 phases=4 linecode=LC1 length=15.3724 units=m

New Line.LINE208 bus1=184.1.2.3.4 bus2=209.1.2.3.4 phases=4 linecode=LC1 length=21.3675 units=m

New Line.LINE209 bus1=184.1.2.3.4 bus2=210.1.2.3.4 phases=4 linecode=LC1 length=18.2052 units=m

New Line.LINE210 bus1=184.1.2.3.4 bus2=211.1.2.3.4 phases=4 linecode=LC1 length=14.0979 units=m

New Line.LINE211 bus1=184.1.2.3.4 bus2=212.1.2.3.4 phases=4 linecode=LC1 length=8.6897 units=m

New Line.LINE212 bus1=184.1.2.3.4 bus2=213.1.2.3.4 phases=4 linecode=LC1 length=6.3946 units=m

New Line.LINE213 bus1=184.1.2.3.4 bus2=214.1.2.3.4 phases=4 linecode=LC1 length=11.3195 units=m

New Line.LINE214 bus1=184.1.2.3.4 bus2=215.1.2.3.4 phases=4 linecode=LC1 length=4.9265 units=m

New Line.LINE215 bus1=184.1.2.3.4 bus2=216.1.2.3.4 phases=4 linecode=LC1 length=21.5998 units=m

New Line.LINE216 bus1=184.1.2.3.4 bus2=217.1.2.3.4 phases=4 linecode=LC1 length=17.6746 units=m

New Line.LINE217 bus1=184.1.2.3.4 bus2=218.1.2.3.4 phases=4 linecode=LC1 length=5.5561 units=m

New Line.LINE218 bus1=184.1.2.3.4 bus2=219.1.2.3.4 phases=4 linecode=LC1 length=8.4552 units=m

New Line.LINE219 bus1=184.1.2.3.4 bus2=220.1.2.3.4 phases=4 linecode=LC1 length=13.3862 units=m

New Line.LINE220 bus1=184.1.2.3.4 bus2=221.1.2.3.4 phases=4 linecode=LC1 length=2.8724 units=m

New Line.LINE221 bus1=184.1.2.3.4 bus2=222.1.2.3.4 phases=4 linecode=LC1 length=11.4066 units=m

New Line.LINE222 bus1=184.1.2.3.4 bus2=223.1.2.3.4 phases=4 linecode=LC1 length=20.3463 units=m

New Line.LINE223 bus1=184.1.2.3.4 bus2=224.1.2.3.4 phases=4 linecode=LC1 length=19.2715 units=m

New Line.LINE224 bus1=184.1.2.3.4 bus2=225.1.2.3.4 phases=4 linecode=LC1 length=16.2718 units=m

New Line.LINE225 bus1=184.1.2.3.4 bus2=226.1.2.3.4 phases=4 linecode=LC1 length=15.4334 units=m

New Line.LINE226 bus1=184.1.2.3.4 bus2=227.1.2.3.4 phases=4 linecode=LC1 length=9.4006 units=m

New Line.LINE227 bus1=184.1.2.3.4 bus2=228.1.2.3.4 phases=4 linecode=LC1 length=90.7874 units=m

New Line.LINE228 bus1=184.1.2.3.4 bus2=229.1.2.3.4 phases=4 linecode=LC1 length=77.515 units=m

New Line.LINE234 bus1=190.1.2.3.4 bus2=235.1.2.3.4 phases=4 linecode=LC1 length=8.8359 units=m

New Line.LINE238 bus1=192.1.2.3.4 bus2=239.1.2.3.4 phases=4 linecode=LC9 length=3.8694 units=m

New Line.LINE252 bus1=239.1.2.3.4 bus2=253.1.2.3.4 phases=4 linecode=LC9 length=2.7908 units=m

New Line.LINE291 bus1=279.1.2.3.4 bus2=292.1.2.3.4 phases=4 linecode=LC9 length=5.386 units=m

New Line.LINE305 bus1=292.1.2.3.4 bus2=306.1.2.3.4 phases=4 linecode=LC9 length=3.0173 units=m

New Line.LINE321 bus1=306.1.2.3.4 bus2=322.1.2.3.4 phases=4 linecode=LC9 length=3.539 units=m

New Line.LINE336 bus1=322.1.2.3.4 bus2=337.1.2.3.4 phases=4 linecode=LC9 length=2.2095 units=m

New Line.LINE501 bus1=488.1.2.3.4 bus2=502.1.2.3.4 phases=4 linecode=LC9 length=12.1541 units=m

New Line.LINE514 bus1=502.1.2.3.4 bus2=515.1.2.3.4 phases=4 linecode=LC1 length=6.9423 units=m

New Line.LINE798 bus1=795.1.2.3.4 bus2=799.1.2.3.4 phases=4 linecode=LC9 length=3.9461 units=m

New Line.LINE850 bus1=841.1.2.3.4 bus2=851.1.2.3.4 phases=4 linecode=LC2 length=4.8124 units=m

New Line.LINE915 bus1=904.1.2.3.4 bus2=916.1.2.3.4 phases=4 linecode=LC2 length=4.1041 units=m

New Line.LINE933 bus1=922.1.2.3.4 bus2=934.1.2.3.4 phases=4 linecode=LC9 length=1.7052 units=m

New Line.LINE1173 bus1=1148.1.2.3.4 bus2=1174.1.2.3.4 phases=4 linecode=LC2 length=3.5432 units=m

New Line.LINE1250 bus1=1224.1.2.3.4 bus2=1251.1.2.3.4 phases=4 linecode=LC2 length=4.973 units=m

New Line.LINE1262 bus1=1236.1.2.3.4 bus2=1263.1.2.3.4 phases=4 linecode=LC6 length=5.2817 units=m

New Line.LINE1426 bus1=1402.1.2.3.4 bus2=1427.1.2.3.4 phases=4 linecode=LC2 length=4.6202 units=m

New Line.LINE1447 bus1=1422.1.2.3.4 bus2=1448.1.2.3.4 phases=4 linecode=LC2 length=6.2647 units=m

New Line.LINE1482 bus1=1458.1.2.3.4 bus2=1483.1.2.3.4 phases=4 linecode=LC2 length=4.0242 units=m

New Line.LINE1544 bus1=1522.1.2.3.4 bus2=1545.1.2.3.4 phases=4 linecode=LC2 length=4.9826 units=m

New Line.LINE1645 bus1=1627.1.2.3.4 bus2=1646.1.2.3.4 phases=4 linecode=LC6 length=3.321 units=m

New Line.LINE1654 bus1=1635.1.2.3.4 bus2=1655.1.2.3.4 phases=4 linecode=LC2 length=5.5519 units=m

New Line.LINE1678 bus1=1661.1.2.3.4 bus2=1679.1.2.3.4 phases=4 linecode=LC2 length=4.0163 units=m

New Line.LINE1681 bus1=1663.1.2.3.4 bus2=1682.1.2.3.4 phases=4 linecode=LC2 length=5.221 units=m

New Line.LINE1758 bus1=1740.1.2.3.4 bus2=1759.1.2.3.4 phases=4 linecode=LC2 length=3.2425 units=m

New Line.LINE1839 bus1=1822.1.2.3.4 bus2=1840.1.2.3.4 phases=4 linecode=LC2 length=4.4295 units=m

New Line.LINE1858 bus1=1841.1.2.3.4 bus2=1859.1.2.3.4 phases=4 linecode=LC2 length=4.9477 units=m

New Line.LINE1904 bus1=1888.1.2.3.4 bus2=1905.1.2.3.4 phases=4 linecode=LC2 length=7.084 units=m

New Line.LINE1906 bus1=1889.1.2.3.4 bus2=1907.1.2.3.4 phases=4 linecode=LC2 length=5.0222 units=m

New Line.LINE2074 bus1=2062.1.2.3.4 bus2=2075.1.2.3.4 phases=4 linecode=LC2 length=6.7889 units=m

New Line.LINE2118 bus1=2108.1.2.3.4 bus2=2119.1.2.3.4 phases=4 linecode=LC2 length=4.5461 units=m

New Line.LINE2134 bus1=2124.1.2.3.4 bus2=2135.1.2.3.4 phases=4 linecode=LC2 length=4.9222 units=m

New Line.LINE2138 bus1=2127.1.2.3.4 bus2=2139.1.2.3.4 phases=4 linecode=LC9 length=1.6976 units=m

New Line.LINE2171 bus1=2159.1.2.3.4 bus2=2172.1.2.3.4 phases=4 linecode=LC2 length=4.934 units=m

New Line.LINE2310 bus1=2302.1.2.3.4 bus2=2311.1.2.3.4 phases=4 linecode=LC2 length=4.2854 units=m

New Line.LINE2345 bus1=2339.1.2.3.4 bus2=2346.1.2.3.4 phases=4 linecode=LC9 length=0.97046 units=m

New Line.LINE2365 bus1=2354.1.2.3.4 bus2=2366.1.2.3.4 phases=4 linecode=LC2 length=5.4571 units=m

New Line.LINE2476 bus1=2464.1.2.3.4 bus2=2477.1.2.3.4 phases=4 linecode=LC2 length=6.5719 units=m

New Line.LINE2533 bus1=2523.1.2.3.4 bus2=2534.1.2.3.4 phases=4 linecode=LC2 length=3.2684 units=m

New Line.LINE2554 bus1=2542.1.2.3.4 bus2=2555.1.2.3.4 phases=4 linecode=LC2 length=7.3322 units=m

New Line.LINE2564 bus1=2551.1.2.3.4 bus2=2565.1.2.3.4 phases=4 linecode=LC2 length=4.204 units=m

New Line.LINE2590 bus1=2578.1.2.3.4 bus2=2591.1.2.3.4 phases=4 linecode=LC2 length=2.8255 units=m

New Line.LINE2674 bus1=2663.1.2.3.4 bus2=2675.1.2.3.4 phases=4 linecode=LC2 length=3.7398 units=m

New Line.LINE2686 bus1=2676.1.2.3.4 bus2=2687.1.2.3.4 phases=4 linecode=LC2 length=4.9765 units=m

New Line.LINE2692 bus1=2681.1.2.3.4 bus2=2693.1.2.3.4 phases=4 linecode=LC2 length=4.1736 units=m

New Line.LINE2708 bus1=2699.1.2.3.4 bus2=2709.1.2.3.4 phases=4 linecode=LC2 length=4.8957 units=m

New Line.LINE2753 bus1=2746.1.2.3.4 bus2=2754.1.2.3.4 phases=4 linecode=LC2 length=6.9125 units=m

New Line.LINE2890 bus1=2881.1.2.3.4 bus2=2891.1.2.3.4 phases=4 linecode=LC2 length=6.145 units=m

New Line.LINE2905 bus1=2896.1.2.3.4 bus2=2906.1.2.3.4 phases=4 linecode=LC2 length=2.9741 units=m

New Line.LINE2916 bus1=2907.1.2.3.4 bus2=2917.1.2.3.4 phases=4 linecode=LC2 length=4.8446 units=m

New Line.LINE3060 bus1=3054.1.2.3.4 bus2=3061.1.2.3.4 phases=4 linecode=LC2 length=3.8644 units=m

New Line.LINE3077 bus1=3072.1.2.3.4 bus2=3078.1.2.3.4 phases=4 linecode=LC2 length=3.9706 units=m

New Line.LINE3085 bus1=3080.1.2.3.4 bus2=3086.1.2.3.4 phases=4 linecode=LC2 length=3.7609 units=m
