! Reduced enabled lines.

New Line._virtual_line0_line1_line2_line3_line4_line5_line6_line7_line8_line9_line10_line11_line12_line13_line14_line15_line16_line17_line18_line19_line20_line21_line22_line23_line24_line25_line26_line27_line28_line29_line30_line31_line32_line33_line34_line35_line36_line37_line38_line39_line40_line41_line42_line43 bus1=44.1.2.3.4 bus2=sourcebus.1.2.3.4 phases=4 linecode=LC8 length=73.974507 units=m
! reduced_from=line0,line1,line2,line3,line4,line5,line6,line7,line8,line9,line10,line11,line12,line13,line14,line15,line16,line17,line18,line19,line20,line21,line22,line23,line24,line25,line26,line27,line28,line29,line30,line31,line32,line33,line34,line35,line36,line37,line38,line39,line40,line41,line42,line43
! eliminated_buses=1,2,3,4,5,6,7,8,9,10,11,12,13,14,15,16,17,18,19,20,21,22,23,24,25,26,27,28,29,30,31,32,33,34,35,36,37,38,39,40,41,42,43

New Line._virtual_line46_line48_line49_line50 bus1=45.1.2.3.4 bus2=51.1.2.3.4 phases=4 linecode=LC8 length=4.4564 units=m
! reduced_from=line46,line48,line49,line50
! eliminated_buses=47,49,50

New Line._virtual_line52_line53_line54_line55_line56_line57_line58_line59_line60_line61_line62_line63_line64_line65_line66_line67 bus1=68.1.2.3.4 bus2=51.1.2.3.4 phases=4 linecode=LC8 length=12.537222 units=m
! reduced_from=line52,line53,line54,line55,line56,line57,line58,line59,line60,line61,line62,line63,line64,line65,line66,line67
! eliminated_buses=53,54,55,56,57,58,59,60,61,62,63,64,65,66,67

New Line._virtual_line69_line70 bus1=71.1.2.3.4 bus2=68.1.2.3.4 phases=4 linecode=LC8 length=1.65985 units=m
! reduced_from=line69,line70
! eliminated_buses=70

New Line._virtual_line74_line76 bus1=73.1.2.3.4 bus2=77.1.2.3.4 phases=4 linecode=LC8 length=4.4537 units=m
! reduced_from=line74,line76
! eliminated_buses=75

New Line._virtual_line79_line80 bus1=77.1.2.3.4 bus2=81.1.2.3.4 phases=4 linecode=LC8 length=7.0393 units=m
! reduced_from=line79,line80
! eliminated_buses=80

New Line._virtual_line82_line84_line86_line88_line90_line92_line94_line96_line98_line100_line102_line104_line106_line108_line110_line112_line115 bus1=81.1.2.3.4 bus2=116.1.2.3.4 phases=4 linecode=LC8 length=31.5719 units=m
! reduced_from=line82,line84,line86,line88,line90,line92,line94,line96,line98,line100,line102,line104,line106,line108,line110,line112,line115
! eliminated_buses=83,85,87,89,91,93,95,97,99,101,103,105,107,109,111,113

New Line._virtual_line122_line126_line132_line139_line146_line153_line161_line169_line177_line185_line193_line203_line214_line225_line236_line247 bus1=248.1.2.3.4 bus2=120.1.2.3.4 phases=4 linecode=LC2 length=11.790568 units=m
! reduced_from=line122,line126,line132,line139,line146,line153,line161,line169,line177,line185,line193,line203,line214,line225,line236,line247
! eliminated_buses=123,127,133,140,147,154,162,170,178,186,194,204,215,226,237

New Line._virtual_line127_line133_line140_line147_line154_line162_line170_line178_line186_line194_line204_line215_line226_line237_line248_line257_line265_line273_line281 bus1=124.1.2.3.4 bus2=282.1.2.3.4 phases=4 linecode=LC2 length=13.517254 units=m
! reduced_from=line127,line133,line140,line147,line154,line162,line170,line178,line186,line194,line204,line215,line226,line237,line248,line257,line265,line273,line281
! eliminated_buses=128,134,141,148,155,163,171,179,187,195,205,216,227,238,249,258,266,274

New Line._virtual_line128_line134_line141_line148_line155_line163_line171_line179_line187_line195_line205_line216_line227_line238_line249_line258_line266_line274 bus1=275.1.2.3.4 bus2=124.1.2.3.4 phases=4 linecode=LC2 length=12.65271 units=m
! reduced_from=line128,line134,line141,line148,line155,line163,line171,line179,line187,line195,line205,line216,line227,line238,line249,line258,line266,line274
! eliminated_buses=129,135,142,149,156,164,172,180,188,196,206,217,228,239,250,259,267

New Line._virtual_line129_line136_line143_line150 bus1=124.1.2.3.4 bus2=151.1.2.3.4 phases=4 linecode=LC8 length=12.52923 units=m
! reduced_from=line129,line136,line143,line150
! eliminated_buses=130,137,144

New Line._virtual_line157_line165_line173_line181_line189_line197_line207_line218_line229_line240_line250_line259_line267_line275_line282_line288_line294 bus1=295.1.2.3.4 bus2=151.1.2.3.4 phases=4 linecode=LC2 length=9.19902 units=m
! reduced_from=line157,line165,line173,line181,line189,line197,line207,line218,line229,line240,line250,line259,line267,line275,line282,line288,line294
! eliminated_buses=158,166,174,182,190,198,208,219,230,241,251,260,268,276,283,289

New Line._virtual_line158_line166_line174_line182_line190_line198_line208_line219_line230_line241_line251_line260_line268_line276_line283_line289_line295_line300_line304_line307_line310 bus1=151.1.2.3.4 bus2=311.1.2.3.4 phases=4 linecode=LC2 length=11.396778 units=m
! reduced_from=line158,line166,line174,line182,line190,line198,line208,line219,line230,line241,line251,line260,line268,line276,line283,line289,line295,line300,line304,line307,line310
! eliminated_buses=159,167,175,183,191,199,209,220,231,242,252,261,269,277,284,290,296,301,305,308

New Line._virtual_line159_line167_line175_line183_line191_line200 bus1=151.1.2.3.4 bus2=201.1.2.3.4 phases=4 linecode=LC8 length=20.865227 units=m
! reduced_from=line159,line167,line175,line183,line191,line200
! eliminated_buses=160,168,176,184,192

New Line._virtual_line210_line221_line232_line243_line253_line261_line269_line277_line284_line290_line296_line301_line305_line308_line311_line313 bus1=201.1.2.3.4 bus2=314.1.2.3.4 phases=4 linecode=LC2 length=9.460501 units=m
! reduced_from=line210,line221,line232,line243,line253,line261,line269,line277,line284,line290,line296,line301,line305,line308,line311,line313
! eliminated_buses=211,222,233,244,254,262,270,278,285,291,297,302,306,309,312

New Line._virtual_line211_line222_line233_line244_line254_line262_line270_line278_line285_line291_line297_line302_line306_line309_line312_line314_line315_line316_line317_line318_line319_line320_line321_line322_line323_line324_line325_line326_line327_line328_line329_line330_line331_line332_line333_line334_line335_line336_line337_line338_line339_line340_line341 bus1=342.1.2.3.4 bus2=201.1.2.3.4 phases=4 linecode=LC8 length=29.63703 units=m
! reduced_from=line211,line222,line233,line244,line254,line262,line270,line278,line285,line291,line297,line302,line306,line309,line312,line314,line315,line316,line317,line318,line319,line320,line321,line322,line323,line324,line325,line326,line327,line328,line329,line330,line331,line332,line333,line334,line335,line336,line337,line338,line339,line340,line341
! eliminated_buses=212,223,234,245,255,263,271,279,286,292,298,303,307,310,313,315,316,317,318,319,320,321,322,323,324,325,326,327,328,329,330,331,332,333,334,335,336,337,338,339,340,341

New Line._virtual_line342_line344_line347_line351_line354_line358_line362_line367 bus1=342.1.2.3.4 bus2=368.1.2.3.4 phases=4 linecode=LC5 length=7.06522 units=m
! reduced_from=line342,line344,line347,line351,line354,line358,line362,line367
! eliminated_buses=343,345,348,352,355,359,363

New Line._virtual_line343_line346 bus1=342.1.2.3.4 bus2=347.1.2.3.4 phases=4 linecode=LC8 length=14.5506 units=m
! reduced_from=line343,line346
! eliminated_buses=344

New Line._virtual_line349_line352 bus1=353.1.2.3.4 bus2=347.1.2.3.4 phases=4 linecode=LC8 length=7.2453 units=m
! reduced_from=line349,line352
! eliminated_buses=350

New Line._virtual_line350_line353_line357_line361_line366_line372_line379_line388_line400_line411_line423_line436_line449_line465_line483_line500_line517 bus1=347.1.2.3.4 bus2=518.1.2.3.4 phases=4 linecode=LC2 length=9.12695 units=m
! reduced_from=line350,line353,line357,line361,line366,line372,line379,line388,line400,line411,line423,line436,line449,line465,line483,line500,line517
! eliminated_buses=351,354,358,362,367,373,380,389,401,412,424,437,450,466,484,501

New Line._virtual_line355_line359_line364 bus1=353.1.2.3.4 bus2=365.1.2.3.4 phases=4 linecode=LC8 length=8.0382 units=m
! reduced_from=line355,line359,line364
! eliminated_buses=356,360

New Line._virtual_line356_line360_line365_line371_line378_line387_line399_line410_line422_line435_line448_line464_line482_line499_line516_line535_line553_line568_line582_line596_line609_line622_line632_line642_line652 bus1=353.1.2.3.4 bus2=653.1.2.3.4 phases=4 linecode=LC2 length=10.106838 units=m
! reduced_from=line356,line360,line365,line371,line378,line387,line399,line410,line422,line435,line448,line464,line482,line499,line516,line535,line553,line568,line582,line596,line609,line622,line632,line642,line652
! eliminated_buses=357,361,366,372,379,388,400,411,423,436,449,465,483,500,517,536,554,569,583,597,610,623,633,643

New Line._virtual_line369_line376 bus1=377.1.2.3.4 bus2=365.1.2.3.4 phases=4 linecode=LC8 length=4.3665 units=m
! reduced_from=line369,line376
! eliminated_buses=370

New Line._virtual_line370_line377_line386_line398_line409_line421_line434_line447_line463_line481_line498_line515_line534_line552_line567_line581_line595_line608_line621 bus1=365.1.2.3.4 bus2=622.1.2.3.4 phases=4 linecode=LC2 length=11.183075 units=m
! reduced_from=line370,line377,line386,line398,line409,line421,line434,line447,line463,line481,line498,line515,line534,line552,line567,line581,line595,line608,line621
! eliminated_buses=371,378,387,399,410,422,435,448,464,482,499,516,535,553,568,582,596,609

New Line._virtual_line373_line380_line389_line401_line412_line424_line437_line450 bus1=451.1.2.3.4 bus2=368.1.2.3.4 phases=4 linecode=LC2 length=10.319794 units=m
! reduced_from=line373,line380,line389,line401,line412,line424,line437,line450
! eliminated_buses=374,381,390,402,413,425,438

New Line._virtual_line374_line382 bus1=368.1.2.3.4 bus2=383.1.2.3.4 phases=4 linecode=LC5 length=11.4297 units=m
! reduced_from=line374,line382
! eliminated_buses=375

New Line._virtual_line385_line397_line408_line420_line433_line446_line462_line480_line497_line514_line533_line551_line566_line580_line594_line607_line620 bus1=377.1.2.3.4 bus2=621.1.2.3.4 phases=4 linecode=LC2 length=9.771943 units=m
! reduced_from=line385,line397,line408,line420,line433,line446,line462,line480,line497,line514,line533,line551,line566,line580,line594,line607,line620
! eliminated_buses=386,398,409,421,434,447,463,481,498,515,534,552,567,581,595,608

New Line._virtual_line392_line403_line414_line426_line439_line452_line467_line485_line501_line518_line536_line554_line569_line583_line597_line610 bus1=611.1.2.3.4 bus2=383.1.2.3.4 phases=4 linecode=LC2 length=9.961179 units=m
! reduced_from=line392,line403,line414,line426,line439,line452,line467,line485,line501,line518,line536,line554,line569,line583,line597,line610
! eliminated_buses=393,404,415,427,440,453,468,486,502,519,537,555,570,584,598

New Line._virtual_line393_line404 bus1=383.1.2.3.4 bus2=405.1.2.3.4 phases=4 linecode=LC5 length=0.71457 units=m
! reduced_from=line393,line404
! eliminated_buses=394

New Line._virtual_line395_line406_line418_line431_line444_line460 bus1=461.1.2.3.4 bus2=385.1.2.3.4 phases=4 linecode=LC8 length=20.42572 units=m
! reduced_from=line395,line406,line418,line431,line444,line460
! eliminated_buses=396,407,419,432,445

New Line._virtual_line396_line407_line419_line432_line445_line461_line479_line496_line513_line532_line550_line565_line579_line593 bus1=594.1.2.3.4 bus2=385.1.2.3.4 phases=4 linecode=LC2 length=7.706293 units=m
! reduced_from=line396,line407,line419,line432,line445,line461,line479,line496,line513,line532,line550,line565,line579,line593
! eliminated_buses=397,408,420,433,446,462,480,497,514,533,551,566,580

New Line._virtual_line415_line427_line440_line453_line468_line486_line502_line519_line537_line555_line570_line584_line598_line611_line623_line633_line643_line653_line661_line669_line676_line684_line691_line698_line707_line713_line719_line724_line731 bus1=732.1.2.3.4 bus2=405.1.2.3.4 phases=4 linecode=LC2 length=18.058145 units=m
! reduced_from=line415,line427,line440,line453,line468,line486,line502,line519,line537,line555,line570,line584,line598,line611,line623,line633,line643,line653,line661,line669,line676,line684,line691,line698,line707,line713,line719,line724,line731
! eliminated_buses=416,428,441,454,469,487,503,520,538,556,571,585,599,612,624,634,644,654,662,670,677,685,692,699,708,714,720,725

New Line._virtual_line428_line441_line454_line469_line487_line503_line520_line538_line556_line571_line585_line599_line612_line624_line634_line644_line654_line662 bus1=663.1.2.3.4 bus2=417.1.2.3.4 phases=4 linecode=LC2 length=9.722708 units=m
! reduced_from=line428,line441,line454,line469,line487,line503,line520,line538,line556,line571,line585,line599,line612,line624,line634,line644,line654,line662
! eliminated_buses=429,442,455,470,488,504,521,539,557,572,586,600,613,625,635,645,655

New Line._virtual_line429_line443 bus1=444.1.2.3.4 bus2=417.1.2.3.4 phases=4 linecode=LC5 length=4.09195 units=m
! reduced_from=line429,line443
! eliminated_buses=430

New Line._virtual_line456_line471_line489_line505_line522_line540_line558_line572_line586_line600_line613_line625_line635_line645_line655_line663_line670_line677_line685_line692_line699_line708_line714_line720_line725_line732_line739_line747_line758 bus1=444.1.2.3.4 bus2=759.1.2.3.4 phases=4 linecode=LC2 length=16.433527 units=m
! reduced_from=line456,line471,line489,line505,line522,line540,line558,line572,line586,line600,line613,line625,line635,line645,line655,line663,line670,line677,line685,line692,line699,line708,line714,line720,line725,line732,line739,line747,line758
! eliminated_buses=457,472,490,506,523,541,559,573,587,601,614,626,636,646,656,664,671,678,686,693,700,709,715,721,726,733,740,748

New Line._virtual_line457_line472_line490_line506_line523_line541_line559_line573_line587_line601_line614_line626_line636_line646_line656_line664_line671_line678_line686_line693_line700_line709_line715_line721_line726_line733_line740_line748_line759_line769_line779_line789_line801_line812_line826_line841 bus1=842.1.2.3.4 bus2=444.1.2.3.4 phases=4 linecode=LC2 length=17.84111 units=m
! reduced_from=line457,line472,line490,line506,line523,line541,line559,line573,line587,line601,line614,line626,line636,line646,line656,line664,line671,line678,line686,line693,line700,line709,line715,line721,line726,line733,line740,line748,line759,line769,line779,line789,line801,line812,line826,line841
! eliminated_buses=458,473,491,507,524,542,560,574,588,602,615,627,637,647,657,665,672,679,687,694,701,710,716,722,727,734,741,749,760,770,780,790,802,813,827

New Line._virtual_line473_line491_line507_line524_line542_line560_line574_line588_line602_line615_line627_line637_line647_line657_line665_line672_line679_line687_line694_line701 bus1=702.1.2.3.4 bus2=459.1.2.3.4 phases=4 linecode=LC2 length=10.030496 units=m
! reduced_from=line473,line491,line507,line524,line542,line560,line574,line588,line602,line615,line627,line637,line647,line657,line665,line672,line679,line687,line694,line701
! eliminated_buses=474,492,508,525,543,561,575,589,603,616,628,638,648,658,666,673,680,688,695

New Line._virtual_line474_line492 bus1=493.1.2.3.4 bus2=459.1.2.3.4 phases=4 linecode=LC5 length=5.4311 units=m
! reduced_from=line474,line492
! eliminated_buses=475

New Line._virtual_line477_line494_line511_line530_line548_line563_line577_line591_line605_line618_line630_line640_line650 bus1=461.1.2.3.4 bus2=651.1.2.3.4 phases=4 linecode=LC2 length=9.708595 units=m
! reduced_from=line477,line494,line511,line530,line548,line563,line577,line591,line605,line618,line630,line640,line650
! eliminated_buses=478,495,512,531,549,564,578,592,606,619,631,641

New Line._virtual_line478_line495_line512_line531_line549_line564_line578_line592_line606_line619_line631_line641_line651_line660_line668_line675_line683 bus1=684.1.2.3.4 bus2=461.1.2.3.4 phases=4 linecode=LC8 length=16.623916 units=m
! reduced_from=line478,line495,line512,line531,line549,line564,line578,line592,line606,line619,line631,line641,line651,line660,line668,line675,line683
! eliminated_buses=479,496,513,532,550,565,579,593,607,620,632,642,652,661,669,676

New Line._virtual_line508_line525_line543_line561_line575_line589_line603_line616_line628_line638_line648_line658_line666_line673 bus1=493.1.2.3.4 bus2=674.1.2.3.4 phases=4 linecode=LC2 length=2.610182 units=m
! reduced_from=line508,line525,line543,line561,line575,line589,line603,line616,line628,line638,line648,line658,line666,line673
! eliminated_buses=509,526,544,562,576,590,604,617,629,639,649,659,667

New Line._virtual_line527_line545_line562_line576_line590_line604_line617_line629_line639_line649_line659_line667_line674_line682_line688_line695 bus1=510.1.2.3.4 bus2=696.1.2.3.4 phases=4 linecode=LC2 length=14.91926 units=m
! reduced_from=line527,line545,line562,line576,line590,line604,line617,line629,line639,line649,line659,line667,line674,line682,line688,line695
! eliminated_buses=528,546,563,577,591,605,618,630,640,650,660,668,675,683,689

New Line._virtual_line689_line696_line704_line710_line716_line722_line727 bus1=728.1.2.3.4 bus2=684.1.2.3.4 phases=4 linecode=LC5 length=6.66287 units=m
! reduced_from=line689,line696,line704,line710,line716,line722,line727
! eliminated_buses=690,697,705,711,717,723

New Line._virtual_line690_line697_line706_line712_line718_line723 bus1=684.1.2.3.4 bus2=724.1.2.3.4 phases=4 linecode=LC8 length=17.02441 units=m
! reduced_from=line690,line697,line706,line712,line718,line723
! eliminated_buses=691,698,707,713,719

New Line._virtual_line729_line737_line744_line753 bus1=754.1.2.3.4 bus2=724.1.2.3.4 phases=4 linecode=LC2 length=8.52648 units=m
! reduced_from=line729,line737,line744,line753
! eliminated_buses=730,738,745

New Line._virtual_line730_line738_line746 bus1=747.1.2.3.4 bus2=724.1.2.3.4 phases=4 linecode=LC8 length=6.95451 units=m
! reduced_from=line730,line738,line746
! eliminated_buses=731,739

New Line._virtual_line734_line741_line749_line760_line770_line780_line790_line802_line813_line827 bus1=728.1.2.3.4 bus2=828.1.2.3.4 phases=4 linecode=LC2 length=4.820468 units=m
! reduced_from=line734,line741,line749,line760,line770,line780,line790,line802,line813,line827
! eliminated_buses=735,742,750,761,771,781,791,803,814

New Line._virtual_line735_line742_line751_line762 bus1=763.1.2.3.4 bus2=728.1.2.3.4 phases=4 linecode=LC5 length=9.84057 units=m
! reduced_from=line735,line742,line751,line762
! eliminated_buses=736,743,752

New Line._virtual_line756_line765_line775_line785_line796_line808_line820_line835 bus1=747.1.2.3.4 bus2=836.1.2.3.4 phases=4 linecode=LC2 length=8.85145 units=m
! reduced_from=line756,line765,line775,line785,line796,line808,line820,line835
! eliminated_buses=757,766,776,786,797,809,821

New Line._virtual_line767_line777_line787 bus1=788.1.2.3.4 bus2=758.1.2.3.4 phases=4 linecode=LC2 length=9.51203 units=m
! reduced_from=line767,line777,line787
! eliminated_buses=768,778

New Line._virtual_line768_line778_line788_line800_line811 bus1=758.1.2.3.4 bus2=812.1.2.3.4 phases=4 linecode=LC8 length=18.4239 units=m
! reduced_from=line768,line778,line788,line800,line811
! eliminated_buses=769,779,789,801

New Line._virtual_line772_line782_line791_line803_line814_line828_line842_line855_line866_line876_line884_line892_line900_line908_line915_line921_line927_line936_line946 bus1=763.1.2.3.4 bus2=947.1.2.3.4 phases=4 linecode=LC2 length=20.407783 units=m
! reduced_from=line772,line782,line791,line803,line814,line828,line842,line855,line866,line876,line884,line892,line900,line908,line915,line921,line927,line936,line946
! eliminated_buses=773,783,792,804,815,829,843,856,867,877,885,893,901,909,916,922,928,937

New Line._virtual_line773_line783_line792_line804_line815_line829_line843_line856_line867 bus1=868.1.2.3.4 bus2=763.1.2.3.4 phases=4 linecode=LC2 length=6.086755 units=m
! reduced_from=line773,line783,line792,line804,line815,line829,line843,line856,line867
! eliminated_buses=774,784,793,805,816,830,844,857

New Line._virtual_line774_line784 bus1=785.1.2.3.4 bus2=763.1.2.3.4 phases=4 linecode=LC5 length=5.9008 units=m
! reduced_from=line774,line784
! eliminated_buses=775

New Line._virtual_line793_line805_line816_line830_line844_line857_line868_line877_line885_line893_line901_line909_line916_line922_line928_line937_line947_line956_line968_line982_line999_line1014_line1029_line1044_line1059_line1074_line1089_line1104_line1119_line1134_line1148_line1162_line1175 bus1=785.1.2.3.4 bus2=1176.1.2.3.4 phases=4 linecode=LC2 length=21.05169 units=m
! reduced_from=line793,line805,line816,line830,line844,line857,line868,line877,line885,line893,line901,line909,line916,line922,line928,line937,line947,line956,line968,line982,line999,line1014,line1029,line1044,line1059,line1074,line1089,line1104,line1119,line1134,line1148,line1162,line1175
! eliminated_buses=794,806,817,831,845,858,869,878,886,894,902,910,917,923,929,938,948,957,969,983,1000,1015,1030,1045,1060,1075,1090,1105,1120,1135,1149,1163

New Line._virtual_line794_line806_line817_line831_line845 bus1=785.1.2.3.4 bus2=846.1.2.3.4 phases=4 linecode=LC2 length=7.64914 units=m
! reduced_from=line794,line806,line817,line831,line845
! eliminated_buses=795,807,818,832

New Line._virtual_line795_line807 bus1=808.1.2.3.4 bus2=785.1.2.3.4 phases=4 linecode=LC5 length=6.03122 units=m
! reduced_from=line795,line807
! eliminated_buses=796

New Line._virtual_line818_line832_line846_line858_line869_line878_line886_line894_line902_line910 bus1=911.1.2.3.4 bus2=808.1.2.3.4 phases=4 linecode=LC2 length=7.064268 units=m
! reduced_from=line818,line832,line846,line858,line869,line878,line886,line894,line902,line910
! eliminated_buses=819,833,847,859,870,879,887,895,903

New Line._virtual_line822_line837_line851_line862_line872_line880_line888_line896_line904_line911_line917_line923_line929_line938_line948_line957_line969_line983_line1000_line1015_line1030_line1045_line1060_line1075_line1091_line1106 bus1=1107.1.2.3.4 bus2=812.1.2.3.4 phases=4 linecode=LC8 length=18.7125 units=m
! reduced_from=line822,line837,line851,line862,line872,line880,line888,line896,line904,line911,line917,line923,line929,line938,line948,line957,line969,line983,line1000,line1015,line1030,line1045,line1060,line1075,line1091,line1106
! eliminated_buses=823,838,852,863,873,881,889,897,905,912,918,924,930,939,949,958,970,984,1001,1016,1031,1046,1061,1076,1092

New Line._virtual_line823_line839_line853_line864_line874_line882_line890_line898_line906_line913_line919 bus1=812.1.2.3.4 bus2=920.1.2.3.4 phases=4 linecode=LC8 length=5.16413 units=m
! reduced_from=line823,line839,line853,line864,line874,line882,line890,line898,line906,line913,line919
! eliminated_buses=824,840,854,865,875,883,891,899,907,914

New Line._virtual_line934_line944_line954_line966_line980_line997_line1012_line1027_line1042_line1057_line1072_line1087_line1102_line1117_line1132_line1146_line1160_line1173_line1185_line1196_line1206_line1216_line1227_line1238 bus1=927.1.2.3.4 bus2=1239.1.2.3.4 phases=4 linecode=LC2 length=7.144753 units=m
! reduced_from=line934,line944,line954,line966,line980,line997,line1012,line1027,line1042,line1057,line1072,line1087,line1102,line1117,line1132,line1146,line1160,line1173,line1185,line1196,line1206,line1216,line1227,line1238
! eliminated_buses=935,945,955,967,981,998,1013,1028,1043,1058,1073,1088,1103,1118,1133,1147,1161,1174,1186,1197,1207,1217,1228

New Line._virtual_line940_line950_line959_line971_line985_line1002_line1017_line1032_line1047_line1062_line1077_line1092_line1107_line1123 bus1=1124.1.2.3.4 bus2=933.1.2.3.4 phases=4 linecode=LC2 length=6.152101 units=m
! reduced_from=line940,line950,line959,line971,line985,line1002,line1017,line1032,line1047,line1062,line1077,line1092,line1107,line1123
! eliminated_buses=941,951,960,972,986,1003,1018,1033,1048,1063,1078,1093,1108

New Line._virtual_line942_line953_line965_line979_line996_line1011_line1026_line1041_line1056_line1071_line1086_line1101_line1116_line1131_line1145 bus1=934.1.2.3.4 bus2=1146.1.2.3.4 phases=4 linecode=LC2 length=5.775357 units=m
! reduced_from=line942,line953,line965,line979,line996,line1011,line1026,line1041,line1056,line1071,line1086,line1101,line1116,line1131,line1145
! eliminated_buses=943,954,966,980,997,1012,1027,1042,1057,1072,1087,1102,1117,1132

New Line._virtual_line952_line964 bus1=942.1.2.3.4 bus2=965.1.2.3.4 phases=4 linecode=LC8 length=1.65326 units=m
! reduced_from=line952,line964
! eliminated_buses=953

New Line._virtual_line974_line991_line1007_line1022_line1037_line1052_line1067_line1082_line1097_line1112 bus1=963.1.2.3.4 bus2=1113.1.2.3.4 phases=4 linecode=LC2 length=4.53952 units=m
! reduced_from=line974,line991,line1007,line1022,line1037,line1052,line1067,line1082,line1097,line1112
! eliminated_buses=975,992,1008,1023,1038,1053,1068,1083,1098

New Line._virtual_line977_line994_line1009_line1024_line1039_line1054_line1069_line1084_line1099_line1114_line1129_line1143_line1158_line1171_line1183_line1194_line1205_line1215_line1226_line1237 bus1=965.1.2.3.4 bus2=1238.1.2.3.4 phases=4 linecode=LC2 length=17.38666 units=m
! reduced_from=line977,line994,line1009,line1024,line1039,line1054,line1069,line1084,line1099,line1114,line1129,line1143,line1158,line1171,line1183,line1194,line1205,line1215,line1226,line1237
! eliminated_buses=978,995,1010,1025,1040,1055,1070,1085,1100,1115,1130,1144,1159,1172,1184,1195,1206,1216,1227

New Line._virtual_line986_line1003_line1018_line1033_line1048_line1063_line1078_line1093_line1108_line1124_line1139_line1155_line1169_line1181_line1192_line1203_line1213_line1224_line1235 bus1=973.1.2.3.4 bus2=1236.1.2.3.4 phases=4 linecode=LC8 length=10.94734 units=m
! reduced_from=line986,line1003,line1018,line1033,line1048,line1063,line1078,line1093,line1108,line1124,line1139,line1155,line1169,line1181,line1192,line1203,line1213,line1224,line1235
! eliminated_buses=987,1004,1019,1034,1049,1064,1079,1094,1109,1125,1140,1156,1170,1182,1193,1204,1214,1225

New Line._virtual_line989_line1006_line1021_line1036_line1051_line1066_line1081_line1096_line1111_line1127 bus1=1128.1.2.3.4 bus2=974.1.2.3.4 phases=4 linecode=LC2 length=7.122588 units=m
! reduced_from=line989,line1006,line1021,line1036,line1051,line1066,line1081,line1096,line1111,line1127
! eliminated_buses=990,1007,1022,1037,1052,1067,1082,1097,1112

New Line._virtual_line992_line1008_line1023_line1038_line1053_line1068_line1083_line1098_line1113_line1128_line1142 bus1=1143.1.2.3.4 bus2=976.1.2.3.4 phases=4 linecode=LC2 length=19.84869 units=m
! reduced_from=line992,line1008,line1023,line1038,line1053,line1068,line1083,line1098,line1113,line1128,line1142
! eliminated_buses=993,1009,1024,1039,1054,1069,1084,1099,1114,1129

New Line._virtual_line995_line1010_line1025_line1040_line1055_line1070_line1085_line1100_line1115_line1130_line1144_line1159_line1172_line1184_line1195 bus1=1196.1.2.3.4 bus2=979.1.2.3.4 phases=4 linecode=LC2 length=5.936408 units=m
! reduced_from=line995,line1010,line1025,line1040,line1055,line1070,line1085,line1100,line1115,line1130,line1144,line1159,line1172,line1184,line1195
! eliminated_buses=996,1011,1026,1041,1056,1071,1086,1101,1116,1131,1145,1160,1173,1185

New Line._virtual_line1005_line1020_line1035_line1050_line1065_line1080_line1095_line1110_line1126_line1141_line1157 bus1=989.1.2.3.4 bus2=1158.1.2.3.4 phases=4 linecode=LC2 length=8.148005 units=m
! reduced_from=line1005,line1020,line1035,line1050,line1065,line1080,line1095,line1110,line1126,line1141,line1157
! eliminated_buses=1006,1021,1036,1051,1066,1081,1096,1111,1127,1142

New Line._virtual_line1122_line1138_line1154_line1168_line1180_line1191_line1202_line1212_line1223_line1234_line1244_line1257 bus1=1258.1.2.3.4 bus2=1107.1.2.3.4 phases=4 linecode=LC2 length=5.863297 units=m
! reduced_from=line1122,line1138,line1154,line1168,line1180,line1191,line1202,line1212,line1223,line1234,line1244,line1257
! eliminated_buses=1123,1139,1155,1169,1181,1192,1203,1213,1224,1235,1245

New Line._virtual_line1136_line1150_line1164_line1177_line1188_line1199_line1209_line1219_line1230_line1240_line1251_line1261_line1269_line1277_line1285_line1293_line1302 bus1=1303.1.2.3.4 bus2=1122.1.2.3.4 phases=4 linecode=LC2 length=10.67507 units=m
! reduced_from=line1136,line1150,line1164,line1177,line1188,line1199,line1209,line1219,line1230,line1240,line1251,line1261,line1269,line1277,line1285,line1293,line1302
! eliminated_buses=1137,1151,1165,1178,1189,1200,1210,1220,1231,1241,1252,1262,1270,1278,1286,1294

New Line._virtual_line1152_line1166_line1178_line1189_line1200_line1210_line1220_line1231_line1241_line1252_line1262_line1270_line1278_line1286_line1294_line1303 bus1=1138.1.2.3.4 bus2=1304.1.2.3.4 phases=4 linecode=LC2 length=9.822395 units=m
! reduced_from=line1152,line1166,line1178,line1189,line1200,line1210,line1220,line1231,line1241,line1252,line1262,line1270,line1278,line1286,line1294,line1303
! eliminated_buses=1153,1167,1179,1190,1201,1211,1221,1232,1242,1253,1263,1271,1279,1287,1295

New Line._virtual_line1153_line1167_line1179_line1190_line1201_line1211 bus1=1138.1.2.3.4 bus2=1212.1.2.3.4 phases=4 linecode=LC8 length=12.13731 units=m
! reduced_from=line1153,line1167,line1179,line1190,line1201,line1211
! eliminated_buses=1154,1168,1180,1191,1202

New Line._virtual_line1221_line1232_line1242_line1253_line1263_line1271_line1279_line1287_line1295_line1304_line1310 bus1=1212.1.2.3.4 bus2=1311.1.2.3.4 phases=4 linecode=LC2 length=11.97028 units=m
! reduced_from=line1221,line1232,line1242,line1253,line1263,line1271,line1279,line1287,line1295,line1304,line1310
! eliminated_buses=1222,1233,1243,1254,1264,1272,1280,1288,1296,1305

New Line._virtual_line1222_line1233_line1243_line1254_line1264_line1273_line1281_line1289 bus1=1212.1.2.3.4 bus2=1290.1.2.3.4 phases=4 linecode=LC8 length=14.99059 units=m
! reduced_from=line1222,line1233,line1243,line1254,line1264,line1273,line1281,line1289
! eliminated_buses=1223,1234,1244,1255,1265,1274,1282

New Line._virtual_line1245_line1258_line1266_line1274_line1282_line1290_line1299_line1308_line1314_line1319_line1324 bus1=1325.1.2.3.4 bus2=1236.1.2.3.4 phases=4 linecode=LC8 length=15.007507 units=m
! reduced_from=line1245,line1258,line1266,line1274,line1282,line1290,line1299,line1308,line1314,line1319,line1324
! eliminated_buses=1246,1259,1267,1275,1283,1291,1300,1309,1315,1320

New Line._virtual_line1259_line1267_line1275_line1283_line1291_line1300_line1309_line1315_line1320_line1325_line1331_line1337_line1343_line1349_line1355_line1360_line1365 bus1=1366.1.2.3.4 bus2=1248.1.2.3.4 phases=4 linecode=LC2 length=12.01261 units=m
! reduced_from=line1259,line1267,line1275,line1283,line1291,line1300,line1309,line1315,line1320,line1325,line1331,line1337,line1343,line1349,line1355,line1360,line1365
! eliminated_buses=1260,1268,1276,1284,1292,1301,1310,1316,1321,1326,1332,1338,1344,1350,1356,1361

New Line._virtual_line1297_line1306_line1312_line1317_line1322_line1327_line1333_line1339_line1345_line1351_line1356_line1361_line1366_line1371 bus1=1372.1.2.3.4 bus2=1290.1.2.3.4 phases=4 linecode=LC2 length=7.469902 units=m
! reduced_from=line1297,line1306,line1312,line1317,line1322,line1327,line1333,line1339,line1345,line1351,line1356,line1361,line1366,line1371
! eliminated_buses=1298,1307,1313,1318,1323,1328,1334,1340,1346,1352,1357,1362,1367

New Line._virtual_line1298_line1307_line1313_line1318_line1323_line1328_line1334_line1340_line1346_line1352_line1357_line1362 bus1=1290.1.2.3.4 bus2=1363.1.2.3.4 phases=4 linecode=LC8 length=16.07573 units=m
! reduced_from=line1298,line1307,line1313,line1318,line1323,line1328,line1334,line1340,line1346,line1352,line1357,line1362
! eliminated_buses=1299,1308,1314,1319,1324,1329,1335,1341,1347,1353,1358

New Line._virtual_line1329_line1335_line1341_line1347_line1353_line1358_line1363_line1369_line1375_line1380_line1386_line1393_line1400_line1408_line1416_line1425_line1435_line1445 bus1=1446.1.2.3.4 bus2=1325.1.2.3.4 phases=4 linecode=LC2 length=8.526872 units=m
! reduced_from=line1329,line1335,line1341,line1347,line1353,line1358,line1363,line1369,line1375,line1380,line1386,line1393,line1400,line1408,line1416,line1425,line1435,line1445
! eliminated_buses=1330,1336,1342,1348,1354,1359,1364,1370,1376,1381,1387,1394,1401,1409,1417,1426,1436

New Line._virtual_line1330_line1336_line1342_line1348_line1354_line1359_line1364_line1370_line1376_line1381_line1387_line1394_line1401_line1409_line1417_line1426_line1436_line1446_line1455_line1464_line1473_line1482_line1491_line1501 bus1=1502.1.2.3.4 bus2=1325.1.2.3.4 phases=4 linecode=LC8 length=16.881825 units=m
! reduced_from=line1330,line1336,line1342,line1348,line1354,line1359,line1364,line1370,line1376,line1381,line1387,line1394,line1401,line1409,line1417,line1426,line1436,line1446,line1455,line1464,line1473,line1482,line1491,line1501
! eliminated_buses=1331,1337,1343,1349,1355,1360,1365,1371,1377,1382,1388,1395,1402,1410,1418,1427,1437,1447,1456,1465,1474,1483,1492

New Line._virtual_line1367_line1372_line1377_line1382_line1388_line1395_line1402_line1410_line1418_line1427 bus1=1428.1.2.3.4 bus2=1363.1.2.3.4 phases=4 linecode=LC2 length=8.037869 units=m
! reduced_from=line1367,line1372,line1377,line1382,line1388,line1395,line1402,line1410,line1418,line1427
! eliminated_buses=1368,1373,1378,1383,1389,1396,1403,1411,1419

New Line._virtual_line1368_line1374_line1379 bus1=1363.1.2.3.4 bus2=1380.1.2.3.4 phases=4 linecode=LC8 length=19.51164 units=m
! reduced_from=line1368,line1374,line1379
! eliminated_buses=1369,1375

New Line._virtual_line1384_line1390_line1397_line1404_line1411_line1419_line1428_line1437_line1447_line1456_line1465_line1474_line1483_line1492_line1502_line1514_line1525_line1537_line1549 bus1=1550.1.2.3.4 bus2=1380.1.2.3.4 phases=4 linecode=LC2 length=12.44733 units=m
! reduced_from=line1384,line1390,line1397,line1404,line1411,line1419,line1428,line1437,line1447,line1456,line1465,line1474,line1483,line1492,line1502,line1514,line1525,line1537,line1549
! eliminated_buses=1385,1391,1398,1405,1412,1420,1429,1438,1448,1457,1466,1475,1484,1493,1503,1515,1526,1538

New Line._virtual_line1391_line1398_line1405_line1412_line1420_line1429_line1438_line1448_line1457_line1466_line1475_line1484_line1493_line1503_line1515_line1526_line1538_line1550 bus1=1386.1.2.3.4 bus2=1551.1.2.3.4 phases=4 linecode=LC2 length=12.897889 units=m
! reduced_from=line1391,line1398,line1405,line1412,line1420,line1429,line1438,line1448,line1457,line1466,line1475,line1484,line1493,line1503,line1515,line1526,line1538,line1550
! eliminated_buses=1392,1399,1406,1413,1421,1430,1439,1449,1458,1467,1476,1485,1494,1504,1516,1527,1539

New Line._virtual_line1392_line1399 bus1=1386.1.2.3.4 bus2=1400.1.2.3.4 phases=4 linecode=LC8 length=4.5242 units=m
! reduced_from=line1392,line1399
! eliminated_buses=1393

New Line._virtual_line1406_line1413_line1421_line1430_line1439_line1449_line1458_line1467_line1476_line1485_line1494_line1504_line1516_line1527_line1539_line1551 bus1=1552.1.2.3.4 bus2=1400.1.2.3.4 phases=4 linecode=LC2 length=11.989696 units=m
! reduced_from=line1406,line1413,line1421,line1430,line1439,line1449,line1458,line1467,line1476,line1485,line1494,line1504,line1516,line1527,line1539,line1551
! eliminated_buses=1407,1414,1422,1431,1440,1450,1459,1468,1477,1486,1495,1505,1517,1528,1540

New Line._virtual_line1414_line1422_line1431_line1440_line1450_line1459_line1468_line1477_line1486_line1495_line1505_line1517_line1528_line1540_line1552 bus1=1408.1.2.3.4 bus2=1553.1.2.3.4 phases=4 linecode=LC2 length=14.35419 units=m
! reduced_from=line1414,line1422,line1431,line1440,line1450,line1459,line1468,line1477,line1486,line1495,line1505,line1517,line1528,line1540,line1552
! eliminated_buses=1415,1423,1432,1441,1451,1460,1469,1478,1487,1496,1506,1518,1529,1541

New Line._virtual_line1423_line1432_line1441_line1451_line1460_line1469_line1478_line1487_line1496_line1506_line1518_line1529 bus1=1530.1.2.3.4 bus2=1416.1.2.3.4 phases=4 linecode=LC2 length=11.638712 units=m
! reduced_from=line1423,line1432,line1441,line1451,line1460,line1469,line1478,line1487,line1496,line1506,line1518,line1529
! eliminated_buses=1424,1433,1442,1452,1461,1470,1479,1488,1497,1507,1519

New Line._virtual_line1433_line1442_line1452_line1461_line1470_line1479_line1488_line1497_line1507_line1519_line1530_line1541_line1553_line1561_line1570_line1579_line1588 bus1=1425.1.2.3.4 bus2=1589.1.2.3.4 phases=4 linecode=LC2 length=12.899749 units=m
! reduced_from=line1433,line1442,line1452,line1461,line1470,line1479,line1488,line1497,line1507,line1519,line1530,line1541,line1553,line1561,line1570,line1579,line1588
! eliminated_buses=1434,1443,1453,1462,1471,1480,1489,1498,1508,1520,1531,1542,1554,1562,1571,1580

New Line._virtual_line1443_line1453_line1462_line1471_line1480_line1489_line1498_line1508_line1520_line1531_line1542_line1554_line1562_line1571_line1580_line1589_line1598_line1609_line1620 bus1=1621.1.2.3.4 bus2=1435.1.2.3.4 phases=4 linecode=LC2 length=13.002757 units=m
! reduced_from=line1443,line1453,line1462,line1471,line1480,line1489,line1498,line1508,line1520,line1531,line1542,line1554,line1562,line1571,line1580,line1589,line1598,line1609,line1620
! eliminated_buses=1444,1454,1463,1472,1481,1490,1499,1509,1521,1532,1543,1555,1563,1572,1581,1590,1599,1610

New Line._virtual_line1444_line1454_line1463_line1472_line1481_line1490 bus1=1491.1.2.3.4 bus2=1435.1.2.3.4 phases=4 linecode=LC8 length=10.08972 units=m
! reduced_from=line1444,line1454,line1463,line1472,line1481,line1490
! eliminated_buses=1445,1455,1464,1473,1482

New Line._virtual_line1499_line1509_line1521_line1532_line1543_line1555_line1563 bus1=1491.1.2.3.4 bus2=1564.1.2.3.4 phases=4 linecode=LC2 length=12.0115 units=m
! reduced_from=line1499,line1509,line1521,line1532,line1543,line1555,line1563
! eliminated_buses=1500,1510,1522,1533,1544,1556

New Line._virtual_line1512_line1523_line1534_line1545_line1556_line1564_line1572_line1581_line1590_line1599_line1610_line1621_line1632_line1642_line1653_line1663_line1673_line1682_line1691_line1703 bus1=1502.1.2.3.4 bus2=1704.1.2.3.4 phases=4 linecode=LC2 length=7.768702 units=m
! reduced_from=line1512,line1523,line1534,line1545,line1556,line1564,line1572,line1581,line1590,line1599,line1610,line1621,line1632,line1642,line1653,line1663,line1673,line1682,line1691,line1703
! eliminated_buses=1513,1524,1535,1546,1557,1565,1573,1582,1591,1600,1611,1622,1633,1643,1654,1664,1674,1683,1692

New Line._virtual_line1513_line1524 bus1=1502.1.2.3.4 bus2=1525.1.2.3.4 phases=4 linecode=LC8 length=4.3446 units=m
! reduced_from=line1513,line1524
! eliminated_buses=1514

New Line._virtual_line1535_line1546_line1557_line1565_line1573_line1582_line1591_line1600_line1611_line1622_line1633_line1643_line1654_line1664_line1674_line1683_line1692_line1704_line1715 bus1=1525.1.2.3.4 bus2=1716.1.2.3.4 phases=4 linecode=LC2 length=20.923201 units=m
! reduced_from=line1535,line1546,line1557,line1565,line1573,line1582,line1591,line1600,line1611,line1622,line1633,line1643,line1654,line1664,line1674,line1683,line1692,line1704,line1715
! eliminated_buses=1536,1547,1558,1566,1574,1583,1592,1601,1612,1623,1634,1644,1655,1665,1675,1684,1693,1705

New Line._virtual_line1547_line1558_line1566_line1574_line1583_line1592_line1601_line1612_line1623_line1634_line1644 bus1=1645.1.2.3.4 bus2=1537.1.2.3.4 phases=4 linecode=LC2 length=6.518991 units=m
! reduced_from=line1547,line1558,line1566,line1574,line1583,line1592,line1601,line1612,line1623,line1634,line1644
! eliminated_buses=1548,1559,1567,1575,1584,1593,1602,1613,1624,1635

New Line._virtual_line1548_line1560 bus1=1537.1.2.3.4 bus2=1561.1.2.3.4 phases=4 linecode=LC8 length=5.5107 units=m
! reduced_from=line1548,line1560
! eliminated_buses=1549

New Line._virtual_line1568_line1576_line1585_line1594_line1603_line1614_line1625_line1636_line1646_line1656 bus1=1657.1.2.3.4 bus2=1561.1.2.3.4 phases=4 linecode=LC2 length=6.448052 units=m
! reduced_from=line1568,line1576,line1585,line1594,line1603,line1614,line1625,line1636,line1646,line1656
! eliminated_buses=1569,1577,1586,1595,1604,1615,1626,1637,1647

New Line._virtual_line1577_line1586_line1595_line1604_line1615_line1626_line1637_line1647_line1657_line1666_line1676_line1685_line1694_line1706_line1717_line1726_line1736_line1745_line1755 bus1=1570.1.2.3.4 bus2=1756.1.2.3.4 phases=4 linecode=LC2 length=22.912217 units=m
! reduced_from=line1577,line1586,line1595,line1604,line1615,line1626,line1637,line1647,line1657,line1666,line1676,line1685,line1694,line1706,line1717,line1726,line1736,line1745,line1755
! eliminated_buses=1578,1587,1596,1605,1616,1627,1638,1648,1658,1667,1677,1686,1695,1707,1718,1727,1737,1746

New Line._virtual_line1578_line1587 bus1=1570.1.2.3.4 bus2=1588.1.2.3.4 phases=4 linecode=LC8 length=2.22238 units=m
! reduced_from=line1578,line1587
! eliminated_buses=1579

New Line._virtual_line1596_line1605_line1616_line1627 bus1=1628.1.2.3.4 bus2=1588.1.2.3.4 phases=4 linecode=LC2 length=6.42441 units=m
! reduced_from=line1596,line1605,line1616,line1627
! eliminated_buses=1597,1606,1617

New Line._virtual_line1606_line1617_line1628_line1638_line1648_line1658_line1667_line1677_line1686_line1695_line1707_line1718_line1727_line1737_line1746_line1756_line1763_line1770_line1776_line1782_line1787_line1792_line1797_line1802_line1806_line1809_line1812_line1815 bus1=1598.1.2.3.4 bus2=1816.1.2.3.4 phases=4 linecode=LC2 length=29.631045 units=m
! reduced_from=line1606,line1617,line1628,line1638,line1648,line1658,line1667,line1677,line1686,line1695,line1707,line1718,line1727,line1737,line1746,line1756,line1763,line1770,line1776,line1782,line1787,line1792,line1797,line1802,line1806,line1809,line1812,line1815
! eliminated_buses=1607,1618,1629,1639,1649,1659,1668,1678,1687,1696,1708,1719,1728,1738,1747,1757,1764,1771,1777,1783,1788,1793,1798,1803,1807,1810,1813

New Line._virtual_line1607_line1618_line1629_line1639_line1649_line1659_line1668_line1678_line1687_line1696_line1708_line1719_line1728_line1738_line1747_line1757_line1764 bus1=1765.1.2.3.4 bus2=1598.1.2.3.4 phases=4 linecode=LC2 length=19.855485 units=m
! reduced_from=line1607,line1618,line1629,line1639,line1649,line1659,line1668,line1678,line1687,line1696,line1708,line1719,line1728,line1738,line1747,line1757,line1764
! eliminated_buses=1608,1619,1630,1640,1650,1660,1669,1679,1688,1697,1709,1720,1729,1739,1748,1758

New Line._virtual_line1608_line1619_line1630_line1640 bus1=1598.1.2.3.4 bus2=1641.1.2.3.4 phases=4 linecode=LC8 length=13.7756 units=m
! reduced_from=line1608,line1619,line1630,line1640
! eliminated_buses=1609,1620,1631

New Line._virtual_line1650_line1660_line1670_line1679_line1688 bus1=1641.1.2.3.4 bus2=1689.1.2.3.4 phases=4 linecode=LC8 length=11.71972 units=m
! reduced_from=line1650,line1660,line1670,line1679,line1688
! eliminated_buses=1651,1661,1671,1680

New Line._virtual_line1651_line1661_line1671_line1680_line1689_line1701_line1713_line1724_line1734_line1743 bus1=1641.1.2.3.4 bus2=1744.1.2.3.4 phases=4 linecode=LC2 length=4.83908 units=m
! reduced_from=line1651,line1661,line1671,line1680,line1689,line1701,line1713,line1724,line1734,line1743
! eliminated_buses=1652,1662,1672,1681,1690,1702,1714,1725,1735

New Line._virtual_line1697_line1709_line1720 bus1=1721.1.2.3.4 bus2=1689.1.2.3.4 phases=4 linecode=LC8 length=6.4354 units=m
! reduced_from=line1697,line1709,line1720
! eliminated_buses=1698,1710

New Line._virtual_line1698_line1710_line1721_line1731_line1740_line1749_line1759_line1766_line1772_line1778 bus1=1779.1.2.3.4 bus2=1689.1.2.3.4 phases=4 linecode=LC2 length=7.85933 units=m
! reduced_from=line1698,line1710,line1721,line1731,line1740,line1749,line1759,line1766,line1772,line1778
! eliminated_buses=1699,1711,1722,1732,1741,1750,1760,1767,1773

New Line._virtual_line1699_line1711_line1722_line1732_line1741_line1750_line1760_line1767_line1773_line1779_line1784_line1789_line1794_line1799 bus1=1800.1.2.3.4 bus2=1689.1.2.3.4 phases=4 linecode=LC2 length=11.69512 units=m
! reduced_from=line1699,line1711,line1722,line1732,line1741,line1750,line1760,line1767,line1773,line1779,line1784,line1789,line1794,line1799
! eliminated_buses=1700,1712,1723,1733,1742,1751,1761,1768,1774,1780,1785,1790,1795

New Line._virtual_line1700_line1712_line1723_line1733_line1742_line1751_line1761_line1768_line1774_line1780_line1785_line1790_line1795_line1800_line1804_line1808_line1811_line1814_line1817 bus1=1818.1.2.3.4 bus2=1689.1.2.3.4 phases=4 linecode=LC2 length=16.46186 units=m
! reduced_from=line1700,line1712,line1723,line1733,line1742,line1751,line1761,line1768,line1774,line1780,line1785,line1790,line1795,line1800,line1804,line1808,line1811,line1814,line1817
! eliminated_buses=1701,1713,1724,1734,1743,1752,1762,1769,1775,1781,1786,1791,1796,1801,1805,1809,1812,1815

New Line._virtual_line1730_line1739_line1748_line1758_line1765_line1771_line1777_line1783_line1788_line1793_line1798_line1803_line1807_line1810_line1813_line1816 bus1=1817.1.2.3.4 bus2=1721.1.2.3.4 phases=4 linecode=LC2 length=8.205417 units=m
! reduced_from=line1730,line1739,line1748,line1758,line1765,line1771,line1777,line1783,line1788,line1793,line1798,line1803,line1807,line1810,line1813,line1816
! eliminated_buses=1731,1740,1749,1759,1766,1772,1778,1784,1789,1794,1799,1804,1808,1811,1814

New Line.LINE44 bus1=44.1.2.3.4 bus2=45.1.2.3.4 phases=4 linecode=LC8 length=2.567 units=m

New Line.LINE45 bus1=44.1.2.3.4 bus2=46.1.2.3.4 phases=4 linecode=LC1 length=14.0926 units=m

New Line.LINE47 bus1=45.1.2.3.4 bus2=48.1.2.3.4 phases=4 linecode=LC1 length=13.3069 units=m

New Line.LINE51 bus1=51.1.2.3.4 bus2=52.1.2.3.4 phases=4 linecode=LC1 length=15.6544 units=m

New Line.LINE68 bus1=68.1.2.3.4 bus2=69.1.2.3.4 phases=4 linecode=LC1 length=15.0938 units=m

New Line.LINE71 bus1=71.1.2.3.4 bus2=72.1.2.3.4 phases=4 linecode=LC1 length=19.9305 units=m

New Line.LINE72 bus1=71.1.2.3.4 bus2=73.1.2.3.4 phases=4 linecode=LC8 length=5.1937 units=m

New Line.LINE73 bus1=73.1.2.3.4 bus2=74.1.2.3.4 phases=4 linecode=LC1 length=13.2203 units=m

New Line.LINE78 bus1=77.1.2.3.4 bus2=79.1.2.3.4 phases=4 linecode=LC1 length=8.6205 units=m

New Line.LINE81 bus1=81.1.2.3.4 bus2=82.1.2.3.4 phases=4 linecode=LC1 length=13.7391 units=m

New Line.LINE118 bus1=116.1.2.3.4 bus2=119.1.2.3.4 phases=4 linecode=LC1 length=9.8345 units=m

New Line.LINE119 bus1=116.1.2.3.4 bus2=120.1.2.3.4 phases=4 linecode=LC8 length=11.6982 units=m

New Line.LINE123 bus1=120.1.2.3.4 bus2=124.1.2.3.4 phases=4 linecode=LC8 length=7.1966 units=m

New Line.LINE384 bus1=377.1.2.3.4 bus2=385.1.2.3.4 phases=4 linecode=LC8 length=5.0298 units=m

New Line.LINE416 bus1=405.1.2.3.4 bus2=417.1.2.3.4 phases=4 linecode=LC5 length=5.3831 units=m

New Line.LINE458 bus1=444.1.2.3.4 bus2=459.1.2.3.4 phases=4 linecode=LC5 length=1.4314 units=m

New Line.LINE509 bus1=493.1.2.3.4 bus2=510.1.2.3.4 phases=4 linecode=LC5 length=0.79268 units=m

New Line.LINE680 bus1=674.1.2.3.4 bus2=681.1.2.3.4 phases=4 linecode=LC2 length=7.1415 units=m

New Line.LINE681 bus1=674.1.2.3.4 bus2=682.1.2.3.4 phases=4 linecode=LC2 length=10.7927 units=m

New Line.LINE702 bus1=696.1.2.3.4 bus2=703.1.2.3.4 phases=4 linecode=LC2 length=16.2269 units=m

New Line.LINE703 bus1=696.1.2.3.4 bus2=704.1.2.3.4 phases=4 linecode=LC2 length=4.2745 units=m

New Line.LINE757 bus1=747.1.2.3.4 bus2=758.1.2.3.4 phases=4 linecode=LC8 length=5.9847 units=m

New Line.LINE925 bus1=920.1.2.3.4 bus2=926.1.2.3.4 phases=4 linecode=LC8 length=7.698 units=m

New Line.LINE926 bus1=920.1.2.3.4 bus2=927.1.2.3.4 phases=4 linecode=LC8 length=1.9464 units=m

New Line.LINE932 bus1=926.1.2.3.4 bus2=933.1.2.3.4 phases=4 linecode=LC8 length=3.4091 units=m

New Line.LINE933 bus1=926.1.2.3.4 bus2=934.1.2.3.4 phases=4 linecode=LC8 length=10.2908 units=m

New Line.LINE941 bus1=933.1.2.3.4 bus2=942.1.2.3.4 phases=4 linecode=LC8 length=8.6333 units=m

New Line.LINE951 bus1=942.1.2.3.4 bus2=952.1.2.3.4 phases=4 linecode=LC8 length=12.7459 units=m

New Line.LINE960 bus1=952.1.2.3.4 bus2=961.1.2.3.4 phases=4 linecode=LC8 length=1.3771 units=m

New Line.LINE962 bus1=952.1.2.3.4 bus2=963.1.2.3.4 phases=4 linecode=LC8 length=0.29544 units=m

New Line.LINE972 bus1=961.1.2.3.4 bus2=973.1.2.3.4 phases=4 linecode=LC8 length=7.3247 units=m

New Line.LINE973 bus1=961.1.2.3.4 bus2=974.1.2.3.4 phases=4 linecode=LC8 length=5.5523 units=m

New Line.LINE975 bus1=963.1.2.3.4 bus2=976.1.2.3.4 phases=4 linecode=LC8 length=0.75055 units=m

New Line.LINE978 bus1=965.1.2.3.4 bus2=979.1.2.3.4 phases=4 linecode=LC8 length=2.1638 units=m

New Line.LINE988 bus1=973.1.2.3.4 bus2=989.1.2.3.4 phases=4 linecode=LC8 length=0.098722 units=m

New Line.LINE1121 bus1=1107.1.2.3.4 bus2=1122.1.2.3.4 phases=4 linecode=LC8 length=7.2792 units=m

New Line.LINE1137 bus1=1122.1.2.3.4 bus2=1138.1.2.3.4 phases=4 linecode=LC8 length=5.7366 units=m

New Line.LINE1247 bus1=1236.1.2.3.4 bus2=1248.1.2.3.4 phases=4 linecode=LC2 length=0.04653 units=m

New Line.LINE1248 bus1=1238.1.2.3.4 bus2=1249.1.2.3.4 phases=4 linecode=LC2 length=5.0702 units=m

New Line.LINE1249 bus1=1238.1.2.3.4 bus2=1250.1.2.3.4 phases=4 linecode=LC2 length=12.1839 units=m

New Line.LINE1265 bus1=1258.1.2.3.4 bus2=1266.1.2.3.4 phases=4 linecode=LC2 length=5.7994 units=m

New Line.LINE1385 bus1=1380.1.2.3.4 bus2=1386.1.2.3.4 phases=4 linecode=LC8 length=9.5212 units=m

New Line.LINE1407 bus1=1400.1.2.3.4 bus2=1408.1.2.3.4 phases=4 linecode=LC8 length=9.3657 units=m

New Line.LINE1415 bus1=1408.1.2.3.4 bus2=1416.1.2.3.4 phases=4 linecode=LC8 length=4.8749 units=m

New Line.LINE1424 bus1=1416.1.2.3.4 bus2=1425.1.2.3.4 phases=4 linecode=LC8 length=9.2898 units=m

New Line.LINE1434 bus1=1425.1.2.3.4 bus2=1435.1.2.3.4 phases=4 linecode=LC8 length=1.8702 units=m

New Line.LINE1536 bus1=1525.1.2.3.4 bus2=1537.1.2.3.4 phases=4 linecode=LC8 length=4.862 units=m

New Line.LINE1569 bus1=1561.1.2.3.4 bus2=1570.1.2.3.4 phases=4 linecode=LC8 length=2.3783 units=m

New Line.LINE1597 bus1=1588.1.2.3.4 bus2=1598.1.2.3.4 phases=4 linecode=LC8 length=2.8075 units=m

New Line.LINE1752 bus1=1744.1.2.3.4 bus2=1753.1.2.3.4 phases=4 linecode=LC2 length=15.3951 units=m

New Line.LINE1753 bus1=1744.1.2.3.4 bus2=1754.1.2.3.4 phases=4 linecode=LC2 length=3.3422 units=m
