! Reduced enabled lines.

New Line._virtual_line0_line1_line2_line3_line4_line5_line6_line7_line8_line9_line10_line11_line12_line13_line14_line15_line16_line17_line18_line19_line20_line21_line22 bus1=sourcebus.1.2.3.4 bus2=23.1.2.3.4 phases=4 linecode=LC8 length=47.452345 units=m
! reduced_from=line0,line1,line2,line3,line4,line5,line6,line7,line8,line9,line10,line11,line12,line13,line14,line15,line16,line17,line18,line19,line20,line21,line22
! eliminated_buses=1,2,3,4,5,6,7,8,9,10,11,12,13,14,15,16,17,18,19,20,21,22

New Line._virtual_line23_line25_line27_line29_line31_line33_line35_line37_line39_line41_line43_line45_line47_line49_line51_line53_line56_line59_line62_line65_line68_line71_line74_line77 bus1=23.1.2.3.4 bus2=78.1.2.3.4 phases=4 linecode=LC2 length=14.945894 units=m
! reduced_from=line23,line25,line27,line29,line31,line33,line35,line37,line39,line41,line43,line45,line47,line49,line51,line53,line56,line59,line62,line65,line68,line71,line74,line77
! eliminated_buses=24,26,28,30,32,34,36,38,40,42,44,46,48,50,52,54,57,60,63,66,69,72,75

New Line._virtual_line24_line26_line28_line30_line32_line34_line36_line38_line40_line42_line44_line46_line48_line50_line52_line55_line58_line61_line64_line67_line70_line73_line76_line79_line81_line83_line85_line87_line89_line90_line91_line92_line93_line94_line95_line96_line97_line99_line102_line106_line109_line112_line115_line119_line124 bus1=125.1.2.3.4 bus2=23.1.2.3.4 phases=4 linecode=LC8 length=94.88934 units=m
! reduced_from=line24,line26,line28,line30,line32,line34,line36,line38,line40,line42,line44,line46,line48,line50,line52,line55,line58,line61,line64,line67,line70,line73,line76,line79,line81,line83,line85,line87,line89,line90,line91,line92,line93,line94,line95,line96,line97,line99,line102,line106,line109,line112,line115,line119,line124
! eliminated_buses=25,27,29,31,33,35,37,39,41,43,45,47,49,51,53,56,59,62,65,68,71,74,77,80,82,84,86,88,90,91,92,93,94,95,96,97,98,100,103,107,110,113,116,120

New Line._virtual_line128_line133_line139_line145_line151_line157_line163_line168_line172 bus1=125.1.2.3.4 bus2=173.1.2.3.4 phases=4 linecode=LC5 length=5.6994 units=m
! reduced_from=line128,line133,line139,line145,line151,line157,line163,line168,line172
! eliminated_buses=129,134,140,146,152,158,164,169

New Line._virtual_line129_line134_line140_line146_line152_line158_line164_line169_line173_line177_line180_line182_line184_line186_line187_line188_line189_line190_line191_line192_line194_line196_line198_line200_line203_line206_line209_line212_line215 bus1=125.1.2.3.4 bus2=216.1.2.3.4 phases=4 linecode=LC8 length=33.59616 units=m
! reduced_from=line129,line134,line140,line146,line152,line158,line164,line169,line173,line177,line180,line182,line184,line186,line187,line188,line189,line190,line191,line192,line194,line196,line198,line200,line203,line206,line209,line212,line215
! eliminated_buses=130,135,141,147,153,159,165,170,174,178,181,183,185,187,188,189,190,191,192,193,195,197,199,201,204,207,210,213

New Line._virtual_line218_line222_line226_line230_line234_line236_line238 bus1=239.1.2.3.4 bus2=216.1.2.3.4 phases=4 linecode=LC8 length=4.39036 units=m
! reduced_from=line218,line222,line226,line230,line234,line236,line238
! eliminated_buses=219,223,227,231,235,237

New Line._virtual_line240_line243_line247_line251_line256_line263_line270_line278_line287 bus1=288.1.2.3.4 bus2=239.1.2.3.4 phases=4 linecode=LC5 length=20.57941 units=m
! reduced_from=line240,line243,line247,line251,line256,line263,line270,line278,line287
! eliminated_buses=241,244,248,252,257,264,271,279

New Line._virtual_line244_line248_line252_line257_line264_line271_line279_line288_line300_line314_line331_line350_line368_line387_line404 bus1=242.1.2.3.4 bus2=405.1.2.3.4 phases=4 linecode=LC2 length=22.263161 units=m
! reduced_from=line244,line248,line252,line257,line264,line271,line279,line288,line300,line314,line331,line350,line368,line387,line404
! eliminated_buses=245,249,253,258,265,272,280,289,301,315,332,351,369,388

New Line._virtual_line245_line249 bus1=250.1.2.3.4 bus2=242.1.2.3.4 phases=4 linecode=LC8 length=8.85799 units=m
! reduced_from=line245,line249
! eliminated_buses=246

New Line._virtual_line253_line258_line265_line272_line280_line289 bus1=290.1.2.3.4 bus2=250.1.2.3.4 phases=4 linecode=LC2 length=8.383328 units=m
! reduced_from=line253,line258,line265,line272,line280,line289
! eliminated_buses=254,259,266,273,281

New Line._virtual_line260_line266_line273_line281_line290_line301_line315_line332_line351_line369 bus1=370.1.2.3.4 bus2=255.1.2.3.4 phases=4 linecode=LC2 length=7.553778 units=m
! reduced_from=line260,line266,line273,line281,line290,line301,line315,line332,line351,line369
! eliminated_buses=261,267,274,282,291,302,316,333,352

New Line._virtual_line267_line274_line282_line291_line302_line316_line333_line352_line370 bus1=371.1.2.3.4 bus2=262.1.2.3.4 phases=4 linecode=LC2 length=8.721608 units=m
! reduced_from=line267,line274,line282,line291,line302,line316,line333,line352,line370
! eliminated_buses=268,275,283,292,303,317,334,353

New Line._virtual_line275_line283_line292_line303_line317_line334_line353_line371_line388 bus1=389.1.2.3.4 bus2=269.1.2.3.4 phases=4 linecode=LC2 length=8.469971 units=m
! reduced_from=line275,line283,line292,line303,line317,line334,line353,line371,line388
! eliminated_buses=276,284,293,304,318,335,354,372

New Line._virtual_line284_line293_line304_line318_line335_line354_line372_line389_line405_line420 bus1=421.1.2.3.4 bus2=277.1.2.3.4 phases=4 linecode=LC2 length=7.486706 units=m
! reduced_from=line284,line293,line304,line318,line335,line354,line372,line389,line405,line420
! eliminated_buses=285,294,305,319,336,355,373,390,406

New Line._virtual_line294_line305_line319_line336_line355_line373_line390_line406_line421_line435 bus1=286.1.2.3.4 bus2=436.1.2.3.4 phases=4 linecode=LC2 length=7.650989 units=m
! reduced_from=line294,line305,line319,line336,line355,line373,line390,line406,line421,line435
! eliminated_buses=295,306,320,337,356,374,391,407,422

New Line._virtual_line297_line309_line324_line342_line361_line380_line397_line413_line428_line442_line454_line466_line477_line488_line499_line509_line519_line529_line538_line547_line554_line560_line565_line569_line573_line577_line581_line585_line589 bus1=590.1.2.3.4 bus2=288.1.2.3.4 phases=4 linecode=LC2 length=19.98985 units=m
! reduced_from=line297,line309,line324,line342,line361,line380,line397,line413,line428,line442,line454,line466,line477,line488,line499,line509,line519,line529,line538,line547,line554,line560,line565,line569,line573,line577,line581,line585,line589
! eliminated_buses=298,310,325,343,362,381,398,414,429,443,455,467,478,489,500,510,520,530,539,548,555,561,566,570,574,578,582,586

New Line._virtual_line298_line310_line325_line343_line362_line381_line398_line414_line429_line443_line455_line467_line478_line489_line500_line510_line520 bus1=288.1.2.3.4 bus2=521.1.2.3.4 phases=4 linecode=LC2 length=11.042232 units=m
! reduced_from=line298,line310,line325,line343,line362,line381,line398,line414,line429,line443,line455,line467,line478,line489,line500,line510,line520
! eliminated_buses=299,311,326,344,363,382,399,415,430,444,456,468,479,490,501,511

New Line._virtual_line306_line320_line337_line356_line374_line391_line407_line422_line436 bus1=296.1.2.3.4 bus2=437.1.2.3.4 phases=4 linecode=LC2 length=7.379114 units=m
! reduced_from=line306,line320,line337,line356,line374,line391,line407,line422,line436
! eliminated_buses=307,321,338,357,375,392,408,423

New Line._virtual_line311_line326_line344_line363_line382_line399_line415_line430_line444_line456_line468_line479_line490_line501_line511_line521_line530_line539_line548_line555 bus1=300.1.2.3.4 bus2=556.1.2.3.4 phases=4 linecode=LC2 length=20.965329 units=m
! reduced_from=line311,line326,line344,line363,line382,line399,line415,line430,line444,line456,line468,line479,line490,line501,line511,line521,line530,line539,line548,line555
! eliminated_buses=312,327,345,364,383,400,416,431,445,457,469,480,491,502,512,522,531,540,549

New Line._virtual_line312_line327_line345_line364_line383_line400_line416_line431_line445_line457_line469_line480_line491_line502_line512_line522_line531_line540_line549_line556_line561 bus1=300.1.2.3.4 bus2=562.1.2.3.4 phases=4 linecode=LC2 length=10.312287 units=m
! reduced_from=line312,line327,line345,line364,line383,line400,line416,line431,line445,line457,line469,line480,line491,line502,line512,line522,line531,line540,line549,line556,line561
! eliminated_buses=313,328,346,365,384,401,417,432,446,458,470,481,492,503,513,523,532,541,550,557

New Line._virtual_line321_line338_line357_line375_line392_line408_line423_line437_line449_line461_line472 bus1=308.1.2.3.4 bus2=473.1.2.3.4 phases=4 linecode=LC2 length=7.065899 units=m
! reduced_from=line321,line338,line357,line375,line392,line408,line423,line437,line449,line461,line472
! eliminated_buses=322,339,358,376,393,409,424,438,450,462

New Line._virtual_line329_line347_line366_line385_line402_line418_line433_line447_line459_line471_line482_line493_line504_line514_line524_line533_line542_line551 bus1=552.1.2.3.4 bus2=314.1.2.3.4 phases=4 linecode=LC2 length=11.055961 units=m
! reduced_from=line329,line347,line366,line385,line402,line418,line433,line447,line459,line471,line482,line493,line504,line514,line524,line533,line542,line551
! eliminated_buses=330,348,367,386,403,419,434,448,460,472,483,494,505,515,525,534,543

New Line._virtual_line339_line358_line376_line393_line409_line424_line438_line450_line462_line473_line483_line494 bus1=495.1.2.3.4 bus2=323.1.2.3.4 phases=4 linecode=LC2 length=9.37962 units=m
! reduced_from=line339,line358,line376,line393,line409,line424,line438,line450,line462,line473,line483,line494
! eliminated_buses=340,359,377,394,410,425,439,451,463,474,484

New Line._virtual_line340_line359 bus1=360.1.2.3.4 bus2=323.1.2.3.4 phases=4 linecode=LC8 length=5.55485 units=m
! reduced_from=line340,line359
! eliminated_buses=341

New Line._virtual_line377_line394_line410_line425_line439_line451_line463_line474_line484_line495_line505_line515_line525_line534_line543 bus1=544.1.2.3.4 bus2=360.1.2.3.4 phases=4 linecode=LC2 length=18.20705 units=m
! reduced_from=line377,line394,line410,line425,line439,line451,line463,line474,line484,line495,line505,line515,line525,line534,line543
! eliminated_buses=378,395,411,426,440,452,464,475,485,496,506,516,526,535

New Line._virtual_line378_line395_line411_line426_line440_line452_line464_line475_line486_line497_line507_line517_line527_line536_line545_line553_line559_line564_line568_line572_line576_line580_line584_line588_line592_line594 bus1=360.1.2.3.4 bus2=595.1.2.3.4 phases=4 linecode=LC8 length=21.04877 units=m
! reduced_from=line378,line395,line411,line426,line440,line452,line464,line475,line486,line497,line507,line517,line527,line536,line545,line553,line559,line564,line568,line572,line576,line580,line584,line588,line592,line594
! eliminated_buses=379,396,412,427,441,453,465,476,487,498,508,518,528,537,546,554,560,565,569,573,577,581,585,589,593

New Line._virtual_line597_line601_line606_line610_line616_line623_line631 bus1=595.1.2.3.4 bus2=632.1.2.3.4 phases=4 linecode=LC5 length=23.266985 units=m
! reduced_from=line597,line601,line606,line610,line616,line623,line631
! eliminated_buses=598,602,607,611,617,624

New Line._virtual_line599_line603_line607_line611_line617_line624_line632_line644_line661_line677_line692_line708_line725_line742_line759_line775_line791_line806_line820_line834_line847_line862_line873_line881 bus1=882.1.2.3.4 bus2=597.1.2.3.4 phases=4 linecode=LC2 length=24.56169 units=m
! reduced_from=line599,line603,line607,line611,line617,line624,line632,line644,line661,line677,line692,line708,line725,line742,line759,line775,line791,line806,line820,line834,line847,line862,line873,line881
! eliminated_buses=600,604,608,612,618,625,633,645,662,678,693,709,726,743,760,776,792,807,821,835,848,863,874

New Line._virtual_line604_line608_line612_line618_line625_line633_line645 bus1=601.1.2.3.4 bus2=646.1.2.3.4 phases=4 linecode=LC2 length=8.12117 units=m
! reduced_from=line604,line608,line612,line618,line625,line633,line645
! eliminated_buses=605,609,613,619,626,634

New Line._virtual_line605_line609 bus1=610.1.2.3.4 bus2=601.1.2.3.4 phases=4 linecode=LC8 length=7.4798 units=m
! reduced_from=line605,line609
! eliminated_buses=606

New Line._virtual_line615_line622_line629_line638_line651_line668_line684_line700_line717_line734_line751 bus1=610.1.2.3.4 bus2=752.1.2.3.4 phases=4 linecode=LC2 length=9.297848 units=m
! reduced_from=line615,line622,line629,line638,line651,line668,line684,line700,line717,line734,line751
! eliminated_buses=616,623,630,639,652,669,685,701,718,735

New Line._virtual_line619_line626 bus1=627.1.2.3.4 bus2=614.1.2.3.4 phases=4 linecode=LC8 length=5.9841 units=m
! reduced_from=line619,line626
! eliminated_buses=620

New Line._virtual_line621_line628_line637_line650_line667 bus1=668.1.2.3.4 bus2=614.1.2.3.4 phases=4 linecode=LC2 length=8.47676 units=m
! reduced_from=line621,line628,line637,line650,line667
! eliminated_buses=622,629,638,651

New Line._virtual_line636_line649_line666_line683_line699 bus1=627.1.2.3.4 bus2=700.1.2.3.4 phases=4 linecode=LC2 length=8.84873 units=m
! reduced_from=line636,line649,line666,line683,line699
! eliminated_buses=637,650,667,684

New Line._virtual_line640_line654_line669_line685_line701_line718_line735_line752_line769_line785_line800 bus1=632.1.2.3.4 bus2=801.1.2.3.4 phases=4 linecode=LC2 length=11.072058 units=m
! reduced_from=line640,line654,line669,line685,line701,line718,line735,line752,line769,line785,line800
! eliminated_buses=641,655,670,686,702,719,736,753,770,786

New Line._virtual_line641_line655_line670_line686_line702_line719_line736_line753_line770_line786_line801_line815_line829_line842_line855 bus1=856.1.2.3.4 bus2=632.1.2.3.4 phases=4 linecode=LC2 length=12.30737 units=m
! reduced_from=line641,line655,line670,line686,line702,line719,line736,line753,line770,line786,line801,line815,line829,line842,line855
! eliminated_buses=642,656,671,687,703,720,737,754,771,787,802,816,830,843

New Line._virtual_line642_line656_line671_line687_line703_line720_line737_line754_line771_line787_line802_line816_line830_line843_line856 bus1=857.1.2.3.4 bus2=632.1.2.3.4 phases=4 linecode=LC2 length=13.22195 units=m
! reduced_from=line642,line656,line671,line687,line703,line720,line737,line754,line771,line787,line802,line816,line830,line843,line856
! eliminated_buses=643,657,672,688,704,721,738,755,772,788,803,817,831,844

New Line._virtual_line648_line665_line682_line698_line716_line733 bus1=734.1.2.3.4 bus2=635.1.2.3.4 phases=4 linecode=LC2 length=7.42655 units=m
! reduced_from=line648,line665,line682,line698,line716,line733
! eliminated_buses=649,666,683,699,717

New Line._virtual_line657_line672_line688_line704_line721_line738_line755_line772_line788_line803_line817_line831_line844_line858 bus1=644.1.2.3.4 bus2=859.1.2.3.4 phases=4 linecode=LC2 length=15.255666 units=m
! reduced_from=line657,line672,line688,line704,line721,line738,line755,line772,line788,line803,line817,line831,line844,line858
! eliminated_buses=658,673,689,705,722,739,756,773,789,804,818,832,845

New Line._virtual_line658_line673_line689_line705_line722_line739_line756_line773_line789_line804_line818_line832_line845_line859_line872_line880 bus1=644.1.2.3.4 bus2=881.1.2.3.4 phases=4 linecode=LC2 length=11.627074 units=m
! reduced_from=line658,line673,line689,line705,line722,line739,line756,line773,line789,line804,line818,line832,line845,line859,line872,line880
! eliminated_buses=659,674,690,706,723,740,757,774,790,805,819,833,846,860,873

New Line._virtual_line659_line674_line690_line706_line723_line740_line757_line774_line790_line805_line819_line833_line846_line860 bus1=644.1.2.3.4 bus2=861.1.2.3.4 phases=4 linecode=LC2 length=13.19402 units=m
! reduced_from=line659,line674,line690,line706,line723,line740,line757,line774,line790,line805,line819,line833,line846,line860
! eliminated_buses=660,675,691,707,724,741,758,775,791,806,820,834,847

New Line._virtual_line664_line681_line697_line715_line732_line750_line768_line784 bus1=785.1.2.3.4 bus2=647.1.2.3.4 phases=4 linecode=LC2 length=9.67723 units=m
! reduced_from=line664,line681,line697,line715,line732,line750,line768,line784
! eliminated_buses=665,682,698,716,733,751,769

New Line._virtual_line680_line696_line714_line731_line749_line767_line783_line799 bus1=663.1.2.3.4 bus2=800.1.2.3.4 phases=4 linecode=LC2 length=8.82421 units=m
! reduced_from=line680,line696,line714,line731,line749,line767,line783,line799
! eliminated_buses=681,697,715,732,750,768,784

New Line._virtual_line694_line713_line730_line748_line766_line782_line798 bus1=679.1.2.3.4 bus2=799.1.2.3.4 phases=4 linecode=LC2 length=9.95698 units=m
! reduced_from=line694,line713,line730,line748,line766,line782,line798
! eliminated_buses=695,714,731,749,767,783

New Line._virtual_line711_line729_line747_line765_line781_line797 bus1=694.1.2.3.4 bus2=798.1.2.3.4 phases=4 linecode=LC2 length=9.50413 units=m
! reduced_from=line711,line729,line747,line765,line781,line797
! eliminated_buses=712,730,748,766,782

New Line._virtual_line726_line744 bus1=745.1.2.3.4 bus2=710.1.2.3.4 phases=4 linecode=LC8 length=5.7944 units=m
! reduced_from=line726,line744
! eliminated_buses=727

New Line._virtual_line727_line746_line764_line780_line796_line811_line825 bus1=826.1.2.3.4 bus2=710.1.2.3.4 phases=4 linecode=LC2 length=8.74131 units=m
! reduced_from=line727,line746,line764,line780,line796,line811,line825
! eliminated_buses=728,747,765,781,797,812

New Line._virtual_line762_line779_line795_line810_line824_line838_line851_line866_line877_line885_line891_line896_line901_line906_line910_line914_line918_line922_line927 bus1=928.1.2.3.4 bus2=745.1.2.3.4 phases=4 linecode=LC2 length=26.26361 units=m
! reduced_from=line762,line779,line795,line810,line824,line838,line851,line866,line877,line885,line891,line896,line901,line906,line910,line914,line918,line922,line927
! eliminated_buses=763,780,796,811,825,839,852,867,878,886,892,897,902,907,911,915,919,923

New Line._virtual_line777_line793_line808_line822_line836_line849_line864_line875_line883_line889_line894_line899_line904_line908_line912 bus1=762.1.2.3.4 bus2=913.1.2.3.4 phases=4 linecode=LC8 length=20.85146 units=m
! reduced_from=line777,line793,line808,line822,line836,line849,line864,line875,line883,line889,line894,line899,line904,line908,line912
! eliminated_buses=778,794,809,823,837,850,865,876,884,890,895,900,905,909

New Line._virtual_line778_line794_line809_line823_line837_line850_line865_line876_line884_line890_line895_line900_line905_line909_line913_line917_line921_line926_line931_line936 bus1=937.1.2.3.4 bus2=762.1.2.3.4 phases=4 linecode=LC5 length=26.93102 units=m
! reduced_from=line778,line794,line809,line823,line837,line850,line865,line876,line884,line890,line895,line900,line905,line909,line913,line917,line921,line926,line931,line936
! eliminated_buses=779,795,810,824,838,851,866,877,885,891,896,901,906,910,914,918,922,927,932

New Line._virtual_line813_line827_line840_line853_line868_line878_line886_line892_line897_line902 bus1=801.1.2.3.4 bus2=903.1.2.3.4 phases=4 linecode=LC2 length=4.520848 units=m
! reduced_from=line813,line827,line840,line853,line868,line878,line886,line892,line897,line902
! eliminated_buses=814,828,841,854,869,879,887,893,898

New Line._virtual_line814_line828_line841_line854_line869_line879_line887_line893_line898_line903_line907_line911_line915_line919_line923_line928_line932_line937_line943_line951_line961_line972 bus1=801.1.2.3.4 bus2=973.1.2.3.4 phases=4 linecode=LC2 length=11.844509 units=m
! reduced_from=line814,line828,line841,line854,line869,line879,line887,line893,line898,line903,line907,line911,line915,line919,line923,line928,line932,line937,line943,line951,line961,line972
! eliminated_buses=815,829,842,855,870,880,888,894,899,904,908,912,916,920,924,929,933,938,944,952,962

New Line._virtual_line924_line929_line933_line938_line944_line952_line962_line973_line984_line994_line1006_line1019_line1033_line1049_line1068_line1087_line1108_line1125_line1140_line1154_line1166_line1182_line1192 bus1=1193.1.2.3.4 bus2=921.1.2.3.4 phases=4 linecode=LC9 length=22.71575 units=m
! reduced_from=line924,line929,line933,line938,line944,line952,line962,line973,line984,line994,line1006,line1019,line1033,line1049,line1068,line1087,line1108,line1125,line1140,line1154,line1166,line1182,line1192
! eliminated_buses=925,930,934,939,945,953,963,974,985,995,1007,1020,1034,1050,1069,1088,1109,1126,1141,1155,1167,1183

New Line._virtual_line925_line930_line934_line939_line945_line953 bus1=954.1.2.3.4 bus2=921.1.2.3.4 phases=4 linecode=LC8 length=22.55783 units=m
! reduced_from=line925,line930,line934,line939,line945,line953
! eliminated_buses=926,931,935,940,946

New Line._virtual_line941_line947_line955_line966_line978_line988_line999_line1011_line1024_line1039_line1056_line1075_line1097_line1114_line1130_line1145_line1159_line1175_line1185_line1195_line1212_line1221_line1231_line1242_line1257_line1264 bus1=1265.1.2.3.4 bus2=937.1.2.3.4 phases=4 linecode=LC2 length=22.141143 units=m
! reduced_from=line941,line947,line955,line966,line978,line988,line999,line1011,line1024,line1039,line1056,line1075,line1097,line1114,line1130,line1145,line1159,line1175,line1185,line1195,line1212,line1221,line1231,line1242,line1257,line1264
! eliminated_buses=942,948,956,967,979,989,1000,1012,1025,1040,1057,1076,1098,1115,1131,1146,1160,1176,1186,1196,1213,1222,1232,1243,1258

New Line._virtual_line948_line956_line967_line979_line989_line1000_line1012_line1025_line1040_line1057_line1076_line1098_line1115 bus1=943.1.2.3.4 bus2=1116.1.2.3.4 phases=4 linecode=LC2 length=6.430111 units=m
! reduced_from=line948,line956,line967,line979,line989,line1000,line1012,line1025,line1040,line1057,line1076,line1098,line1115
! eliminated_buses=949,957,968,980,990,1001,1013,1026,1041,1058,1077,1099

New Line._virtual_line949_line957_line968_line980_line990_line1001_line1013_line1026_line1041_line1058_line1077_line1099_line1116 bus1=943.1.2.3.4 bus2=1117.1.2.3.4 phases=4 linecode=LC2 length=6.23862 units=m
! reduced_from=line949,line957,line968,line980,line990,line1001,line1013,line1026,line1041,line1058,line1077,line1099,line1116
! eliminated_buses=950,958,969,981,991,1002,1014,1027,1042,1059,1078,1100

New Line._virtual_line958_line969_line981_line991_line1002_line1014_line1027_line1042_line1059_line1078_line1100_line1117_line1132_line1146_line1160_line1176_line1186_line1196_line1213_line1222_line1232_line1243_line1258_line1265_line1271_line1277_line1282_line1287_line1292_line1296_line1300 bus1=951.1.2.3.4 bus2=1301.1.2.3.4 phases=4 linecode=LC2 length=22.046893 units=m
! reduced_from=line958,line969,line981,line991,line1002,line1014,line1027,line1042,line1059,line1078,line1100,line1117,line1132,line1146,line1160,line1176,line1186,line1196,line1213,line1222,line1232,line1243,line1258,line1265,line1271,line1277,line1282,line1287,line1292,line1296,line1300
! eliminated_buses=959,970,982,992,1003,1015,1028,1043,1060,1079,1101,1118,1133,1147,1161,1177,1187,1197,1214,1223,1233,1244,1259,1266,1272,1278,1283,1288,1293,1297

New Line._virtual_line959_line970_line982_line992_line1003_line1015_line1028_line1043_line1060_line1079_line1101_line1118_line1133_line1147_line1161_line1177_line1187_line1197_line1214_line1223_line1233_line1244_line1259_line1266_line1272_line1278_line1283_line1288 bus1=951.1.2.3.4 bus2=1289.1.2.3.4 phases=4 linecode=LC2 length=20.482603 units=m
! reduced_from=line959,line970,line982,line992,line1003,line1015,line1028,line1043,line1060,line1079,line1101,line1118,line1133,line1147,line1161,line1177,line1187,line1197,line1214,line1223,line1233,line1244,line1259,line1266,line1272,line1278,line1283,line1288
! eliminated_buses=960,971,983,993,1004,1016,1029,1044,1061,1080,1102,1119,1134,1148,1162,1178,1188,1198,1215,1224,1234,1245,1260,1267,1273,1279,1284

New Line._virtual_line960_line971_line983_line993_line1005 bus1=1006.1.2.3.4 bus2=951.1.2.3.4 phases=4 linecode=LC5 length=12.6837 units=m
! reduced_from=line960,line971,line983,line993,line1005
! eliminated_buses=961,972,984,994

New Line._virtual_line963_line974_line985_line995_line1007_line1020_line1034_line1050_line1069 bus1=1070.1.2.3.4 bus2=954.1.2.3.4 phases=4 linecode=LC9 length=10.10401 units=m
! reduced_from=line963,line974,line985,line995,line1007,line1020,line1034,line1050,line1069
! eliminated_buses=964,975,986,996,1008,1021,1035,1051

New Line._virtual_line976_line987 bus1=988.1.2.3.4 bus2=965.1.2.3.4 phases=4 linecode=LC8 length=4.16013 units=m
! reduced_from=line976,line987
! eliminated_buses=977

New Line._virtual_line1017_line1030_line1045_line1062_line1081_line1103_line1120_line1135_line1149_line1162_line1178_line1188_line1198_line1215_line1224 bus1=1006.1.2.3.4 bus2=1225.1.2.3.4 phases=4 linecode=LC2 length=8.13101 units=m
! reduced_from=line1017,line1030,line1045,line1062,line1081,line1103,line1120,line1135,line1149,line1162,line1178,line1188,line1198,line1215,line1224
! eliminated_buses=1018,1031,1046,1063,1082,1104,1121,1136,1150,1163,1179,1189,1199,1216

New Line._virtual_line1022_line1036_line1052_line1071_line1093_line1110_line1127_line1142_line1156_line1167_line1183_line1193_line1210_line1219_line1228_line1238 bus1=1239.1.2.3.4 bus2=1011.1.2.3.4 phases=4 linecode=LC9 length=12.489336 units=m
! reduced_from=line1022,line1036,line1052,line1071,line1093,line1110,line1127,line1142,line1156,line1167,line1183,line1193,line1210,line1219,line1228,line1238
! eliminated_buses=1023,1037,1053,1072,1094,1111,1128,1143,1157,1168,1184,1194,1211,1220,1229

New Line._virtual_line1031_line1046_line1063_line1082_line1104_line1121_line1136_line1150_line1163_line1179_line1189_line1199_line1216_line1225_line1234 bus1=1235.1.2.3.4 bus2=1019.1.2.3.4 phases=4 linecode=LC2 length=14.29417 units=m
! reduced_from=line1031,line1046,line1063,line1082,line1104,line1121,line1136,line1150,line1163,line1179,line1189,line1199,line1216,line1225,line1234
! eliminated_buses=1032,1047,1064,1083,1105,1122,1137,1151,1164,1180,1190,1200,1217,1226

New Line._virtual_line1032_line1048_line1067 bus1=1068.1.2.3.4 bus2=1019.1.2.3.4 phases=4 linecode=LC5 length=3.560195 units=m
! reduced_from=line1032,line1048,line1067
! eliminated_buses=1033,1049

New Line._virtual_line1037_line1053_line1072_line1094_line1111_line1128_line1143_line1157 bus1=1158.1.2.3.4 bus2=1024.1.2.3.4 phases=4 linecode=LC9 length=9.375 units=m
! reduced_from=line1037,line1053,line1072,line1094,line1111,line1128,line1143,line1157
! eliminated_buses=1038,1054,1073,1095,1112,1129,1144

New Line._virtual_line1038_line1055_line1074_line1096 bus1=1097.1.2.3.4 bus2=1024.1.2.3.4 phases=4 linecode=LC8 length=7.4147 units=m
! reduced_from=line1038,line1055,line1074,line1096
! eliminated_buses=1039,1056,1075

New Line._virtual_line1113_line1129_line1144_line1158_line1174_line1184_line1194_line1211_line1220_line1230 bus1=1231.1.2.3.4 bus2=1097.1.2.3.4 phases=4 linecode=LC8 length=17.05374 units=m
! reduced_from=line1113,line1129,line1144,line1158,line1174,line1184,line1194,line1211,line1220,line1230
! eliminated_buses=1114,1130,1145,1159,1175,1185,1195,1212,1221

New Line._virtual_line1241_line1256_line1263_line1270_line1276_line1281_line1286_line1291_line1295_line1299_line1303_line1304_line1305_line1306_line1307_line1308_line1309_line1310_line1311_line1312_line1313_line1314_line1315_line1316_line1317 bus1=1318.1.2.3.4 bus2=1231.1.2.3.4 phases=4 linecode=LC8 length=9.35471 units=m
! reduced_from=line1241,line1256,line1263,line1270,line1276,line1281,line1286,line1291,line1295,line1299,line1303,line1304,line1305,line1306,line1307,line1308,line1309,line1310,line1311,line1312,line1313,line1314,line1315,line1316,line1317
! eliminated_buses=1242,1257,1264,1271,1277,1282,1287,1292,1296,1300,1304,1305,1306,1307,1308,1309,1310,1311,1312,1313,1314,1315,1316,1317

New Line._virtual_line1318_line1321_line1324_line1327_line1330_line1333_line1337_line1341_line1345_line1349 bus1=1318.1.2.3.4 bus2=1350.1.2.3.4 phases=4 linecode=LC2 length=16.74321 units=m
! reduced_from=line1318,line1321,line1324,line1327,line1330,line1333,line1337,line1341,line1345,line1349
! eliminated_buses=1319,1322,1325,1328,1331,1334,1338,1342,1346

New Line._virtual_line1319_line1322_line1325_line1328_line1331_line1334_line1338_line1342_line1346 bus1=1347.1.2.3.4 bus2=1318.1.2.3.4 phases=4 linecode=LC2 length=5.833582 units=m
! reduced_from=line1319,line1322,line1325,line1328,line1331,line1334,line1338,line1342,line1346
! eliminated_buses=1320,1323,1326,1329,1332,1335,1339,1343

New Line._virtual_line1320_line1323_line1326_line1329_line1332_line1336_line1340_line1344_line1348_line1353 bus1=1354.1.2.3.4 bus2=1318.1.2.3.4 phases=4 linecode=LC8 length=9.955704 units=m
! reduced_from=line1320,line1323,line1326,line1329,line1332,line1336,line1340,line1344,line1348,line1353
! eliminated_buses=1321,1324,1327,1330,1333,1337,1341,1345,1349

New Line._virtual_line1355_line1358_line1361_line1364_line1366_line1368_line1369 bus1=1354.1.2.3.4 bus2=1370.1.2.3.4 phases=4 linecode=LC9 length=4.40021 units=m
! reduced_from=line1355,line1358,line1361,line1364,line1366,line1368,line1369
! eliminated_buses=1356,1359,1362,1365,1367,1369

New Line.LINE176 bus1=173.1.2.3.4 bus2=177.1.2.3.4 phases=4 linecode=LC1 length=1.8222 units=m

New Line.LINE219 bus1=216.1.2.3.4 bus2=220.1.2.3.4 phases=4 linecode=LC1 length=0.072801 units=m

New Line.LINE241 bus1=239.1.2.3.4 bus2=242.1.2.3.4 phases=4 linecode=LC8 length=0.50799 units=m

New Line.LINE254 bus1=250.1.2.3.4 bus2=255.1.2.3.4 phases=4 linecode=LC8 length=4.3401 units=m

New Line.LINE261 bus1=255.1.2.3.4 bus2=262.1.2.3.4 phases=4 linecode=LC8 length=8.2719 units=m

New Line.LINE268 bus1=262.1.2.3.4 bus2=269.1.2.3.4 phases=4 linecode=LC8 length=4.1639 units=m

New Line.LINE276 bus1=269.1.2.3.4 bus2=277.1.2.3.4 phases=4 linecode=LC8 length=9.8398 units=m

New Line.LINE285 bus1=277.1.2.3.4 bus2=286.1.2.3.4 phases=4 linecode=LC8 length=1.7813 units=m

New Line.LINE295 bus1=286.1.2.3.4 bus2=296.1.2.3.4 phases=4 linecode=LC8 length=7.3814 units=m

New Line.LINE299 bus1=288.1.2.3.4 bus2=300.1.2.3.4 phases=4 linecode=LC5 length=8.5957 units=m

New Line.LINE307 bus1=296.1.2.3.4 bus2=308.1.2.3.4 phases=4 linecode=LC8 length=5.4179 units=m

New Line.LINE313 bus1=300.1.2.3.4 bus2=314.1.2.3.4 phases=4 linecode=LC5 length=2.867 units=m

New Line.LINE322 bus1=308.1.2.3.4 bus2=323.1.2.3.4 phases=4 linecode=LC8 length=7.9236 units=m

New Line.LINE596 bus1=595.1.2.3.4 bus2=597.1.2.3.4 phases=4 linecode=LC8 length=5.3952 units=m

New Line.LINE600 bus1=597.1.2.3.4 bus2=601.1.2.3.4 phases=4 linecode=LC8 length=5.9793 units=m

New Line.LINE613 bus1=610.1.2.3.4 bus2=614.1.2.3.4 phases=4 linecode=LC8 length=4.5686 units=m

New Line.LINE634 bus1=627.1.2.3.4 bus2=635.1.2.3.4 phases=4 linecode=LC8 length=6.3925 units=m

New Line.LINE643 bus1=632.1.2.3.4 bus2=644.1.2.3.4 phases=4 linecode=LC5 length=11.3145 units=m

New Line.LINE646 bus1=635.1.2.3.4 bus2=647.1.2.3.4 phases=4 linecode=LC8 length=7.1424 units=m

New Line.LINE662 bus1=647.1.2.3.4 bus2=663.1.2.3.4 phases=4 linecode=LC8 length=3.8837 units=m

New Line.LINE678 bus1=663.1.2.3.4 bus2=679.1.2.3.4 phases=4 linecode=LC8 length=7.7287 units=m

New Line.LINE693 bus1=679.1.2.3.4 bus2=694.1.2.3.4 phases=4 linecode=LC8 length=4.0328 units=m

New Line.LINE709 bus1=694.1.2.3.4 bus2=710.1.2.3.4 phases=4 linecode=LC8 length=4.6967 units=m

New Line.LINE761 bus1=745.1.2.3.4 bus2=762.1.2.3.4 phases=4 linecode=LC8 length=4.42 units=m

New Line.LINE870 bus1=859.1.2.3.4 bus2=871.1.2.3.4 phases=4 linecode=LC2 length=16.665 units=m

New Line.LINE871 bus1=859.1.2.3.4 bus2=872.1.2.3.4 phases=4 linecode=LC2 length=0.70753 units=m

New Line.LINE916 bus1=913.1.2.3.4 bus2=917.1.2.3.4 phases=4 linecode=LC1 length=0.053852 units=m

New Line.LINE920 bus1=917.1.2.3.4 bus2=921.1.2.3.4 phases=4 linecode=LC8 length=1.441 units=m

New Line.LINE942 bus1=937.1.2.3.4 bus2=943.1.2.3.4 phases=4 linecode=LC5 length=2.5104 units=m

New Line.LINE950 bus1=943.1.2.3.4 bus2=951.1.2.3.4 phases=4 linecode=LC5 length=4.56 units=m

New Line.LINE964 bus1=954.1.2.3.4 bus2=965.1.2.3.4 phases=4 linecode=LC8 length=6.7407 units=m

New Line.LINE975 bus1=965.1.2.3.4 bus2=976.1.2.3.4 phases=4 linecode=LC1 length=3.9108 units=m

New Line.LINE997 bus1=988.1.2.3.4 bus2=998.1.2.3.4 phases=4 linecode=LC1 length=5.9179 units=m

New Line.LINE998 bus1=988.1.2.3.4 bus2=999.1.2.3.4 phases=4 linecode=LC8 length=1.0473 units=m

New Line.LINE1009 bus1=999.1.2.3.4 bus2=1010.1.2.3.4 phases=4 linecode=LC1 length=7.8937 units=m

New Line.LINE1010 bus1=999.1.2.3.4 bus2=1011.1.2.3.4 phases=4 linecode=LC8 length=12.8701 units=m

New Line.LINE1018 bus1=1006.1.2.3.4 bus2=1019.1.2.3.4 phases=4 linecode=LC5 length=0.01 units=m

New Line.LINE1023 bus1=1011.1.2.3.4 bus2=1024.1.2.3.4 phases=4 linecode=LC8 length=12.9006 units=m

New Line.LINE1086 bus1=1068.1.2.3.4 bus2=1087.1.2.3.4 phases=4 linecode=LC1 length=1.9077 units=m

New Line.LINE1088 bus1=1070.1.2.3.4 bus2=1089.1.2.3.4 phases=4 linecode=LC1 length=14.2865 units=m

New Line.LINE1089 bus1=1070.1.2.3.4 bus2=1090.1.2.3.4 phases=4 linecode=LC1 length=5.1907 units=m

New Line.LINE1090 bus1=1070.1.2.3.4 bus2=1091.1.2.3.4 phases=4 linecode=LC1 length=4.1717 units=m

New Line.LINE1091 bus1=1070.1.2.3.4 bus2=1092.1.2.3.4 phases=4 linecode=LC1 length=5.2785 units=m

New Line.LINE1112 bus1=1097.1.2.3.4 bus2=1113.1.2.3.4 phases=4 linecode=LC1 length=4.4509 units=m

New Line.LINE1131 bus1=1116.1.2.3.4 bus2=1132.1.2.3.4 phases=4 linecode=LC2 length=1.2981 units=m

New Line.LINE1168 bus1=1158.1.2.3.4 bus2=1169.1.2.3.4 phases=4 linecode=LC1 length=7.8723 units=m

New Line.LINE1169 bus1=1158.1.2.3.4 bus2=1170.1.2.3.4 phases=4 linecode=LC1 length=4.1199 units=m

New Line.LINE1170 bus1=1158.1.2.3.4 bus2=1171.1.2.3.4 phases=4 linecode=LC1 length=3.0681 units=m

New Line.LINE1171 bus1=1158.1.2.3.4 bus2=1172.1.2.3.4 phases=4 linecode=LC1 length=7.857 units=m

New Line.LINE1172 bus1=1158.1.2.3.4 bus2=1173.1.2.3.4 phases=4 linecode=LC1 length=5.1704 units=m

New Line.LINE1173 bus1=1158.1.2.3.4 bus2=1174.1.2.3.4 phases=4 linecode=LC1 length=5.3379 units=m

New Line.LINE1202 bus1=1193.1.2.3.4 bus2=1203.1.2.3.4 phases=4 linecode=LC1 length=10.4597 units=m

New Line.LINE1203 bus1=1193.1.2.3.4 bus2=1204.1.2.3.4 phases=4 linecode=LC1 length=7.4044 units=m

New Line.LINE1204 bus1=1193.1.2.3.4 bus2=1205.1.2.3.4 phases=4 linecode=LC1 length=4.4995 units=m

New Line.LINE1205 bus1=1193.1.2.3.4 bus2=1206.1.2.3.4 phases=4 linecode=LC1 length=3.1281 units=m

New Line.LINE1206 bus1=1193.1.2.3.4 bus2=1207.1.2.3.4 phases=4 linecode=LC1 length=4.6803 units=m

New Line.LINE1207 bus1=1193.1.2.3.4 bus2=1208.1.2.3.4 phases=4 linecode=LC1 length=5.0681 units=m

New Line.LINE1208 bus1=1193.1.2.3.4 bus2=1209.1.2.3.4 phases=4 linecode=LC1 length=6.1972 units=m

New Line.LINE1209 bus1=1193.1.2.3.4 bus2=1210.1.2.3.4 phases=4 linecode=LC1 length=8.6201 units=m

New Line.LINE1240 bus1=1231.1.2.3.4 bus2=1241.1.2.3.4 phases=4 linecode=LC1 length=7.0644 units=m

New Line.LINE1247 bus1=1239.1.2.3.4 bus2=1248.1.2.3.4 phases=4 linecode=LC1 length=8.5703 units=m

New Line.LINE1248 bus1=1239.1.2.3.4 bus2=1249.1.2.3.4 phases=4 linecode=LC1 length=5.8694 units=m

New Line.LINE1249 bus1=1239.1.2.3.4 bus2=1250.1.2.3.4 phases=4 linecode=LC1 length=3.0676 units=m

New Line.LINE1250 bus1=1239.1.2.3.4 bus2=1251.1.2.3.4 phases=4 linecode=LC1 length=2.0025 units=m

New Line.LINE1251 bus1=1239.1.2.3.4 bus2=1252.1.2.3.4 phases=4 linecode=LC1 length=4.4598 units=m

New Line.LINE1252 bus1=1239.1.2.3.4 bus2=1253.1.2.3.4 phases=4 linecode=LC1 length=5.5362 units=m

New Line.LINE1253 bus1=1239.1.2.3.4 bus2=1254.1.2.3.4 phases=4 linecode=LC1 length=4.4688 units=m

New Line.LINE1254 bus1=1239.1.2.3.4 bus2=1255.1.2.3.4 phases=4 linecode=LC1 length=5.7245 units=m

New Line.LINE1350 bus1=1347.1.2.3.4 bus2=1351.1.2.3.4 phases=4 linecode=LC2 length=8.7328 units=m

New Line.LINE1351 bus1=1347.1.2.3.4 bus2=1352.1.2.3.4 phases=4 linecode=LC2 length=5.303 units=m

New Line.LINE1370 bus1=1370.1.2.3.4 bus2=1371.1.2.3.4 phases=4 linecode=LC9 length=4.6215 units=m

New Line.LINE1371 bus1=1370.1.2.3.4 bus2=1372.1.2.3.4 phases=4 linecode=LC9 length=1.4624 units=m

New Line.LINE1372 bus1=1370.1.2.3.4 bus2=1373.1.2.3.4 phases=4 linecode=LC9 length=4.7727 units=m

New Line.LINE1373 bus1=1370.1.2.3.4 bus2=1374.1.2.3.4 phases=4 linecode=LC9 length=7.211 units=m

New Line.LINE1374 bus1=1370.1.2.3.4 bus2=1375.1.2.3.4 phases=4 linecode=LC9 length=7.596 units=m

New Line.LINE1375 bus1=1370.1.2.3.4 bus2=1376.1.2.3.4 phases=4 linecode=LC9 length=13.3558 units=m

New Line.LINE1376 bus1=1370.1.2.3.4 bus2=1377.1.2.3.4 phases=4 linecode=LC9 length=9.369 units=m
