! Self-contained reduced OpenDSS case generated by opendssexport/export_simple_reduced_dss.jl
! Reduced network.

clear
Set DefaultBaseFrequency=50

New Circuit.Reduced_ENWL_network_13_Feeder_3_4wire BasekV=0.416 pu=1.00 ISC3=100000 ISC1=100000

Redirect Linecodes.dss
Redirect Lines.dss
Redirect Loads.dss
Redirect Groundings.dss

Set voltagebases=[0.416]
calcv
solve
