! Reduced enabled lines.

New Line._virtual_line0_line1_line2_line3_line4_line5_line6_line7_line8_line9_line10_line11_line12_line13_line14_line15_line16_line17_line18_line19_line20_line21_line22_line23_line24_line26_line28_line30_line32_line34_line35_line36_line37_line38_line39_line40_line41_line42_line43_line44_line45_line46_line47_line48_line49_line50_line51_line52_line53_line54_line55_line56_line57_line58_line59_line60_line61_line62_line63_line64_line65 bus1=66.1.2.3.4 bus2=sourcebus.1.2.3.4 phases=4 linecode=LC8 length=200.413993 units=m
! reduced_from=line0,line1,line2,line3,line4,line5,line6,line7,line8,line9,line10,line11,line12,line13,line14,line15,line16,line17,line18,line19,line20,line21,line22,line23,line24,line26,line28,line30,line32,line34,line35,line36,line37,line38,line39,line40,line41,line42,line43,line44,line45,line46,line47,line48,line49,line50,line51,line52,line53,line54,line55,line56,line57,line58,line59,line60,line61,line62,line63,line64,line65
! eliminated_buses=1,2,3,4,5,6,7,8,9,10,11,12,13,14,15,16,17,18,19,20,21,22,23,24,25,27,29,31,33,35,36,37,38,39,40,41,42,43,44,45,46,47,48,49,50,51,52,53,54,55,56,57,58,59,60,61,62,63,64,65

New Line._virtual_line66_line68_line70_line72_line74_line76_line78_line81_line84_line87_line89_line91_line93_line95 bus1=66.1.2.3.4 bus2=96.1.2.3.4 phases=4 linecode=LC8 length=19.89585 units=m
! reduced_from=line66,line68,line70,line72,line74,line76,line78,line81,line84,line87,line89,line91,line93,line95
! eliminated_buses=67,69,71,73,75,77,79,82,85,88,90,92,94

New Line._virtual_line67_line69_line71_line73_line75_line77_line80_line83_line86_line88_line90_line92_line94_line96_line99_line104_line109_line118 bus1=119.1.2.3.4 bus2=66.1.2.3.4 phases=4 linecode=LC8 length=28.42053 units=m
! reduced_from=line67,line69,line71,line73,line75,line77,line80,line83,line86,line88,line90,line92,line94,line96,line99,line104,line109,line118
! eliminated_buses=68,70,72,74,76,78,81,84,87,89,91,93,95,97,100,105,110

New Line._virtual_line97_line100_line105_line110_line119 bus1=96.1.2.3.4 bus2=120.1.2.3.4 phases=4 linecode=LC8 length=14.41404 units=m
! reduced_from=line97,line100,line105,line110,line119
! eliminated_buses=98,101,106,111

New Line._virtual_line103_line107 bus1=99.1.2.3.4 bus2=108.1.2.3.4 phases=4 linecode=LC8 length=14.9663 units=m
! reduced_from=line103,line107
! eliminated_buses=104

New Line._virtual_line113_line123_line135_line146_line157_line168_line180_line192_line205_line220_line237 bus1=238.1.2.3.4 bus2=108.1.2.3.4 phases=4 linecode=LC3 length=11.540524 units=m
! reduced_from=line113,line123,line135,line146,line157,line168,line180,line192,line205,line220,line237
! eliminated_buses=114,124,136,147,158,169,181,193,206,221

New Line._virtual_line114_line125_line137_line148_line160 bus1=161.1.2.3.4 bus2=108.1.2.3.4 phases=4 linecode=LC8 length=19.8425 units=m
! reduced_from=line114,line125,line137,line148,line160
! eliminated_buses=115,126,138,149

New Line._virtual_line128_line140_line152_line164_line176_line188_line201_line216_line231_line248_line271_line294_line318_line342_line365_line390_line416_line443_line468_line493 bus1=494.1.2.3.4 bus2=119.1.2.3.4 phases=4 linecode=LC2 length=6.823506 units=m
! reduced_from=line128,line140,line152,line164,line176,line188,line201,line216,line231,line248,line271,line294,line318,line342,line365,line390,line416,line443,line468,line493
! eliminated_buses=129,141,153,165,177,189,202,217,232,249,272,295,319,343,366,391,417,444,469

New Line._virtual_line129_line141_line153_line165_line177_line189_line202_line217_line233_line251_line274_line297_line322_line344_line367_line392_line419_line445_line470_line496_line521_line546_line573 bus1=119.1.2.3.4 bus2=574.1.2.3.4 phases=4 linecode=LC8 length=64.92328 units=m
! reduced_from=line129,line141,line153,line165,line177,line189,line202,line217,line233,line251,line274,line297,line322,line344,line367,line392,line419,line445,line470,line496,line521,line546,line573
! eliminated_buses=130,142,154,166,178,190,203,218,234,252,275,298,323,345,368,393,420,446,471,497,522,547

New Line._virtual_line130_line142_line154_line166_line178_line190_line203_line218 bus1=120.1.2.3.4 bus2=219.1.2.3.4 phases=4 linecode=LC8 length=5.56042 units=m
! reduced_from=line130,line142,line154,line166,line178,line190,line203,line218
! eliminated_buses=131,143,155,167,179,191,204

New Line._virtual_line131_line143_line155_line167_line179_line191_line204_line219_line235_line253 bus1=120.1.2.3.4 bus2=254.1.2.3.4 phases=4 linecode=LC2 length=9.57765 units=m
! reduced_from=line131,line143,line155,line167,line179,line191,line204,line219,line235,line253
! eliminated_buses=132,144,156,168,180,192,205,220,236

New Line._virtual_line172_line183_line195 bus1=161.1.2.3.4 bus2=196.1.2.3.4 phases=4 linecode=LC8 length=12.9361 units=m
! reduced_from=line172,line183,line195
! eliminated_buses=173,184

New Line._virtual_line210_line225_line243 bus1=244.1.2.3.4 bus2=196.1.2.3.4 phases=4 linecode=LC8 length=7.9513 units=m
! reduced_from=line210,line225,line243
! eliminated_buses=211,226

New Line._virtual_line234_line252_line276_line300_line326 bus1=219.1.2.3.4 bus2=327.1.2.3.4 phases=4 linecode=LC4 length=12.13858 units=m
! reduced_from=line234,line252,line276,line300,line326
! eliminated_buses=235,253,277,301

New Line._virtual_line257_line283 bus1=284.1.2.3.4 bus2=238.1.2.3.4 phases=4 linecode=LC3 length=5.10552 units=m
! reduced_from=line257,line283
! eliminated_buses=258

New Line._virtual_line303_line328_line351 bus1=282.1.2.3.4 bus2=352.1.2.3.4 phases=4 linecode=LC3 length=10.936 units=m
! reduced_from=line303,line328,line351
! eliminated_buses=304,329

New Line._virtual_line349_line371_line396 bus1=397.1.2.3.4 bus2=327.1.2.3.4 phases=4 linecode=LC4 length=9.0531 units=m
! reduced_from=line349,line371,line396
! eliminated_buses=350,372

New Line._virtual_line373_line398_line425_line451_line475_line502_line528_line553_line581_line608_line637_line663_line693_line721_line749_line779 bus1=780.1.2.3.4 bus2=352.1.2.3.4 phases=4 linecode=LC2 length=8.809191 units=m
! reduced_from=line373,line398,line425,line451,line475,line502,line528,line553,line581,line608,line637,line663,line693,line721,line749,line779
! eliminated_buses=374,399,426,452,476,503,529,554,582,609,638,664,694,722,750

New Line._virtual_line374_line399_line426_line452_line476_line503_line529_line554 bus1=555.1.2.3.4 bus2=352.1.2.3.4 phases=4 linecode=LC2 length=4.119758 units=m
! reduced_from=line374,line399,line426,line452,line476,line503,line529,line554
! eliminated_buses=375,400,427,453,477,504,530

New Line._virtual_line375_line400_line427_line453 bus1=454.1.2.3.4 bus2=352.1.2.3.4 phases=4 linecode=LC3 length=11.379 units=m
! reduced_from=line375,line400,line427,line453
! eliminated_buses=376,401,428

New Line._virtual_line423_line449_line474 bus1=397.1.2.3.4 bus2=475.1.2.3.4 phases=4 linecode=LC4 length=8.815 units=m
! reduced_from=line423,line449,line474
! eliminated_buses=424,450

New Line._virtual_line477_line504 bus1=454.1.2.3.4 bus2=505.1.2.3.4 phases=4 linecode=LC3 length=5.54934 units=m
! reduced_from=line477,line504
! eliminated_buses=478

New Line._virtual_line478_line507_line534_line562_line588_line618 bus1=454.1.2.3.4 bus2=619.1.2.3.4 phases=4 linecode=LC2 length=3.476896 units=m
! reduced_from=line478,line507,line534,line562,line588,line618
! eliminated_buses=479,508,535,563,589

New Line._virtual_line500_line525_line549_line576_line603_line632_line658_line683_line712_line740_line771 bus1=475.1.2.3.4 bus2=772.1.2.3.4 phases=4 linecode=LC2 length=6.62079 units=m
! reduced_from=line500,line525,line549,line576,line603,line632,line658,line683,line712,line740,line771
! eliminated_buses=501,526,550,577,604,633,659,684,713,741

New Line._virtual_line501_line527_line552_line579_line606_line634_line660 bus1=475.1.2.3.4 bus2=661.1.2.3.4 phases=4 linecode=LC4 length=13.57766 units=m
! reduced_from=line501,line527,line552,line579,line606,line634,line660
! eliminated_buses=502,528,553,580,607,635

New Line._virtual_line531_line556 bus1=505.1.2.3.4 bus2=557.1.2.3.4 phases=4 linecode=LC3 length=10.0243 units=m
! reduced_from=line531,line556
! eliminated_buses=532

New Line._virtual_line583_line610 bus1=611.1.2.3.4 bus2=557.1.2.3.4 phases=4 linecode=LC1 length=5.2995 units=m
! reduced_from=line583,line610
! eliminated_buses=584

New Line._virtual_line584_line612 bus1=557.1.2.3.4 bus2=613.1.2.3.4 phases=4 linecode=LC3 length=11.4646 units=m
! reduced_from=line584,line612
! eliminated_buses=585

New Line._virtual_line599_line628_line654_line679_line708_line736_line767_line793_line817_line839_line863_line885_line908_line932_line955_line977_line999_line1020_line1040_line1062_line1083_line1103_line1122_line1141_line1160_line1179_line1200_line1221_line1242_line1263_line1283_line1303_line1323_line1341_line1357_line1372_line1387 bus1=1388.1.2.3.4 bus2=574.1.2.3.4 phases=4 linecode=LC8 length=45.000194 units=m
! reduced_from=line599,line628,line654,line679,line708,line736,line767,line793,line817,line839,line863,line885,line908,line932,line955,line977,line999,line1020,line1040,line1062,line1083,line1103,line1122,line1141,line1160,line1179,line1200,line1221,line1242,line1263,line1283,line1303,line1323,line1341,line1357,line1372,line1387
! eliminated_buses=600,629,655,680,709,737,768,794,818,840,864,886,909,933,956,978,1000,1021,1041,1063,1084,1104,1123,1142,1161,1180,1201,1222,1243,1264,1284,1304,1324,1342,1358,1373

New Line._virtual_line600_line629_line655_line680_line709_line737_line768_line794_line819_line842_line867_line889_line912_line937_line960_line982_line1003_line1025_line1047_line1069_line1089_line1107_line1126_line1144_line1163_line1182_line1203_line1224_line1245_line1265_line1285_line1305_line1324 bus1=574.1.2.3.4 bus2=1325.1.2.3.4 phases=4 linecode=LC4 length=124.509373 units=m
! reduced_from=line600,line629,line655,line680,line709,line737,line768,line794,line819,line842,line867,line889,line912,line937,line960,line982,line1003,line1025,line1047,line1069,line1089,line1107,line1126,line1144,line1163,line1182,line1203,line1224,line1245,line1265,line1285,line1305,line1324
! eliminated_buses=601,630,656,681,710,738,769,795,820,843,868,890,913,938,961,983,1004,1026,1048,1070,1090,1108,1127,1145,1164,1183,1204,1225,1246,1266,1286,1306

New Line._virtual_line615_line644 bus1=586.1.2.3.4 bus2=645.1.2.3.4 phases=4 linecode=LC1 length=3.65625 units=m
! reduced_from=line615,line644
! eliminated_buses=616

New Line._virtual_line640_line666 bus1=613.1.2.3.4 bus2=667.1.2.3.4 phases=4 linecode=LC1 length=3.981 units=m
! reduced_from=line640,line666
! eliminated_buses=641

New Line._virtual_line641_line667_line696_line725 bus1=613.1.2.3.4 bus2=726.1.2.3.4 phases=4 linecode=LC3 length=12.200457 units=m
! reduced_from=line641,line667,line696,line725
! eliminated_buses=642,668,697

New Line._virtual_line685_line714 bus1=661.1.2.3.4 bus2=715.1.2.3.4 phases=4 linecode=LC4 length=12.1604 units=m
! reduced_from=line685,line714
! eliminated_buses=686

New Line._virtual_line686_line716_line745_line775_line802_line825_line849_line874_line897_line921_line946_line968_line990_line1012 bus1=1013.1.2.3.4 bus2=661.1.2.3.4 phases=4 linecode=LC2 length=12.187112 units=m
! reduced_from=line686,line716,line745,line775,line802,line825,line849,line874,line897,line921,line946,line968,line990,line1012
! eliminated_buses=687,717,746,776,803,826,850,875,898,922,947,969,991

New Line._virtual_line687_line718_line747_line777_line804_line827_line851_line876_line900_line924_line949_line971_line993_line1014_line1035_line1058_line1080_line1100_line1119_line1138_line1157_line1176_line1196_line1219_line1240_line1261 bus1=661.1.2.3.4 bus2=1262.1.2.3.4 phases=4 linecode=LC2 length=11.27199 units=m
! reduced_from=line687,line718,line747,line777,line804,line827,line851,line876,line900,line924,line949,line971,line993,line1014,line1035,line1058,line1080,line1100,line1119,line1138,line1157,line1176,line1196,line1219,line1240,line1261
! eliminated_buses=688,719,748,778,805,828,852,877,901,925,950,972,994,1015,1036,1059,1081,1101,1120,1139,1158,1177,1197,1220,1241

New Line._virtual_line741_line772_line799_line822_line845_line869_line891_line914_line939_line962 bus1=715.1.2.3.4 bus2=963.1.2.3.4 phases=4 linecode=LC4 length=27.8419 units=m
! reduced_from=line741,line772,line799,line822,line845,line869,line891,line914,line939,line962
! eliminated_buses=742,773,800,823,846,870,892,915,940

New Line._virtual_line742_line773_line800_line823_line847_line872_line895_line919_line944_line966_line988_line1010_line1032_line1055_line1078 bus1=1079.1.2.3.4 bus2=715.1.2.3.4 phases=4 linecode=LC2 length=12.884255 units=m
! reduced_from=line742,line773,line800,line823,line847,line872,line895,line919,line944,line966,line988,line1010,line1032,line1055,line1078
! eliminated_buses=743,774,801,824,848,873,896,920,945,967,989,1011,1033,1056

New Line._virtual_line743_line774_line801_line824_line848_line873_line896_line920_line945_line967_line989_line1011_line1033_line1056 bus1=1057.1.2.3.4 bus2=715.1.2.3.4 phases=4 linecode=LC2 length=5.859041 units=m
! reduced_from=line743,line774,line801,line824,line848,line873,line896,line920,line945,line967,line989,line1011,line1033,line1056
! eliminated_buses=744,775,802,825,849,874,897,921,946,968,990,1012,1034

New Line._virtual_line755_line781_line806_line829_line853_line878_line902_line926_line950_line972_line994_line1016_line1037_line1060_line1082_line1102_line1121_line1140_line1159_line1178 bus1=1179.1.2.3.4 bus2=726.1.2.3.4 phases=4 linecode=LC2 length=15.130051 units=m
! reduced_from=line755,line781,line806,line829,line853,line878,line902,line926,line950,line972,line994,line1016,line1037,line1060,line1082,line1102,line1121,line1140,line1159,line1178
! eliminated_buses=756,782,807,830,854,879,903,927,951,973,995,1017,1038,1061,1083,1103,1122,1141,1160

New Line._virtual_line983_line1004_line1026_line1048 bus1=1049.1.2.3.4 bus2=963.1.2.3.4 phases=4 linecode=LC4 length=5.27389 units=m
! reduced_from=line983,line1004,line1026,line1048
! eliminated_buses=984,1005,1027

New Line._virtual_line984_line1006_line1029_line1052_line1075_line1096_line1115_line1135_line1154_line1173_line1193_line1215_line1236_line1258_line1279_line1299_line1319_line1337_line1352_line1368_line1383 bus1=963.1.2.3.4 bus2=1384.1.2.3.4 phases=4 linecode=LC2 length=17.797003 units=m
! reduced_from=line984,line1006,line1029,line1052,line1075,line1096,line1115,line1135,line1154,line1173,line1193,line1215,line1236,line1258,line1279,line1299,line1319,line1337,line1352,line1368,line1383
! eliminated_buses=985,1007,1030,1053,1076,1097,1116,1136,1155,1174,1194,1216,1237,1259,1280,1300,1320,1338,1353,1369

New Line._virtual_line1070_line1090_line1109_line1129_line1147_line1166 bus1=1049.1.2.3.4 bus2=1167.1.2.3.4 phases=4 linecode=LC4 length=15.41681 units=m
! reduced_from=line1070,line1090,line1109,line1129,line1147,line1166
! eliminated_buses=1071,1091,1110,1130,1148

New Line._virtual_line1071_line1092_line1111_line1131_line1150_line1170_line1190_line1212_line1234_line1256_line1277_line1297_line1317_line1335_line1351_line1367_line1382_line1396_line1410_line1422 bus1=1049.1.2.3.4 bus2=1423.1.2.3.4 phases=4 linecode=LC2 length=9.142033 units=m
! reduced_from=line1071,line1092,line1111,line1131,line1150,line1170,line1190,line1212,line1234,line1256,line1277,line1297,line1317,line1335,line1351,line1367,line1382,line1396,line1410,line1422
! eliminated_buses=1072,1093,1112,1132,1151,1171,1191,1213,1235,1257,1278,1298,1318,1336,1352,1368,1383,1397,1411

New Line._virtual_line1185_line1206 bus1=1167.1.2.3.4 bus2=1207.1.2.3.4 phases=4 linecode=LC4 length=6.4046 units=m
! reduced_from=line1185,line1206
! eliminated_buses=1186

New Line._virtual_line1186_line1208_line1230_line1252_line1273_line1293_line1313_line1332_line1349_line1365_line1380_line1394 bus1=1395.1.2.3.4 bus2=1167.1.2.3.4 phases=4 linecode=LC2 length=6.728974 units=m
! reduced_from=line1186,line1208,line1230,line1252,line1273,line1293,line1313,line1332,line1349,line1365,line1380,line1394
! eliminated_buses=1187,1209,1231,1253,1274,1294,1314,1333,1350,1366,1381

New Line._virtual_line1227_line1248_line1268 bus1=1207.1.2.3.4 bus2=1269.1.2.3.4 phases=4 linecode=LC4 length=6.6292 units=m
! reduced_from=line1227,line1248,line1268
! eliminated_buses=1228,1249

New Line._virtual_line1228_line1250_line1271_line1291_line1311_line1330_line1347_line1363_line1378 bus1=1207.1.2.3.4 bus2=1379.1.2.3.4 phases=4 linecode=LC2 length=6.68109 units=m
! reduced_from=line1228,line1250,line1271,line1291,line1311,line1330,line1347,line1363,line1378
! eliminated_buses=1229,1251,1272,1292,1312,1331,1348,1364

New Line._virtual_line1287_line1307_line1326_line1343 bus1=1344.1.2.3.4 bus2=1269.1.2.3.4 phases=4 linecode=LC4 length=6.57236 units=m
! reduced_from=line1287,line1307,line1326,line1343
! eliminated_buses=1288,1308,1327

New Line._virtual_line1288_line1308_line1327_line1344_line1360_line1376_line1392_line1407 bus1=1269.1.2.3.4 bus2=1408.1.2.3.4 phases=4 linecode=LC2 length=7.27378 units=m
! reduced_from=line1288,line1308,line1327,line1344,line1360,line1376,line1392,line1407
! eliminated_buses=1289,1309,1328,1345,1361,1377,1393

New Line._virtual_line1358_line1373_line1388_line1402 bus1=1344.1.2.3.4 bus2=1403.1.2.3.4 phases=4 linecode=LC4 length=6.21613 units=m
! reduced_from=line1358,line1373,line1388,line1402
! eliminated_buses=1359,1374,1389

New Line._virtual_line1359_line1375_line1391_line1406_line1420_line1433_line1446_line1460 bus1=1344.1.2.3.4 bus2=1461.1.2.3.4 phases=4 linecode=LC2 length=5.98094 units=m
! reduced_from=line1359,line1375,line1391,line1406,line1420,line1433,line1446,line1460
! eliminated_buses=1360,1376,1392,1407,1421,1434,1447

New Line._virtual_line1400_line1413_line1425_line1437_line1450_line1462_line1474_line1486_line1498 bus1=1388.1.2.3.4 bus2=1499.1.2.3.4 phases=4 linecode=LC8 length=10.744208 units=m
! reduced_from=line1400,line1413,line1425,line1437,line1450,line1462,line1474,line1486,line1498
! eliminated_buses=1401,1414,1426,1438,1451,1463,1475,1487

New Line._virtual_line1401_line1414_line1426_line1438_line1451_line1463_line1475_line1487_line1499_line1514_line1527_line1538_line1548_line1558_line1568_line1575_line1580_line1589_line1601_line1613_line1628_line1643_line1659_line1673_line1686_line1699_line1717_line1732_line1748 bus1=1388.1.2.3.4 bus2=1749.1.2.3.4 phases=4 linecode=LC8 length=56.396463 units=m
! reduced_from=line1401,line1414,line1426,line1438,line1451,line1463,line1475,line1487,line1499,line1514,line1527,line1538,line1548,line1558,line1568,line1575,line1580,line1589,line1601,line1613,line1628,line1643,line1659,line1673,line1686,line1699,line1717,line1732,line1748
! eliminated_buses=1402,1415,1427,1439,1452,1464,1476,1488,1500,1515,1528,1539,1549,1559,1569,1576,1581,1590,1602,1614,1629,1644,1660,1674,1687,1700,1718,1733

New Line._virtual_line1415_line1427 bus1=1403.1.2.3.4 bus2=1428.1.2.3.4 phases=4 linecode=LC4 length=6.80153 units=m
! reduced_from=line1415,line1427
! eliminated_buses=1416

New Line._virtual_line1416_line1429_line1442_line1456_line1469_line1482_line1494_line1507_line1522 bus1=1523.1.2.3.4 bus2=1403.1.2.3.4 phases=4 linecode=LC2 length=5.89781 units=m
! reduced_from=line1416,line1429,line1442,line1456,line1469,line1482,line1494,line1507,line1522
! eliminated_buses=1417,1430,1443,1457,1470,1483,1495,1508

New Line._virtual_line1439_line1453 bus1=1428.1.2.3.4 bus2=1454.1.2.3.4 phases=4 linecode=LC4 length=5.0025 units=m
! reduced_from=line1439,line1453
! eliminated_buses=1440

New Line._virtual_line1440_line1454_line1467_line1480_line1492_line1505_line1521_line1533 bus1=1428.1.2.3.4 bus2=1534.1.2.3.4 phases=4 linecode=LC2 length=6.46567 units=m
! reduced_from=line1440,line1454,line1467,line1480,line1492,line1505,line1521,line1533
! eliminated_buses=1441,1455,1468,1481,1493,1506,1522

New Line._virtual_line1466_line1479_line1491_line1504_line1520_line1532_line1543_line1553_line1563 bus1=1454.1.2.3.4 bus2=1564.1.2.3.4 phases=4 linecode=LC2 length=4.96326 units=m
! reduced_from=line1466,line1479,line1491,line1504,line1520,line1532,line1543,line1553,line1563
! eliminated_buses=1467,1480,1492,1505,1521,1533,1544,1554

New Line._virtual_line1511_line1525_line1536_line1546_line1556_line1566_line1573_line1578 bus1=1579.1.2.3.4 bus2=1499.1.2.3.4 phases=4 linecode=LC3 length=8.318912 units=m
! reduced_from=line1511,line1525,line1536,line1546,line1556,line1566,line1573,line1578
! eliminated_buses=1512,1526,1537,1547,1557,1567,1574

New Line._virtual_line1512_line1526_line1537_line1547_line1557_line1567_line1574_line1579_line1587_line1598_line1610_line1624_line1638_line1653_line1668_line1682_line1696_line1714_line1729 bus1=1730.1.2.3.4 bus2=1499.1.2.3.4 phases=4 linecode=LC6 length=11.40635 units=m
! reduced_from=line1512,line1526,line1537,line1547,line1557,line1567,line1574,line1579,line1587,line1598,line1610,line1624,line1638,line1653,line1668,line1682,line1696,line1714,line1729
! eliminated_buses=1513,1527,1538,1548,1558,1568,1575,1580,1588,1599,1611,1625,1639,1654,1669,1683,1697,1715

New Line._virtual_line1585_line1596_line1608_line1622_line1636_line1651_line1666_line1680_line1694_line1712_line1727_line1744_line1762 bus1=1579.1.2.3.4 bus2=1763.1.2.3.4 phases=4 linecode=LC6 length=10.539898 units=m
! reduced_from=line1585,line1596,line1608,line1622,line1636,line1651,line1666,line1680,line1694,line1712,line1727,line1744,line1762
! eliminated_buses=1586,1597,1609,1623,1637,1652,1667,1681,1695,1713,1728,1745

New Line._virtual_line1586_line1597_line1609_line1623_line1637_line1652_line1667_line1681_line1695_line1713_line1728_line1745 bus1=1579.1.2.3.4 bus2=1746.1.2.3.4 phases=4 linecode=LC6 length=11.11463 units=m
! reduced_from=line1586,line1597,line1609,line1623,line1637,line1652,line1667,line1681,line1695,line1713,line1728,line1745
! eliminated_buses=1587,1598,1610,1624,1638,1653,1668,1682,1696,1714,1729

New Line._virtual_line1592_line1604 bus1=1605.1.2.3.4 bus2=1584.1.2.3.4 phases=4 linecode=LC3 length=8.6198 units=m
! reduced_from=line1592,line1604
! eliminated_buses=1593

New Line._virtual_line1593_line1605_line1619_line1633_line1648_line1663_line1677_line1691_line1709_line1725_line1742_line1760_line1780 bus1=1781.1.2.3.4 bus2=1584.1.2.3.4 phases=4 linecode=LC2 length=12.97694 units=m
! reduced_from=line1593,line1605,line1619,line1633,line1648,line1663,line1677,line1691,line1709,line1725,line1742,line1760,line1780
! eliminated_buses=1594,1606,1620,1634,1649,1664,1678,1692,1710,1726,1743,1761

New Line._virtual_line1594_line1606_line1620_line1634_line1649_line1664_line1678_line1692_line1710_line1726_line1743_line1761 bus1=1762.1.2.3.4 bus2=1584.1.2.3.4 phases=4 linecode=LC6 length=10.82473 units=m
! reduced_from=line1594,line1606,line1620,line1634,line1649,line1664,line1678,line1692,line1710,line1726,line1743,line1761
! eliminated_buses=1595,1607,1621,1635,1650,1665,1679,1693,1711,1727,1744

New Line._virtual_line1616_line1630_line1645_line1660_line1674_line1688_line1706 bus1=1605.1.2.3.4 bus2=1707.1.2.3.4 phases=4 linecode=LC6 length=13.37174 units=m
! reduced_from=line1616,line1630,line1645,line1660,line1674,line1688,line1706
! eliminated_buses=1617,1631,1646,1661,1675,1689

New Line._virtual_line1617_line1631_line1646_line1661_line1675_line1689_line1707_line1723_line1740_line1758_line1778 bus1=1779.1.2.3.4 bus2=1605.1.2.3.4 phases=4 linecode=LC6 length=10.62648 units=m
! reduced_from=line1617,line1631,line1646,line1661,line1675,line1689,line1707,line1723,line1740,line1758,line1778
! eliminated_buses=1618,1632,1647,1662,1676,1690,1708,1724,1741,1759

New Line._virtual_line1618_line1632_line1647_line1662_line1676_line1690_line1708_line1724_line1741_line1759_line1779_line1796_line1813_line1830_line1846 bus1=1605.1.2.3.4 bus2=1847.1.2.3.4 phases=4 linecode=LC3 length=19.189962 units=m
! reduced_from=line1618,line1632,line1647,line1662,line1676,line1690,line1708,line1724,line1741,line1759,line1779,line1796,line1813,line1830,line1846
! eliminated_buses=1619,1633,1648,1663,1677,1691,1709,1725,1742,1760,1780,1797,1814,1831

New Line._virtual_line1722_line1739_line1757_line1777_line1795_line1812_line1829_line1845_line1861_line1878_line1896_line1912_line1927 bus1=1707.1.2.3.4 bus2=1928.1.2.3.4 phases=4 linecode=LC6 length=13.15727 units=m
! reduced_from=line1722,line1739,line1757,line1777,line1795,line1812,line1829,line1845,line1861,line1878,line1896,line1912,line1927
! eliminated_buses=1723,1740,1758,1778,1796,1813,1830,1846,1862,1879,1897,1913

New Line._virtual_line1737_line1755_line1775_line1793_line1810_line1827_line1843_line1859_line1876_line1894_line1911_line1926_line1940_line1953_line1966_line1979_line1992_line2005_line2018_line2029_line2039_line2049_line2057_line2066_line2077_line2090 bus1=1722.1.2.3.4 bus2=2091.1.2.3.4 phases=4 linecode=LC1 length=14.986315 units=m
! reduced_from=line1737,line1755,line1775,line1793,line1810,line1827,line1843,line1859,line1876,line1894,line1911,line1926,line1940,line1953,line1966,line1979,line1992,line2005,line2018,line2029,line2039,line2049,line2057,line2066,line2077,line2090
! eliminated_buses=1738,1756,1776,1794,1811,1828,1844,1860,1877,1895,1912,1927,1941,1954,1967,1980,1993,2006,2019,2030,2040,2050,2058,2067,2078

New Line._virtual_line1738_line1756_line1776_line1794_line1811_line1828_line1844_line1860_line1877_line1895 bus1=1896.1.2.3.4 bus2=1722.1.2.3.4 phases=4 linecode=LC6 length=12.195577 units=m
! reduced_from=line1738,line1756,line1776,line1794,line1811,line1828,line1844,line1860,line1877,line1895
! eliminated_buses=1739,1757,1777,1795,1812,1829,1845,1861,1878

New Line._virtual_line1752_line1772_line1790_line1807_line1824_line1840_line1856_line1873_line1891_line1908_line1923_line1937_line1950_line1963_line1977_line1991_line2004_line2017_line2028_line2038_line2048_line2056_line2065_line2076_line2089_line2105_line2119_line2133_line2148_line2163 bus1=2164.1.2.3.4 bus2=1737.1.2.3.4 phases=4 linecode=LC6 length=28.851556 units=m
! reduced_from=line1752,line1772,line1790,line1807,line1824,line1840,line1856,line1873,line1891,line1908,line1923,line1937,line1950,line1963,line1977,line1991,line2004,line2017,line2028,line2038,line2048,line2056,line2065,line2076,line2089,line2105,line2119,line2133,line2148,line2163
! eliminated_buses=1753,1773,1791,1808,1825,1841,1857,1874,1892,1909,1924,1938,1951,1964,1978,1992,2005,2018,2029,2039,2049,2057,2066,2077,2090,2106,2120,2134,2149

New Line._virtual_line1753_line1773_line1791_line1808_line1825_line1841_line1857_line1874_line1892_line1909_line1924_line1938_line1951_line1964_line1978 bus1=1737.1.2.3.4 bus2=1979.1.2.3.4 phases=4 linecode=LC2 length=13.168208 units=m
! reduced_from=line1753,line1773,line1791,line1808,line1825,line1841,line1857,line1874,line1892,line1909,line1924,line1938,line1951,line1964,line1978
! eliminated_buses=1754,1774,1792,1809,1826,1842,1858,1875,1893,1910,1925,1939,1952,1965

New Line._virtual_line1754_line1774_line1792_line1809_line1826_line1842_line1858_line1875_line1893_line1910_line1925_line1939_line1952_line1965 bus1=1737.1.2.3.4 bus2=1966.1.2.3.4 phases=4 linecode=LC1 length=12.950617 units=m
! reduced_from=line1754,line1774,line1792,line1809,line1826,line1842,line1858,line1875,line1893,line1910,line1925,line1939,line1952,line1965
! eliminated_buses=1755,1775,1793,1810,1827,1843,1859,1876,1894,1911,1926,1940,1953

New Line._virtual_line1765_line1783_line1799_line1816_line1833_line1848_line1865_line1883_line1902_line1918_line1933_line1946_line1959 bus1=1960.1.2.3.4 bus2=1749.1.2.3.4 phases=4 linecode=LC8 length=30.26898 units=m
! reduced_from=line1765,line1783,line1799,line1816,line1833,line1848,line1865,line1883,line1902,line1918,line1933,line1946,line1959
! eliminated_buses=1766,1784,1800,1817,1834,1849,1866,1884,1903,1919,1934,1947

New Line._virtual_line1766_line1785_line1802_line1819_line1836_line1852_line1869_line1887_line1905_line1921_line1936_line1949_line1962_line1976 bus1=1977.1.2.3.4 bus2=1749.1.2.3.4 phases=4 linecode=LC3 length=27.97034 units=m
! reduced_from=line1766,line1785,line1802,line1819,line1836,line1852,line1869,line1887,line1905,line1921,line1936,line1949,line1962,line1976
! eliminated_buses=1767,1786,1803,1820,1837,1853,1870,1888,1906,1922,1937,1950,1963

New Line._virtual_line1862_line1879_line1897_line1913_line1928_line1941_line1954_line1967 bus1=1968.1.2.3.4 bus2=1847.1.2.3.4 phases=4 linecode=LC6 length=9.61535 units=m
! reduced_from=line1862,line1879,line1897,line1913,line1928,line1941,line1954,line1967
! eliminated_buses=1863,1880,1898,1914,1929,1942,1955

New Line._virtual_line1880_line1898_line1914_line1929_line1942_line1955_line1968_line1980_line1993_line2006_line2019 bus1=1864.1.2.3.4 bus2=2020.1.2.3.4 phases=4 linecode=LC6 length=14.34329 units=m
! reduced_from=line1880,line1898,line1914,line1929,line1942,line1955,line1968,line1980,line1993,line2006,line2019
! eliminated_buses=1881,1899,1915,1930,1943,1956,1969,1981,1994,2007

New Line._virtual_line1899_line1915_line1930_line1943_line1956_line1969 bus1=1882.1.2.3.4 bus2=1970.1.2.3.4 phases=4 linecode=LC6 length=9.45113 units=m
! reduced_from=line1899,line1915,line1930,line1943,line1956,line1969
! eliminated_buses=1900,1916,1931,1944,1957

New Line._virtual_line1900_line1916 bus1=1882.1.2.3.4 bus2=1917.1.2.3.4 phases=4 linecode=LC3 length=1.44988 units=m
! reduced_from=line1900,line1916
! eliminated_buses=1901

New Line._virtual_line1931_line1944_line1957_line1970_line1983_line1996_line2008 bus1=1917.1.2.3.4 bus2=2009.1.2.3.4 phases=4 linecode=LC2 length=9.92839 units=m
! reduced_from=line1931,line1944,line1957,line1970,line1983,line1996,line2008
! eliminated_buses=1932,1945,1958,1971,1984,1997

New Line._virtual_line1981_line1994 bus1=1970.1.2.3.4 bus2=1995.1.2.3.4 phases=4 linecode=LC2 length=13.903 units=m
! reduced_from=line1981,line1994
! eliminated_buses=1982

New Line._virtual_line1982_line1995_line2007_line2020_line2030_line2040_line2050_line2059_line2068_line2079_line2092_line2107_line2121_line2135_line2150 bus1=1970.1.2.3.4 bus2=2151.1.2.3.4 phases=4 linecode=LC6 length=17.54869 units=m
! reduced_from=line1982,line1995,line2007,line2020,line2030,line2040,line2050,line2059,line2068,line2079,line2092,line2107,line2121,line2135,line2150
! eliminated_buses=1983,1996,2008,2021,2031,2041,2051,2060,2069,2080,2093,2108,2122,2136

New Line._virtual_line1988_line2001_line2014_line2025_line2035_line2045_line2054_line2063 bus1=2064.1.2.3.4 bus2=1977.1.2.3.4 phases=4 linecode=LC3 length=8.29255 units=m
! reduced_from=line1988,line2001,line2014,line2025,line2035,line2045,line2054,line2063
! eliminated_buses=1989,2002,2015,2026,2036,2046,2055

New Line._virtual_line1989_line2002_line2015_line2026_line2036_line2046 bus1=2047.1.2.3.4 bus2=1977.1.2.3.4 phases=4 linecode=LC6 length=9.266003 units=m
! reduced_from=line1989,line2002,line2015,line2026,line2036,line2046
! eliminated_buses=1990,2003,2016,2027,2037

New Line._virtual_line1990_line2003_line2016_line2027_line2037_line2047_line2055_line2064 bus1=1977.1.2.3.4 bus2=2065.1.2.3.4 phases=4 linecode=LC6 length=0.798994 units=m
! reduced_from=line1990,line2003,line2016,line2027,line2037,line2047,line2055,line2064
! eliminated_buses=1991,2004,2017,2028,2038,2048,2056

New Line._virtual_line2074_line2087 bus1=2065.1.2.3.4 bus2=2088.1.2.3.4 phases=4 linecode=LC3 length=2.6496 units=m
! reduced_from=line2074,line2087
! eliminated_buses=2075

New Line._virtual_line2083_line2098_line2114 bus1=2073.1.2.3.4 bus2=2115.1.2.3.4 phases=4 linecode=LC3 length=7.2812 units=m
! reduced_from=line2083,line2098,line2114
! eliminated_buses=2084,2099

New Line._virtual_line2084_line2099_line2115_line2129_line2144_line2159 bus1=2073.1.2.3.4 bus2=2160.1.2.3.4 phases=4 linecode=LC6 length=8.47972 units=m
! reduced_from=line2084,line2099,line2115,line2129,line2144,line2159
! eliminated_buses=2085,2100,2116,2130,2145

New Line._virtual_line2086_line2101_line2116_line2130_line2145_line2160_line2173_line2184_line2196_line2208_line2220_line2233 bus1=2074.1.2.3.4 bus2=2234.1.2.3.4 phases=4 linecode=LC6 length=9.96164 units=m
! reduced_from=line2086,line2101,line2116,line2130,line2145,line2160,line2173,line2184,line2196,line2208,line2220,line2233
! eliminated_buses=2087,2102,2117,2131,2146,2161,2174,2185,2197,2209,2221

New Line._virtual_line2103_line2117_line2131_line2146_line2161_line2174_line2185_line2197 bus1=2088.1.2.3.4 bus2=2198.1.2.3.4 phases=4 linecode=LC6 length=10.213921 units=m
! reduced_from=line2103,line2117,line2131,line2146,line2161,line2174,line2185,line2197
! eliminated_buses=2104,2118,2132,2147,2162,2175,2186

New Line._virtual_line2128_line2143_line2158_line2172_line2183_line2195_line2207_line2219_line2232_line2245_line2259_line2274 bus1=2275.1.2.3.4 bus2=2115.1.2.3.4 phases=4 linecode=LC6 length=2.700401 units=m
! reduced_from=line2128,line2143,line2158,line2172,line2183,line2195,line2207,line2219,line2232,line2245,line2259,line2274
! eliminated_buses=2129,2144,2159,2173,2184,2196,2208,2220,2233,2246,2260

New Line._virtual_line2141_line2155_line2169_line2180 bus1=2128.1.2.3.4 bus2=2181.1.2.3.4 phases=4 linecode=LC3 length=12.4606 units=m
! reduced_from=line2141,line2155,line2169,line2180
! eliminated_buses=2142,2156,2170

New Line._virtual_line2142_line2157_line2171_line2182_line2194_line2206_line2218_line2231_line2244_line2258_line2273_line2289_line2309 bus1=2310.1.2.3.4 bus2=2128.1.2.3.4 phases=4 linecode=LC6 length=8.5119 units=m
! reduced_from=line2142,line2157,line2171,line2182,line2194,line2206,line2218,line2231,line2244,line2258,line2273,line2289,line2309
! eliminated_buses=2143,2158,2172,2183,2195,2207,2219,2232,2245,2259,2274,2290

New Line._virtual_line2191_line2203 bus1=2181.1.2.3.4 bus2=2204.1.2.3.4 phases=4 linecode=LC3 length=8.2458 units=m
! reduced_from=line2191,line2203
! eliminated_buses=2192

New Line._virtual_line2192_line2204_line2216_line2229_line2242_line2256_line2271_line2287_line2306_line2325_line2342_line2360_line2376_line2391 bus1=2181.1.2.3.4 bus2=2392.1.2.3.4 phases=4 linecode=LC6 length=13.1611 units=m
! reduced_from=line2192,line2204,line2216,line2229,line2242,line2256,line2271,line2287,line2306,line2325,line2342,line2360,line2376,line2391
! eliminated_buses=2193,2205,2217,2230,2243,2257,2272,2288,2307,2326,2343,2361,2377

New Line._virtual_line2214_line2226 bus1=2204.1.2.3.4 bus2=2227.1.2.3.4 phases=4 linecode=LC3 length=2.7436 units=m
! reduced_from=line2214,line2226
! eliminated_buses=2215

New Line._virtual_line2215_line2228_line2241_line2255_line2270_line2286_line2305_line2324_line2341_line2359 bus1=2360.1.2.3.4 bus2=2204.1.2.3.4 phases=4 linecode=LC6 length=10.22076 units=m
! reduced_from=line2215,line2228,line2241,line2255,line2270,line2286,line2305,line2324,line2341,line2359
! eliminated_buses=2216,2229,2242,2256,2271,2287,2306,2325,2342

New Line._virtual_line2239_line2253_line2268_line2284_line2303_line2322_line2339_line2357_line2374_line2389 bus1=2227.1.2.3.4 bus2=2390.1.2.3.4 phases=4 linecode=LC6 length=9.45293 units=m
! reduced_from=line2239,line2253,line2268,line2284,line2303,line2322,line2339,line2357,line2374,line2389
! eliminated_buses=2240,2254,2269,2285,2304,2323,2340,2358,2375

New Line._virtual_line2252_line2267_line2283_line2302_line2321_line2338_line2356_line2373_line2388_line2402_line2413_line2424_line2434_line2442_line2448_line2453 bus1=2239.1.2.3.4 bus2=2454.1.2.3.4 phases=4 linecode=LC6 length=8.988756 units=m
! reduced_from=line2252,line2267,line2283,line2302,line2321,line2338,line2356,line2373,line2388,line2402,line2413,line2424,line2434,line2442,line2448,line2453
! eliminated_buses=2253,2268,2284,2303,2322,2339,2357,2374,2389,2403,2414,2425,2435,2443,2449

New Line._virtual_line2266_line2282_line2301_line2320_line2337_line2355_line2372_line2387_line2401 bus1=2252.1.2.3.4 bus2=2402.1.2.3.4 phases=4 linecode=LC6 length=10.58014 units=m
! reduced_from=line2266,line2282,line2301,line2320,line2337,line2355,line2372,line2387,line2401
! eliminated_buses=2267,2283,2302,2321,2338,2356,2373,2388

New Line._virtual_line2281_line2300_line2319_line2336_line2354_line2371_line2386_line2400_line2412_line2423_line2433_line2441_line2447 bus1=2448.1.2.3.4 bus2=2266.1.2.3.4 phases=4 linecode=LC6 length=9.887721 units=m
! reduced_from=line2281,line2300,line2319,line2336,line2354,line2371,line2386,line2400,line2412,line2423,line2433,line2441,line2447
! eliminated_buses=2282,2301,2320,2337,2355,2372,2387,2401,2413,2424,2434,2442

New Line._virtual_line2291_line2310 bus1=2311.1.2.3.4 bus2=2275.1.2.3.4 phases=4 linecode=LC6 length=8.3237 units=m
! reduced_from=line2291,line2310
! eliminated_buses=2292

New Line._virtual_line2298_line2317 bus1=2281.1.2.3.4 bus2=2318.1.2.3.4 phases=4 linecode=LC3 length=5.7535 units=m
! reduced_from=line2298,line2317
! eliminated_buses=2299

New Line._virtual_line2299_line2318_line2335_line2353_line2370_line2385_line2399_line2411_line2422_line2432 bus1=2281.1.2.3.4 bus2=2433.1.2.3.4 phases=4 linecode=LC2 length=10.09194 units=m
! reduced_from=line2299,line2318,line2335,line2353,line2370,line2385,line2399,line2411,line2422,line2432
! eliminated_buses=2300,2319,2336,2354,2371,2386,2400,2412,2423

New Line._virtual_line2333_line2350_line2367_line2382_line2396_line2408_line2419_line2429_line2438_line2445_line2450_line2455_line2458_line2461_line2464_line2467_line2470_line2473_line2476_line2478_line2480 bus1=2481.1.2.3.4 bus2=2318.1.2.3.4 phases=4 linecode=LC3 length=9.523629 units=m
! reduced_from=line2333,line2350,line2367,line2382,line2396,line2408,line2419,line2429,line2438,line2445,line2450,line2455,line2458,line2461,line2464,line2467,line2470,line2473,line2476,line2478,line2480
! eliminated_buses=2334,2351,2368,2383,2397,2409,2420,2430,2439,2446,2451,2456,2459,2462,2465,2468,2471,2474,2477,2479

New Line._virtual_line2334_line2352_line2369_line2384_line2398_line2410_line2421_line2431_line2440 bus1=2441.1.2.3.4 bus2=2318.1.2.3.4 phases=4 linecode=LC6 length=8.55371 units=m
! reduced_from=line2334,line2352,line2369,line2384,line2398,line2410,line2421,line2431,line2440
! eliminated_buses=2335,2353,2370,2385,2399,2411,2422,2432

New Line._virtual_line2483_line2488_line2493_line2498_line2502_line2506_line2510_line2514_line2517_line2520_line2523_line2526_line2529 bus1=2481.1.2.3.4 bus2=2530.1.2.3.4 phases=4 linecode=LC6 length=10.04256 units=m
! reduced_from=line2483,line2488,line2493,line2498,line2502,line2506,line2510,line2514,line2517,line2520,line2523,line2526,line2529
! eliminated_buses=2484,2489,2494,2499,2503,2507,2511,2515,2518,2521,2524,2527

New Line._virtual_line2484_line2489_line2494_line2499_line2503_line2507_line2511_line2515_line2518_line2521_line2524_line2527_line2530_line2532_line2534_line2536_line2538_line2539 bus1=2481.1.2.3.4 bus2=2540.1.2.3.4 phases=4 linecode=LC6 length=15.205354 units=m
! reduced_from=line2484,line2489,line2494,line2499,line2503,line2507,line2511,line2515,line2518,line2521,line2524,line2527,line2530,line2532,line2534,line2536,line2538,line2539
! eliminated_buses=2485,2490,2495,2500,2504,2508,2512,2516,2519,2522,2525,2528,2531,2533,2535,2537,2539

New Line.LINE98 bus1=96.1.2.3.4 bus2=99.1.2.3.4 phases=4 linecode=LC8 length=0.95579 units=m

New Line.LINE101 bus1=99.1.2.3.4 bus2=102.1.2.3.4 phases=4 linecode=LC1 length=8.0371 units=m

New Line.LINE102 bus1=99.1.2.3.4 bus2=103.1.2.3.4 phases=4 linecode=LC1 length=8.0371 units=m

New Line.LINE171 bus1=161.1.2.3.4 bus2=172.1.2.3.4 phases=4 linecode=LC1 length=3.7119 units=m

New Line.LINE211 bus1=196.1.2.3.4 bus2=212.1.2.3.4 phases=4 linecode=LC1 length=0.074544 units=m

New Line.LINE227 bus1=212.1.2.3.4 bus2=228.1.2.3.4 phases=4 linecode=LC1 length=2.9468 units=m

New Line.LINE255 bus1=238.1.2.3.4 bus2=256.1.2.3.4 phases=4 linecode=LC3 length=2.1159 units=m

New Line.LINE256 bus1=238.1.2.3.4 bus2=257.1.2.3.4 phases=4 linecode=LC3 length=1.9364 units=m

New Line.LINE264 bus1=244.1.2.3.4 bus2=265.1.2.3.4 phases=4 linecode=LC1 length=4.0079 units=m

New Line.LINE265 bus1=244.1.2.3.4 bus2=266.1.2.3.4 phases=4 linecode=LC1 length=4.0079 units=m

New Line.LINE278 bus1=256.1.2.3.4 bus2=279.1.2.3.4 phases=4 linecode=LC1 length=5.9019 units=m

New Line.LINE279 bus1=256.1.2.3.4 bus2=280.1.2.3.4 phases=4 linecode=LC1 length=5.9019 units=m

New Line.LINE280 bus1=257.1.2.3.4 bus2=281.1.2.3.4 phases=4 linecode=LC1 length=7.3711 units=m

New Line.LINE281 bus1=257.1.2.3.4 bus2=282.1.2.3.4 phases=4 linecode=LC3 length=0.41424 units=m

New Line.LINE302 bus1=282.1.2.3.4 bus2=303.1.2.3.4 phases=4 linecode=LC1 length=3.3926 units=m

New Line.LINE305 bus1=284.1.2.3.4 bus2=306.1.2.3.4 phases=4 linecode=LC1 length=13.4126 units=m

New Line.LINE348 bus1=327.1.2.3.4 bus2=349.1.2.3.4 phases=4 linecode=LC1 length=4.1865 units=m

New Line.LINE422 bus1=397.1.2.3.4 bus2=423.1.2.3.4 phases=4 linecode=LC1 length=4.227 units=m

New Line.LINE532 bus1=505.1.2.3.4 bus2=533.1.2.3.4 phases=4 linecode=LC3 length=2.3122 units=m

New Line.LINE560 bus1=533.1.2.3.4 bus2=561.1.2.3.4 phases=4 linecode=LC1 length=2.9829 units=m

New Line.LINE585 bus1=557.1.2.3.4 bus2=586.1.2.3.4 phases=4 linecode=LC3 length=4.7966 units=m

New Line.LINE797 bus1=772.1.2.3.4 bus2=798.1.2.3.4 phases=4 linecode=LC2 length=5.33 units=m

New Line.LINE798 bus1=772.1.2.3.4 bus2=799.1.2.3.4 phases=4 linecode=LC2 length=2.9544 units=m

New Line.LINE1198 bus1=1179.1.2.3.4 bus2=1199.1.2.3.4 phases=4 linecode=LC2 length=2.7184 units=m

New Line.LINE1199 bus1=1179.1.2.3.4 bus2=1200.1.2.3.4 phases=4 linecode=LC2 length=7.9002 units=m

New Line.LINE1342 bus1=1325.1.2.3.4 bus2=1343.1.2.3.4 phases=4 linecode=LC1 length=17.6385 units=m

New Line.LINE1572 bus1=1564.1.2.3.4 bus2=1573.1.2.3.4 phases=4 linecode=LC2 length=2.0516 units=m

New Line.LINE1583 bus1=1579.1.2.3.4 bus2=1584.1.2.3.4 phases=4 linecode=LC3 length=9.0606 units=m

New Line.LINE1721 bus1=1707.1.2.3.4 bus2=1722.1.2.3.4 phases=4 linecode=LC6 length=7.862 units=m

New Line.LINE1736 bus1=1722.1.2.3.4 bus2=1737.1.2.3.4 phases=4 linecode=LC6 length=7.6224 units=m

New Line.LINE1863 bus1=1847.1.2.3.4 bus2=1864.1.2.3.4 phases=4 linecode=LC3 length=2.7021 units=m

New Line.LINE1881 bus1=1864.1.2.3.4 bus2=1882.1.2.3.4 phases=4 linecode=LC3 length=2.0484 units=m

New Line.LINE1972 bus1=1960.1.2.3.4 bus2=1973.1.2.3.4 phases=4 linecode=LC1 length=5.147 units=m

New Line.LINE2072 bus1=2064.1.2.3.4 bus2=2073.1.2.3.4 phases=4 linecode=LC3 length=1.1564 units=m

New Line.LINE2073 bus1=2064.1.2.3.4 bus2=2074.1.2.3.4 phases=4 linecode=LC3 length=1.7514 units=m

New Line.LINE2127 bus1=2115.1.2.3.4 bus2=2128.1.2.3.4 phases=4 linecode=LC3 length=4.7473 units=m

New Line.LINE2238 bus1=2227.1.2.3.4 bus2=2239.1.2.3.4 phases=4 linecode=LC3 length=5.7516 units=m

New Line.LINE2251 bus1=2239.1.2.3.4 bus2=2252.1.2.3.4 phases=4 linecode=LC3 length=3.0478 units=m

New Line.LINE2265 bus1=2252.1.2.3.4 bus2=2266.1.2.3.4 phases=4 linecode=LC3 length=5.3377 units=m

New Line.LINE2280 bus1=2266.1.2.3.4 bus2=2281.1.2.3.4 phases=4 linecode=LC3 length=3.657 units=m

New Line.LINE2290 bus1=2275.1.2.3.4 bus2=2291.1.2.3.4 phases=4 linecode=LC6 length=7.5548 units=m
