! Reduced enabled lines.

New Line._virtual_line0_line1_line2_line3_line4_line5_line6_line7_line8_line9_line10_line11_line12_line13_line14_line15_line16_line17_line18_line19_line20_line21_line22_line23_line24 bus1=sourcebus.1.2.3.4 bus2=25.1.2.3.4 phases=4 linecode=LC8 length=18.591856 units=m
! reduced_from=line0,line1,line2,line3,line4,line5,line6,line7,line8,line9,line10,line11,line12,line13,line14,line15,line16,line17,line18,line19,line20,line21,line22,line23,line24
! eliminated_buses=1,2,3,4,5,6,7,8,9,10,11,12,13,14,15,16,17,18,19,20,21,22,23,24

New Line._virtual_line25_line27_line29_line31_line33_line35_line37_line39_line41_line44_line46_line48_line50_line52_line54_line56_line58_line60_line63_line66_line70_line75_line81_line89_line98_line108_line119_line131_line144_line157_line168_line179_line188 bus1=25.1.2.3.4 bus2=189.1.2.3.4 phases=4 linecode=LC9 length=41.923631 units=m
! reduced_from=line25,line27,line29,line31,line33,line35,line37,line39,line41,line44,line46,line48,line50,line52,line54,line56,line58,line60,line63,line66,line70,line75,line81,line89,line98,line108,line119,line131,line144,line157,line168,line179,line188
! eliminated_buses=26,28,30,32,34,36,38,40,42,45,47,49,51,53,55,57,59,61,64,67,71,76,82,90,99,109,120,132,145,158,169,180

New Line._virtual_line26_line28_line30_line32_line34_line36_line38_line40_line42_line45_line47_line49_line51_line53_line55_line57_line59_line61_line64_line67_line71_line76 bus1=77.1.2.3.4 bus2=25.1.2.3.4 phases=4 linecode=LC8 length=48.880965 units=m
! reduced_from=line26,line28,line30,line32,line34,line36,line38,line40,line42,line45,line47,line49,line51,line53,line55,line57,line59,line61,line64,line67,line71,line76
! eliminated_buses=27,29,31,33,35,37,39,41,43,46,48,50,52,54,56,58,60,62,65,68,72

New Line._virtual_line82_line90_line99_line109_line120_line132_line145_line159_line171_line182_line191_line203_line215_line225 bus1=77.1.2.3.4 bus2=226.1.2.3.4 phases=4 linecode=LC8 length=35.19801 units=m
! reduced_from=line82,line90,line99,line109,line120,line132,line145,line159,line171,line182,line191,line203,line215,line225
! eliminated_buses=83,91,100,110,121,133,146,160,172,183,192,204,216

New Line._virtual_line83_line92_line102_line113_line125_line138_line151_line165_line177_line186_line195_line205_line216_line226_line238 bus1=239.1.2.3.4 bus2=77.1.2.3.4 phases=4 linecode=LC1 length=13.12005 units=m
! reduced_from=line83,line92,line102,line113,line125,line138,line151,line165,line177,line186,line195,line205,line216,line226,line238
! eliminated_buses=84,93,103,114,126,139,152,166,178,187,196,206,217,227

New Line._virtual_line84_line93_line103_line114_line126_line139_line152_line166_line178_line187_line196_line206_line217_line227_line239_line252_line266_line280_line295 bus1=296.1.2.3.4 bus2=77.1.2.3.4 phases=4 linecode=LC1 length=13.330228 units=m
! reduced_from=line84,line93,line103,line114,line126,line139,line152,line166,line178,line187,line196,line206,line217,line227,line239,line252,line266,line280,line295
! eliminated_buses=85,94,104,115,127,140,153,167,179,188,197,207,218,228,240,253,267,281

New Line._virtual_line198_line210_line220_line230_line242_line255_line269_line283_line298_line312_line326_line338_line350_line361_line372_line386_line399 bus1=189.1.2.3.4 bus2=400.1.2.3.4 phases=4 linecode=LC6 length=8.777119 units=m
! reduced_from=line198,line210,line220,line230,line242,line255,line269,line283,line298,line312,line326,line338,line350,line361,line372,line386,line399
! eliminated_buses=199,211,221,231,243,256,270,284,299,313,327,339,351,362,373,387

New Line._virtual_line199_line211_line221_line231_line243_line256_line270_line284_line299_line313_line327_line339_line351_line362_line373_line387_line400_line414 bus1=189.1.2.3.4 bus2=415.1.2.3.4 phases=4 linecode=LC6 length=9.006699 units=m
! reduced_from=line199,line211,line221,line231,line243,line256,line270,line284,line299,line313,line327,line339,line351,line362,line373,line387,line400,line414
! eliminated_buses=200,212,222,232,244,257,271,285,300,314,328,340,352,363,374,388,401

New Line._virtual_line209_line219_line229_line241_line254_line268_line282_line297_line311 bus1=312.1.2.3.4 bus2=198.1.2.3.4 phases=4 linecode=LC6 length=7.384091 units=m
! reduced_from=line209,line219,line229,line241,line254,line268,line282,line297,line311
! eliminated_buses=210,220,230,242,255,269,283,298

New Line._virtual_line235_line247_line260_line273_line287_line301_line315_line328_line340_line352_line363_line374_line388_line401_line415_line430_line444_line457_line472_line487_line501_line514_line526_line537 bus1=538.1.2.3.4 bus2=226.1.2.3.4 phases=4 linecode=LC8 length=24.473553 units=m
! reduced_from=line235,line247,line260,line273,line287,line301,line315,line328,line340,line352,line363,line374,line388,line401,line415,line430,line444,line457,line472,line487,line501,line514,line526,line537
! eliminated_buses=236,248,261,274,288,302,316,329,341,353,364,375,389,402,416,431,445,458,473,488,502,515,527

New Line._virtual_line236_line249 bus1=250.1.2.3.4 bus2=226.1.2.3.4 phases=4 linecode=LC9 length=1.06722 units=m
! reduced_from=line236,line249
! eliminated_buses=237

New Line._virtual_line250_line265_line279_line294_line307_line321_line334_line346_line357_line368 bus1=239.1.2.3.4 bus2=369.1.2.3.4 phases=4 linecode=LC1 length=11.37539 units=m
! reduced_from=line250,line265,line279,line294,line307,line321,line334,line346,line357,line368
! eliminated_buses=251,266,280,295,308,322,335,347,358

New Line._virtual_line262_line275_line289_line303_line317_line330_line342_line354_line365_line376_line390_line403_line417_line432_line446_line459_line474_line489_line503_line516_line528_line539_line548_line557_line567_line578_line590_line605_line621_line637_line653_line673 bus1=674.1.2.3.4 bus2=250.1.2.3.4 phases=4 linecode=LC1 length=16.477023 units=m
! reduced_from=line262,line275,line289,line303,line317,line330,line342,line354,line365,line376,line390,line403,line417,line432,line446,line459,line474,line489,line503,line516,line528,line539,line548,line557,line567,line578,line590,line605,line621,line637,line653,line673
! eliminated_buses=263,276,290,304,318,331,343,355,366,377,391,404,418,433,447,460,475,490,504,517,529,540,549,558,568,579,591,606,622,638,654

New Line._virtual_line263_line276_line290_line304_line318_line331_line343_line355_line366_line377_line391_line404_line418_line433_line447_line460_line475_line490_line504_line517_line529_line540_line549_line558_line568_line579_line591_line606_line622_line638_line654_line674_line696 bus1=250.1.2.3.4 bus2=697.1.2.3.4 phases=4 linecode=LC1 length=11.976049 units=m
! reduced_from=line263,line276,line290,line304,line318,line331,line343,line355,line366,line377,line391,line404,line418,line433,line447,line460,line475,line490,line504,line517,line529,line540,line549,line558,line568,line579,line591,line606,line622,line638,line654,line674,line696
! eliminated_buses=264,277,291,305,319,332,344,356,367,378,392,405,419,434,448,461,476,491,505,518,530,541,550,559,569,580,592,607,623,639,655,675

New Line._virtual_line308_line322_line335_line347_line358_line369_line383_line396_line409 bus1=296.1.2.3.4 bus2=410.1.2.3.4 phases=4 linecode=LC1 length=10.9901 units=m
! reduced_from=line308,line322,line335,line347,line358,line369,line383,line396,line409
! eliminated_buses=309,323,336,348,359,370,384,397

New Line._virtual_line324_line337_line349_line360_line371_line385_line398_line411_line426 bus1=427.1.2.3.4 bus2=312.1.2.3.4 phases=4 linecode=LC6 length=12.66868 units=m
! reduced_from=line324,line337,line349,line360,line371,line385,line398,line411,line426
! eliminated_buses=325,338,350,361,372,386,399,412

New Line._virtual_line381_line395_line408_line422_line437_line451_line466_line481_line495_line508_line520_line531 bus1=532.1.2.3.4 bus2=369.1.2.3.4 phases=4 linecode=LC1 length=16.11977 units=m
! reduced_from=line381,line395,line408,line422,line437,line451,line466,line481,line495,line508,line520,line531
! eliminated_buses=382,396,409,423,438,452,467,482,496,509,521

New Line._virtual_line412_line427_line442_line455_line470_line485_line499_line512_line524_line535 bus1=536.1.2.3.4 bus2=400.1.2.3.4 phases=4 linecode=LC6 length=19.57284 units=m
! reduced_from=line412,line427,line442,line455,line470,line485,line499,line512,line524,line535
! eliminated_buses=413,428,443,456,471,486,500,513,525

New Line._virtual_line423_line438_line452_line467_line482_line496_line509_line521_line532_line542_line550_line559_line569 bus1=410.1.2.3.4 bus2=570.1.2.3.4 phases=4 linecode=LC1 length=17.3452 units=m
! reduced_from=line423,line438,line452,line467,line482,line496,line509,line521,line532,line542,line550,line559,line569
! eliminated_buses=424,439,453,468,483,497,510,522,533,543,551,560

New Line._virtual_line428_line443_line456_line471_line486_line500_line513_line525_line536_line545_line552 bus1=415.1.2.3.4 bus2=553.1.2.3.4 phases=4 linecode=LC6 length=19.045002 units=m
! reduced_from=line428,line443,line456,line471,line486,line500,line513,line525,line536,line545,line552
! eliminated_buses=429,444,457,472,487,501,514,526,537,546

New Line._virtual_line440_line454_line469_line484_line498_line511_line523_line534_line544 bus1=545.1.2.3.4 bus2=427.1.2.3.4 phases=4 linecode=LC6 length=13.77085 units=m
! reduced_from=line440,line454,line469,line484,line498,line511,line523,line534,line544
! eliminated_buses=441,455,470,485,499,512,524,535

New Line._virtual_line546_line553_line561_line571_line581_line593_line609_line625_line641 bus1=538.1.2.3.4 bus2=642.1.2.3.4 phases=4 linecode=LC8 length=36.5319 units=m
! reduced_from=line546,line553,line561,line571,line581,line593,line609,line625,line641
! eliminated_buses=547,554,562,572,582,594,610,626

New Line._virtual_line547_line555 bus1=556.1.2.3.4 bus2=538.1.2.3.4 phases=4 linecode=LC8 length=1.49931 units=m
! reduced_from=line547,line555
! eliminated_buses=548

New Line._virtual_line565_line576_line588_line603_line619_line635_line651_line671_line692_line711_line728_line742_line755 bus1=756.1.2.3.4 bus2=556.1.2.3.4 phases=4 linecode=LC9 length=26.766996 units=m
! reduced_from=line565,line576,line588,line603,line619,line635,line651,line671,line692,line711,line728,line742,line755
! eliminated_buses=566,577,589,604,620,636,652,672,693,712,729,743

New Line._virtual_line657_line677_line699_line717_line733_line748 bus1=642.1.2.3.4 bus2=749.1.2.3.4 phases=4 linecode=LC8 length=29.7512 units=m
! reduced_from=line657,line677,line699,line717,line733,line748
! eliminated_buses=658,678,700,718,734

New Line._virtual_line661_line682_line705_line723_line737_line752_line764_line777_line791_line805_line818_line832_line847_line863_line879_line898 bus1=642.1.2.3.4 bus2=899.1.2.3.4 phases=4 linecode=LC2 length=23.08856 units=m
! reduced_from=line661,line682,line705,line723,line737,line752,line764,line777,line791,line805,line818,line832,line847,line863,line879,line898
! eliminated_buses=662,683,706,724,738,753,765,778,792,806,819,833,848,864,880

New Line._virtual_line694_line712_line729_line743_line756_line770_line783_line797_line810_line823_line837_line852_line868_line885_line904_line928_line950_line972_line994_line1016_line1042_line1067_line1092 bus1=1093.1.2.3.4 bus2=674.1.2.3.4 phases=4 linecode=LC1 length=15.916431 units=m
! reduced_from=line694,line712,line729,line743,line756,line770,line783,line797,line810,line823,line837,line852,line868,line885,line904,line928,line950,line972,line994,line1016,line1042,line1067,line1092
! eliminated_buses=695,713,730,744,757,771,784,798,811,824,838,853,869,886,905,929,951,973,995,1017,1043,1068

New Line._virtual_line713_line730_line744_line757_line771_line784_line798_line811_line824_line838_line853_line869_line886_line905 bus1=697.1.2.3.4 bus2=906.1.2.3.4 phases=4 linecode=LC1 length=15.485684 units=m
! reduced_from=line713,line730,line744,line757,line771,line784,line798,line811,line824,line838,line853,line869,line886,line905
! eliminated_buses=714,731,745,758,772,785,799,812,825,839,854,870,887

New Line._virtual_line760_line774_line787_line801_line814_line827_line841_line856_line872 bus1=749.1.2.3.4 bus2=873.1.2.3.4 phases=4 linecode=LC9 length=9.68201 units=m
! reduced_from=line760,line774,line787,line801,line814,line827,line841,line856,line872
! eliminated_buses=761,775,788,802,815,828,842,857

New Line._virtual_line761_line775_line789_line803_line816_line830_line845_line860_line876_line895_line917_line940_line962_line984_line1004_line1026_line1052_line1078_line1103_line1128_line1150_line1173_line1193_line1215_line1234_line1253_line1273_line1291_line1312_line1333_line1358_line1381_line1411_line1437_line1466_line1493_line1521_line1549_line1579_line1612_line1646_line1681_line1717_line1757_line1799_line1842_line1887_line1934_line1975_line2021_line2068 bus1=749.1.2.3.4 bus2=2069.1.2.3.4 phases=4 linecode=LC8 length=101.359123 units=m
! reduced_from=line761,line775,line789,line803,line816,line830,line845,line860,line876,line895,line917,line940,line962,line984,line1004,line1026,line1052,line1078,line1103,line1128,line1150,line1173,line1193,line1215,line1234,line1253,line1273,line1291,line1312,line1333,line1358,line1381,line1411,line1437,line1466,line1493,line1521,line1549,line1579,line1612,line1646,line1681,line1717,line1757,line1799,line1842,line1887,line1934,line1975,line2021,line2068
! eliminated_buses=762,776,790,804,817,831,846,861,877,896,918,941,963,985,1005,1027,1053,1079,1104,1129,1151,1174,1194,1216,1235,1254,1274,1292,1313,1334,1359,1382,1412,1438,1467,1494,1522,1550,1580,1613,1647,1682,1718,1758,1800,1843,1888,1935,1976,2022

New Line._virtual_line766_line779_line793_line806_line819_line833_line848_line864_line880_line899_line922_line945_line967_line989 bus1=990.1.2.3.4 bus2=756.1.2.3.4 phases=4 linecode=LC9 length=11.14229 units=m
! reduced_from=line766,line779,line793,line806,line819,line833,line848,line864,line880,line899,line922,line945,line967,line989
! eliminated_buses=767,780,794,807,820,834,849,865,881,900,923,946,968

New Line._virtual_line768_line781_line795_line808_line821_line835_line850_line866_line882_line901 bus1=902.1.2.3.4 bus2=756.1.2.3.4 phases=4 linecode=LC2 length=11.79292 units=m
! reduced_from=line768,line781,line795,line808,line821,line835,line850,line866,line882,line901
! eliminated_buses=769,782,796,809,822,836,851,867,883

New Line._virtual_line769_line782_line796_line809_line822_line836_line851_line867_line883_line902_line926_line948_line970_line992_line1014_line1040_line1065_line1091 bus1=756.1.2.3.4 bus2=1092.1.2.3.4 phases=4 linecode=LC2 length=23.65462 units=m
! reduced_from=line769,line782,line796,line809,line822,line836,line851,line867,line883,line902,line926,line948,line970,line992,line1014,line1040,line1065,line1091
! eliminated_buses=770,783,797,810,823,837,852,868,884,903,927,949,971,993,1015,1041,1066

New Line._virtual_line889_line908_line931_line953_line975_line996_line1018_line1044_line1069_line1094_line1117_line1140 bus1=873.1.2.3.4 bus2=1141.1.2.3.4 phases=4 linecode=LC6 length=7.87775 units=m
! reduced_from=line889,line908,line931,line953,line975,line996,line1018,line1044,line1069,line1094,line1117,line1140
! eliminated_buses=890,909,932,954,976,997,1019,1045,1070,1095,1118

New Line._virtual_line890_line909_line932_line954_line976_line997_line1019_line1045 bus1=873.1.2.3.4 bus2=1046.1.2.3.4 phases=4 linecode=LC6 length=7.14369 units=m
! reduced_from=line890,line909,line932,line954,line976,line997,line1019,line1045
! eliminated_buses=891,910,933,955,977,998,1020

New Line._virtual_line910_line933_line955_line977_line998_line1020_line1046_line1072_line1095 bus1=892.1.2.3.4 bus2=1096.1.2.3.4 phases=4 linecode=LC9 length=9.24456 units=m
! reduced_from=line910,line933,line955,line977,line998,line1020,line1046,line1072,line1095
! eliminated_buses=911,934,956,978,999,1021,1047,1073

New Line._virtual_line912_line935_line957_line979_line1000_line1022_line1048_line1074_line1097_line1122_line1145_line1169_line1190_line1211_line1232_line1251 bus1=1252.1.2.3.4 bus2=892.1.2.3.4 phases=4 linecode=LC6 length=12.35706 units=m
! reduced_from=line912,line935,line957,line979,line1000,line1022,line1048,line1074,line1097,line1122,line1145,line1169,line1190,line1211,line1232,line1251
! eliminated_buses=913,936,958,980,1001,1023,1049,1075,1098,1123,1146,1170,1191,1212,1233

New Line._virtual_line913_line936_line958_line980_line1001_line1023_line1049_line1075_line1098_line1123_line1146_line1170_line1191 bus1=1192.1.2.3.4 bus2=892.1.2.3.4 phases=4 linecode=LC6 length=6.53992 units=m
! reduced_from=line913,line936,line958,line980,line1001,line1023,line1049,line1075,line1098,line1123,line1146,line1170,line1191
! eliminated_buses=914,937,959,981,1002,1024,1050,1076,1099,1124,1147,1171

New Line._virtual_line921_line944_line966_line988_line1008_line1029 bus1=1030.1.2.3.4 bus2=899.1.2.3.4 phases=4 linecode=LC2 length=7.57771 units=m
! reduced_from=line921,line944,line966,line988,line1008,line1029
! eliminated_buses=922,945,967,989,1009

New Line._virtual_line925_line947_line969_line991_line1013 bus1=1014.1.2.3.4 bus2=902.1.2.3.4 phases=4 linecode=LC2 length=4.09476 units=m
! reduced_from=line925,line947,line969,line991,line1013
! eliminated_buses=926,948,970,992

New Line._virtual_line1010_line1034_line1061_line1086_line1110_line1134_line1156_line1179_line1200_line1222_line1241_line1260_line1279_line1296_line1317_line1342_line1367_line1390_line1420_line1449_line1478_line1505 bus1=1506.1.2.3.4 bus2=990.1.2.3.4 phases=4 linecode=LC6 length=11.490937 units=m
! reduced_from=line1010,line1034,line1061,line1086,line1110,line1134,line1156,line1179,line1200,line1222,line1241,line1260,line1279,line1296,line1317,line1342,line1367,line1390,line1420,line1449,line1478,line1505
! eliminated_buses=1011,1035,1062,1087,1111,1135,1157,1180,1201,1223,1242,1261,1280,1297,1318,1343,1368,1391,1421,1450,1479

New Line._virtual_line1011_line1035_line1062_line1087_line1111_line1135_line1157_line1180_line1201_line1223_line1242_line1261_line1280_line1297_line1318_line1343_line1368_line1391_line1421_line1450_line1479_line1506_line1535_line1563_line1595_line1628_line1662_line1697_line1735_line1774_line1815_line1858 bus1=1859.1.2.3.4 bus2=990.1.2.3.4 phases=4 linecode=LC6 length=24.734082 units=m
! reduced_from=line1011,line1035,line1062,line1087,line1111,line1135,line1157,line1180,line1201,line1223,line1242,line1261,line1280,line1297,line1318,line1343,line1368,line1391,line1421,line1450,line1479,line1506,line1535,line1563,line1595,line1628,line1662,line1697,line1735,line1774,line1815,line1858
! eliminated_buses=1012,1036,1063,1088,1112,1136,1158,1181,1202,1224,1243,1262,1281,1298,1319,1344,1369,1392,1422,1451,1480,1507,1536,1564,1596,1629,1663,1698,1736,1775,1816

New Line._virtual_line1030_line1057_line1082_line1106_line1130_line1152_line1175_line1195_line1217_line1236_line1255_line1274_line1292_line1313 bus1=1314.1.2.3.4 bus2=1010.1.2.3.4 phases=4 linecode=LC9 length=31.02833 units=m
! reduced_from=line1030,line1057,line1082,line1106,line1130,line1152,line1175,line1195,line1217,line1236,line1255,line1274,line1292,line1313
! eliminated_buses=1031,1058,1083,1107,1131,1153,1176,1196,1218,1237,1256,1275,1293

New Line._virtual_line1031_line1058_line1083_line1107_line1131_line1153_line1176_line1197_line1219_line1238_line1257_line1276_line1293_line1314_line1338_line1363_line1386_line1416_line1445_line1474_line1501_line1529 bus1=1530.1.2.3.4 bus2=1010.1.2.3.4 phases=4 linecode=LC6 length=19.79364 units=m
! reduced_from=line1031,line1058,line1083,line1107,line1131,line1153,line1176,line1197,line1219,line1238,line1257,line1276,line1293,line1314,line1338,line1363,line1386,line1416,line1445,line1474,line1501,line1529
! eliminated_buses=1032,1059,1084,1108,1132,1154,1177,1198,1220,1239,1258,1277,1294,1315,1339,1364,1387,1417,1446,1475,1502

New Line._virtual_line1033_line1060_line1085_line1109_line1133_line1155_line1178_line1199_line1221_line1240_line1259_line1278_line1295_line1316_line1340_line1365_line1388_line1418_line1447_line1476_line1503_line1531_line1560_line1592_line1625_line1659_line1694_line1731_line1771_line1813_line1856 bus1=1010.1.2.3.4 bus2=1857.1.2.3.4 phases=4 linecode=LC6 length=31.04342 units=m
! reduced_from=line1033,line1060,line1085,line1109,line1133,line1155,line1178,line1199,line1221,line1240,line1259,line1278,line1295,line1316,line1340,line1365,line1388,line1418,line1447,line1476,line1503,line1531,line1560,line1592,line1625,line1659,line1694,line1731,line1771,line1813,line1856
! eliminated_buses=1034,1061,1086,1110,1134,1156,1179,1200,1222,1241,1260,1279,1296,1317,1341,1366,1389,1419,1448,1477,1504,1532,1561,1593,1626,1660,1695,1732,1772,1814

New Line._virtual_line1039_line1064 bus1=1014.1.2.3.4 bus2=1065.1.2.3.4 phases=4 linecode=LC2 length=5.2489 units=m
! reduced_from=line1039,line1064
! eliminated_buses=1040

New Line._virtual_line1056_line1081_line1105 bus1=1030.1.2.3.4 bus2=1106.1.2.3.4 phases=4 linecode=LC2 length=10.7433 units=m
! reduced_from=line1056,line1081,line1105
! eliminated_buses=1057,1082

New Line._virtual_line1090_line1113_line1137 bus1=1065.1.2.3.4 bus2=1138.1.2.3.4 phases=4 linecode=LC2 length=10.9085 units=m
! reduced_from=line1090,line1113,line1137
! eliminated_buses=1091,1114

New Line._virtual_line1115_line1138_line1159_line1182_line1203_line1224_line1243_line1262_line1281 bus1=1282.1.2.3.4 bus2=1092.1.2.3.4 phases=4 linecode=LC2 length=9.17589 units=m
! reduced_from=line1115,line1138,line1159,line1182,line1203,line1224,line1243,line1262,line1281
! eliminated_buses=1116,1139,1160,1183,1204,1225,1244,1263

New Line._virtual_line1118_line1141_line1163_line1183_line1204_line1225_line1244_line1263_line1282_line1300 bus1=1096.1.2.3.4 bus2=1301.1.2.3.4 phases=4 linecode=LC6 length=2.60482 units=m
! reduced_from=line1118,line1141,line1163,line1183,line1204,line1225,line1244,line1263,line1282,line1300
! eliminated_buses=1119,1142,1164,1184,1205,1226,1245,1264,1283

New Line._virtual_line1119_line1142_line1164_line1184_line1205_line1226_line1245_line1264_line1283_line1301_line1322 bus1=1323.1.2.3.4 bus2=1096.1.2.3.4 phases=4 linecode=LC6 length=1.857318 units=m
! reduced_from=line1119,line1142,line1164,line1184,line1205,line1226,line1245,line1264,line1283,line1301,line1322
! eliminated_buses=1120,1143,1165,1185,1206,1227,1246,1265,1284,1302

New Line._virtual_line1120_line1143 bus1=1096.1.2.3.4 bus2=1144.1.2.3.4 phases=4 linecode=LC9 length=14.39 units=m
! reduced_from=line1120,line1143
! eliminated_buses=1121

New Line._virtual_line1165_line1185_line1206_line1227_line1246_line1265_line1284_line1302_line1323_line1347_line1370 bus1=1144.1.2.3.4 bus2=1371.1.2.3.4 phases=4 linecode=LC6 length=2.331533 units=m
! reduced_from=line1165,line1185,line1206,line1227,line1246,line1265,line1284,line1302,line1323,line1347,line1370
! eliminated_buses=1166,1186,1207,1228,1247,1266,1285,1303,1324,1348

New Line._virtual_line1166_line1186_line1207_line1228_line1247_line1266_line1285_line1303_line1324_line1348_line1371 bus1=1144.1.2.3.4 bus2=1372.1.2.3.4 phases=4 linecode=LC6 length=1.856888 units=m
! reduced_from=line1166,line1186,line1207,line1228,line1247,line1266,line1285,line1303,line1324,line1348,line1371
! eliminated_buses=1167,1187,1208,1229,1248,1267,1286,1304,1325,1349

New Line._virtual_line1167_line1188_line1209_line1230_line1249_line1268_line1287 bus1=1144.1.2.3.4 bus2=1288.1.2.3.4 phases=4 linecode=LC9 length=19.97749 units=m
! reduced_from=line1167,line1188,line1209,line1230,line1249,line1268,line1287
! eliminated_buses=1168,1189,1210,1231,1250,1269

New Line._virtual_line1299_line1319_line1344_line1369_line1392_line1422_line1451 bus1=1452.1.2.3.4 bus2=1282.1.2.3.4 phases=4 linecode=LC2 length=7.4772 units=m
! reduced_from=line1299,line1319,line1344,line1369,line1392,line1422,line1451
! eliminated_buses=1300,1320,1345,1370,1393,1423

New Line._virtual_line1306_line1326_line1350_line1373_line1398_line1424_line1453_line1481_line1508_line1537_line1565_line1597_line1630_line1664_line1699_line1737_line1776_line1816_line1859_line1907_line1950_line1995 bus1=1996.1.2.3.4 bus2=1288.1.2.3.4 phases=4 linecode=LC6 length=6.872665 units=m
! reduced_from=line1306,line1326,line1350,line1373,line1398,line1424,line1453,line1481,line1508,line1537,line1565,line1597,line1630,line1664,line1699,line1737,line1776,line1816,line1859,line1907,line1950,line1995
! eliminated_buses=1307,1327,1351,1374,1399,1425,1454,1482,1509,1538,1566,1598,1631,1665,1700,1738,1777,1817,1860,1908,1951

New Line._virtual_line1307_line1327_line1351_line1374_line1399_line1425_line1454_line1482_line1509_line1538_line1566_line1598_line1631_line1665_line1700_line1738_line1777_line1817_line1860_line1908_line1951_line1996_line2042 bus1=2043.1.2.3.4 bus2=1288.1.2.3.4 phases=4 linecode=LC6 length=9.738213 units=m
! reduced_from=line1307,line1327,line1351,line1374,line1399,line1425,line1454,line1482,line1509,line1538,line1566,line1598,line1631,line1665,line1700,line1738,line1777,line1817,line1860,line1908,line1951,line1996,line2042
! eliminated_buses=1308,1328,1352,1375,1400,1426,1455,1483,1510,1539,1567,1599,1632,1666,1701,1739,1778,1818,1861,1909,1952,1997

New Line._virtual_line1308_line1328_line1352_line1375 bus1=1376.1.2.3.4 bus2=1288.1.2.3.4 phases=4 linecode=LC9 length=23.63561 units=m
! reduced_from=line1308,line1328,line1352,line1375
! eliminated_buses=1309,1329,1353

New Line._virtual_line1334_line1359_line1382_line1412 bus1=1413.1.2.3.4 bus2=1314.1.2.3.4 phases=4 linecode=LC9 length=1.57109 units=m
! reduced_from=line1334,line1359,line1382,line1412
! eliminated_buses=1335,1360,1383

New Line._virtual_line1335_line1360_line1383_line1413_line1442_line1471_line1498_line1526_line1554_line1585_line1618_line1652_line1687 bus1=1314.1.2.3.4 bus2=1688.1.2.3.4 phases=4 linecode=LC6 length=10.90577 units=m
! reduced_from=line1335,line1360,line1383,line1413,line1442,line1471,line1498,line1526,line1554,line1585,line1618,line1652,line1687
! eliminated_buses=1336,1361,1384,1414,1443,1472,1499,1527,1555,1586,1619,1653

New Line._virtual_line1336_line1361_line1384_line1414_line1443_line1472_line1499_line1527_line1555_line1586_line1619_line1653_line1688_line1725_line1765_line1807_line1850_line1896_line1943 bus1=1944.1.2.3.4 bus2=1314.1.2.3.4 phases=4 linecode=LC6 length=21.23958 units=m
! reduced_from=line1336,line1361,line1384,line1414,line1443,line1472,line1499,line1527,line1555,line1586,line1619,line1653,line1688,line1725,line1765,line1807,line1850,line1896,line1943
! eliminated_buses=1337,1362,1385,1415,1444,1473,1500,1528,1556,1587,1620,1654,1689,1726,1766,1808,1851,1897

New Line._virtual_line1337_line1362_line1385_line1415_line1444_line1473_line1500_line1528_line1556_line1587_line1620_line1654_line1689_line1726_line1766_line1808_line1851_line1897_line1944_line1989_line2033_line2082_line2127_line2166_line2203_line2245_line2281_line2311_line2342_line2368_line2394_line2422_line2444_line2464_line2480_line2497_line2511_line2525_line2538_line2551_line2565_line2580_line2596 bus1=1314.1.2.3.4 bus2=2597.1.2.3.4 phases=4 linecode=LC6 length=26.575854 units=m
! reduced_from=line1337,line1362,line1385,line1415,line1444,line1473,line1500,line1528,line1556,line1587,line1620,line1654,line1689,line1726,line1766,line1808,line1851,line1897,line1944,line1989,line2033,line2082,line2127,line2166,line2203,line2245,line2281,line2311,line2342,line2368,line2394,line2422,line2444,line2464,line2480,line2497,line2511,line2525,line2538,line2551,line2565,line2580,line2596
! eliminated_buses=1338,1363,1386,1416,1445,1474,1501,1529,1557,1588,1621,1655,1690,1727,1767,1809,1852,1898,1945,1990,2034,2083,2128,2167,2204,2246,2282,2312,2343,2369,2395,2423,2445,2465,2481,2498,2512,2526,2539,2552,2566,2581

New Line._virtual_line1401_line1427_line1456_line1483_line1510_line1539_line1567_line1599_line1632_line1666_line1701_line1739_line1778_line1818_line1861_line1909_line1952_line1997_line2043_line2088_line2131_line2170_line2207_line2249_line2284_line2314_line2345_line2371_line2398_line2425_line2446 bus1=2447.1.2.3.4 bus2=1376.1.2.3.4 phases=4 linecode=LC6 length=10.119469 units=m
! reduced_from=line1401,line1427,line1456,line1483,line1510,line1539,line1567,line1599,line1632,line1666,line1701,line1739,line1778,line1818,line1861,line1909,line1952,line1997,line2043,line2088,line2131,line2170,line2207,line2249,line2284,line2314,line2345,line2371,line2398,line2425,line2446
! eliminated_buses=1402,1428,1457,1484,1511,1540,1568,1600,1633,1667,1702,1740,1779,1819,1862,1910,1953,1998,2044,2089,2132,2171,2208,2250,2285,2315,2346,2372,2399,2426

New Line._virtual_line1402_line1428_line1457_line1484_line1511_line1540_line1568_line1600_line1633_line1667_line1702_line1740_line1779_line1819_line1862_line1910_line1953_line1998 bus1=1376.1.2.3.4 bus2=1999.1.2.3.4 phases=4 linecode=LC6 length=8.287025 units=m
! reduced_from=line1402,line1428,line1457,line1484,line1511,line1540,line1568,line1600,line1633,line1667,line1702,line1740,line1779,line1819,line1862,line1910,line1953,line1998
! eliminated_buses=1403,1429,1458,1485,1512,1541,1569,1601,1634,1668,1703,1741,1780,1820,1863,1911,1954

New Line._virtual_line1403_line1429_line1458_line1485_line1512_line1541_line1569_line1601_line1634 bus1=1376.1.2.3.4 bus2=1635.1.2.3.4 phases=4 linecode=LC9 length=19.05253 units=m
! reduced_from=line1403,line1429,line1458,line1485,line1512,line1541,line1569,line1601,line1634
! eliminated_buses=1404,1430,1459,1486,1513,1542,1570,1602

New Line._virtual_line1438_line1467_line1494_line1522_line1550_line1581_line1614_line1648_line1683_line1719_line1759_line1801_line1844_line1889_line1936 bus1=1413.1.2.3.4 bus2=1937.1.2.3.4 phases=4 linecode=LC9 length=46.50287 units=m
! reduced_from=line1438,line1467,line1494,line1522,line1550,line1581,line1614,line1648,line1683,line1719,line1759,line1801,line1844,line1889,line1936
! eliminated_buses=1439,1468,1495,1523,1551,1582,1615,1649,1684,1720,1760,1802,1845,1890

New Line._virtual_line1440_line1469_line1496_line1524_line1552_line1583_line1616_line1650_line1685_line1721_line1761_line1803_line1846_line1892_line1939_line1983_line2029_line2078_line2122_line2163_line2200_line2242_line2277_line2307_line2338_line2365_line2391 bus1=1413.1.2.3.4 bus2=2392.1.2.3.4 phases=4 linecode=LC6 length=19.29609 units=m
! reduced_from=line1440,line1469,line1496,line1524,line1552,line1583,line1616,line1650,line1685,line1721,line1761,line1803,line1846,line1892,line1939,line1983,line2029,line2078,line2122,line2163,line2200,line2242,line2277,line2307,line2338,line2365,line2391
! eliminated_buses=1441,1470,1497,1525,1553,1584,1617,1651,1686,1722,1762,1804,1847,1893,1940,1984,2030,2079,2123,2164,2201,2243,2278,2308,2339,2366

New Line._virtual_line1441_line1470_line1497_line1525_line1553_line1584_line1617_line1651_line1686_line1722_line1762_line1804_line1847_line1893_line1940_line1984_line2030_line2079_line2123_line2164_line2201_line2243_line2278_line2308_line2339_line2366_line2392_line2420_line2443 bus1=1413.1.2.3.4 bus2=2444.1.2.3.4 phases=4 linecode=LC6 length=26.55481 units=m
! reduced_from=line1441,line1470,line1497,line1525,line1553,line1584,line1617,line1651,line1686,line1722,line1762,line1804,line1847,line1893,line1940,line1984,line2030,line2079,line2123,line2164,line2201,line2243,line2278,line2308,line2339,line2366,line2392,line2420,line2443
! eliminated_buses=1442,1471,1498,1526,1554,1585,1618,1652,1687,1723,1763,1805,1848,1894,1941,1985,2031,2080,2124,2165,2202,2244,2279,2309,2340,2367,2393,2421

New Line._virtual_line1534_line1562_line1594_line1627_line1661_line1696 bus1=1697.1.2.3.4 bus2=1506.1.2.3.4 phases=4 linecode=LC6 length=3.45735 units=m
! reduced_from=line1534,line1562,line1594,line1627,line1661,line1696
! eliminated_buses=1535,1563,1595,1628,1662

New Line._virtual_line1557_line1588_line1621_line1655_line1690_line1727_line1767_line1809_line1852_line1898_line1945_line1990 bus1=1991.1.2.3.4 bus2=1530.1.2.3.4 phases=4 linecode=LC6 length=14.27015 units=m
! reduced_from=line1557,line1588,line1621,line1655,line1690,line1727,line1767,line1809,line1852,line1898,line1945,line1990
! eliminated_buses=1558,1589,1622,1656,1691,1728,1768,1810,1853,1899,1946

New Line._virtual_line1558_line1590_line1623_line1657_line1692_line1729_line1769_line1811_line1854_line1900 bus1=1530.1.2.3.4 bus2=1901.1.2.3.4 phases=4 linecode=LC6 length=27.64836 units=m
! reduced_from=line1558,line1590,line1623,line1657,line1692,line1729,line1769,line1811,line1854,line1900
! eliminated_buses=1559,1591,1624,1658,1693,1730,1770,1812,1855

New Line._virtual_line1668_line1703_line1741_line1780_line1820_line1863_line1911_line1954_line1999_line2046_line2090_line2133_line2172_line2209_line2251_line2286_line2316_line2347_line2373_line2400_line2426_line2447_line2466_line2482_line2499_line2513_line2527_line2540_line2553_line2567 bus1=1635.1.2.3.4 bus2=2568.1.2.3.4 phases=4 linecode=LC6 length=6.688311 units=m
! reduced_from=line1668,line1703,line1741,line1780,line1820,line1863,line1911,line1954,line1999,line2046,line2090,line2133,line2172,line2209,line2251,line2286,line2316,line2347,line2373,line2400,line2426,line2447,line2466,line2482,line2499,line2513,line2527,line2540,line2553,line2567
! eliminated_buses=1669,1704,1742,1781,1821,1864,1912,1955,2000,2047,2091,2134,2173,2210,2252,2287,2317,2348,2374,2401,2427,2448,2467,2483,2500,2514,2528,2541,2554

New Line._virtual_line1669_line1704_line1742_line1781_line1821_line1864_line1912_line1955_line2000_line2047_line2091_line2134_line2173_line2210_line2252_line2287_line2317_line2348_line2374_line2401_line2427_line2448_line2467 bus1=2468.1.2.3.4 bus2=1635.1.2.3.4 phases=4 linecode=LC6 length=6.281993 units=m
! reduced_from=line1669,line1704,line1742,line1781,line1821,line1864,line1912,line1955,line2000,line2047,line2091,line2134,line2173,line2210,line2252,line2287,line2317,line2348,line2374,line2401,line2427,line2448,line2467
! eliminated_buses=1670,1705,1743,1782,1822,1865,1913,1956,2001,2048,2092,2135,2174,2211,2253,2288,2318,2349,2375,2402,2428,2449

New Line._virtual_line1670_line1705_line1745 bus1=1746.1.2.3.4 bus2=1635.1.2.3.4 phases=4 linecode=LC9 length=14.2294 units=m
! reduced_from=line1670,line1705,line1745
! eliminated_buses=1671,1706

New Line._virtual_line1723_line1763_line1805_line1848_line1894_line1941_line1985_line2031_line2080_line2124_line2165_line2202_line2244 bus1=2245.1.2.3.4 bus2=1688.1.2.3.4 phases=4 linecode=LC6 length=10.553096 units=m
! reduced_from=line1723,line1763,line1805,line1848,line1894,line1941,line1985,line2031,line2080,line2124,line2165,line2202,line2244
! eliminated_buses=1724,1764,1806,1849,1895,1942,1986,2032,2081,2125,2166,2203

New Line._virtual_line1724_line1764_line1806_line1849_line1895_line1942_line1986_line2032_line2081 bus1=2082.1.2.3.4 bus2=1688.1.2.3.4 phases=4 linecode=LC6 length=3.2474 units=m
! reduced_from=line1724,line1764,line1806,line1849,line1895,line1942,line1986,line2032,line2081
! eliminated_buses=1725,1765,1807,1850,1896,1943,1987,2033

New Line._virtual_line1734_line1773 bus1=1774.1.2.3.4 bus2=1697.1.2.3.4 phases=4 linecode=LC6 length=9.0396 units=m
! reduced_from=line1734,line1773
! eliminated_buses=1735

New Line._virtual_line1784_line1824_line1867_line1915_line1958_line2003_line2050_line2094_line2137_line2176_line2213_line2255_line2289_line2319_line2350_line2376_line2403_line2429_line2450_line2469_line2486_line2501_line2515_line2529_line2541_line2554_line2568_line2584_line2598_line2613 bus1=2614.1.2.3.4 bus2=1746.1.2.3.4 phases=4 linecode=LC6 length=10.483402 units=m
! reduced_from=line1784,line1824,line1867,line1915,line1958,line2003,line2050,line2094,line2137,line2176,line2213,line2255,line2289,line2319,line2350,line2376,line2403,line2429,line2450,line2469,line2486,line2501,line2515,line2529,line2541,line2554,line2568,line2584,line2598,line2613
! eliminated_buses=1785,1825,1868,1916,1959,2004,2051,2095,2138,2177,2214,2256,2290,2320,2351,2377,2404,2430,2451,2470,2487,2502,2516,2530,2542,2555,2569,2585,2599

New Line._virtual_line1785_line1825_line1868_line1916_line1959_line2004_line2051_line2095_line2138_line2177_line2214_line2256_line2290_line2320_line2351_line2377_line2404_line2430_line2451_line2470_line2487_line2502_line2516_line2530_line2542_line2555_line2569_line2585_line2599_line2614_line2627_line2639_line2651_line2662 bus1=1746.1.2.3.4 bus2=2663.1.2.3.4 phases=4 linecode=LC6 length=9.700222 units=m
! reduced_from=line1785,line1825,line1868,line1916,line1959,line2004,line2051,line2095,line2138,line2177,line2214,line2256,line2290,line2320,line2351,line2377,line2404,line2430,line2451,line2470,line2487,line2502,line2516,line2530,line2542,line2555,line2569,line2585,line2599,line2614,line2627,line2639,line2651,line2662
! eliminated_buses=1786,1826,1869,1917,1960,2005,2052,2096,2139,2178,2215,2257,2291,2321,2352,2378,2405,2431,2452,2471,2488,2503,2517,2531,2543,2556,2570,2586,2600,2615,2628,2640,2652

New Line._virtual_line1826_line1869_line1917_line1960_line2005_line2052_line2096_line2139_line2178_line2215_line2257_line2291_line2321_line2353_line2379_line2406_line2432_line2454_line2473_line2490_line2505_line2519_line2533_line2545_line2557_line2571_line2587 bus1=1787.1.2.3.4 bus2=2588.1.2.3.4 phases=4 linecode=LC2 length=19.002313 units=m
! reduced_from=line1826,line1869,line1917,line1960,line2005,line2052,line2096,line2139,line2178,line2215,line2257,line2291,line2321,line2353,line2379,line2406,line2432,line2454,line2473,line2490,line2505,line2519,line2533,line2545,line2557,line2571,line2587
! eliminated_buses=1827,1870,1918,1961,2006,2053,2097,2140,2179,2216,2258,2292,2322,2354,2380,2407,2433,2455,2474,2491,2506,2520,2534,2546,2558,2572

New Line._virtual_line1827_line1870_line1918_line1961_line2006_line2053_line2097_line2140_line2179_line2216_line2258_line2292_line2322_line2354_line2380 bus1=2381.1.2.3.4 bus2=1787.1.2.3.4 phases=4 linecode=LC6 length=12.542892 units=m
! reduced_from=line1827,line1870,line1918,line1961,line2006,line2053,line2097,line2140,line2179,line2216,line2258,line2292,line2322,line2354,line2380
! eliminated_buses=1828,1871,1919,1962,2007,2054,2098,2141,2180,2217,2259,2293,2323,2355

New Line._virtual_line1906_line1949_line1994_line2039_line2086_line2129_line2168_line2205_line2247_line2282_line2312_line2343_line2369 bus1=2370.1.2.3.4 bus2=1859.1.2.3.4 phases=4 linecode=LC6 length=6.79848 units=m
! reduced_from=line1906,line1949,line1994,line2039,line2086,line2129,line2168,line2205,line2247,line2282,line2312,line2343,line2369
! eliminated_buses=1907,1950,1995,2040,2087,2130,2169,2206,2248,2283,2313,2344

New Line._virtual_line1977_line2023_line2070_line2113_line2155_line2193 bus1=2194.1.2.3.4 bus2=1937.1.2.3.4 phases=4 linecode=LC9 length=13.30951 units=m
! reduced_from=line1977,line2023,line2070,line2113,line2155,line2193
! eliminated_buses=1978,2024,2071,2114,2156

New Line._virtual_line1978_line2024_line2071_line2114 bus1=1937.1.2.3.4 bus2=2115.1.2.3.4 phases=4 linecode=LC6 length=17.79989 units=m
! reduced_from=line1978,line2024,line2071,line2114
! eliminated_buses=1979,2025,2072

New Line._virtual_line1979_line2025_line2072 bus1=2073.1.2.3.4 bus2=1937.1.2.3.4 phases=4 linecode=LC6 length=10.44818 units=m
! reduced_from=line1979,line2025,line2072
! eliminated_buses=1980,2026

New Line._virtual_line1980_line2026_line2073_line2117_line2158_line2195 bus1=2196.1.2.3.4 bus2=1937.1.2.3.4 phases=4 linecode=LC6 length=11.81886 units=m
! reduced_from=line1980,line2026,line2073,line2117,line2158,line2195
! eliminated_buses=1981,2027,2074,2118,2159

New Line._virtual_line2041_line2087_line2130_line2169_line2206_line2248_line2283_line2313_line2344_line2370_line2397_line2424 bus1=1996.1.2.3.4 bus2=2425.1.2.3.4 phases=4 linecode=LC6 length=5.913378 units=m
! reduced_from=line2041,line2087,line2130,line2169,line2206,line2248,line2283,line2313,line2344,line2370,line2397,line2424
! eliminated_buses=2042,2088,2131,2170,2207,2249,2284,2314,2345,2371,2398

New Line._virtual_line2045_line2089_line2132_line2171_line2208_line2250_line2285_line2315_line2346_line2372_line2399 bus1=2400.1.2.3.4 bus2=1999.1.2.3.4 phases=4 linecode=LC6 length=7.09656 units=m
! reduced_from=line2045,line2089,line2132,line2171,line2208,line2250,line2285,line2315,line2346,line2372,line2399
! eliminated_buses=2046,2090,2133,2172,2209,2251,2286,2316,2347,2373

New Line._virtual_line2157_line2194_line2231_line2273_line2305_line2336 bus1=2337.1.2.3.4 bus2=2115.1.2.3.4 phases=4 linecode=LC6 length=9.2523 units=m
! reduced_from=line2157,line2194,line2231,line2273,line2305,line2336
! eliminated_buses=2158,2195,2232,2274,2306

New Line._virtual_line2230_line2272_line2304 bus1=2194.1.2.3.4 bus2=2305.1.2.3.4 phases=4 linecode=LC9 length=2.5892 units=m
! reduced_from=line2230,line2272,line2304
! eliminated_buses=2231,2273

New Line._virtual_line2335_line2364_line2390_line2417_line2442_line2461_line2479_line2496_line2510_line2524_line2537_line2549 bus1=2305.1.2.3.4 bus2=2550.1.2.3.4 phases=4 linecode=LC9 length=23.85802 units=m
! reduced_from=line2335,line2364,line2390,line2417,line2442,line2461,line2479,line2496,line2510,line2524,line2537,line2549
! eliminated_buses=2336,2365,2391,2418,2443,2462,2480,2497,2511,2525,2538

New Line._virtual_line2396_line2423_line2445_line2465_line2481_line2498_line2512_line2526_line2539_line2552_line2566_line2581_line2597_line2612_line2624_line2638_line2650_line2661_line2671_line2682_line2689_line2696_line2703_line2710_line2715_line2720_line2724_line2728_line2732_line2735_line2738_line2739_line2740_line2741_line2742_line2743_line2744_line2745_line2746_line2747_line2748_line2749_line2750_line2751 bus1=2752.1.2.3.4 bus2=2370.1.2.3.4 phases=4 linecode=LC6 length=20.416745 units=m
! reduced_from=line2396,line2423,line2445,line2465,line2481,line2498,line2512,line2526,line2539,line2552,line2566,line2581,line2597,line2612,line2624,line2638,line2650,line2661,line2671,line2682,line2689,line2696,line2703,line2710,line2715,line2720,line2724,line2728,line2732,line2735,line2738,line2739,line2740,line2741,line2742,line2743,line2744,line2745,line2746,line2747,line2748,line2749,line2750,line2751
! eliminated_buses=2397,2424,2446,2466,2482,2499,2513,2527,2540,2553,2567,2582,2598,2613,2625,2639,2651,2662,2672,2683,2690,2697,2704,2711,2716,2721,2725,2729,2733,2736,2739,2740,2741,2742,2743,2744,2745,2746,2747,2748,2749,2750,2751

New Line._virtual_line2407_line2433_line2455_line2474_line2491_line2506_line2520_line2534_line2546_line2558_line2572_line2588_line2601_line2616_line2629 bus1=2381.1.2.3.4 bus2=2630.1.2.3.4 phases=4 linecode=LC6 length=3.57647 units=m
! reduced_from=line2407,line2433,line2455,line2474,line2491,line2506,line2520,line2534,line2546,line2558,line2572,line2588,line2601,line2616,line2629
! eliminated_buses=2408,2434,2456,2475,2492,2507,2521,2535,2547,2559,2573,2589,2602,2617

New Line._virtual_line2408_line2434_line2456_line2475_line2492_line2507_line2521_line2535_line2547_line2559_line2573_line2589 bus1=2381.1.2.3.4 bus2=2590.1.2.3.4 phases=4 linecode=LC6 length=15.452212 units=m
! reduced_from=line2408,line2434,line2456,line2475,line2492,line2507,line2521,line2535,line2547,line2559,line2573,line2589
! eliminated_buses=2409,2435,2457,2476,2493,2508,2522,2536,2548,2560,2574

New Line._virtual_line2562_line2577_line2593_line2607_line2621_line2635_line2648_line2659_line2669 bus1=2670.1.2.3.4 bus2=2550.1.2.3.4 phases=4 linecode=LC6 length=4.81226 units=m
! reduced_from=line2562,line2577,line2593,line2607,line2621,line2635,line2648,line2659,line2669
! eliminated_buses=2563,2578,2594,2608,2622,2636,2649,2660

New Line._virtual_line2563_line2578_line2594_line2608_line2622_line2636 bus1=2550.1.2.3.4 bus2=2637.1.2.3.4 phases=4 linecode=LC6 length=10.54823 units=m
! reduced_from=line2563,line2578,line2594,line2608,line2622,line2636
! eliminated_buses=2564,2579,2595,2609,2623

New Line._virtual_line2575_line2591_line2605_line2619_line2632_line2645_line2656_line2666_line2676_line2685_line2692_line2699 bus1=2700.1.2.3.4 bus2=2562.1.2.3.4 phases=4 linecode=LC2 length=5.49766 units=m
! reduced_from=line2575,line2591,line2605,line2619,line2632,line2645,line2656,line2666,line2676,line2685,line2692,line2699
! eliminated_buses=2576,2592,2606,2620,2633,2646,2657,2667,2677,2686,2693

New Line._virtual_line2576_line2592_line2606_line2620_line2634_line2647_line2658_line2668_line2678_line2687_line2694_line2701 bus1=2562.1.2.3.4 bus2=2702.1.2.3.4 phases=4 linecode=LC2 length=16.11389 units=m
! reduced_from=line2576,line2592,line2606,line2620,line2634,line2647,line2658,line2668,line2678,line2687,line2694,line2701
! eliminated_buses=2577,2593,2607,2621,2635,2648,2659,2669,2679,2688,2695

New Line._virtual_line2603_line2617_line2630_line2643_line2654_line2665 bus1=2666.1.2.3.4 bus2=2590.1.2.3.4 phases=4 linecode=LC6 length=8.61131 units=m
! reduced_from=line2603,line2617,line2630,line2643,line2654,line2665
! eliminated_buses=2604,2618,2631,2644,2655

New Line._virtual_line2642_line2653_line2664_line2675_line2684_line2691_line2698_line2705 bus1=2706.1.2.3.4 bus2=2630.1.2.3.4 phases=4 linecode=LC6 length=6.40476 units=m
! reduced_from=line2642,line2653,line2664,line2675,line2684,line2691,line2698,line2705
! eliminated_buses=2643,2654,2665,2676,2685,2692,2699

New Line._virtual_line2680_line2688_line2695_line2702_line2709_line2714 bus1=2715.1.2.3.4 bus2=2670.1.2.3.4 phases=4 linecode=LC6 length=6.46115 units=m
! reduced_from=line2680,line2688,line2695,line2702,line2709,line2714
! eliminated_buses=2681,2689,2696,2703,2710

New Line._virtual_line2707_line2712_line2716_line2721_line2725 bus1=2700.1.2.3.4 bus2=2726.1.2.3.4 phases=4 linecode=LC2 length=5.2332 units=m
! reduced_from=line2707,line2712,line2716,line2721,line2725
! eliminated_buses=2708,2713,2717,2722

New Line._virtual_line2719_line2723_line2727 bus1=2728.1.2.3.4 bus2=2715.1.2.3.4 phases=4 linecode=LC6 length=7.0203 units=m
! reduced_from=line2719,line2723,line2727
! eliminated_buses=2720,2724

New Line._virtual_line2730_line2733_line2736 bus1=2737.1.2.3.4 bus2=2726.1.2.3.4 phases=4 linecode=LC2 length=10.2369 units=m
! reduced_from=line2730,line2733,line2736
! eliminated_buses=2731,2734

New Line.LINE197 bus1=189.1.2.3.4 bus2=198.1.2.3.4 phases=4 linecode=LC9 length=13.3327 units=m

New Line.LINE251 bus1=239.1.2.3.4 bus2=252.1.2.3.4 phases=4 linecode=LC1 length=5.6022 units=m

New Line.LINE309 bus1=296.1.2.3.4 bus2=310.1.2.3.4 phases=4 linecode=LC1 length=5.8062 units=m

New Line.LINE325 bus1=312.1.2.3.4 bus2=326.1.2.3.4 phases=4 linecode=LC6 length=6.1592 units=m

New Line.LINE382 bus1=369.1.2.3.4 bus2=383.1.2.3.4 phases=4 linecode=LC1 length=5.4624 units=m

New Line.LINE413 bus1=400.1.2.3.4 bus2=414.1.2.3.4 phases=4 linecode=LC6 length=6.8364 units=m

New Line.LINE424 bus1=410.1.2.3.4 bus2=425.1.2.3.4 phases=4 linecode=LC1 length=5.8398 units=m

New Line.LINE429 bus1=415.1.2.3.4 bus2=430.1.2.3.4 phases=4 linecode=LC6 length=6.7368 units=m

New Line.LINE441 bus1=427.1.2.3.4 bus2=442.1.2.3.4 phases=4 linecode=LC6 length=6.1468 units=m

New Line.LINE695 bus1=674.1.2.3.4 bus2=696.1.2.3.4 phases=4 linecode=LC1 length=6.0198 units=m

New Line.LINE714 bus1=697.1.2.3.4 bus2=715.1.2.3.4 phases=4 linecode=LC1 length=6.0907 units=m

New Line.LINE891 bus1=873.1.2.3.4 bus2=892.1.2.3.4 phases=4 linecode=LC9 length=7.9378 units=m

New Line.LINE920 bus1=899.1.2.3.4 bus2=921.1.2.3.4 phases=4 linecode=LC2 length=7.8209 units=m

New Line.LINE924 bus1=902.1.2.3.4 bus2=925.1.2.3.4 phases=4 linecode=LC2 length=7.9971 units=m

New Line.LINE1009 bus1=990.1.2.3.4 bus2=1010.1.2.3.4 phases=4 linecode=LC9 length=1.402 units=m

New Line.LINE1038 bus1=1014.1.2.3.4 bus2=1039.1.2.3.4 phases=4 linecode=LC2 length=5.599 units=m

New Line.LINE1055 bus1=1030.1.2.3.4 bus2=1056.1.2.3.4 phases=4 linecode=LC2 length=5.0398 units=m

New Line.LINE1070 bus1=1046.1.2.3.4 bus2=1071.1.2.3.4 phases=4 linecode=LC6 length=6.4518 units=m

New Line.LINE1071 bus1=1046.1.2.3.4 bus2=1072.1.2.3.4 phases=4 linecode=LC6 length=6.4518 units=m

New Line.LINE1089 bus1=1065.1.2.3.4 bus2=1090.1.2.3.4 phases=4 linecode=LC2 length=4.6954 units=m

New Line.LINE1114 bus1=1092.1.2.3.4 bus2=1115.1.2.3.4 phases=4 linecode=LC2 length=6.2649 units=m

New Line.LINE1161 bus1=1141.1.2.3.4 bus2=1162.1.2.3.4 phases=4 linecode=LC6 length=6.0961 units=m

New Line.LINE1162 bus1=1141.1.2.3.4 bus2=1163.1.2.3.4 phases=4 linecode=LC6 length=6.0961 units=m

New Line.LINE1212 bus1=1192.1.2.3.4 bus2=1213.1.2.3.4 phases=4 linecode=LC6 length=5.8428 units=m

New Line.LINE1213 bus1=1192.1.2.3.4 bus2=1214.1.2.3.4 phases=4 linecode=LC6 length=5.8428 units=m

New Line.LINE1270 bus1=1252.1.2.3.4 bus2=1271.1.2.3.4 phases=4 linecode=LC6 length=7.6267 units=m

New Line.LINE1271 bus1=1252.1.2.3.4 bus2=1272.1.2.3.4 phases=4 linecode=LC6 length=7.6267 units=m

New Line.LINE1298 bus1=1282.1.2.3.4 bus2=1299.1.2.3.4 phases=4 linecode=LC2 length=6.7479 units=m

New Line.LINE1320 bus1=1301.1.2.3.4 bus2=1321.1.2.3.4 phases=4 linecode=LC6 length=8.6331 units=m

New Line.LINE1321 bus1=1301.1.2.3.4 bus2=1322.1.2.3.4 phases=4 linecode=LC6 length=8.6331 units=m

New Line.LINE1345 bus1=1323.1.2.3.4 bus2=1346.1.2.3.4 phases=4 linecode=LC6 length=8.9155 units=m

New Line.LINE1346 bus1=1323.1.2.3.4 bus2=1347.1.2.3.4 phases=4 linecode=LC6 length=8.9155 units=m

New Line.LINE1393 bus1=1371.1.2.3.4 bus2=1394.1.2.3.4 phases=4 linecode=LC6 length=8.9448 units=m

New Line.LINE1394 bus1=1371.1.2.3.4 bus2=1395.1.2.3.4 phases=4 linecode=LC6 length=8.9448 units=m

New Line.LINE1395 bus1=1372.1.2.3.4 bus2=1396.1.2.3.4 phases=4 linecode=LC6 length=9.1733 units=m

New Line.LINE1396 bus1=1372.1.2.3.4 bus2=1397.1.2.3.4 phases=4 linecode=LC6 length=9.1733 units=m

New Line.LINE1533 bus1=1506.1.2.3.4 bus2=1534.1.2.3.4 phases=4 linecode=LC6 length=3.1274 units=m

New Line.LINE1733 bus1=1697.1.2.3.4 bus2=1734.1.2.3.4 phases=4 linecode=LC6 length=4.0811 units=m

New Line.LINE1786 bus1=1746.1.2.3.4 bus2=1787.1.2.3.4 phases=4 linecode=LC9 length=4.8928 units=m

New Line.LINE1902 bus1=1857.1.2.3.4 bus2=1903.1.2.3.4 phases=4 linecode=LC6 length=8.0634 units=m

New Line.LINE1903 bus1=1857.1.2.3.4 bus2=1904.1.2.3.4 phases=4 linecode=LC6 length=8.0634 units=m

New Line.LINE1905 bus1=1859.1.2.3.4 bus2=1906.1.2.3.4 phases=4 linecode=LC6 length=5.0708 units=m

New Line.LINE1987 bus1=1944.1.2.3.4 bus2=1988.1.2.3.4 phases=4 linecode=LC6 length=0.30615 units=m

New Line.LINE1988 bus1=1944.1.2.3.4 bus2=1989.1.2.3.4 phases=4 linecode=LC6 length=0.30615 units=m

New Line.LINE2034 bus1=1991.1.2.3.4 bus2=2035.1.2.3.4 phases=4 linecode=LC6 length=8.9305 units=m

New Line.LINE2035 bus1=1991.1.2.3.4 bus2=2036.1.2.3.4 phases=4 linecode=LC6 length=8.9305 units=m

New Line.LINE2040 bus1=1996.1.2.3.4 bus2=2041.1.2.3.4 phases=4 linecode=LC6 length=1.9121 units=m

New Line.LINE2044 bus1=1999.1.2.3.4 bus2=2045.1.2.3.4 phases=4 linecode=LC6 length=2.229 units=m

New Line.LINE2112 bus1=2069.1.2.3.4 bus2=2113.1.2.3.4 phases=4 linecode=LC1 length=0.49729 units=m

New Line.LINE2115 bus1=2073.1.2.3.4 bus2=2116.1.2.3.4 phases=4 linecode=LC6 length=8.708 units=m

New Line.LINE2116 bus1=2073.1.2.3.4 bus2=2117.1.2.3.4 phases=4 linecode=LC6 length=8.708 units=m

New Line.LINE2125 bus1=2082.1.2.3.4 bus2=2126.1.2.3.4 phases=4 linecode=LC6 length=0.69516 units=m

New Line.LINE2126 bus1=2082.1.2.3.4 bus2=2127.1.2.3.4 phases=4 linecode=LC6 length=0.69516 units=m

New Line.LINE2156 bus1=2115.1.2.3.4 bus2=2157.1.2.3.4 phases=4 linecode=LC6 length=3.4451 units=m

New Line.LINE2229 bus1=2194.1.2.3.4 bus2=2230.1.2.3.4 phases=4 linecode=LC1 length=13.2039 units=m

New Line.LINE2232 bus1=2196.1.2.3.4 bus2=2233.1.2.3.4 phases=4 linecode=LC6 length=16.2162 units=m

New Line.LINE2233 bus1=2196.1.2.3.4 bus2=2234.1.2.3.4 phases=4 linecode=LC6 length=16.2162 units=m

New Line.LINE2234 bus1=2196.1.2.3.4 bus2=2235.1.2.3.4 phases=4 linecode=LC6 length=8.6217 units=m

New Line.LINE2235 bus1=2196.1.2.3.4 bus2=2236.1.2.3.4 phases=4 linecode=LC6 length=8.6217 units=m

New Line.LINE2236 bus1=2196.1.2.3.4 bus2=2237.1.2.3.4 phases=4 linecode=LC6 length=8.6564 units=m

New Line.LINE2237 bus1=2196.1.2.3.4 bus2=2238.1.2.3.4 phases=4 linecode=LC6 length=8.6564 units=m

New Line.LINE2280 bus1=2245.1.2.3.4 bus2=2281.1.2.3.4 phases=4 linecode=LC6 length=8.8099 units=m

New Line.LINE2334 bus1=2305.1.2.3.4 bus2=2335.1.2.3.4 phases=4 linecode=LC1 length=12.256 units=m

New Line.LINE2395 bus1=2370.1.2.3.4 bus2=2396.1.2.3.4 phases=4 linecode=LC6 length=4.0318 units=m

New Line.LINE2418 bus1=2392.1.2.3.4 bus2=2419.1.2.3.4 phases=4 linecode=LC6 length=8.3343 units=m

New Line.LINE2419 bus1=2392.1.2.3.4 bus2=2420.1.2.3.4 phases=4 linecode=LC6 length=8.3343 units=m

New Line.LINE2462 bus1=2444.1.2.3.4 bus2=2463.1.2.3.4 phases=4 linecode=LC6 length=8.5406 units=m

New Line.LINE2463 bus1=2444.1.2.3.4 bus2=2464.1.2.3.4 phases=4 linecode=LC6 length=8.5406 units=m

New Line.LINE2483 bus1=2468.1.2.3.4 bus2=2484.1.2.3.4 phases=4 linecode=LC6 length=7.2585 units=m

New Line.LINE2484 bus1=2468.1.2.3.4 bus2=2485.1.2.3.4 phases=4 linecode=LC6 length=7.2585 units=m

New Line.LINE2561 bus1=2550.1.2.3.4 bus2=2562.1.2.3.4 phases=4 linecode=LC9 length=10.6151 units=m

New Line.LINE2582 bus1=2568.1.2.3.4 bus2=2583.1.2.3.4 phases=4 linecode=LC6 length=8.9696 units=m

New Line.LINE2583 bus1=2568.1.2.3.4 bus2=2584.1.2.3.4 phases=4 linecode=LC6 length=8.9696 units=m

New Line.LINE2602 bus1=2590.1.2.3.4 bus2=2603.1.2.3.4 phases=4 linecode=LC2 length=5.3073 units=m

New Line.LINE2610 bus1=2597.1.2.3.4 bus2=2611.1.2.3.4 phases=4 linecode=LC6 length=1.2422 units=m

New Line.LINE2611 bus1=2597.1.2.3.4 bus2=2612.1.2.3.4 phases=4 linecode=LC6 length=1.2422 units=m

New Line.LINE2625 bus1=2614.1.2.3.4 bus2=2626.1.2.3.4 phases=4 linecode=LC6 length=7.9912 units=m

New Line.LINE2626 bus1=2614.1.2.3.4 bus2=2627.1.2.3.4 phases=4 linecode=LC6 length=7.9912 units=m

New Line.LINE2641 bus1=2630.1.2.3.4 bus2=2642.1.2.3.4 phases=4 linecode=LC6 length=6.2068 units=m

New Line.LINE2672 bus1=2663.1.2.3.4 bus2=2673.1.2.3.4 phases=4 linecode=LC6 length=7.6657 units=m

New Line.LINE2673 bus1=2663.1.2.3.4 bus2=2674.1.2.3.4 phases=4 linecode=LC6 length=7.6657 units=m

New Line.LINE2679 bus1=2670.1.2.3.4 bus2=2680.1.2.3.4 phases=4 linecode=LC6 length=1.5597 units=m

New Line.LINE2706 bus1=2700.1.2.3.4 bus2=2707.1.2.3.4 phases=4 linecode=LC2 length=2.9261 units=m

New Line.LINE2718 bus1=2715.1.2.3.4 bus2=2719.1.2.3.4 phases=4 linecode=LC6 length=1.1482 units=m

New Line.LINE2729 bus1=2726.1.2.3.4 bus2=2730.1.2.3.4 phases=4 linecode=LC2 length=2.4132 units=m
