! Reduced enabled lines.

New Line._virtual_line0_line1_line2_line3_line4_line5_line6_line7_line8_line9_line10_line11_line12_line13_line14_line15_line16_line17_line19_line24_line29_line34_line39_line44_line49_line55 bus1=56.1.2.3.4 bus2=sourcebus.1.2.3.4 phases=4 linecode=LC8 length=57.385804 units=m
! reduced_from=line0,line1,line2,line3,line4,line5,line6,line7,line8,line9,line10,line11,line12,line13,line14,line15,line16,line17,line19,line24,line29,line34,line39,line44,line49,line55
! eliminated_buses=1,2,3,4,5,6,7,8,9,10,11,12,13,14,15,16,17,18,20,25,30,35,40,45,50

New Line._virtual_line61_line68_line76_line84_line92_line98_line103_line107_line111_line115_line121 bus1=122.1.2.3.4 bus2=56.1.2.3.4 phases=4 linecode=LC2 length=11.273083 units=m
! reduced_from=line61,line68,line76,line84,line92,line98,line103,line107,line111,line115,line121
! eliminated_buses=62,69,77,85,93,99,104,108,112,116

New Line._virtual_line69_line77_line85_line93_line99_line104_line108_line112_line116_line122_line127 bus1=63.1.2.3.4 bus2=128.1.2.3.4 phases=4 linecode=LC2 length=11.65177 units=m
! reduced_from=line69,line77,line85,line93,line99,line104,line108,line112,line116,line122,line127
! eliminated_buses=70,78,86,94,100,105,109,113,117,123

New Line._virtual_line70_line78_line86_line94_line100_line105_line109_line113 bus1=114.1.2.3.4 bus2=63.1.2.3.4 phases=4 linecode=LC8 length=19.27948 units=m
! reduced_from=line70,line78,line86,line94,line100,line105,line109,line113
! eliminated_buses=71,79,87,95,101,106,110

New Line._virtual_line117_line123 bus1=114.1.2.3.4 bus2=124.1.2.3.4 phases=4 linecode=LC8 length=6.1684 units=m
! reduced_from=line117,line123
! eliminated_buses=118

New Line._virtual_line118_line124_line130_line134_line138_line142_line145_line148_line152_line156_line160_line164_line168_line172_line176_line180_line184_line188_line192_line196_line201_line207_line214_line223 bus1=114.1.2.3.4 bus2=224.1.2.3.4 phases=4 linecode=LC2 length=5.06619 units=m
! reduced_from=line118,line124,line130,line134,line138,line142,line145,line148,line152,line156,line160,line164,line168,line172,line176,line180,line184,line188,line192,line196,line201,line207,line214,line223
! eliminated_buses=119,125,131,135,139,143,146,149,153,157,161,165,169,173,177,181,185,189,193,197,202,208,215

New Line._virtual_line119_line125_line131_line135_line139_line143_line146_line149_line153_line157_line161_line165_line169_line173_line177_line181_line185_line189_line193_line197_line202_line208_line215_line224_line235_line247_line260_line274_line290_line305_line320_line336_line351_line366_line380_line394_line408_line423_line441_line462_line481_line500_line519_line539_line561_line580_line599_line617_line636_line655 bus1=114.1.2.3.4 bus2=656.1.2.3.4 phases=4 linecode=LC2 length=23.775955 units=m
! reduced_from=line119,line125,line131,line135,line139,line143,line146,line149,line153,line157,line161,line165,line169,line173,line177,line181,line185,line189,line193,line197,line202,line208,line215,line224,line235,line247,line260,line274,line290,line305,line320,line336,line351,line366,line380,line394,line408,line423,line441,line462,line481,line500,line519,line539,line561,line580,line599,line617,line636,line655
! eliminated_buses=120,126,132,136,140,144,147,150,154,158,162,166,170,174,178,182,186,190,194,198,203,209,216,225,236,248,261,275,291,306,321,337,352,367,381,395,409,424,442,463,482,501,520,540,562,581,600,618,637

New Line._virtual_line129_line133_line137_line141_line144_line147 bus1=148.1.2.3.4 bus2=124.1.2.3.4 phases=4 linecode=LC8 length=11.28762 units=m
! reduced_from=line129,line133,line137,line141,line144,line147
! eliminated_buses=130,134,138,142,145

New Line._virtual_line150_line154_line158_line162_line166_line170_line174_line178_line182_line186_line190_line194_line198_line203_line209_line216_line225_line237_line250_line264_line279_line295_line311_line327_line343_line359_line375_line389_line403_line417 bus1=418.1.2.3.4 bus2=148.1.2.3.4 phases=4 linecode=LC8 length=50.738449 units=m
! reduced_from=line150,line154,line158,line162,line166,line170,line174,line178,line182,line186,line190,line194,line198,line203,line209,line216,line225,line237,line250,line264,line279,line295,line311,line327,line343,line359,line375,line389,line403,line417
! eliminated_buses=151,155,159,163,167,171,175,179,183,187,191,195,199,204,210,217,226,238,251,265,280,296,312,328,344,360,376,390,404

New Line._virtual_line151_line155_line159_line163_line167_line171_line175_line179_line183_line187_line191_line195_line199_line204_line210_line218_line228_line241_line255_line269_line285_line301_line316_line332_line347_line363_line377_line391_line405_line420_line438_line459_line478 bus1=148.1.2.3.4 bus2=479.1.2.3.4 phases=4 linecode=LC8 length=64.16382 units=m
! reduced_from=line151,line155,line159,line163,line167,line171,line175,line179,line183,line187,line191,line195,line199,line204,line210,line218,line228,line241,line255,line269,line285,line301,line316,line332,line347,line363,line377,line391,line405,line420,line438,line459,line478
! eliminated_buses=152,156,160,164,168,172,176,180,184,188,192,196,200,205,211,219,229,242,256,270,286,302,317,333,348,364,378,392,406,421,439,460

New Line._virtual_line233_line246 bus1=247.1.2.3.4 bus2=224.1.2.3.4 phases=4 linecode=LC2 length=14.0277 units=m
! reduced_from=line233,line246
! eliminated_buses=234

New Line._virtual_line432_line450_line470_line488_line507_line526_line546_line566_line584_line602_line620_line638_line657_line678_line701_line721_line742_line762_line783_line807_line832_line860_line886_line914_line943_line975_line1007_line1044_line1083_line1120_line1160_line1201_line1241_line1277_line1313_line1347_line1379_line1407_line1435_line1460_line1486_line1517_line1546_line1576_line1609_line1644_line1680_line1714_line1751_line1789_line1828_line1868_line1910_line1951_line1992_line2030_line2065 bus1=418.1.2.3.4 bus2=2066.1.2.3.4 phases=4 linecode=LC2 length=30.40341 units=m
! reduced_from=line432,line450,line470,line488,line507,line526,line546,line566,line584,line602,line620,line638,line657,line678,line701,line721,line742,line762,line783,line807,line832,line860,line886,line914,line943,line975,line1007,line1044,line1083,line1120,line1160,line1201,line1241,line1277,line1313,line1347,line1379,line1407,line1435,line1460,line1486,line1517,line1546,line1576,line1609,line1644,line1680,line1714,line1751,line1789,line1828,line1868,line1910,line1951,line1992,line2030,line2065
! eliminated_buses=433,451,471,489,508,527,547,567,585,603,621,639,658,679,702,722,743,763,784,808,833,861,887,915,944,976,1008,1045,1084,1121,1161,1202,1242,1278,1314,1348,1380,1408,1436,1461,1487,1518,1547,1577,1610,1645,1681,1715,1752,1790,1829,1869,1911,1952,1993,2031

New Line._virtual_line433_line451_line471_line489_line508_line527_line547_line567_line585_line603_line621_line639_line658_line679_line702_line722_line743_line763_line784_line808_line833_line861_line887_line915_line944_line976_line1008_line1045_line1084_line1121_line1162_line1204_line1243_line1279_line1315_line1349_line1381_line1409 bus1=1410.1.2.3.4 bus2=418.1.2.3.4 phases=4 linecode=LC2 length=55.31691 units=m
! reduced_from=line433,line451,line471,line489,line508,line527,line547,line567,line585,line603,line621,line639,line658,line679,line702,line722,line743,line763,line784,line808,line833,line861,line887,line915,line944,line976,line1008,line1045,line1084,line1121,line1162,line1204,line1243,line1279,line1315,line1349,line1381,line1409
! eliminated_buses=434,452,472,490,509,528,548,568,586,604,622,640,659,680,703,723,744,764,785,809,834,862,888,916,945,977,1009,1046,1085,1122,1163,1205,1244,1280,1316,1350,1382

New Line._virtual_line434_line452_line472_line490_line509_line528_line548_line568_line586_line604_line622_line640_line659_line680_line703_line723_line744_line764_line785_line809_line834_line862_line888_line916_line945_line977_line1009_line1046_line1085_line1122_line1163_line1205_line1244_line1280_line1316_line1350_line1382_line1410_line1437_line1462_line1488_line1519_line1548 bus1=418.1.2.3.4 bus2=1549.1.2.3.4 phases=4 linecode=LC2 length=33.319902 units=m
! reduced_from=line434,line452,line472,line490,line509,line528,line548,line568,line586,line604,line622,line640,line659,line680,line703,line723,line744,line764,line785,line809,line834,line862,line888,line916,line945,line977,line1009,line1046,line1085,line1122,line1163,line1205,line1244,line1280,line1316,line1350,line1382,line1410,line1437,line1462,line1488,line1519,line1548
! eliminated_buses=435,453,473,491,510,529,549,569,587,605,623,641,660,681,704,724,745,765,786,810,835,863,889,917,946,978,1010,1047,1086,1123,1164,1206,1245,1281,1317,1351,1383,1411,1438,1463,1489,1520

New Line._virtual_line496_line515_line535 bus1=536.1.2.3.4 bus2=479.1.2.3.4 phases=4 linecode=LC8 length=8.2686 units=m
! reduced_from=line496,line515,line535
! eliminated_buses=497,516

New Line._virtual_line497_line516_line536_line558_line577_line596_line614_line633_line652_line672 bus1=673.1.2.3.4 bus2=479.1.2.3.4 phases=4 linecode=LC3 length=9.7535 units=m
! reduced_from=line497,line516,line536,line558,line577,line596,line614,line633,line652,line672
! eliminated_buses=498,517,537,559,578,597,615,634,653

New Line._virtual_line555_line574_line593_line611_line629_line647_line666_line686 bus1=687.1.2.3.4 bus2=536.1.2.3.4 phases=4 linecode=LC8 length=32.3544 units=m
! reduced_from=line555,line574,line593,line611,line629,line647,line666,line686
! eliminated_buses=556,575,594,612,630,648,667

New Line._virtual_line556_line576_line595_line613_line632_line651_line671_line693_line715 bus1=536.1.2.3.4 bus2=716.1.2.3.4 phases=4 linecode=LC3 length=12.16985 units=m
! reduced_from=line556,line576,line595,line613,line632,line651,line671,line693,line715
! eliminated_buses=557,577,596,614,633,652,672,694

New Line._virtual_line694_line716_line738_line759_line780 bus1=781.1.2.3.4 bus2=673.1.2.3.4 phases=4 linecode=LC9 length=1.87825 units=m
! reduced_from=line694,line716,line738,line759,line780
! eliminated_buses=695,717,739,760

New Line._virtual_line698_line719 bus1=676.1.2.3.4 bus2=720.1.2.3.4 phases=4 linecode=LC2 length=11.8262 units=m
! reduced_from=line698,line719
! eliminated_buses=699

New Line._virtual_line708_line728_line749_line768 bus1=769.1.2.3.4 bus2=687.1.2.3.4 phases=4 linecode=LC8 length=13.234 units=m
! reduced_from=line708,line728,line749,line768
! eliminated_buses=709,729,750

New Line._virtual_line709_line730_line751_line771_line793_line818_line844_line871_line898_line926_line956_line988_line1023_line1061_line1098_line1136_line1179_line1222_line1260_line1297_line1334_line1370 bus1=687.1.2.3.4 bus2=1371.1.2.3.4 phases=4 linecode=LC3 length=13.39458 units=m
! reduced_from=line709,line730,line751,line771,line793,line818,line844,line871,line898,line926,line956,line988,line1023,line1061,line1098,line1136,line1179,line1222,line1260,line1297,line1334,line1370
! eliminated_buses=710,731,752,772,794,819,845,872,899,927,957,989,1024,1062,1099,1137,1180,1223,1261,1298,1335

New Line._virtual_line736_line757_line777_line799_line823_line849_line874_line900_line928_line958 bus1=716.1.2.3.4 bus2=959.1.2.3.4 phases=4 linecode=LC6 length=8.90411 units=m
! reduced_from=line736,line757,line777,line799,line823,line849,line874,line900,line928,line958
! eliminated_buses=737,758,778,800,824,850,875,901,929

New Line._virtual_line737_line758 bus1=716.1.2.3.4 bus2=759.1.2.3.4 phases=4 linecode=LC3 length=5.7634 units=m
! reduced_from=line737,line758
! eliminated_buses=738

New Line._virtual_line778_line800_line824_line850_line875_line901_line929_line959_line990_line1025_line1063 bus1=1064.1.2.3.4 bus2=759.1.2.3.4 phases=4 linecode=LC6 length=10.423967 units=m
! reduced_from=line778,line800,line824,line850,line875,line901,line929,line959,line990,line1025,line1063
! eliminated_buses=779,801,825,851,876,902,930,960,991,1026

New Line._virtual_line789_line813_line838_line864_line890_line917_line946_line978_line1010 bus1=769.1.2.3.4 bus2=1011.1.2.3.4 phases=4 linecode=LC3 length=12.62216 units=m
! reduced_from=line789,line813,line838,line864,line890,line917,line946,line978,line1010
! eliminated_buses=790,814,839,865,891,918,947,979

New Line._virtual_line790_line814_line839_line865_line891_line918_line947_line979_line1012 bus1=1013.1.2.3.4 bus2=769.1.2.3.4 phases=4 linecode=LC8 length=30.6841 units=m
! reduced_from=line790,line814,line839,line865,line891,line918,line947,line979,line1012
! eliminated_buses=791,815,840,866,892,919,948,980

New Line._virtual_line801_line825_line851_line876_line902_line930_line960_line991_line1026_line1064 bus1=1065.1.2.3.4 bus2=780.1.2.3.4 phases=4 linecode=LC6 length=9.096596 units=m
! reduced_from=line801,line825,line851,line876,line902,line930,line960,line991,line1026,line1064
! eliminated_buses=802,826,852,877,903,931,961,992,1027

New Line._virtual_line803_line828 bus1=781.1.2.3.4 bus2=829.1.2.3.4 phases=4 linecode=LC9 length=9.4305 units=m
! reduced_from=line803,line828
! eliminated_buses=804

New Line._virtual_line804_line829_line857_line883_line911_line941_line973_line1005_line1042_line1081_line1118_line1158_line1199_line1239_line1276_line1312 bus1=1313.1.2.3.4 bus2=781.1.2.3.4 phases=4 linecode=LC2 length=9.37355 units=m
! reduced_from=line804,line829,line857,line883,line911,line941,line973,line1005,line1042,line1081,line1118,line1158,line1199,line1239,line1276,line1312
! eliminated_buses=805,830,858,884,912,942,974,1006,1043,1082,1119,1159,1200,1240,1277

New Line._virtual_line826_line852_line877_line903_line931_line961_line992_line1027_line1065_line1100_line1138 bus1=803.1.2.3.4 bus2=1139.1.2.3.4 phases=4 linecode=LC6 length=9.889519 units=m
! reduced_from=line826,line852,line877,line903,line931,line961,line992,line1027,line1065,line1100,line1138
! eliminated_buses=827,853,878,904,932,962,993,1028,1066,1101

New Line._virtual_line853_line878_line904_line932_line962_line993_line1028_line1066_line1101_line1139 bus1=828.1.2.3.4 bus2=1140.1.2.3.4 phases=4 linecode=LC6 length=10.26427 units=m
! reduced_from=line853,line878,line904,line932,line962,line993,line1028,line1066,line1101,line1139
! eliminated_buses=854,879,905,933,963,994,1029,1067,1102

New Line._virtual_line854_line879 bus1=880.1.2.3.4 bus2=828.1.2.3.4 phases=4 linecode=LC3 length=5.9515 units=m
! reduced_from=line854,line879
! eliminated_buses=855

New Line._virtual_line855_line880_line907_line936_line967 bus1=968.1.2.3.4 bus2=829.1.2.3.4 phases=4 linecode=LC2 length=5.49061 units=m
! reduced_from=line855,line880,line907,line936,line967
! eliminated_buses=856,881,908,937

New Line._virtual_line856_line882 bus1=883.1.2.3.4 bus2=829.1.2.3.4 phases=4 linecode=LC9 length=9.0279 units=m
! reduced_from=line856,line882
! eliminated_buses=857

New Line._virtual_line906_line935_line966_line998_line1034_line1073_line1109_line1148_line1190_line1233_line1271 bus1=880.1.2.3.4 bus2=1272.1.2.3.4 phases=4 linecode=LC6 length=10.943748 units=m
! reduced_from=line906,line935,line966,line998,line1034,line1073,line1109,line1148,line1190,line1233,line1271
! eliminated_buses=907,936,967,999,1035,1074,1110,1149,1191,1234

New Line._virtual_line910_line940_line972_line1004_line1041 bus1=1042.1.2.3.4 bus2=883.1.2.3.4 phases=4 linecode=LC2 length=7.53959 units=m
! reduced_from=line910,line940,line972,line1004,line1041
! eliminated_buses=911,941,973,1005

New Line._virtual_line934_line965_line997_line1033_line1072_line1108_line1147_line1189_line1232_line1270_line1306_line1341_line1375 bus1=1376.1.2.3.4 bus2=906.1.2.3.4 phases=4 linecode=LC6 length=9.906148 units=m
! reduced_from=line934,line965,line997,line1033,line1072,line1108,line1147,line1189,line1232,line1270,line1306,line1341,line1375
! eliminated_buses=935,966,998,1034,1073,1109,1148,1190,1233,1271,1307,1342

New Line._virtual_line939_line971_line1003_line1040_line1080_line1117_line1157 bus1=910.1.2.3.4 bus2=1158.1.2.3.4 phases=4 linecode=LC2 length=4.93587 units=m
! reduced_from=line939,line971,line1003,line1040,line1080,line1117,line1157
! eliminated_buses=940,972,1004,1041,1081,1118

New Line._virtual_line964_line996_line1032_line1071_line1107_line1146_line1188_line1231_line1269_line1305_line1340 bus1=1341.1.2.3.4 bus2=934.1.2.3.4 phases=4 linecode=LC6 length=9.893792 units=m
! reduced_from=line964,line996,line1032,line1071,line1107,line1146,line1188,line1231,line1269,line1305,line1340
! eliminated_buses=965,997,1033,1072,1108,1147,1189,1232,1270,1306

New Line._virtual_line970_line1002_line1039_line1079_line1116_line1156_line1198 bus1=939.1.2.3.4 bus2=1199.1.2.3.4 phases=4 linecode=LC2 length=6.826149 units=m
! reduced_from=line970,line1002,line1039,line1079,line1116,line1156,line1198
! eliminated_buses=971,1003,1040,1080,1117,1157

New Line._virtual_line995_line1031_line1070_line1106_line1145_line1187_line1230_line1268_line1304 bus1=1305.1.2.3.4 bus2=964.1.2.3.4 phases=4 linecode=LC6 length=9.835127 units=m
! reduced_from=line995,line1031,line1070,line1106,line1145,line1187,line1230,line1268,line1304
! eliminated_buses=996,1032,1071,1107,1146,1188,1231,1269

New Line._virtual_line1001_line1038_line1078_line1115_line1155 bus1=970.1.2.3.4 bus2=1156.1.2.3.4 phases=4 linecode=LC2 length=7.90486 units=m
! reduced_from=line1001,line1038,line1078,line1115,line1155
! eliminated_buses=1002,1039,1079,1116

New Line._virtual_line1030_line1069_line1105_line1144_line1186_line1229_line1267_line1303_line1339 bus1=1340.1.2.3.4 bus2=995.1.2.3.4 phases=4 linecode=LC6 length=9.748774 units=m
! reduced_from=line1030,line1069,line1105,line1144,line1186,line1229,line1267,line1303,line1339
! eliminated_buses=1031,1070,1106,1145,1187,1230,1268,1304

New Line._virtual_line1037_line1077_line1114_line1154_line1197 bus1=1001.1.2.3.4 bus2=1198.1.2.3.4 phases=4 linecode=LC2 length=4.35361 units=m
! reduced_from=line1037,line1077,line1114,line1154,line1197
! eliminated_buses=1038,1078,1115,1155

New Line._virtual_line1047_line1086 bus1=1087.1.2.3.4 bus2=1011.1.2.3.4 phases=4 linecode=LC3 length=8.1913 units=m
! reduced_from=line1047,line1086
! eliminated_buses=1048

New Line._virtual_line1048_line1087_line1125_line1167_line1210_line1249_line1286_line1322_line1357_line1389_line1418 bus1=1419.1.2.3.4 bus2=1011.1.2.3.4 phases=4 linecode=LC6 length=9.648061 units=m
! reduced_from=line1048,line1087,line1125,line1167,line1210,line1249,line1286,line1322,line1357,line1389,line1418
! eliminated_buses=1049,1088,1126,1168,1211,1250,1287,1323,1358,1390

New Line._virtual_line1050_line1089_line1127 bus1=1013.1.2.3.4 bus2=1128.1.2.3.4 phases=4 linecode=LC1 length=10.5258 units=m
! reduced_from=line1050,line1089,line1127
! eliminated_buses=1051,1090

New Line._virtual_line1051_line1091_line1130_line1173_line1217_line1256_line1294_line1331_line1367_line1398_line1427_line1453 bus1=1454.1.2.3.4 bus2=1013.1.2.3.4 phases=4 linecode=LC3 length=11.7759 units=m
! reduced_from=line1051,line1091,line1130,line1173,line1217,line1256,line1294,line1331,line1367,line1398,line1427,line1453
! eliminated_buses=1052,1092,1131,1174,1218,1257,1295,1332,1368,1399,1428

New Line._virtual_line1067_line1102 bus1=1030.1.2.3.4 bus2=1103.1.2.3.4 phases=4 linecode=LC3 length=5.8008 units=m
! reduced_from=line1067,line1102
! eliminated_buses=1068

New Line._virtual_line1068_line1104_line1143_line1185_line1228_line1266_line1302_line1338_line1374 bus1=1375.1.2.3.4 bus2=1030.1.2.3.4 phases=4 linecode=LC6 length=9.79897 units=m
! reduced_from=line1068,line1104,line1143,line1185,line1228,line1266,line1302,line1338,line1374
! eliminated_buses=1069,1105,1144,1186,1229,1267,1303,1339

New Line._virtual_line1075_line1111_line1150_line1192_line1235 bus1=1236.1.2.3.4 bus2=1037.1.2.3.4 phases=4 linecode=LC2 length=3.79034 units=m
! reduced_from=line1075,line1111,line1150,line1192,line1235
! eliminated_buses=1076,1112,1151,1193

New Line._virtual_line1076_line1113 bus1=1114.1.2.3.4 bus2=1037.1.2.3.4 phases=4 linecode=LC9 length=6.4486 units=m
! reduced_from=line1076,line1113
! eliminated_buses=1077

New Line._virtual_line1123_line1164_line1206_line1245_line1281_line1317_line1351_line1383_line1411 bus1=1087.1.2.3.4 bus2=1412.1.2.3.4 phases=4 linecode=LC6 length=9.60322 units=m
! reduced_from=line1123,line1164,line1206,line1245,line1281,line1317,line1351,line1383,line1411
! eliminated_buses=1124,1165,1207,1246,1282,1318,1352,1384

New Line._virtual_line1141_line1183_line1226_line1264_line1301_line1337_line1373_line1404_line1433 bus1=1434.1.2.3.4 bus2=1103.1.2.3.4 phases=4 linecode=LC6 length=9.80674 units=m
! reduced_from=line1141,line1183,line1226,line1264,line1301,line1337,line1373,line1404,line1433
! eliminated_buses=1142,1184,1227,1265,1302,1338,1374,1405

New Line._virtual_line1153_line1196_line1238_line1275 bus1=1276.1.2.3.4 bus2=1114.1.2.3.4 phases=4 linecode=LC2 length=3.3504 units=m
! reduced_from=line1153,line1196,line1238,line1275
! eliminated_buses=1154,1197,1239

New Line._virtual_line1165_line1207_line1246_line1282_line1318_line1352_line1384_line1412_line1438_line1463_line1489 bus1=1490.1.2.3.4 bus2=1125.1.2.3.4 phases=4 linecode=LC6 length=8.59795 units=m
! reduced_from=line1165,line1207,line1246,line1282,line1318,line1352,line1384,line1412,line1438,line1463,line1489
! eliminated_buses=1166,1208,1247,1283,1319,1353,1385,1413,1439,1464

New Line._virtual_line1169_line1212_line1251_line1288_line1324_line1359_line1391_line1420_line1446_line1472_line1501 bus1=1502.1.2.3.4 bus2=1128.1.2.3.4 phases=4 linecode=LC8 length=41.12074 units=m
! reduced_from=line1169,line1212,line1251,line1288,line1324,line1359,line1391,line1420,line1446,line1472,line1501
! eliminated_buses=1170,1213,1252,1289,1325,1360,1392,1421,1447,1473

New Line._virtual_line1170_line1214_line1254_line1292_line1329_line1365_line1397_line1426_line1452_line1478 bus1=1128.1.2.3.4 bus2=1479.1.2.3.4 phases=4 linecode=LC3 length=14.85859 units=m
! reduced_from=line1170,line1214,line1254,line1292,line1329,line1365,line1397,line1426,line1452,line1478
! eliminated_buses=1171,1215,1255,1293,1330,1366,1398,1427,1453

New Line._virtual_line1182_line1225_line1263_line1300_line1336_line1372_line1403_line1432_line1458_line1485_line1516 bus1=1517.1.2.3.4 bus2=1141.1.2.3.4 phases=4 linecode=LC6 length=9.725275 units=m
! reduced_from=line1182,line1225,line1263,line1300,line1336,line1372,line1403,line1432,line1458,line1485,line1516
! eliminated_buses=1183,1226,1264,1301,1337,1373,1404,1433,1459,1486

New Line._virtual_line1195_line1237_line1274_line1309_line1344_line1378 bus1=1379.1.2.3.4 bus2=1153.1.2.3.4 phases=4 linecode=LC2 length=4.81773 units=m
! reduced_from=line1195,line1237,line1274,line1309,line1344,line1378
! eliminated_buses=1196,1238,1275,1310,1345

New Line._virtual_line1208_line1247_line1283_line1319_line1353 bus1=1354.1.2.3.4 bus2=1167.1.2.3.4 phases=4 linecode=LC6 length=9.15635 units=m
! reduced_from=line1208,line1247,line1283,line1319,line1353
! eliminated_buses=1209,1248,1284,1320

New Line._virtual_line1209_line1248 bus1=1167.1.2.3.4 bus2=1249.1.2.3.4 phases=4 linecode=LC3 length=4.9765 units=m
! reduced_from=line1209,line1248
! eliminated_buses=1210

New Line._virtual_line1224_line1262_line1299_line1335_line1371_line1402_line1431 bus1=1432.1.2.3.4 bus2=1182.1.2.3.4 phases=4 linecode=LC6 length=9.43706 units=m
! reduced_from=line1224,line1262,line1299,line1335,line1371,line1402,line1431
! eliminated_buses=1225,1263,1300,1336,1372,1403

New Line._virtual_line1284_line1320 bus1=1321.1.2.3.4 bus2=1249.1.2.3.4 phases=4 linecode=LC3 length=3.7884 units=m
! reduced_from=line1284,line1320
! eliminated_buses=1285

New Line._virtual_line1285_line1321_line1356_line1388_line1417_line1444_line1470_line1497_line1528_line1557_line1586_line1619_line1653_line1686_line1720_line1757_line1794 bus1=1249.1.2.3.4 bus2=1795.1.2.3.4 phases=4 linecode=LC6 length=9.529232 units=m
! reduced_from=line1285,line1321,line1356,line1388,line1417,line1444,line1470,line1497,line1528,line1557,line1586,line1619,line1653,line1686,line1720,line1757,line1794
! eliminated_buses=1286,1322,1357,1389,1418,1445,1471,1498,1529,1558,1587,1620,1654,1687,1721,1758

New Line._virtual_line1355_line1387_line1416_line1443_line1469_line1496_line1527_line1556_line1585_line1618 bus1=1619.1.2.3.4 bus2=1321.1.2.3.4 phases=4 linecode=LC6 length=9.24992 units=m
! reduced_from=line1355,line1387,line1416,line1443,line1469,line1496,line1527,line1556,line1585,line1618
! eliminated_buses=1356,1388,1417,1444,1470,1497,1528,1557,1586

New Line._virtual_line1386_line1415_line1442_line1468_line1495_line1526_line1555_line1584_line1617_line1652 bus1=1653.1.2.3.4 bus2=1355.1.2.3.4 phases=4 linecode=LC6 length=8.1721 units=m
! reduced_from=line1386,line1415,line1442,line1468,line1495,line1526,line1555,line1584,line1617,line1652
! eliminated_buses=1387,1416,1443,1469,1496,1527,1556,1585,1618

New Line._virtual_line1400_line1429_line1455_line1481_line1511_line1540_line1569_line1601_line1635_line1671_line1704_line1740 bus1=1741.1.2.3.4 bus2=1371.1.2.3.4 phases=4 linecode=LC6 length=8.135815 units=m
! reduced_from=line1400,line1429,line1455,line1481,line1511,line1540,line1569,line1601,line1635,line1671,line1704,line1740
! eliminated_buses=1401,1430,1456,1482,1512,1541,1570,1602,1636,1672,1705

New Line._virtual_line1401_line1430 bus1=1431.1.2.3.4 bus2=1371.1.2.3.4 phases=4 linecode=LC3 length=3.7772 units=m
! reduced_from=line1401,line1430
! eliminated_buses=1402

New Line._virtual_line1413_line1440 bus1=1386.1.2.3.4 bus2=1441.1.2.3.4 phases=4 linecode=LC3 length=2.7037 units=m
! reduced_from=line1413,line1440
! eliminated_buses=1414

New Line._virtual_line1414_line1441_line1467_line1494_line1525_line1554_line1583_line1616_line1651 bus1=1386.1.2.3.4 bus2=1652.1.2.3.4 phases=4 linecode=LC6 length=9.01396 units=m
! reduced_from=line1414,line1441,line1467,line1494,line1525,line1554,line1583,line1616,line1651
! eliminated_buses=1415,1442,1468,1495,1526,1555,1584,1617

New Line._virtual_line1456_line1482_line1512_line1541_line1570_line1602_line1636 bus1=1637.1.2.3.4 bus2=1431.1.2.3.4 phases=4 linecode=LC6 length=6.523262 units=m
! reduced_from=line1456,line1482,line1512,line1541,line1570,line1602,line1636
! eliminated_buses=1457,1483,1513,1542,1571,1603

New Line._virtual_line1457_line1484 bus1=1431.1.2.3.4 bus2=1485.1.2.3.4 phases=4 linecode=LC3 length=6.10256 units=m
! reduced_from=line1457,line1484
! eliminated_buses=1458

New Line._virtual_line1466_line1493_line1524_line1553_line1582_line1615_line1650_line1685_line1719_line1756_line1793_line1832_line1872_line1913 bus1=1914.1.2.3.4 bus2=1441.1.2.3.4 phases=4 linecode=LC6 length=9.382914 units=m
! reduced_from=line1466,line1493,line1524,line1553,line1582,line1615,line1650,line1685,line1719,line1756,line1793,line1832,line1872,line1913
! eliminated_buses=1467,1494,1525,1554,1583,1616,1651,1686,1720,1757,1794,1833,1873

New Line._virtual_line1479_line1509_line1538_line1567 bus1=1568.1.2.3.4 bus2=1454.1.2.3.4 phases=4 linecode=LC3 length=9.89364 units=m
! reduced_from=line1479,line1509,line1538,line1567
! eliminated_buses=1480,1510,1539

New Line._virtual_line1480_line1510_line1539_line1568_line1600_line1634_line1670_line1703_line1739 bus1=1454.1.2.3.4 bus2=1740.1.2.3.4 phases=4 linecode=LC1 length=6.871189 units=m
! reduced_from=line1480,line1510,line1539,line1568,line1600,line1634,line1670,line1703,line1739
! eliminated_buses=1481,1511,1540,1569,1601,1635,1671,1704

New Line._virtual_line1492_line1523_line1552_line1581_line1614_line1649_line1684_line1718_line1755 bus1=1466.1.2.3.4 bus2=1756.1.2.3.4 phases=4 linecode=LC6 length=8.26618 units=m
! reduced_from=line1492,line1523,line1552,line1581,line1614,line1649,line1684,line1718,line1755
! eliminated_buses=1493,1524,1553,1582,1615,1650,1685,1719

New Line._virtual_line1507_line1536_line1564 bus1=1479.1.2.3.4 bus2=1565.1.2.3.4 phases=4 linecode=LC3 length=3.33648 units=m
! reduced_from=line1507,line1536,line1564
! eliminated_buses=1508,1537

New Line._virtual_line1508_line1537_line1565_line1595_line1628_line1663_line1695_line1730 bus1=1479.1.2.3.4 bus2=1731.1.2.3.4 phases=4 linecode=LC6 length=8.92102 units=m
! reduced_from=line1508,line1537,line1565,line1595,line1628,line1663,line1695,line1730
! eliminated_buses=1509,1538,1566,1596,1629,1664,1696

New Line._virtual_line1514_line1543_line1572_line1604_line1638_line1673_line1706_line1742_line1779 bus1=1780.1.2.3.4 bus2=1485.1.2.3.4 phases=4 linecode=LC6 length=7.660815 units=m
! reduced_from=line1514,line1543,line1572,line1604,line1638,line1673,line1706,line1742,line1779
! eliminated_buses=1515,1544,1573,1605,1639,1674,1707,1743

New Line._virtual_line1522_line1551_line1580_line1613_line1648_line1683_line1717_line1754_line1792_line1831_line1871_line1912 bus1=1492.1.2.3.4 bus2=1913.1.2.3.4 phases=4 linecode=LC6 length=9.456671 units=m
! reduced_from=line1522,line1551,line1580,line1613,line1648,line1683,line1717,line1754,line1792,line1831,line1871,line1912
! eliminated_buses=1523,1552,1581,1614,1649,1684,1718,1755,1793,1832,1872

New Line._virtual_line1544_line1573_line1605_line1639_line1674_line1707_line1743_line1780_line1818_line1858_line1900 bus1=1901.1.2.3.4 bus2=1516.1.2.3.4 phases=4 linecode=LC6 length=6.439784 units=m
! reduced_from=line1544,line1573,line1605,line1639,line1674,line1707,line1743,line1780,line1818,line1858,line1900
! eliminated_buses=1545,1574,1606,1640,1675,1708,1744,1781,1819,1859

New Line._virtual_line1550_line1579_line1612_line1647_line1682_line1716_line1753_line1791_line1830_line1870 bus1=1522.1.2.3.4 bus2=1871.1.2.3.4 phases=4 linecode=LC6 length=9.78182 units=m
! reduced_from=line1550,line1579,line1612,line1647,line1682,line1716,line1753,line1791,line1830,line1870
! eliminated_buses=1551,1580,1613,1648,1683,1717,1754,1792,1831

New Line._virtual_line1560_line1589_line1622_line1656_line1688_line1723_line1761_line1798_line1837_line1877_line1918 bus1=1919.1.2.3.4 bus2=1532.1.2.3.4 phases=4 linecode=LC5 length=12.78734 units=m
! reduced_from=line1560,line1589,line1622,line1656,line1688,line1723,line1761,line1798,line1837,line1877,line1918
! eliminated_buses=1561,1590,1623,1657,1689,1724,1762,1799,1838,1878

New Line._virtual_line1574_line1606_line1640_line1675_line1708_line1744_line1781_line1819_line1859 bus1=1546.1.2.3.4 bus2=1860.1.2.3.4 phases=4 linecode=LC6 length=7.411051 units=m
! reduced_from=line1574,line1606,line1640,line1675,line1708,line1744,line1781,line1819,line1859
! eliminated_buses=1575,1607,1641,1676,1709,1745,1782,1820

New Line._virtual_line1593_line1625_line1659_line1690_line1724_line1762_line1799_line1838_line1878_line1919_line1960_line2001_line2039_line2074 bus1=2075.1.2.3.4 bus2=1565.1.2.3.4 phases=4 linecode=LC6 length=8.952637 units=m
! reduced_from=line1593,line1625,line1659,line1690,line1724,line1762,line1799,line1838,line1878,line1919,line1960,line2001,line2039,line2074
! eliminated_buses=1594,1626,1660,1691,1725,1763,1800,1839,1879,1920,1961,2002,2040

New Line._virtual_line1597_line1630_line1665_line1697_line1732_line1770_line1808_line1847_line1888_line1929_line1970_line2011_line2048_line2083_line2116 bus1=1568.1.2.3.4 bus2=2117.1.2.3.4 phases=4 linecode=LC2 length=8.154587 units=m
! reduced_from=line1597,line1630,line1665,line1697,line1732,line1770,line1808,line1847,line1888,line1929,line1970,line2011,line2048,line2083,line2116
! eliminated_buses=1598,1631,1666,1698,1733,1771,1809,1848,1889,1930,1971,2012,2049,2084

New Line._virtual_line1598_line1631_line1666_line1698_line1733_line1771_line1809_line1848_line1889_line1930_line1971_line2012_line2049_line2084_line2117_line2147_line2173 bus1=2174.1.2.3.4 bus2=1568.1.2.3.4 phases=4 linecode=LC6 length=10.346555 units=m
! reduced_from=line1598,line1631,line1666,line1698,line1733,line1771,line1809,line1848,line1889,line1930,line1971,line2012,line2049,line2084,line2117,line2147,line2173
! eliminated_buses=1599,1632,1667,1699,1734,1772,1810,1849,1890,1931,1972,2013,2050,2085,2118,2148

New Line._virtual_line1607_line1641_line1676_line1709_line1745_line1782_line1820_line1860_line1901_line1942_line1983 bus1=1984.1.2.3.4 bus2=1576.1.2.3.4 phases=4 linecode=LC6 length=7.603637 units=m
! reduced_from=line1607,line1641,line1676,line1709,line1745,line1782,line1820,line1860,line1901,line1942,line1983
! eliminated_buses=1608,1642,1677,1710,1746,1783,1821,1861,1902,1943

New Line._virtual_line1626_line1660_line1691_line1725_line1763_line1800_line1839_line1879_line1920_line1961_line2002 bus1=2003.1.2.3.4 bus2=1595.1.2.3.4 phases=4 linecode=LC6 length=9.478065 units=m
! reduced_from=line1626,line1660,line1691,line1725,line1763,line1800,line1839,line1879,line1920,line1961,line2002
! eliminated_buses=1627,1661,1692,1726,1764,1801,1840,1880,1921,1962

New Line._virtual_line1632_line1667_line1699_line1734_line1772_line1810_line1849_line1890_line1931_line1972_line2013 bus1=2014.1.2.3.4 bus2=1600.1.2.3.4 phases=4 linecode=LC6 length=7.64097 units=m
! reduced_from=line1632,line1667,line1699,line1734,line1772,line1810,line1849,line1890,line1931,line1972,line2013
! eliminated_buses=1633,1668,1700,1735,1773,1811,1850,1891,1932,1973

New Line._virtual_line1633_line1669 bus1=1670.1.2.3.4 bus2=1600.1.2.3.4 phases=4 linecode=LC3 length=3.0006 units=m
! reduced_from=line1633,line1669
! eliminated_buses=1634

New Line._virtual_line1642_line1677_line1710_line1746_line1783_line1821_line1861_line1902_line1943_line1984 bus1=1609.1.2.3.4 bus2=1985.1.2.3.4 phases=4 linecode=LC6 length=7.131576 units=m
! reduced_from=line1642,line1677,line1710,line1746,line1783,line1821,line1861,line1902,line1943,line1984
! eliminated_buses=1643,1678,1711,1747,1784,1822,1862,1903,1944

New Line._virtual_line1661_line1692_line1726_line1764_line1801_line1840_line1880_line1921_line1962_line2003_line2040_line2075_line2110 bus1=2111.1.2.3.4 bus2=1628.1.2.3.4 phases=4 linecode=LC6 length=8.699785 units=m
! reduced_from=line1661,line1692,line1726,line1764,line1801,line1840,line1880,line1921,line1962,line2003,line2040,line2075,line2110
! eliminated_buses=1662,1693,1727,1765,1802,1841,1881,1922,1963,2004,2041,2076

New Line._virtual_line1678_line1711_line1747_line1784_line1822_line1862_line1903_line1944_line1985 bus1=1986.1.2.3.4 bus2=1644.1.2.3.4 phases=4 linecode=LC6 length=7.989834 units=m
! reduced_from=line1678,line1711,line1747,line1784,line1822,line1862,line1903,line1944,line1985
! eliminated_buses=1679,1712,1748,1785,1823,1863,1904,1945

New Line._virtual_line1693_line1727_line1765_line1802_line1841_line1881_line1922_line1963_line2004_line2041_line2076 bus1=1663.1.2.3.4 bus2=2077.1.2.3.4 phases=4 linecode=LC2 length=8.039841 units=m
! reduced_from=line1693,line1727,line1765,line1802,line1841,line1881,line1922,line1963,line2004,line2041,line2076
! eliminated_buses=1694,1728,1766,1803,1842,1882,1923,1964,2005,2042

New Line._virtual_line1701_line1736_line1774_line1812_line1851_line1892_line1933_line1974_line2015_line2051_line2086_line2118 bus1=1670.1.2.3.4 bus2=2119.1.2.3.4 phases=4 linecode=LC6 length=7.280077 units=m
! reduced_from=line1701,line1736,line1774,line1812,line1851,line1892,line1933,line1974,line2015,line2051,line2086,line2118
! eliminated_buses=1702,1737,1775,1813,1852,1893,1934,1975,2016,2052,2087

New Line._virtual_line1712_line1748_line1785_line1823_line1863_line1904_line1945_line1986_line2024_line2060_line2095 bus1=1680.1.2.3.4 bus2=2096.1.2.3.4 phases=4 linecode=LC6 length=7.843514 units=m
! reduced_from=line1712,line1748,line1785,line1823,line1863,line1904,line1945,line1986,line2024,line2060,line2095
! eliminated_buses=1713,1749,1786,1824,1864,1905,1946,1987,2025,2061

New Line._virtual_line1728_line1766_line1803_line1842_line1882_line1923_line1964_line2005_line2042_line2077 bus1=1695.1.2.3.4 bus2=2078.1.2.3.4 phases=4 linecode=LC1 length=8.640992 units=m
! reduced_from=line1728,line1766,line1803,line1842,line1882,line1923,line1964,line2005,line2042,line2077
! eliminated_buses=1729,1767,1804,1843,1883,1924,1965,2006,2043

New Line._virtual_line1737_line1775_line1813_line1852_line1893_line1934_line1975_line2016_line2052_line2087_line2119 bus1=2120.1.2.3.4 bus2=1703.1.2.3.4 phases=4 linecode=LC6 length=7.034184 units=m
! reduced_from=line1737,line1775,line1813,line1852,line1893,line1934,line1975,line2016,line2052,line2087,line2119
! eliminated_buses=1738,1776,1814,1853,1894,1935,1976,2017,2053,2088

New Line._virtual_line1749_line1786_line1824_line1864_line1905_line1946_line1987_line2025 bus1=1714.1.2.3.4 bus2=2026.1.2.3.4 phases=4 linecode=LC6 length=6.82739 units=m
! reduced_from=line1749,line1786,line1824,line1864,line1905,line1946,line1987,line2025
! eliminated_buses=1750,1787,1825,1865,1906,1947,1988

New Line._virtual_line1767_line1804_line1843_line1883_line1924_line1965_line2006_line2043_line2078_line2111_line2142_line2168_line2193_line2219_line2245_line2267_line2291 bus1=1730.1.2.3.4 bus2=2292.1.2.3.4 phases=4 linecode=LC6 length=9.275244 units=m
! reduced_from=line1767,line1804,line1843,line1883,line1924,line1965,line2006,line2043,line2078,line2111,line2142,line2168,line2193,line2219,line2245,line2267,line2291
! eliminated_buses=1768,1805,1844,1884,1925,1966,2007,2044,2079,2112,2143,2169,2194,2220,2246,2268

New Line._virtual_line1776_line1814_line1853_line1894_line1935_line1976_line2017_line2053_line2088_line2120 bus1=1739.1.2.3.4 bus2=2121.1.2.3.4 phases=4 linecode=LC6 length=7.039263 units=m
! reduced_from=line1776,line1814,line1853,line1894,line1935,line1976,line2017,line2053,line2088,line2120
! eliminated_buses=1777,1815,1854,1895,1936,1977,2018,2054,2089

New Line._virtual_line1787_line1825_line1865_line1906_line1947_line1988_line2026_line2061_line2096_line2126_line2153_line2179 bus1=1751.1.2.3.4 bus2=2180.1.2.3.4 phases=4 linecode=LC6 length=8.072549 units=m
! reduced_from=line1787,line1825,line1865,line1906,line1947,line1988,line2026,line2061,line2096,line2126,line2153,line2179
! eliminated_buses=1788,1826,1866,1907,1948,1989,2027,2062,2097,2127,2154

New Line._virtual_line1805_line1844_line1884_line1925_line1966_line2007_line2044_line2079_line2112_line2143_line2169_line2194 bus1=2195.1.2.3.4 bus2=1769.1.2.3.4 phases=4 linecode=LC6 length=9.323146 units=m
! reduced_from=line1805,line1844,line1884,line1925,line1966,line2007,line2044,line2079,line2112,line2143,line2169,line2194
! eliminated_buses=1806,1845,1885,1926,1967,2008,2045,2080,2113,2144,2170

New Line._virtual_line1815_line1854_line1895_line1936_line1977_line2018_line2054_line2089_line2121_line2148_line2174 bus1=1778.1.2.3.4 bus2=2175.1.2.3.4 phases=4 linecode=LC6 length=8.357212 units=m
! reduced_from=line1815,line1854,line1895,line1936,line1977,line2018,line2054,line2089,line2121,line2148,line2174
! eliminated_buses=1816,1855,1896,1937,1978,2019,2055,2090,2122,2149

New Line._virtual_line1826_line1866_line1907_line1948_line1989_line2027_line2062_line2097_line2127_line2154 bus1=2155.1.2.3.4 bus2=1789.1.2.3.4 phases=4 linecode=LC6 length=8.42149 units=m
! reduced_from=line1826,line1866,line1907,line1948,line1989,line2027,line2062,line2097,line2127,line2154
! eliminated_buses=1827,1867,1908,1949,1990,2028,2063,2098,2128

New Line._virtual_line1845_line1885_line1926_line1967_line2008_line2045_line2080_line2113_line2144_line2170_line2195_line2220_line2246_line2268_line2292_line2316_line2343_line2369_line2394 bus1=1807.1.2.3.4 bus2=2395.1.2.3.4 phases=4 linecode=LC6 length=10.326825 units=m
! reduced_from=line1845,line1885,line1926,line1967,line2008,line2045,line2080,line2113,line2144,line2170,line2195,line2220,line2246,line2268,line2292,line2316,line2343,line2369,line2394
! eliminated_buses=1846,1886,1927,1968,2009,2046,2081,2114,2145,2171,2196,2221,2247,2269,2293,2317,2344,2370

New Line._virtual_line1846_line1887 bus1=1888.1.2.3.4 bus2=1807.1.2.3.4 phases=4 linecode=LC3 length=5.0656 units=m
! reduced_from=line1846,line1887
! eliminated_buses=1847

New Line._virtual_line1855_line1896_line1937_line1978_line2019_line2055_line2090_line2122_line2149_line2175_line2199 bus1=2200.1.2.3.4 bus2=1817.1.2.3.4 phases=4 linecode=LC6 length=7.69277 units=m
! reduced_from=line1855,line1896,line1937,line1978,line2019,line2055,line2090,line2122,line2149,line2175,line2199
! eliminated_buses=1856,1897,1938,1979,2020,2056,2091,2123,2150,2176

New Line._virtual_line1897_line1938_line1979_line2020_line2056_line2091_line2123_line2150_line2176_line2200_line2223_line2248_line2270 bus1=1857.1.2.3.4 bus2=2271.1.2.3.4 phases=4 linecode=LC6 length=8.64528 units=m
! reduced_from=line1897,line1938,line1979,line2020,line2056,line2091,line2123,line2150,line2176,line2200,line2223,line2248,line2270
! eliminated_buses=1898,1939,1980,2021,2057,2092,2124,2151,2177,2201,2224,2249

New Line._virtual_line1928_line1969_line2010_line2047_line2082_line2115_line2146_line2172 bus1=2173.1.2.3.4 bus2=1888.1.2.3.4 phases=4 linecode=LC2 length=1.64048 units=m
! reduced_from=line1928,line1969,line2010,line2047,line2082,line2115,line2146,line2172
! eliminated_buses=1929,1970,2011,2048,2083,2116,2147

New Line._virtual_line1939_line1980_line2021_line2057_line2092_line2124_line2151_line2177_line2201_line2224_line2249 bus1=2250.1.2.3.4 bus2=1899.1.2.3.4 phases=4 linecode=LC6 length=8.09097 units=m
! reduced_from=line1939,line1980,line2021,line2057,line2092,line2124,line2151,line2177,line2201,line2224,line2249
! eliminated_buses=1940,1981,2022,2058,2093,2125,2152,2178,2202,2225

New Line._virtual_line1957_line1998_line2036_line2070_line2105_line2136_line2162_line2186_line2210_line2232_line2255_line2278_line2302_line2326_line2352_line2376_line2400_line2422_line2445_line2467_line2489_line2512_line2535 bus1=2536.1.2.3.4 bus2=1919.1.2.3.4 phases=4 linecode=LC8 length=147.22761 units=m
! reduced_from=line1957,line1998,line2036,line2070,line2105,line2136,line2162,line2186,line2210,line2232,line2255,line2278,line2302,line2326,line2352,line2376,line2400,line2422,line2445,line2467,line2489,line2512,line2535
! eliminated_buses=1958,1999,2037,2071,2106,2137,2163,2187,2211,2233,2256,2279,2303,2327,2353,2377,2401,2423,2446,2468,2490,2513

New Line._virtual_line1958_line1999_line2037_line2071_line2106_line2137_line2163_line2187_line2211_line2233_line2256_line2279_line2303_line2327_line2353 bus1=1919.1.2.3.4 bus2=2354.1.2.3.4 phases=4 linecode=LC8 length=12.80777 units=m
! reduced_from=line1958,line1999,line2037,line2071,line2106,line2137,line2163,line2187,line2211,line2233,line2256,line2279,line2303,line2327,line2353
! eliminated_buses=1959,2000,2038,2072,2107,2138,2164,2188,2212,2234,2257,2280,2304,2328

New Line._virtual_line1959_line2000_line2038 bus1=1919.1.2.3.4 bus2=2039.1.2.3.4 phases=4 linecode=LC5 length=2.19423 units=m
! reduced_from=line1959,line2000,line2038
! eliminated_buses=1960,2001

New Line._virtual_line1981_line2022_line2058_line2093_line2125_line2152_line2178_line2202 bus1=1941.1.2.3.4 bus2=2203.1.2.3.4 phases=4 linecode=LC6 length=8.54897 units=m
! reduced_from=line1981,line2022,line2058,line2093,line2125,line2152,line2178,line2202
! eliminated_buses=1982,2023,2059,2094,2126,2153,2179

New Line._virtual_line2072_line2107_line2138_line2164_line2188 bus1=2039.1.2.3.4 bus2=2189.1.2.3.4 phases=4 linecode=LC9 length=8.71837 units=m
! reduced_from=line2072,line2107,line2138,line2164,line2188
! eliminated_buses=2073,2108,2139,2165

New Line._virtual_line2099_line2129_line2156_line2181_line2204_line2226_line2250_line2271 bus1=2066.1.2.3.4 bus2=2272.1.2.3.4 phases=4 linecode=LC2 length=8.65782 units=m
! reduced_from=line2099,line2129,line2156,line2181,line2204,line2226,line2250,line2271
! eliminated_buses=2100,2130,2157,2182,2205,2227,2251

New Line._virtual_line2108_line2139_line2165_line2189_line2215_line2237_line2260_line2283_line2307_line2331_line2357_line2382_line2405_line2428_line2451_line2474_line2497_line2520_line2547_line2575_line2604_line2635 bus1=2636.1.2.3.4 bus2=2074.1.2.3.4 phases=4 linecode=LC9 length=16.110003 units=m
! reduced_from=line2108,line2139,line2165,line2189,line2215,line2237,line2260,line2283,line2307,line2331,line2357,line2382,line2405,line2428,line2451,line2474,line2497,line2520,line2547,line2575,line2604,line2635
! eliminated_buses=2109,2140,2166,2190,2216,2238,2261,2284,2308,2332,2358,2383,2406,2429,2452,2475,2498,2521,2548,2576,2605

New Line._virtual_line2109_line2140_line2166_line2190_line2216 bus1=2217.1.2.3.4 bus2=2074.1.2.3.4 phases=4 linecode=LC5 length=12.3354 units=m
! reduced_from=line2109,line2140,line2166,line2190,line2216
! eliminated_buses=2110,2141,2167,2191

New Line._virtual_line2198_line2222_line2247_line2269_line2293_line2317 bus1=2173.1.2.3.4 bus2=2318.1.2.3.4 phases=4 linecode=LC2 length=8.34836 units=m
! reduced_from=line2198,line2222,line2247,line2269,line2293,line2317
! eliminated_buses=2199,2223,2248,2270,2294

New Line._virtual_line2212_line2234_line2257_line2280_line2304_line2328_line2354_line2379_line2402_line2425_line2448_line2471_line2494_line2518_line2545_line2573_line2602_line2632_line2663_line2698_line2736_line2775 bus1=2776.1.2.3.4 bus2=2189.1.2.3.4 phases=4 linecode=LC2 length=11.025674 units=m
! reduced_from=line2212,line2234,line2257,line2280,line2304,line2328,line2354,line2379,line2402,line2425,line2448,line2471,line2494,line2518,line2545,line2573,line2602,line2632,line2663,line2698,line2736,line2775
! eliminated_buses=2213,2235,2258,2281,2305,2329,2355,2380,2403,2426,2449,2472,2495,2519,2546,2574,2603,2633,2664,2699,2737

New Line._virtual_line2213_line2235_line2258_line2281_line2305_line2329_line2355_line2380_line2403_line2426_line2449_line2472_line2495 bus1=2189.1.2.3.4 bus2=2496.1.2.3.4 phases=4 linecode=LC2 length=6.70499 units=m
! reduced_from=line2213,line2235,line2258,line2281,line2305,line2329,line2355,line2380,line2403,line2426,line2449,line2472,line2495
! eliminated_buses=2214,2236,2259,2282,2306,2330,2356,2381,2404,2427,2450,2473

New Line._virtual_line2239_line2262_line2285_line2309_line2333_line2359_line2384_line2407_line2430_line2453_line2476_line2499_line2522_line2549_line2577_line2606_line2637_line2669_line2705 bus1=2217.1.2.3.4 bus2=2706.1.2.3.4 phases=4 linecode=LC2 length=17.808506 units=m
! reduced_from=line2239,line2262,line2285,line2309,line2333,line2359,line2384,line2407,line2430,line2453,line2476,line2499,line2522,line2549,line2577,line2606,line2637,line2669,line2705
! eliminated_buses=2240,2263,2286,2310,2334,2360,2385,2408,2431,2454,2477,2500,2523,2550,2578,2607,2638,2670

New Line._virtual_line2240_line2263_line2286_line2310_line2334_line2360_line2385_line2408_line2431_line2454_line2477_line2500_line2523_line2550_line2578_line2607_line2638_line2670_line2706 bus1=2217.1.2.3.4 bus2=2707.1.2.3.4 phases=4 linecode=LC2 length=16.012541 units=m
! reduced_from=line2240,line2263,line2286,line2310,line2334,line2360,line2385,line2408,line2431,line2454,line2477,line2500,line2523,line2550,line2578,line2607,line2638,line2670,line2706
! eliminated_buses=2241,2264,2287,2311,2335,2361,2386,2409,2432,2455,2478,2501,2524,2551,2579,2608,2639,2671

New Line._virtual_line2242_line2265_line2288_line2312 bus1=2313.1.2.3.4 bus2=2217.1.2.3.4 phases=4 linecode=LC5 length=11.07396 units=m
! reduced_from=line2242,line2265,line2288,line2312
! eliminated_buses=2243,2266,2289

New Line._virtual_line2294_line2318 bus1=2319.1.2.3.4 bus2=2272.1.2.3.4 phases=4 linecode=LC2 length=13.0943 units=m
! reduced_from=line2294,line2318
! eliminated_buses=2295

New Line._virtual_line2337_line2363_line2388_line2411_line2434_line2457_line2480_line2503_line2526_line2553_line2581_line2610_line2641_line2673_line2709_line2748_line2787_line2827_line2867_line2937_line2971_line3007 bus1=3008.1.2.3.4 bus2=2313.1.2.3.4 phases=4 linecode=LC2 length=15.686434 units=m
! reduced_from=line2337,line2363,line2388,line2411,line2434,line2457,line2480,line2503,line2526,line2553,line2581,line2610,line2641,line2673,line2709,line2748,line2787,line2827,line2867,line2937,line2971,line3007
! eliminated_buses=2338,2364,2389,2412,2435,2458,2481,2504,2527,2554,2582,2611,2642,2674,2710,2749,2788,2828,2868,2938,2972

New Line._virtual_line2338_line2364_line2389_line2412_line2435_line2458_line2481_line2504_line2527_line2554_line2582_line2611_line2642_line2674_line2710_line2749_line2788_line2828_line2868 bus1=2869.1.2.3.4 bus2=2313.1.2.3.4 phases=4 linecode=LC2 length=18.091825 units=m
! reduced_from=line2338,line2364,line2389,line2412,line2435,line2458,line2481,line2504,line2527,line2554,line2582,line2611,line2642,line2674,line2710,line2749,line2788,line2828,line2868
! eliminated_buses=2339,2365,2390,2413,2436,2459,2482,2505,2528,2555,2583,2612,2643,2675,2711,2750,2789,2829

New Line._virtual_line2340_line2366_line2392_line2415_line2438_line2461_line2484_line2507_line2530_line2557_line2585 bus1=2313.1.2.3.4 bus2=2586.1.2.3.4 phases=4 linecode=LC5 length=29.1779 units=m
! reduced_from=line2340,line2366,line2392,line2415,line2438,line2461,line2484,line2507,line2530,line2557,line2585
! eliminated_buses=2341,2367,2393,2416,2439,2462,2485,2508,2531,2558

New Line._virtual_line2401_line2423_line2446_line2468_line2490_line2513 bus1=2514.1.2.3.4 bus2=2379.1.2.3.4 phases=4 linecode=LC8 length=16.9728 units=m
! reduced_from=line2401,line2423,line2446,line2468,line2490,line2513
! eliminated_buses=2402,2424,2447,2469,2491

New Line._virtual_line2536_line2563_line2592_line2621_line2652_line2686_line2722_line2762_line2801_line2841_line2912_line2950_line2986_line3021_line3051_line3080_line3110_line3138_line3167_line3196_line3222_line3247_line3274_line3298_line3322_line3348_line3373_line3400_line3427_line3454_line3480 bus1=2514.1.2.3.4 bus2=3481.1.2.3.4 phases=4 linecode=LC2 length=23.584566 units=m
! reduced_from=line2536,line2563,line2592,line2621,line2652,line2686,line2722,line2762,line2801,line2841,line2912,line2950,line2986,line3021,line3051,line3080,line3110,line3138,line3167,line3196,line3222,line3247,line3274,line3298,line3322,line3348,line3373,line3400,line3427,line3454,line3480
! eliminated_buses=2537,2564,2593,2622,2653,2687,2723,2763,2802,2842,2913,2951,2987,3022,3052,3081,3111,3139,3168,3197,3223,3248,3275,3299,3323,3349,3374,3401,3428,3455

New Line._virtual_line2537_line2564_line2593_line2622_line2653_line2687_line2723_line2763_line2802_line2842_line2913_line2951_line2987_line3022_line3052_line3081_line3111_line3139_line3168 bus1=2514.1.2.3.4 bus2=3169.1.2.3.4 phases=4 linecode=LC2 length=21.455056 units=m
! reduced_from=line2537,line2564,line2593,line2622,line2653,line2687,line2723,line2763,line2802,line2842,line2913,line2951,line2987,line3022,line3052,line3081,line3111,line3139,line3168
! eliminated_buses=2538,2565,2594,2623,2654,2688,2724,2764,2803,2843,2914,2952,2988,3023,3053,3082,3112,3140

New Line._virtual_line2539_line2566_line2595_line2624_line2655_line2689_line2725_line2765_line2804_line2844_line2915_line2953_line2989_line3024_line3054_line3083_line3113_line3141_line3170_line3197_line3223_line3248_line3275_line3299_line3323_line3349_line3374_line3401_line3428_line3455 bus1=3456.1.2.3.4 bus2=2514.1.2.3.4 phases=4 linecode=LC2 length=23.118125 units=m
! reduced_from=line2539,line2566,line2595,line2624,line2655,line2689,line2725,line2765,line2804,line2844,line2915,line2953,line2989,line3024,line3054,line3083,line3113,line3141,line3170,line3197,line3223,line3248,line3275,line3299,line3323,line3349,line3374,line3401,line3428,line3455
! eliminated_buses=2540,2567,2596,2625,2656,2690,2726,2766,2805,2845,2916,2954,2990,3025,3055,3084,3114,3142,3171,3198,3224,3249,3276,3300,3324,3350,3375,3402,3429

New Line._virtual_line2540_line2567_line2596_line2625_line2656_line2690 bus1=2691.1.2.3.4 bus2=2514.1.2.3.4 phases=4 linecode=LC8 length=18.635 units=m
! reduced_from=line2540,line2567,line2596,line2625,line2656,line2690
! eliminated_buses=2541,2568,2597,2626,2657

New Line._virtual_line2561_line2588_line2617_line2649_line2683_line2720_line2760_line2799_line2839 bus1=2840.1.2.3.4 bus2=2536.1.2.3.4 phases=4 linecode=LC9 length=6.015 units=m
! reduced_from=line2561,line2588,line2617,line2649,line2683,line2720,line2760,line2799,line2839
! eliminated_buses=2562,2589,2618,2650,2684,2721,2761,2800

New Line._virtual_line2614_line2645 bus1=2646.1.2.3.4 bus2=2586.1.2.3.4 phases=4 linecode=LC6 length=13.7657 units=m
! reduced_from=line2614,line2645
! eliminated_buses=2615

New Line._virtual_line2615_line2646 bus1=2586.1.2.3.4 bus2=2647.1.2.3.4 phases=4 linecode=LC5 length=3.7558 units=m
! reduced_from=line2615,line2646
! eliminated_buses=2616

New Line._virtual_line2667_line2703_line2742_line2781_line2821_line2861_line2932_line2969_line3005_line3038_line3065_line3094 bus1=2636.1.2.3.4 bus2=3095.1.2.3.4 phases=4 linecode=LC2 length=4.90104 units=m
! reduced_from=line2667,line2703,line2742,line2781,line2821,line2861,line2932,line2969,line3005,line3038,line3065,line3094
! eliminated_buses=2668,2704,2743,2782,2822,2862,2933,2970,3006,3039,3066

New Line._virtual_line2677_line2713_line2752_line2791_line2831_line2871_line2942_line2977_line3013_line3044_line3071_line3100_line3128_line3155_line3185_line3211_line3236_line3263_line3288_line3312_line3337_line3362_line3389_line3416_line3444_line3473_line3494_line3514_line3536_line3555_line3573_line3590_line3605_line3620_line3633_line3646_line3659_line3670_line3681_line3691_line3700_line3709_line3717 bus1=3718.1.2.3.4 bus2=2647.1.2.3.4 phases=4 linecode=LC2 length=17.98212 units=m
! reduced_from=line2677,line2713,line2752,line2791,line2831,line2871,line2942,line2977,line3013,line3044,line3071,line3100,line3128,line3155,line3185,line3211,line3236,line3263,line3288,line3312,line3337,line3362,line3389,line3416,line3444,line3473,line3494,line3514,line3536,line3555,line3573,line3590,line3605,line3620,line3633,line3646,line3659,line3670,line3681,line3691,line3700,line3709,line3717
! eliminated_buses=2678,2714,2753,2792,2832,2872,2943,2978,3014,3045,3072,3101,3129,3156,3186,3212,3237,3264,3289,3313,3338,3363,3390,3417,3445,3474,3495,3515,3537,3556,3574,3591,3606,3621,3634,3647,3660,3671,3682,3692,3701,3710

New Line._virtual_line2678_line2714_line2753_line2792_line2832_line2872_line2943_line2978_line3014_line3045_line3072_line3101_line3129_line3156_line3186_line3212_line3237_line3264_line3289_line3313_line3338_line3363_line3390_line3417_line3445_line3474_line3495_line3515_line3537_line3556_line3574_line3591_line3606 bus1=3607.1.2.3.4 bus2=2647.1.2.3.4 phases=4 linecode=LC2 length=17.675313 units=m
! reduced_from=line2678,line2714,line2753,line2792,line2832,line2872,line2943,line2978,line3014,line3045,line3072,line3101,line3129,line3156,line3186,line3212,line3237,line3264,line3289,line3313,line3338,line3363,line3390,line3417,line3445,line3474,line3495,line3515,line3537,line3556,line3574,line3591,line3606
! eliminated_buses=2679,2715,2754,2793,2833,2873,2944,2979,3015,3046,3073,3102,3130,3157,3187,3213,3238,3265,3290,3314,3339,3364,3391,3418,3446,3475,3496,3516,3538,3557,3575,3592

New Line._virtual_line2679_line2715_line2754_line2793_line2833_line2873_line2944_line2979_line3015_line3046_line3073_line3102_line3130_line3157_line3187_line3213_line3238_line3265_line3290_line3314_line3339_line3364_line3391_line3418_line3446_line3475_line3496_line3516_line3538_line3557_line3575_line3592_line3607_line3621_line3634 bus1=3635.1.2.3.4 bus2=2647.1.2.3.4 phases=4 linecode=LC2 length=20.131147 units=m
! reduced_from=line2679,line2715,line2754,line2793,line2833,line2873,line2944,line2979,line3015,line3046,line3073,line3102,line3130,line3157,line3187,line3213,line3238,line3265,line3290,line3314,line3339,line3364,line3391,line3418,line3446,line3475,line3496,line3516,line3538,line3557,line3575,line3592,line3607,line3621,line3634
! eliminated_buses=2680,2716,2755,2794,2834,2874,2945,2980,3016,3047,3074,3103,3131,3158,3188,3214,3239,3266,3291,3315,3340,3365,3392,3419,3447,3476,3497,3517,3539,3558,3576,3593,3608,3622

New Line._virtual_line2702_line2741_line2780_line2820_line2860_line2931_line2968_line3004_line3037_line3064_line3093_line3123_line3152_line3182_line3210_line3235_line3262_line3287 bus1=2667.1.2.3.4 bus2=3288.1.2.3.4 phases=4 linecode=LC2 length=5.33273 units=m
! reduced_from=line2702,line2741,line2780,line2820,line2860,line2931,line2968,line3004,line3037,line3064,line3093,line3123,line3152,line3182,line3210,line3235,line3262,line3287
! eliminated_buses=2703,2742,2781,2821,2861,2932,2969,3005,3038,3065,3094,3124,3153,3183,3211,3236,3263

New Line._virtual_line2716_line2755 bus1=2756.1.2.3.4 bus2=2681.1.2.3.4 phases=4 linecode=LC6 length=14.5209 units=m
! reduced_from=line2716,line2755
! eliminated_buses=2717

New Line._virtual_line2717_line2756_line2794_line2834_line2874_line2945_line2980_line3016_line3047 bus1=3048.1.2.3.4 bus2=2681.1.2.3.4 phases=4 linecode=LC5 length=32.14193 units=m
! reduced_from=line2717,line2756,line2794,line2834,line2874,line2945,line2980,line3016,line3047
! eliminated_buses=2718,2757,2795,2835,2875,2946,2981,3017

New Line._virtual_line2726_line2766_line2805_line2845_line2916_line2954_line2990_line3025_line3055_line3084_line3114_line3142_line3171_line3198_line3224_line3249_line3277_line3301_line3325_line3351_line3376_line3403_line3430 bus1=2691.1.2.3.4 bus2=3431.1.2.3.4 phases=4 linecode=LC9 length=37.50258 units=m
! reduced_from=line2726,line2766,line2805,line2845,line2916,line2954,line2990,line3025,line3055,line3084,line3114,line3142,line3171,line3198,line3224,line3249,line3277,line3301,line3325,line3351,line3376,line3403,line3430
! eliminated_buses=2727,2767,2806,2846,2917,2955,2991,3026,3056,3085,3115,3143,3172,3199,3225,3250,3278,3302,3326,3352,3377,3404

New Line._virtual_line2740_line2779_line2819_line2859_line2930_line2967_line3003_line3036_line3063_line3092_line3122_line3151_line3181_line3209 bus1=2702.1.2.3.4 bus2=3210.1.2.3.4 phases=4 linecode=LC2 length=4.598805 units=m
! reduced_from=line2740,line2779,line2819,line2859,line2930,line2967,line3003,line3036,line3063,line3092,line3122,line3151,line3181,line3209
! eliminated_buses=2741,2780,2820,2860,2931,2968,3004,3037,3064,3093,3123,3152,3182

New Line._virtual_line2778_line2818_line2858_line2929_line2966_line3002_line3035_line3062_line3091 bus1=2740.1.2.3.4 bus2=3092.1.2.3.4 phases=4 linecode=LC2 length=5.264537 units=m
! reduced_from=line2778,line2818,line2858,line2929,line2966,line3002,line3035,line3062,line3091
! eliminated_buses=2779,2819,2859,2930,2967,3003,3036,3063

New Line._virtual_line2816_line2856_line2927_line2964_line3000_line3033_line3061_line3090_line3120_line3149 bus1=3150.1.2.3.4 bus2=2778.1.2.3.4 phases=4 linecode=LC9 length=29.21455 units=m
! reduced_from=line2816,line2856,line2927,line2964,line3000,line3033,line3061,line3090,line3120,line3149
! eliminated_buses=2817,2857,2928,2965,3001,3034,3062,3091,3121

New Line._virtual_line2817_line2857_line2928_line2965_line3001_line3034 bus1=2778.1.2.3.4 bus2=3035.1.2.3.4 phases=4 linecode=LC2 length=4.57097 units=m
! reduced_from=line2817,line2857,line2928,line2965,line3001,line3034
! eliminated_buses=2818,2858,2929,2966,3002

New Line._virtual_line3074_line3103_line3131_line3158_line3188_line3214_line3239_line3266_line3291_line3315_line3341_line3366_line3393_line3420 bus1=3421.1.2.3.4 bus2=3048.1.2.3.4 phases=4 linecode=LC2 length=19.87726 units=m
! reduced_from=line3074,line3103,line3131,line3158,line3188,line3214,line3239,line3266,line3291,line3315,line3341,line3366,line3393,line3420
! eliminated_buses=3075,3104,3132,3159,3189,3215,3240,3267,3292,3316,3342,3367,3394

New Line._virtual_line3075_line3104_line3132_line3159_line3189_line3215_line3240_line3267_line3292_line3316_line3342_line3367_line3394_line3421 bus1=3422.1.2.3.4 bus2=3048.1.2.3.4 phases=4 linecode=LC2 length=20.616845 units=m
! reduced_from=line3075,line3104,line3132,line3159,line3189,line3215,line3240,line3267,line3292,line3316,line3342,line3367,line3394,line3421
! eliminated_buses=3076,3105,3133,3160,3190,3216,3241,3268,3293,3317,3343,3368,3395

New Line._virtual_line3076_line3106_line3135 bus1=3136.1.2.3.4 bus2=3048.1.2.3.4 phases=4 linecode=LC5 length=5.6605 units=m
! reduced_from=line3076,line3106,line3135
! eliminated_buses=3077,3107

New Line._virtual_line3163_line3193_line3219_line3244_line3271_line3296_line3320_line3346_line3371_line3398 bus1=3399.1.2.3.4 bus2=3136.1.2.3.4 phases=4 linecode=LC2 length=6.350639 units=m
! reduced_from=line3163,line3193,line3219,line3244,line3271,line3296,line3320,line3346,line3371,line3398
! eliminated_buses=3164,3194,3220,3245,3272,3297,3321,3347,3372

New Line._virtual_line3178_line3206 bus1=3207.1.2.3.4 bus2=3150.1.2.3.4 phases=4 linecode=LC2 length=5.4136 units=m
! reduced_from=line3178,line3206
! eliminated_buses=3179

New Line._virtual_line3179_line3207 bus1=3150.1.2.3.4 bus2=3208.1.2.3.4 phases=4 linecode=LC9 length=5.77162 units=m
! reduced_from=line3179,line3207
! eliminated_buses=3180

New Line._virtual_line3232_line3258 bus1=3259.1.2.3.4 bus2=3208.1.2.3.4 phases=4 linecode=LC2 length=4.2693 units=m
! reduced_from=line3232,line3258
! eliminated_buses=3233

New Line._virtual_line3233_line3260_line3285 bus1=3208.1.2.3.4 bus2=3286.1.2.3.4 phases=4 linecode=LC9 length=15.0727 units=m
! reduced_from=line3233,line3260,line3285
! eliminated_buses=3234,3261

New Line._virtual_line3309_line3333 bus1=3334.1.2.3.4 bus2=3286.1.2.3.4 phases=4 linecode=LC2 length=5.1925 units=m
! reduced_from=line3309,line3333
! eliminated_buses=3310

New Line._virtual_line3310_line3335_line3360 bus1=3286.1.2.3.4 bus2=3361.1.2.3.4 phases=4 linecode=LC9 length=10.8044 units=m
! reduced_from=line3310,line3335,line3360
! eliminated_buses=3311,3336

New Line._virtual_line3386_line3413 bus1=3414.1.2.3.4 bus2=3361.1.2.3.4 phases=4 linecode=LC2 length=8.9509 units=m
! reduced_from=line3386,line3413
! eliminated_buses=3387

New Line._virtual_line3415_line3443_line3472_line3493 bus1=3388.1.2.3.4 bus2=3494.1.2.3.4 phases=4 linecode=LC9 length=12.0106 units=m
! reduced_from=line3415,line3443,line3472,line3493
! eliminated_buses=3416,3444,3473

New Line._virtual_line3457_line3482_line3502_line3522_line3543_line3562_line3580_line3597_line3611_line3625_line3638_line3652_line3664_line3675_line3686_line3695_line3704_line3712_line3720_line3728_line3736_line3745_line3754_line3764_line3774_line3783_line3794_line3804_line3814_line3826_line3835_line3844_line3853 bus1=3431.1.2.3.4 bus2=3854.1.2.3.4 phases=4 linecode=LC2 length=15.03825 units=m
! reduced_from=line3457,line3482,line3502,line3522,line3543,line3562,line3580,line3597,line3611,line3625,line3638,line3652,line3664,line3675,line3686,line3695,line3704,line3712,line3720,line3728,line3736,line3745,line3754,line3764,line3774,line3783,line3794,line3804,line3814,line3826,line3835,line3844,line3853
! eliminated_buses=3458,3483,3503,3523,3544,3563,3581,3598,3612,3626,3639,3653,3665,3676,3687,3696,3705,3713,3721,3729,3737,3746,3755,3765,3775,3784,3795,3805,3815,3827,3836,3845

New Line._virtual_line3458_line3483_line3503_line3523_line3544_line3563_line3581_line3598_line3612_line3626_line3639_line3653_line3665_line3676_line3687_line3696_line3705_line3713_line3721_line3729_line3737_line3746_line3755_line3765_line3775_line3784_line3795_line3805 bus1=3431.1.2.3.4 bus2=3806.1.2.3.4 phases=4 linecode=LC6 length=9.459883 units=m
! reduced_from=line3458,line3483,line3503,line3523,line3544,line3563,line3581,line3598,line3612,line3626,line3639,line3653,line3665,line3676,line3687,line3696,line3705,line3713,line3721,line3729,line3737,line3746,line3755,line3765,line3775,line3784,line3795,line3805
! eliminated_buses=3459,3484,3504,3524,3545,3564,3582,3599,3613,3627,3640,3654,3666,3677,3688,3697,3706,3714,3722,3730,3738,3747,3756,3766,3776,3785,3796

New Line._virtual_line3513_line3535 bus1=3494.1.2.3.4 bus2=3536.1.2.3.4 phases=4 linecode=LC9 length=8.1203 units=m
! reduced_from=line3513,line3535
! eliminated_buses=3514

New Line._virtual_line3553_line3572 bus1=3573.1.2.3.4 bus2=3536.1.2.3.4 phases=4 linecode=LC2 length=4.2933 units=m
! reduced_from=line3553,line3572
! eliminated_buses=3554

New Line._virtual_line3648_line3660_line3671_line3682_line3692_line3701_line3710_line3718_line3726_line3734_line3744_line3753_line3763_line3773_line3782_line3793_line3803_line3813 bus1=3635.1.2.3.4 bus2=3814.1.2.3.4 phases=4 linecode=LC2 length=7.22344 units=m
! reduced_from=line3648,line3660,line3671,line3682,line3692,line3701,line3710,line3718,line3726,line3734,line3744,line3753,line3763,line3773,line3782,line3793,line3803,line3813
! eliminated_buses=3649,3661,3672,3683,3693,3702,3711,3719,3727,3735,3745,3754,3764,3774,3783,3794,3804

New Line._virtual_line3725_line3733_line3743_line3752_line3762_line3772_line3781_line3792_line3802_line3812_line3823_line3833_line3842_line3851_line3860_line3870_line3879_line3888_line3898_line3909 bus1=3910.1.2.3.4 bus2=3718.1.2.3.4 phases=4 linecode=LC2 length=9.557173 units=m
! reduced_from=line3725,line3733,line3743,line3752,line3762,line3772,line3781,line3792,line3802,line3812,line3823,line3833,line3842,line3851,line3860,line3870,line3879,line3888,line3898,line3909
! eliminated_buses=3726,3734,3744,3753,3763,3773,3782,3793,3803,3813,3824,3834,3843,3852,3861,3871,3880,3889,3899

New Line._virtual_line3816_line3827_line3836_line3845_line3854_line3864_line3873_line3882_line3891_line3901_line3912_line3923_line3933_line3941_line3948_line3954_line3960_line3964_line3969_line3974 bus1=3806.1.2.3.4 bus2=3975.1.2.3.4 phases=4 linecode=LC6 length=6.68404 units=m
! reduced_from=line3816,line3827,line3836,line3845,line3854,line3864,line3873,line3882,line3891,line3901,line3912,line3923,line3933,line3941,line3948,line3954,line3960,line3964,line3969,line3974
! eliminated_buses=3817,3828,3837,3846,3855,3865,3874,3883,3892,3902,3913,3924,3934,3942,3949,3955,3961,3965,3970

New Line._virtual_line3825_line3834_line3843_line3852_line3861_line3871_line3880_line3889_line3899_line3910_line3921_line3931_line3939_line3946_line3952_line3958 bus1=3959.1.2.3.4 bus2=3814.1.2.3.4 phases=4 linecode=LC2 length=16.882572 units=m
! reduced_from=line3825,line3834,line3843,line3852,line3861,line3871,line3880,line3889,line3899,line3910,line3921,line3931,line3939,line3946,line3952,line3958
! eliminated_buses=3826,3835,3844,3853,3862,3872,3881,3890,3900,3911,3922,3932,3940,3947,3953

New Line._virtual_line3863_line3872_line3881_line3890_line3900_line3911_line3922_line3932_line3940_line3947_line3953_line3959_line3963_line3968_line3973 bus1=3854.1.2.3.4 bus2=3974.1.2.3.4 phases=4 linecode=LC2 length=6.2424 units=m
! reduced_from=line3863,line3872,line3881,line3890,line3900,line3911,line3922,line3932,line3940,line3947,line3953,line3959,line3963,line3968,line3973
! eliminated_buses=3864,3873,3882,3891,3901,3912,3923,3933,3941,3948,3954,3960,3964,3969

New Line._virtual_line3920_line3930_line3938_line3945_line3951_line3957_line3962_line3967_line3972_line3977_line3984_line3989_line3993_line3997_line4001_line4004_line4007_line4010_line4013_line4016_line4019_line4022 bus1=3910.1.2.3.4 bus2=4023.1.2.3.4 phases=4 linecode=LC2 length=14.22739 units=m
! reduced_from=line3920,line3930,line3938,line3945,line3951,line3957,line3962,line3967,line3972,line3977,line3984,line3989,line3993,line3997,line4001,line4004,line4007,line4010,line4013,line4016,line4019,line4022
! eliminated_buses=3921,3931,3939,3946,3952,3958,3963,3968,3973,3978,3985,3990,3994,3998,4002,4005,4008,4011,4014,4017,4020

New Line._virtual_line3979_line3985_line3990_line3994_line3998_line4002_line4005_line4008_line4011_line4014_line4017_line4020_line4023_line4025 bus1=3974.1.2.3.4 bus2=4026.1.2.3.4 phases=4 linecode=LC2 length=16.972264 units=m
! reduced_from=line3979,line3985,line3990,line3994,line3998,line4002,line4005,line4008,line4011,line4014,line4017,line4020,line4023,line4025
! eliminated_buses=3980,3986,3991,3995,3999,4003,4006,4009,4012,4015,4018,4021,4024

New Line._virtual_line3981_line3986_line3991_line3995_line3999_line4003_line4006_line4009_line4012_line4015_line4018_line4021_line4024_line4026_line4027_line4028_line4029_line4030_line4031_line4032_line4033_line4034_line4035_line4036_line4037 bus1=3975.1.2.3.4 bus2=4038.1.2.3.4 phases=4 linecode=LC6 length=10.554621 units=m
! reduced_from=line3981,line3986,line3991,line3995,line3999,line4003,line4006,line4009,line4012,line4015,line4018,line4021,line4024,line4026,line4027,line4028,line4029,line4030,line4031,line4032,line4033,line4034,line4035,line4036,line4037
! eliminated_buses=3982,3987,3992,3996,4000,4004,4007,4010,4013,4016,4019,4022,4025,4027,4028,4029,4030,4031,4032,4033,4034,4035,4036,4037

New Line._virtual_line4039_line4040_line4041_line4042_line4043_line4044_line4045_line4046_line4047_line4048_line4049_line4050_line4052_line4054_line4056_line4058_line4060_line4062_line4064_line4066_line4068_line4070 bus1=4038.1.2.3.4 bus2=4071.1.2.3.4 phases=4 linecode=LC6 length=14.898095 units=m
! reduced_from=line4039,line4040,line4041,line4042,line4043,line4044,line4045,line4046,line4047,line4048,line4049,line4050,line4052,line4054,line4056,line4058,line4060,line4062,line4064,line4066,line4068,line4070
! eliminated_buses=4040,4041,4042,4043,4044,4045,4046,4047,4048,4049,4050,4051,4053,4055,4057,4059,4061,4063,4065,4067,4069

New Line.LINE62 bus1=56.1.2.3.4 bus2=63.1.2.3.4 phases=4 linecode=LC8 length=19.6063 units=m

New Line.LINE128 bus1=124.1.2.3.4 bus2=129.1.2.3.4 phases=4 linecode=LC1 length=2.6456 units=m

New Line.LINE234 bus1=224.1.2.3.4 bus2=235.1.2.3.4 phases=4 linecode=LC2 length=6.5578 units=m

New Line.LINE675 bus1=656.1.2.3.4 bus2=676.1.2.3.4 phases=4 linecode=LC2 length=4.4295 units=m

New Line.LINE676 bus1=656.1.2.3.4 bus2=677.1.2.3.4 phases=4 linecode=LC2 length=6.6873 units=m

New Line.LINE699 bus1=676.1.2.3.4 bus2=700.1.2.3.4 phases=4 linecode=LC2 length=7.536 units=m

New Line.LINE779 bus1=759.1.2.3.4 bus2=780.1.2.3.4 phases=4 linecode=LC3 length=3.8405 units=m

New Line.LINE802 bus1=780.1.2.3.4 bus2=803.1.2.3.4 phases=4 linecode=LC3 length=5.3089 units=m

New Line.LINE827 bus1=803.1.2.3.4 bus2=828.1.2.3.4 phases=4 linecode=LC3 length=3.9293 units=m

New Line.LINE905 bus1=880.1.2.3.4 bus2=906.1.2.3.4 phases=4 linecode=LC3 length=3.4662 units=m

New Line.LINE909 bus1=883.1.2.3.4 bus2=910.1.2.3.4 phases=4 linecode=LC9 length=5.5082 units=m

New Line.LINE933 bus1=906.1.2.3.4 bus2=934.1.2.3.4 phases=4 linecode=LC3 length=5.8679 units=m

New Line.LINE938 bus1=910.1.2.3.4 bus2=939.1.2.3.4 phases=4 linecode=LC9 length=1.1044 units=m

New Line.LINE963 bus1=934.1.2.3.4 bus2=964.1.2.3.4 phases=4 linecode=LC3 length=3.0456 units=m

New Line.LINE969 bus1=939.1.2.3.4 bus2=970.1.2.3.4 phases=4 linecode=LC9 length=11.7697 units=m

New Line.LINE994 bus1=964.1.2.3.4 bus2=995.1.2.3.4 phases=4 linecode=LC3 length=5.6334 units=m

New Line.LINE1000 bus1=970.1.2.3.4 bus2=1001.1.2.3.4 phases=4 linecode=LC9 length=3.4764 units=m

New Line.LINE1029 bus1=995.1.2.3.4 bus2=1030.1.2.3.4 phases=4 linecode=LC3 length=3.2715 units=m

New Line.LINE1036 bus1=1001.1.2.3.4 bus2=1037.1.2.3.4 phases=4 linecode=LC9 length=6.0173 units=m

New Line.LINE1124 bus1=1087.1.2.3.4 bus2=1125.1.2.3.4 phases=4 linecode=LC3 length=2.8003 units=m

New Line.LINE1140 bus1=1103.1.2.3.4 bus2=1141.1.2.3.4 phases=4 linecode=LC3 length=3.1577 units=m

New Line.LINE1152 bus1=1114.1.2.3.4 bus2=1153.1.2.3.4 phases=4 linecode=LC9 length=7.6473 units=m

New Line.LINE1166 bus1=1125.1.2.3.4 bus2=1167.1.2.3.4 phases=4 linecode=LC3 length=7.3015 units=m

New Line.LINE1181 bus1=1141.1.2.3.4 bus2=1182.1.2.3.4 phases=4 linecode=LC3 length=7.1459 units=m

New Line.LINE1310 bus1=1276.1.2.3.4 bus2=1311.1.2.3.4 phases=4 linecode=LC2 length=1.0111 units=m

New Line.LINE1311 bus1=1276.1.2.3.4 bus2=1312.1.2.3.4 phases=4 linecode=LC2 length=9.2025 units=m

New Line.LINE1345 bus1=1313.1.2.3.4 bus2=1346.1.2.3.4 phases=4 linecode=LC2 length=2.6947 units=m

New Line.LINE1346 bus1=1313.1.2.3.4 bus2=1347.1.2.3.4 phases=4 linecode=LC2 length=2.6947 units=m

New Line.LINE1354 bus1=1321.1.2.3.4 bus2=1355.1.2.3.4 phases=4 linecode=LC3 length=3.0341 units=m

New Line.LINE1385 bus1=1355.1.2.3.4 bus2=1386.1.2.3.4 phases=4 linecode=LC3 length=7.1223 units=m

New Line.LINE1465 bus1=1441.1.2.3.4 bus2=1466.1.2.3.4 phases=4 linecode=LC3 length=6.8558 units=m

New Line.LINE1491 bus1=1466.1.2.3.4 bus2=1492.1.2.3.4 phases=4 linecode=LC3 length=3.2722 units=m

New Line.LINE1515 bus1=1485.1.2.3.4 bus2=1516.1.2.3.4 phases=4 linecode=LC3 length=3.7 units=m

New Line.LINE1521 bus1=1492.1.2.3.4 bus2=1522.1.2.3.4 phases=4 linecode=LC3 length=5.2652 units=m

New Line.LINE1531 bus1=1502.1.2.3.4 bus2=1532.1.2.3.4 phases=4 linecode=LC1 length=0.5 units=m

New Line.LINE1545 bus1=1516.1.2.3.4 bus2=1546.1.2.3.4 phases=4 linecode=LC3 length=5.8597 units=m

New Line.LINE1575 bus1=1546.1.2.3.4 bus2=1576.1.2.3.4 phases=4 linecode=LC3 length=2.3001 units=m

New Line.LINE1594 bus1=1565.1.2.3.4 bus2=1595.1.2.3.4 phases=4 linecode=LC3 length=6.6228 units=m

New Line.LINE1599 bus1=1568.1.2.3.4 bus2=1600.1.2.3.4 phases=4 linecode=LC3 length=5.6895 units=m

New Line.LINE1608 bus1=1576.1.2.3.4 bus2=1609.1.2.3.4 phases=4 linecode=LC3 length=7.5984 units=m

New Line.LINE1627 bus1=1595.1.2.3.4 bus2=1628.1.2.3.4 phases=4 linecode=LC3 length=3.1005 units=m

New Line.LINE1643 bus1=1609.1.2.3.4 bus2=1644.1.2.3.4 phases=4 linecode=LC3 length=1.6092 units=m

New Line.LINE1662 bus1=1628.1.2.3.4 bus2=1663.1.2.3.4 phases=4 linecode=LC3 length=4.4885 units=m

New Line.LINE1679 bus1=1644.1.2.3.4 bus2=1680.1.2.3.4 phases=4 linecode=LC3 length=7.3555 units=m

New Line.LINE1694 bus1=1663.1.2.3.4 bus2=1695.1.2.3.4 phases=4 linecode=LC3 length=4.665 units=m

New Line.LINE1702 bus1=1670.1.2.3.4 bus2=1703.1.2.3.4 phases=4 linecode=LC3 length=6.5103 units=m

New Line.LINE1713 bus1=1680.1.2.3.4 bus2=1714.1.2.3.4 phases=4 linecode=LC3 length=2.7014 units=m

New Line.LINE1729 bus1=1695.1.2.3.4 bus2=1730.1.2.3.4 phases=4 linecode=LC3 length=7.3782 units=m

New Line.LINE1738 bus1=1703.1.2.3.4 bus2=1739.1.2.3.4 phases=4 linecode=LC3 length=2.601 units=m

New Line.LINE1750 bus1=1714.1.2.3.4 bus2=1751.1.2.3.4 phases=4 linecode=LC3 length=6.3553 units=m

New Line.LINE1768 bus1=1730.1.2.3.4 bus2=1769.1.2.3.4 phases=4 linecode=LC3 length=2.4992 units=m

New Line.LINE1777 bus1=1739.1.2.3.4 bus2=1778.1.2.3.4 phases=4 linecode=LC3 length=5.6144 units=m

New Line.LINE1788 bus1=1751.1.2.3.4 bus2=1789.1.2.3.4 phases=4 linecode=LC3 length=3.0083 units=m

New Line.LINE1806 bus1=1769.1.2.3.4 bus2=1807.1.2.3.4 phases=4 linecode=LC3 length=6.6141 units=m

New Line.LINE1816 bus1=1778.1.2.3.4 bus2=1817.1.2.3.4 phases=4 linecode=LC3 length=3.6003 units=m

New Line.LINE1856 bus1=1817.1.2.3.4 bus2=1857.1.2.3.4 phases=4 linecode=LC3 length=5.6415 units=m

New Line.LINE1898 bus1=1857.1.2.3.4 bus2=1899.1.2.3.4 phases=4 linecode=LC3 length=4.6086 units=m

New Line.LINE1940 bus1=1899.1.2.3.4 bus2=1941.1.2.3.4 phases=4 linecode=LC3 length=4.434 units=m

New Line.LINE2073 bus1=2039.1.2.3.4 bus2=2074.1.2.3.4 phases=4 linecode=LC5 length=2.4046 units=m

New Line.LINE2100 bus1=2066.1.2.3.4 bus2=2101.1.2.3.4 phases=4 linecode=LC2 length=7.7969 units=m

New Line.LINE2197 bus1=2173.1.2.3.4 bus2=2198.1.2.3.4 phases=4 linecode=LC2 length=8.1976 units=m

New Line.LINE2295 bus1=2272.1.2.3.4 bus2=2296.1.2.3.4 phases=4 linecode=LC2 length=6.807 units=m

New Line.LINE2378 bus1=2354.1.2.3.4 bus2=2379.1.2.3.4 phases=4 linecode=LC1 length=1.3117 units=m

New Line.LINE2666 bus1=2636.1.2.3.4 bus2=2667.1.2.3.4 phases=4 linecode=LC9 length=5.7888 units=m

New Line.LINE2680 bus1=2647.1.2.3.4 bus2=2681.1.2.3.4 phases=4 linecode=LC5 length=9.0735 units=m

New Line.LINE2701 bus1=2667.1.2.3.4 bus2=2702.1.2.3.4 phases=4 linecode=LC9 length=7.4086 units=m

New Line.LINE2739 bus1=2702.1.2.3.4 bus2=2740.1.2.3.4 phases=4 linecode=LC9 length=5.9636 units=m

New Line.LINE2744 bus1=2706.1.2.3.4 bus2=2745.1.2.3.4 phases=4 linecode=LC2 length=7.4878 units=m

New Line.LINE2745 bus1=2707.1.2.3.4 bus2=2746.1.2.3.4 phases=4 linecode=LC2 length=6.091 units=m

New Line.LINE2777 bus1=2740.1.2.3.4 bus2=2778.1.2.3.4 phases=4 linecode=LC9 length=7.1589 units=m

New Line.LINE2879 bus1=2840.1.2.3.4 bus2=2880.1.2.3.4 phases=4 linecode=LC1 length=12.0118 units=m

New Line.LINE2880 bus1=2840.1.2.3.4 bus2=2881.1.2.3.4 phases=4 linecode=LC1 length=12.0118 units=m

New Line.LINE2881 bus1=2840.1.2.3.4 bus2=2882.1.2.3.4 phases=4 linecode=LC1 length=12.0118 units=m

New Line.LINE2882 bus1=2840.1.2.3.4 bus2=2883.1.2.3.4 phases=4 linecode=LC1 length=12.0118 units=m

New Line.LINE2883 bus1=2840.1.2.3.4 bus2=2884.1.2.3.4 phases=4 linecode=LC1 length=12.0118 units=m

New Line.LINE2884 bus1=2840.1.2.3.4 bus2=2885.1.2.3.4 phases=4 linecode=LC1 length=12.0118 units=m

New Line.LINE2885 bus1=2840.1.2.3.4 bus2=2886.1.2.3.4 phases=4 linecode=LC1 length=12.0118 units=m

New Line.LINE2886 bus1=2840.1.2.3.4 bus2=2887.1.2.3.4 phases=4 linecode=LC1 length=12.0118 units=m

New Line.LINE2887 bus1=2840.1.2.3.4 bus2=2888.1.2.3.4 phases=4 linecode=LC1 length=12.0118 units=m

New Line.LINE2888 bus1=2840.1.2.3.4 bus2=2889.1.2.3.4 phases=4 linecode=LC1 length=12.0118 units=m

New Line.LINE2889 bus1=2840.1.2.3.4 bus2=2890.1.2.3.4 phases=4 linecode=LC1 length=12.0118 units=m

New Line.LINE2890 bus1=2840.1.2.3.4 bus2=2891.1.2.3.4 phases=4 linecode=LC1 length=12.0118 units=m

New Line.LINE2891 bus1=2840.1.2.3.4 bus2=2892.1.2.3.4 phases=4 linecode=LC1 length=12.0118 units=m

New Line.LINE2892 bus1=2840.1.2.3.4 bus2=2893.1.2.3.4 phases=4 linecode=LC1 length=12.0118 units=m

New Line.LINE2893 bus1=2840.1.2.3.4 bus2=2894.1.2.3.4 phases=4 linecode=LC1 length=12.0118 units=m

New Line.LINE2894 bus1=2840.1.2.3.4 bus2=2895.1.2.3.4 phases=4 linecode=LC1 length=12.0118 units=m

New Line.LINE2895 bus1=2840.1.2.3.4 bus2=2896.1.2.3.4 phases=4 linecode=LC1 length=12.0118 units=m

New Line.LINE2896 bus1=2840.1.2.3.4 bus2=2897.1.2.3.4 phases=4 linecode=LC1 length=12.0118 units=m

New Line.LINE2897 bus1=2840.1.2.3.4 bus2=2898.1.2.3.4 phases=4 linecode=LC1 length=12.0118 units=m

New Line.LINE2898 bus1=2840.1.2.3.4 bus2=2899.1.2.3.4 phases=4 linecode=LC1 length=12.0118 units=m

New Line.LINE2899 bus1=2840.1.2.3.4 bus2=2900.1.2.3.4 phases=4 linecode=LC1 length=12.0118 units=m

New Line.LINE2900 bus1=2840.1.2.3.4 bus2=2901.1.2.3.4 phases=4 linecode=LC1 length=12.0118 units=m

New Line.LINE2901 bus1=2840.1.2.3.4 bus2=2902.1.2.3.4 phases=4 linecode=LC1 length=12.0118 units=m

New Line.LINE2902 bus1=2840.1.2.3.4 bus2=2903.1.2.3.4 phases=4 linecode=LC1 length=12.0118 units=m

New Line.LINE2903 bus1=2840.1.2.3.4 bus2=2904.1.2.3.4 phases=4 linecode=LC1 length=12.0118 units=m

New Line.LINE2904 bus1=2840.1.2.3.4 bus2=2905.1.2.3.4 phases=4 linecode=LC1 length=12.0118 units=m

New Line.LINE2905 bus1=2840.1.2.3.4 bus2=2906.1.2.3.4 phases=4 linecode=LC1 length=12.0118 units=m

New Line.LINE2906 bus1=2840.1.2.3.4 bus2=2907.1.2.3.4 phases=4 linecode=LC1 length=12.0118 units=m

New Line.LINE2907 bus1=2840.1.2.3.4 bus2=2908.1.2.3.4 phases=4 linecode=LC1 length=12.0118 units=m

New Line.LINE2908 bus1=2840.1.2.3.4 bus2=2909.1.2.3.4 phases=4 linecode=LC1 length=12.0118 units=m

New Line.LINE2909 bus1=2840.1.2.3.4 bus2=2910.1.2.3.4 phases=4 linecode=LC1 length=12.0118 units=m

New Line.LINE2910 bus1=2840.1.2.3.4 bus2=2911.1.2.3.4 phases=4 linecode=LC1 length=12.0118 units=m

New Line.LINE2938 bus1=2869.1.2.3.4 bus2=2939.1.2.3.4 phases=4 linecode=LC2 length=6.4413 units=m

New Line.LINE2939 bus1=2869.1.2.3.4 bus2=2940.1.2.3.4 phases=4 linecode=LC2 length=7.2809 units=m

New Line.LINE3040 bus1=3008.1.2.3.4 bus2=3041.1.2.3.4 phases=4 linecode=LC2 length=5.1532 units=m

New Line.LINE3387 bus1=3361.1.2.3.4 bus2=3388.1.2.3.4 phases=4 linecode=LC9 length=5.9247 units=m

New Line.LINE3414 bus1=3388.1.2.3.4 bus2=3415.1.2.3.4 phases=4 linecode=LC2 length=2.055 units=m

New Line.LINE3425 bus1=3399.1.2.3.4 bus2=3426.1.2.3.4 phases=4 linecode=LC2 length=3.6217 units=m

New Line.LINE3439 bus1=3414.1.2.3.4 bus2=3440.1.2.3.4 phases=4 linecode=LC2 length=1.5316 units=m

New Line.LINE3440 bus1=3415.1.2.3.4 bus2=3441.1.2.3.4 phases=4 linecode=LC2 length=2.1089 units=m

New Line.LINE3441 bus1=3415.1.2.3.4 bus2=3442.1.2.3.4 phases=4 linecode=LC2 length=2.1089 units=m

New Line.LINE3468 bus1=3440.1.2.3.4 bus2=3469.1.2.3.4 phases=4 linecode=LC2 length=10.8566 units=m

New Line.LINE3512 bus1=3494.1.2.3.4 bus2=3513.1.2.3.4 phases=4 linecode=LC2 length=2.0633 units=m

New Line.LINE3532 bus1=3513.1.2.3.4 bus2=3533.1.2.3.4 phases=4 linecode=LC2 length=2.3381 units=m

New Line.LINE3533 bus1=3513.1.2.3.4 bus2=3534.1.2.3.4 phases=4 linecode=LC2 length=2.3381 units=m

New Line.LINE3647 bus1=3635.1.2.3.4 bus2=3648.1.2.3.4 phases=4 linecode=LC2 length=8.4029 units=m

New Line.LINE3724 bus1=3718.1.2.3.4 bus2=3725.1.2.3.4 phases=4 linecode=LC2 length=8.4552 units=m

New Line.LINE3815 bus1=3806.1.2.3.4 bus2=3816.1.2.3.4 phases=4 linecode=LC2 length=8.0949 units=m

New Line.LINE3824 bus1=3814.1.2.3.4 bus2=3825.1.2.3.4 phases=4 linecode=LC2 length=7.7286 units=m

New Line.LINE3862 bus1=3854.1.2.3.4 bus2=3863.1.2.3.4 phases=4 linecode=LC2 length=8.4135 units=m

New Line.LINE3919 bus1=3910.1.2.3.4 bus2=3920.1.2.3.4 phases=4 linecode=LC2 length=8.0055 units=m

New Line.LINE3978 bus1=3974.1.2.3.4 bus2=3979.1.2.3.4 phases=4 linecode=LC2 length=8.9206 units=m

New Line.LINE3980 bus1=3975.1.2.3.4 bus2=3981.1.2.3.4 phases=4 linecode=LC2 length=7.3034 units=m

New Line.LINE4038 bus1=4038.1.2.3.4 bus2=4039.1.2.3.4 phases=4 linecode=LC6 length=8.9842 units=m
