! Reduced enabled lines.

New Line._virtual_line0_line1_line2_line3_line4_line5_line6_line7_line8_line9_line10_line11_line12_line13_line14_line15_line16_line17_line18_line19_line20_line21_line22_line23_line24_line25_line26_line27_line28_line29_line30_line31_line32_line33_line35_line36_line37_line38_line39_line40_line41_line42_line43_line44_line45_line46_line47_line48_line49_line50_line51_line52_line53_line54_line55_line56_line57_line58_line59_line60_line61_line62_line64_line66_line68_line70_line72_line74_line76_line78_line80_line82_line84 bus1=sourcebus.1.2.3.4 bus2=85.1.2.3.4 phases=4 linecode=LC8 length=93.063425 units=m
! reduced_from=line0,line1,line2,line3,line4,line5,line6,line7,line8,line9,line10,line11,line12,line13,line14,line15,line16,line17,line18,line19,line20,line21,line22,line23,line24,line25,line26,line27,line28,line29,line30,line31,line32,line33,line35,line36,line37,line38,line39,line40,line41,line42,line43,line44,line45,line46,line47,line48,line49,line50,line51,line52,line53,line54,line55,line56,line57,line58,line59,line60,line61,line62,line64,line66,line68,line70,line72,line74,line76,line78,line80,line82,line84
! eliminated_buses=1,2,3,4,5,6,7,8,9,10,11,12,13,14,15,16,17,18,19,20,21,22,23,24,25,26,27,28,29,30,31,32,33,34,36,37,38,39,40,41,42,43,44,45,46,47,48,49,50,51,52,53,54,55,56,57,58,59,60,61,62,63,65,67,69,71,73,75,77,79,81,83

New Line._virtual_line86_line88_line90_line92_line94_line96_line98_line100_line102_line104 bus1=105.1.2.3.4 bus2=85.1.2.3.4 phases=4 linecode=LC8 length=30.85357 units=m
! reduced_from=line86,line88,line90,line92,line94,line96,line98,line100,line102,line104
! eliminated_buses=87,89,91,93,95,97,99,101,103

New Line._virtual_line87_line89_line91_line93_line95_line97_line99_line101_line103_line106_line112_line118_line125_line132_line139_line146_line153_line160_line167 bus1=168.1.2.3.4 bus2=85.1.2.3.4 phases=4 linecode=LC7 length=20.7479 units=m
! reduced_from=line87,line89,line91,line93,line95,line97,line99,line101,line103,line106,line112,line118,line125,line132,line139,line146,line153,line160,line167
! eliminated_buses=88,90,92,94,96,98,100,102,104,107,113,119,126,133,140,147,154,161

New Line._virtual_line107_line113_line119_line126_line133_line140_line147_line154_line161_line168_line176_line182_line189_line196_line203_line211_line219_line229_line242_line255_line269_line283_line296_line308_line319_line330_line340_line348_line356_line364_line372_line381_line388_line395_line402_line410_line417_line424_line431_line438 bus1=105.1.2.3.4 bus2=439.1.2.3.4 phases=4 linecode=LC2 length=39.818588 units=m
! reduced_from=line107,line113,line119,line126,line133,line140,line147,line154,line161,line168,line176,line182,line189,line196,line203,line211,line219,line229,line242,line255,line269,line283,line296,line308,line319,line330,line340,line348,line356,line364,line372,line381,line388,line395,line402,line410,line417,line424,line431,line438
! eliminated_buses=108,114,120,127,134,141,148,155,162,169,177,183,190,197,204,212,220,230,243,256,270,284,297,309,320,331,341,349,357,365,373,382,389,396,403,411,418,425,432

New Line._virtual_line110_line116 bus1=117.1.2.3.4 bus2=105.1.2.3.4 phases=4 linecode=LC8 length=5.94812 units=m
! reduced_from=line110,line116
! eliminated_buses=111

New Line._virtual_line122_line129_line136_line143_line150_line157_line164_line171_line178_line184_line191 bus1=117.1.2.3.4 bus2=192.1.2.3.4 phases=4 linecode=LC2 length=20.86864 units=m
! reduced_from=line122,line129,line136,line143,line150,line157,line164,line171,line178,line184,line191
! eliminated_buses=123,130,137,144,151,158,165,172,179,185

New Line._virtual_line123_line130_line137_line144_line151_line158_line165_line172_line179_line185_line192_line198_line205_line213_line221_line231_line244 bus1=117.1.2.3.4 bus2=245.1.2.3.4 phases=4 linecode=LC8 length=46.77616 units=m
! reduced_from=line123,line130,line137,line144,line151,line158,line165,line172,line179,line185,line192,line198,line205,line213,line221,line231,line244
! eliminated_buses=124,131,138,145,152,159,166,173,180,186,193,199,206,214,222,232

New Line._virtual_line175_line181 bus1=168.1.2.3.4 bus2=182.1.2.3.4 phases=4 linecode=LC7 length=6.419 units=m
! reduced_from=line175,line181
! eliminated_buses=176

New Line._virtual_line188_line194 bus1=195.1.2.3.4 bus2=182.1.2.3.4 phases=4 linecode=LC7 length=11.6373 units=m
! reduced_from=line188,line194
! eliminated_buses=189

New Line._virtual_line200_line207_line215_line223_line233_line246_line260_line274 bus1=195.1.2.3.4 bus2=275.1.2.3.4 phases=4 linecode=LC2 length=8.37249 units=m
! reduced_from=line200,line207,line215,line223,line233,line246,line260,line274
! eliminated_buses=201,208,216,224,234,247,261

New Line._virtual_line208_line216_line224_line234_line247_line261_line275_line288_line301 bus1=202.1.2.3.4 bus2=302.1.2.3.4 phases=4 linecode=LC2 length=8.19219 units=m
! reduced_from=line208,line216,line224,line234,line247,line261,line275,line288,line301
! eliminated_buses=209,217,225,235,248,262,276,289

New Line._virtual_line209_line217_line225_line235_line248_line262_line276_line289_line302_line313_line324_line335_line345_line353_line361_line369_line378_line386_line393_line401_line409_line416_line423_line430_line437 bus1=202.1.2.3.4 bus2=438.1.2.3.4 phases=4 linecode=LC7 length=16.384941 units=m
! reduced_from=line209,line217,line225,line235,line248,line262,line276,line289,line302,line313,line324,line335,line345,line353,line361,line369,line378,line386,line393,line401,line409,line416,line423,line430,line437
! eliminated_buses=210,218,226,236,249,263,277,290,303,314,325,336,346,354,362,370,379,387,394,402,410,417,424,431

New Line._virtual_line257_line271_line285_line298_line310_line321_line332_line342_line350_line358_line366 bus1=245.1.2.3.4 bus2=367.1.2.3.4 phases=4 linecode=LC5 length=1.184906 units=m
! reduced_from=line257,line271,line285,line298,line310,line321,line332,line342,line350,line358,line366
! eliminated_buses=258,272,286,299,311,322,333,343,351,359

New Line._virtual_line258_line272_line286_line299_line311_line322_line333_line343_line351_line359_line367_line376_line384_line391_line399_line407_line414_line421_line428_line435_line442_line453_line463_line472_line482 bus1=483.1.2.3.4 bus2=245.1.2.3.4 phases=4 linecode=LC8 length=40.57891 units=m
! reduced_from=line258,line272,line286,line299,line311,line322,line333,line343,line351,line359,line367,line376,line384,line391,line399,line407,line414,line421,line428,line435,line442,line453,line463,line472,line482
! eliminated_buses=259,273,287,300,312,323,334,344,352,360,368,377,385,392,400,408,415,422,429,436,443,454,464,473

New Line._virtual_line374_line383_line390 bus1=367.1.2.3.4 bus2=391.1.2.3.4 phases=4 linecode=LC8 length=4.071 units=m
! reduced_from=line374,line383,line390
! eliminated_buses=375,384

New Line._virtual_line397_line405_line412_line419_line426_line433_line440_line450_line460_line469_line478_line488_line501_line514_line526_line538_line550_line562_line574_line586_line596_line605_line613_line622_line630_line638_line646_line654_line663_line673_line685_line700_line716_line732_line747_line762_line775_line790_line807_line828_line852 bus1=391.1.2.3.4 bus2=853.1.2.3.4 phases=4 linecode=LC8 length=58.37592 units=m
! reduced_from=line397,line405,line412,line419,line426,line433,line440,line450,line460,line469,line478,line488,line501,line514,line526,line538,line550,line562,line574,line586,line596,line605,line613,line622,line630,line638,line646,line654,line663,line673,line685,line700,line716,line732,line747,line762,line775,line790,line807,line828,line852
! eliminated_buses=398,406,413,420,427,434,441,451,461,470,479,489,502,515,527,539,551,563,575,587,597,606,614,623,631,639,647,655,664,674,686,701,717,733,748,763,776,791,808,829

New Line._virtual_line398_line406_line413_line420_line427_line434_line441_line451_line461_line470_line479_line489_line502_line515_line527_line539_line551_line563_line576_line587_line597_line606_line615_line624_line633_line641_line649_line657_line666 bus1=667.1.2.3.4 bus2=391.1.2.3.4 phases=4 linecode=LC9 length=20.912297 units=m
! reduced_from=line398,line406,line413,line420,line427,line434,line441,line451,line461,line470,line479,line489,line502,line515,line527,line539,line551,line563,line576,line587,line597,line606,line615,line624,line633,line641,line649,line657,line666
! eliminated_buses=399,407,414,421,428,435,442,452,462,471,480,490,503,516,528,540,552,564,577,588,598,607,616,625,634,642,650,658

New Line._virtual_line445_line455_line465_line474_line484_line495_line507_line520_line532_line545_line557_line569 bus1=438.1.2.3.4 bus2=570.1.2.3.4 phases=4 linecode=LC2 length=9.080361 units=m
! reduced_from=line445,line455,line465,line474,line484,line495,line507,line520,line532,line545,line557,line569
! eliminated_buses=446,456,466,475,485,496,508,521,533,546,558

New Line._virtual_line448_line458_line468_line477_line487_line500 bus1=501.1.2.3.4 bus2=439.1.2.3.4 phases=4 linecode=LC2 length=5.92229 units=m
! reduced_from=line448,line458,line468,line477,line487,line500
! eliminated_buses=449,459,469,478,488

New Line._virtual_line456_line466_line475_line485_line496_line508_line521_line533_line546_line558_line570_line582 bus1=583.1.2.3.4 bus2=447.1.2.3.4 phases=4 linecode=LC2 length=12.04872 units=m
! reduced_from=line456,line466,line475,line485,line496,line508,line521,line533,line546,line558,line570,line582
! eliminated_buses=457,467,476,486,497,509,522,534,547,559,571

New Line._virtual_line457_line467_line476_line486 bus1=447.1.2.3.4 bus2=487.1.2.3.4 phases=4 linecode=LC7 length=8.4635 units=m
! reduced_from=line457,line467,line476,line486
! eliminated_buses=458,468,477

New Line._virtual_line493_line504_line517_line529_line542_line554_line566_line579_line590_line600_line609_line618_line627_line635_line643 bus1=644.1.2.3.4 bus2=483.1.2.3.4 phases=4 linecode=LC8 length=31.83571 units=m
! reduced_from=line493,line504,line517,line529,line542,line554,line566,line579,line590,line600,line609,line618,line627,line635,line643
! eliminated_buses=494,505,518,530,543,555,567,580,591,601,610,619,628,636

New Line._virtual_line497_line509_line522_line534_line547_line559_line571_line583_line593 bus1=594.1.2.3.4 bus2=487.1.2.3.4 phases=4 linecode=LC2 length=6.700971 units=m
! reduced_from=line497,line509,line522,line534,line547,line559,line571,line583,line593
! eliminated_buses=498,510,523,535,548,560,572,584

New Line._virtual_line498_line510_line523_line535_line548_line560_line572_line584_line594_line603_line611_line620_line628_line636_line644 bus1=487.1.2.3.4 bus2=645.1.2.3.4 phases=4 linecode=LC2 length=11.741445 units=m
! reduced_from=line498,line510,line523,line535,line548,line560,line572,line584,line594,line603,line611,line620,line628,line636,line644
! eliminated_buses=499,511,524,536,549,561,573,585,595,604,612,621,629,637

New Line._virtual_line511_line524_line536 bus1=537.1.2.3.4 bus2=500.1.2.3.4 phases=4 linecode=LC5 length=2.34916 units=m
! reduced_from=line511,line524,line536
! eliminated_buses=512,525

New Line._virtual_line513_line525_line537 bus1=501.1.2.3.4 bus2=538.1.2.3.4 phases=4 linecode=LC2 length=12.2849 units=m
! reduced_from=line513,line525,line537
! eliminated_buses=514,526

New Line._virtual_line549_line561_line573_line585_line595_line604_line612_line621_line629_line637_line645_line653_line662_line672 bus1=537.1.2.3.4 bus2=673.1.2.3.4 phases=4 linecode=LC7 length=8.88153 units=m
! reduced_from=line549,line561,line573,line585,line595,line604,line612,line621,line629,line637,line645,line653,line662,line672
! eliminated_buses=550,562,574,586,596,605,613,622,630,638,646,654,663

New Line._virtual_line651_line659_line668_line679_line689_line704_line720_line736_line751 bus1=644.1.2.3.4 bus2=752.1.2.3.4 phases=4 linecode=LC8 length=1.2776 units=m
! reduced_from=line651,line659,line668,line679,line689,line704,line720,line736,line751
! eliminated_buses=652,660,669,680,690,705,721,737

New Line._virtual_line652_line661_line671_line682_line693_line709_line724_line740_line756_line769_line782_line798_line819_line843_line868_line896_line925_line957_line987_line1015_line1043_line1068_line1094_line1118_line1143_line1166_line1191 bus1=1192.1.2.3.4 bus2=644.1.2.3.4 phases=4 linecode=LC8 length=41.06085 units=m
! reduced_from=line652,line661,line671,line682,line693,line709,line724,line740,line756,line769,line782,line798,line819,line843,line868,line896,line925,line957,line987,line1015,line1043,line1068,line1094,line1118,line1143,line1166,line1191
! eliminated_buses=653,662,672,683,694,710,725,741,757,770,783,799,820,844,869,897,926,958,988,1016,1044,1069,1095,1119,1144,1167

New Line._virtual_line677_line688_line703_line719_line735_line750_line764_line777_line792 bus1=793.1.2.3.4 bus2=667.1.2.3.4 phases=4 linecode=LC9 length=8.56415 units=m
! reduced_from=line677,line688,line703,line719,line735,line750,line764,line777,line792
! eliminated_buses=678,689,704,720,736,751,765,778

New Line._virtual_line683_line694_line710_line725_line741_line757_line770_line783_line799_line820 bus1=673.1.2.3.4 bus2=821.1.2.3.4 phases=4 linecode=LC2 length=9.497301 units=m
! reduced_from=line683,line694,line710,line725,line741,line757,line770,line783,line799,line820
! eliminated_buses=684,695,711,726,742,758,771,784,800

New Line._virtual_line684_line695_line711_line727 bus1=728.1.2.3.4 bus2=673.1.2.3.4 phases=4 linecode=LC7 length=4.96217 units=m
! reduced_from=line684,line695,line711,line727
! eliminated_buses=685,696,712

New Line._virtual_line743_line759_line772_line785_line801_line822_line845_line869_line897_line926_line958 bus1=959.1.2.3.4 bus2=728.1.2.3.4 phases=4 linecode=LC2 length=8.709457 units=m
! reduced_from=line743,line759,line772,line785,line801,line822,line845,line869,line897,line926,line958
! eliminated_buses=744,760,773,786,802,823,846,870,898,927

New Line._virtual_line765_line778_line793_line813_line836_line860_line888_line917_line950_line982_line1010_line1038_line1065_line1092_line1116_line1141_line1165_line1190_line1215 bus1=752.1.2.3.4 bus2=1216.1.2.3.4 phases=4 linecode=LC9 length=9.507812 units=m
! reduced_from=line765,line778,line793,line813,line836,line860,line888,line917,line950,line982,line1010,line1038,line1065,line1092,line1116,line1141,line1165,line1190,line1215
! eliminated_buses=766,779,794,814,837,861,889,918,951,983,1011,1039,1066,1093,1117,1142,1166,1191

New Line._virtual_line787_line803_line824_line847_line871_line898_line927_line959_line988_line1016_line1044_line1069_line1095_line1119_line1144_line1167_line1192_line1218_line1248_line1278_line1308_line1340_line1369_line1397_line1425_line1452_line1484_line1511_line1541_line1574_line1606_line1642_line1679_line1719 bus1=1720.1.2.3.4 bus2=775.1.2.3.4 phases=4 linecode=LC2 length=13.050622 units=m
! reduced_from=line787,line803,line824,line847,line871,line898,line927,line959,line988,line1016,line1044,line1069,line1095,line1119,line1144,line1167,line1192,line1218,line1248,line1278,line1308,line1340,line1369,line1397,line1425,line1452,line1484,line1511,line1541,line1574,line1606,line1642,line1679,line1719
! eliminated_buses=788,804,825,848,872,899,928,960,989,1017,1045,1070,1096,1120,1145,1168,1193,1219,1249,1279,1309,1341,1370,1398,1426,1453,1485,1512,1542,1575,1607,1643,1680

New Line._virtual_line788_line804_line825_line848_line872_line899_line928_line960_line989_line1017 bus1=775.1.2.3.4 bus2=1018.1.2.3.4 phases=4 linecode=LC2 length=8.067569 units=m
! reduced_from=line788,line804,line825,line848,line872,line899,line928,line960,line989,line1017
! eliminated_buses=789,805,826,849,873,900,929,961,990

New Line._virtual_line805_line826_line849_line873_line900_line929_line961_line990_line1018_line1045_line1070 bus1=1071.1.2.3.4 bus2=790.1.2.3.4 phases=4 linecode=LC2 length=8.84162 units=m
! reduced_from=line805,line826,line849,line873,line900,line929,line961,line990,line1018,line1045,line1070
! eliminated_buses=806,827,850,874,901,930,962,991,1019,1046

New Line._virtual_line806_line827 bus1=790.1.2.3.4 bus2=828.1.2.3.4 phases=4 linecode=LC7 length=4.31595 units=m
! reduced_from=line806,line827
! eliminated_buses=807

New Line._virtual_line810_line833_line857_line885_line914_line947_line979_line1007_line1035_line1062_line1089_line1113_line1138_line1162_line1187_line1212_line1239_line1269_line1299_line1331_line1360_line1388_line1416_line1443_line1474_line1501_line1531_line1562_line1595_line1627_line1665_line1702_line1741_line1781_line1820_line1862_line1905_line1947_line1990 bus1=1991.1.2.3.4 bus2=793.1.2.3.4 phases=4 linecode=LC6 length=38.624419 units=m
! reduced_from=line810,line833,line857,line885,line914,line947,line979,line1007,line1035,line1062,line1089,line1113,line1138,line1162,line1187,line1212,line1239,line1269,line1299,line1331,line1360,line1388,line1416,line1443,line1474,line1501,line1531,line1562,line1595,line1627,line1665,line1702,line1741,line1781,line1820,line1862,line1905,line1947,line1990
! eliminated_buses=811,834,858,886,915,948,980,1008,1036,1063,1090,1114,1139,1163,1188,1213,1240,1270,1300,1332,1361,1389,1417,1444,1475,1502,1532,1563,1596,1628,1666,1703,1742,1782,1821,1863,1906,1948

New Line._virtual_line811_line834_line858_line886_line915_line948_line980_line1008_line1036_line1063_line1090_line1114_line1139_line1163_line1188_line1213_line1240_line1270_line1300_line1332_line1361_line1389_line1417_line1444_line1475_line1502_line1532_line1563_line1596_line1628_line1666_line1703_line1742_line1782_line1821 bus1=1822.1.2.3.4 bus2=793.1.2.3.4 phases=4 linecode=LC6 length=36.46458 units=m
! reduced_from=line811,line834,line858,line886,line915,line948,line980,line1008,line1036,line1063,line1090,line1114,line1139,line1163,line1188,line1213,line1240,line1270,line1300,line1332,line1361,line1389,line1417,line1444,line1475,line1502,line1532,line1563,line1596,line1628,line1666,line1703,line1742,line1782,line1821
! eliminated_buses=812,835,859,887,916,949,981,1009,1037,1064,1091,1115,1140,1164,1189,1214,1241,1271,1301,1333,1362,1390,1418,1445,1476,1503,1533,1564,1597,1629,1667,1704,1743,1783

New Line._virtual_line812_line835_line859_line887_line916_line949_line981_line1009_line1037_line1064_line1091_line1115_line1140_line1164_line1189_line1214_line1241_line1271_line1301_line1333_line1362_line1390_line1418_line1445_line1476_line1503_line1533 bus1=1534.1.2.3.4 bus2=793.1.2.3.4 phases=4 linecode=LC6 length=23.33314 units=m
! reduced_from=line812,line835,line859,line887,line916,line949,line981,line1009,line1037,line1064,line1091,line1115,line1140,line1164,line1189,line1214,line1241,line1271,line1301,line1333,line1362,line1390,line1418,line1445,line1476,line1503,line1533
! eliminated_buses=813,836,860,888,917,950,982,1010,1038,1065,1092,1116,1141,1165,1190,1215,1242,1272,1302,1334,1363,1391,1419,1446,1477,1504

New Line._virtual_line830_line854_line882 bus1=810.1.2.3.4 bus2=883.1.2.3.4 phases=4 linecode=LC9 length=14.2485 units=m
! reduced_from=line830,line854,line882
! eliminated_buses=831,855

New Line._virtual_line831_line855_line883_line912_line945_line977_line1005_line1033_line1060_line1087_line1110_line1135_line1159_line1184_line1209_line1236_line1266_line1296_line1327_line1357_line1385_line1413_line1440 bus1=810.1.2.3.4 bus2=1441.1.2.3.4 phases=4 linecode=LC6 length=22.2071 units=m
! reduced_from=line831,line855,line883,line912,line945,line977,line1005,line1033,line1060,line1087,line1110,line1135,line1159,line1184,line1209,line1236,line1266,line1296,line1327,line1357,line1385,line1413,line1440
! eliminated_buses=832,856,884,913,946,978,1006,1034,1061,1088,1111,1136,1160,1185,1210,1237,1267,1297,1328,1358,1386,1414

New Line._virtual_line832_line856_line884_line913_line946_line978_line1006_line1034_line1061_line1088_line1112_line1137_line1161_line1186_line1211_line1238_line1268_line1298 bus1=1299.1.2.3.4 bus2=810.1.2.3.4 phases=4 linecode=LC6 length=13.176237 units=m
! reduced_from=line832,line856,line884,line913,line946,line978,line1006,line1034,line1061,line1088,line1112,line1137,line1161,line1186,line1211,line1238,line1268,line1298
! eliminated_buses=833,857,885,914,947,979,1007,1035,1062,1089,1113,1138,1162,1187,1212,1239,1269

New Line._virtual_line851_line877_line903_line932_line964_line993_line1021_line1048 bus1=1049.1.2.3.4 bus2=828.1.2.3.4 phases=4 linecode=LC7 length=5.942522 units=m
! reduced_from=line851,line877,line903,line932,line964,line993,line1021,line1048
! eliminated_buses=852,878,904,933,965,994,1022

New Line._virtual_line875_line901_line930_line962_line991_line1019_line1046_line1071_line1096_line1120_line1145_line1168_line1193_line1219_line1249_line1279_line1309 bus1=1310.1.2.3.4 bus2=851.1.2.3.4 phases=4 linecode=LC2 length=12.524746 units=m
! reduced_from=line875,line901,line930,line962,line991,line1019,line1046,line1071,line1096,line1120,line1145,line1168,line1193,line1219,line1249,line1279,line1309
! eliminated_buses=876,902,931,963,992,1020,1047,1072,1097,1121,1146,1169,1194,1220,1250,1280

New Line._virtual_line876_line902_line931_line963_line992_line1020_line1047_line1072_line1097_line1121 bus1=851.1.2.3.4 bus2=1122.1.2.3.4 phases=4 linecode=LC2 length=8.781513 units=m
! reduced_from=line876,line902,line931,line963,line992,line1020,line1047,line1072,line1097,line1121
! eliminated_buses=877,903,932,964,993,1021,1048,1073,1098

New Line._virtual_line878_line904 bus1=853.1.2.3.4 bus2=905.1.2.3.4 phases=4 linecode=LC8 length=18.3329 units=m
! reduced_from=line878,line904
! eliminated_buses=879

New Line._virtual_line879_line905_line938_line970_line999_line1027_line1054_line1081_line1104_line1129_line1154_line1177_line1202_line1229_line1259_line1289_line1319_line1350_line1379_line1407_line1434_line1465_line1495_line1524_line1555_line1588_line1621_line1659_line1696_line1734_line1774_line1814_line1856_line1900_line1940_line1984_line2026 bus1=853.1.2.3.4 bus2=2027.1.2.3.4 phases=4 linecode=LC6 length=34.846774 units=m
! reduced_from=line879,line905,line938,line970,line999,line1027,line1054,line1081,line1104,line1129,line1154,line1177,line1202,line1229,line1259,line1289,line1319,line1350,line1379,line1407,line1434,line1465,line1495,line1524,line1555,line1588,line1621,line1659,line1696,line1734,line1774,line1814,line1856,line1900,line1940,line1984,line2026
! eliminated_buses=880,906,939,971,1000,1028,1055,1082,1105,1130,1155,1178,1203,1230,1260,1290,1320,1351,1380,1408,1435,1466,1496,1525,1556,1589,1622,1660,1697,1735,1775,1815,1857,1901,1941,1985

New Line._virtual_line880_line906_line939_line971_line1000_line1028_line1055_line1082_line1105_line1130_line1155_line1178_line1203_line1230_line1260_line1290_line1320_line1351_line1380_line1408_line1435_line1466_line1496_line1526_line1557_line1590_line1623_line1661_line1698_line1736_line1776_line1816_line1858_line1901 bus1=853.1.2.3.4 bus2=1902.1.2.3.4 phases=4 linecode=LC6 length=13.501555 units=m
! reduced_from=line880,line906,line939,line971,line1000,line1028,line1055,line1082,line1105,line1130,line1155,line1178,line1203,line1230,line1260,line1290,line1320,line1351,line1380,line1408,line1435,line1466,line1496,line1526,line1557,line1590,line1623,line1661,line1698,line1736,line1776,line1816,line1858,line1901
! eliminated_buses=881,907,940,972,1001,1029,1056,1083,1106,1131,1156,1179,1204,1231,1261,1291,1321,1352,1381,1409,1436,1467,1497,1527,1558,1591,1624,1662,1699,1737,1777,1817,1859

New Line._virtual_line908_line941_line973_line1001_line1029_line1056_line1083_line1106_line1131_line1156_line1181_line1206_line1233_line1263_line1293_line1323_line1354_line1383_line1411_line1438_line1469_line1498_line1528_line1559_line1592_line1625_line1663_line1700_line1738_line1778_line1818_line1860_line1903_line1944_line1987_line2029 bus1=883.1.2.3.4 bus2=2030.1.2.3.4 phases=4 linecode=LC9 length=40.06246 units=m
! reduced_from=line908,line941,line973,line1001,line1029,line1056,line1083,line1106,line1131,line1156,line1181,line1206,line1233,line1263,line1293,line1323,line1354,line1383,line1411,line1438,line1469,line1498,line1528,line1559,line1592,line1625,line1663,line1700,line1738,line1778,line1818,line1860,line1903,line1944,line1987,line2029
! eliminated_buses=909,942,974,1002,1030,1057,1084,1107,1132,1157,1182,1207,1234,1264,1294,1324,1355,1384,1412,1439,1470,1499,1529,1560,1593,1626,1664,1701,1739,1779,1819,1861,1904,1945,1988

New Line._virtual_line909_line942_line974_line1002_line1030_line1057_line1084_line1107_line1132_line1157_line1182_line1207_line1234_line1264_line1294_line1324_line1355 bus1=1356.1.2.3.4 bus2=883.1.2.3.4 phases=4 linecode=LC2 length=13.69362 units=m
! reduced_from=line909,line942,line974,line1002,line1030,line1057,line1084,line1107,line1132,line1157,line1182,line1207,line1234,line1264,line1294,line1324,line1355
! eliminated_buses=910,943,975,1003,1031,1058,1085,1108,1133,1158,1183,1208,1235,1265,1295,1325

New Line._virtual_line910_line943_line975_line1003_line1031_line1058_line1085_line1108_line1133 bus1=1134.1.2.3.4 bus2=883.1.2.3.4 phases=4 linecode=LC2 length=14.41703 units=m
! reduced_from=line910,line943,line975,line1003,line1031,line1058,line1085,line1108,line1133
! eliminated_buses=911,944,976,1004,1032,1059,1086,1109

New Line._virtual_line911_line944_line976_line1004_line1032_line1059_line1086_line1109_line1134_line1158_line1183_line1208_line1235_line1265_line1295 bus1=1296.1.2.3.4 bus2=883.1.2.3.4 phases=4 linecode=LC2 length=13.79282 units=m
! reduced_from=line911,line944,line976,line1004,line1032,line1059,line1086,line1109,line1134,line1158,line1183,line1208,line1235,line1265,line1295
! eliminated_buses=912,945,977,1005,1033,1060,1087,1110,1135,1159,1184,1209,1236,1266

New Line._virtual_line934_line967_line996_line1024_line1051_line1078_line1101_line1126_line1150_line1173_line1198_line1225_line1255_line1285_line1315_line1346_line1375_line1403_line1430_line1461_line1491_line1520_line1551_line1584_line1617_line1655_line1693_line1731_line1771_line1811_line1853_line1898_line1938_line1982_line2024_line2068 bus1=2069.1.2.3.4 bus2=905.1.2.3.4 phases=4 linecode=LC2 length=31.041514 units=m
! reduced_from=line934,line967,line996,line1024,line1051,line1078,line1101,line1126,line1150,line1173,line1198,line1225,line1255,line1285,line1315,line1346,line1375,line1403,line1430,line1461,line1491,line1520,line1551,line1584,line1617,line1655,line1693,line1731,line1771,line1811,line1853,line1898,line1938,line1982,line2024,line2068
! eliminated_buses=935,968,997,1025,1052,1079,1102,1127,1151,1174,1199,1226,1256,1286,1316,1347,1376,1404,1431,1462,1492,1521,1552,1585,1618,1656,1694,1732,1772,1812,1854,1899,1939,1983,2025

New Line._virtual_line1216_line1246_line1276_line1306_line1338_line1367_line1395_line1423_line1450_line1482_line1509_line1539 bus1=1192.1.2.3.4 bus2=1540.1.2.3.4 phases=4 linecode=LC8 length=15.00708 units=m
! reduced_from=line1216,line1246,line1276,line1306,line1338,line1367,line1395,line1423,line1450,line1482,line1509,line1539
! eliminated_buses=1217,1247,1277,1307,1339,1368,1396,1424,1451,1483,1510

New Line._virtual_line1217_line1247_line1277_line1307_line1339_line1368_line1396_line1424_line1451_line1483_line1510_line1540_line1573_line1605_line1641_line1678_line1718 bus1=1192.1.2.3.4 bus2=1719.1.2.3.4 phases=4 linecode=LC9 length=14.59328 units=m
! reduced_from=line1217,line1247,line1277,line1307,line1339,line1368,line1396,line1424,line1451,line1483,line1510,line1540,line1573,line1605,line1641,line1678,line1718
! eliminated_buses=1218,1248,1278,1308,1340,1369,1397,1425,1452,1484,1511,1541,1574,1606,1642,1679

New Line._virtual_line1242_line1272_line1302_line1334_line1363_line1391_line1419_line1446_line1477_line1504_line1534_line1566_line1597_line1629_line1667_line1704_line1743_line1783_line1822_line1865_line1906_line1948_line1991_line2034_line2079_line2120_line2161_line2203_line2241_line2279_line2314_line2348_line2381_line2415_line2452 bus1=2453.1.2.3.4 bus2=1216.1.2.3.4 phases=4 linecode=LC2 length=20.822533 units=m
! reduced_from=line1242,line1272,line1302,line1334,line1363,line1391,line1419,line1446,line1477,line1504,line1534,line1566,line1597,line1629,line1667,line1704,line1743,line1783,line1822,line1865,line1906,line1948,line1991,line2034,line2079,line2120,line2161,line2203,line2241,line2279,line2314,line2348,line2381,line2415,line2452
! eliminated_buses=1243,1273,1303,1335,1364,1392,1420,1447,1478,1505,1535,1567,1598,1630,1668,1705,1744,1784,1823,1866,1907,1949,1992,2035,2080,2121,2162,2204,2242,2280,2315,2349,2382,2416

New Line._virtual_line1244_line1274_line1304_line1336_line1365_line1393_line1421_line1448_line1479_line1506_line1536_line1568_line1599_line1631_line1669_line1706_line1745_line1785_line1824_line1867_line1908 bus1=1909.1.2.3.4 bus2=1216.1.2.3.4 phases=4 linecode=LC2 length=13.70763 units=m
! reduced_from=line1244,line1274,line1304,line1336,line1365,line1393,line1421,line1448,line1479,line1506,line1536,line1568,line1599,line1631,line1669,line1706,line1745,line1785,line1824,line1867,line1908
! eliminated_buses=1245,1275,1305,1337,1366,1394,1422,1449,1480,1507,1537,1569,1600,1632,1670,1707,1746,1786,1825,1868

New Line._virtual_line1245_line1275_line1305_line1337_line1366_line1394_line1422_line1449_line1480_line1507_line1537_line1569_line1600 bus1=1601.1.2.3.4 bus2=1216.1.2.3.4 phases=4 linecode=LC9 length=9.51811 units=m
! reduced_from=line1245,line1275,line1305,line1337,line1366,line1394,line1422,line1449,line1480,line1507,line1537,line1569,line1600
! eliminated_buses=1246,1276,1306,1338,1367,1395,1423,1450,1481,1508,1538,1570

New Line._virtual_line1326_line1356_line1384_line1412_line1439_line1470 bus1=1296.1.2.3.4 bus2=1471.1.2.3.4 phases=4 linecode=LC2 length=10.60031 units=m
! reduced_from=line1326,line1356,line1384,line1412,line1439,line1470
! eliminated_buses=1327,1357,1385,1413,1440

New Line._virtual_line1330_line1359_line1387_line1415_line1442_line1473_line1500_line1530_line1561_line1594 bus1=1595.1.2.3.4 bus2=1299.1.2.3.4 phases=4 linecode=LC6 length=10.91143 units=m
! reduced_from=line1330,line1359,line1387,line1415,line1442,line1473,line1500,line1530,line1561,line1594
! eliminated_buses=1331,1360,1388,1416,1443,1474,1501,1531,1562

New Line._virtual_line1472_line1499_line1529_line1560_line1593_line1626_line1664_line1701 bus1=1441.1.2.3.4 bus2=1702.1.2.3.4 phases=4 linecode=LC6 length=5.65033 units=m
! reduced_from=line1472,line1499,line1529,line1560,line1593,line1626,line1664,line1701
! eliminated_buses=1473,1500,1530,1561,1594,1627,1665

New Line._virtual_line1571_line1602_line1636_line1673_line1712_line1751_line1791_line1830_line1875_line1916_line1960 bus1=1540.1.2.3.4 bus2=1961.1.2.3.4 phases=4 linecode=LC5 length=14.09653 units=m
! reduced_from=line1571,line1602,line1636,line1673,line1712,line1751,line1791,line1830,line1875,line1916,line1960
! eliminated_buses=1572,1603,1637,1674,1713,1752,1792,1831,1876,1917

New Line._virtual_line1632_line1670_line1707_line1746_line1786_line1825_line1868_line1909_line1950_line1993_line2036_line2081_line2122 bus1=2123.1.2.3.4 bus2=1601.1.2.3.4 phases=4 linecode=LC2 length=12.19759 units=m
! reduced_from=line1632,line1670,line1707,line1746,line1786,line1825,line1868,line1909,line1950,line1993,line2036,line2081,line2122
! eliminated_buses=1633,1671,1708,1747,1787,1826,1869,1910,1951,1994,2037,2082

New Line._virtual_line1633_line1671_line1708_line1747_line1787_line1826_line1869_line1910_line1951_line1994_line2037 bus1=2038.1.2.3.4 bus2=1601.1.2.3.4 phases=4 linecode=LC2 length=12.331379 units=m
! reduced_from=line1633,line1671,line1708,line1747,line1787,line1826,line1869,line1910,line1951,line1994,line2037
! eliminated_buses=1634,1672,1709,1748,1788,1827,1870,1911,1952,1995

New Line._virtual_line1634_line1672 bus1=1601.1.2.3.4 bus2=1673.1.2.3.4 phases=4 linecode=LC9 length=12.8528 units=m
! reduced_from=line1634,line1672
! eliminated_buses=1635

New Line._virtual_line1709_line1748_line1788_line1827 bus1=1673.1.2.3.4 bus2=1828.1.2.3.4 phases=4 linecode=LC9 length=13.07835 units=m
! reduced_from=line1709,line1748,line1788,line1827
! eliminated_buses=1710,1749,1789

New Line._virtual_line1710_line1749_line1789_line1828_line1873_line1914_line1958_line2000_line2043_line2085_line2126_line2166_line2208_line2246_line2284 bus1=1673.1.2.3.4 bus2=2285.1.2.3.4 phases=4 linecode=LC2 length=13.679003 units=m
! reduced_from=line1710,line1749,line1789,line1828,line1873,line1914,line1958,line2000,line2043,line2085,line2126,line2166,line2208,line2246,line2284
! eliminated_buses=1711,1750,1790,1829,1874,1915,1959,2001,2044,2086,2127,2167,2209,2247

New Line._virtual_line1711_line1750_line1790_line1829_line1874_line1915_line1959_line2001_line2044_line2086_line2127_line2167_line2209_line2247 bus1=1673.1.2.3.4 bus2=2248.1.2.3.4 phases=4 linecode=LC2 length=13.70532 units=m
! reduced_from=line1711,line1750,line1790,line1829,line1874,line1915,line1959,line2001,line2044,line2086,line2127,line2167,line2209,line2247
! eliminated_buses=1712,1751,1791,1830,1875,1916,1960,2002,2045,2087,2128,2168,2210

New Line._virtual_line1758_line1798_line1839_line1885_line1927_line1971_line2016_line2060_line2101_line2142_line2181_line2222_line2259_line2296_line2329_line2363_line2397_line2432_line2469 bus1=1719.1.2.3.4 bus2=2470.1.2.3.4 phases=4 linecode=LC6 length=10.06731 units=m
! reduced_from=line1758,line1798,line1839,line1885,line1927,line1971,line2016,line2060,line2101,line2142,line2181,line2222,line2259,line2296,line2329,line2363,line2397,line2432,line2469
! eliminated_buses=1759,1799,1840,1886,1928,1972,2017,2061,2102,2143,2182,2223,2260,2297,2330,2364,2398,2433

New Line._virtual_line1759_line1799 bus1=1719.1.2.3.4 bus2=1800.1.2.3.4 phases=4 linecode=LC9 length=9.1668 units=m
! reduced_from=line1759,line1799
! eliminated_buses=1760

New Line._virtual_line1780_line1819_line1861_line1904_line1945_line1988_line2030_line2077_line2118_line2159_line2201_line2239_line2277_line2312_line2346_line2379_line2413_line2450_line2486_line2522_line2557 bus1=1741.1.2.3.4 bus2=2558.1.2.3.4 phases=4 linecode=LC6 length=18.73633 units=m
! reduced_from=line1780,line1819,line1861,line1904,line1945,line1988,line2030,line2077,line2118,line2159,line2201,line2239,line2277,line2312,line2346,line2379,line2413,line2450,line2486,line2522,line2557
! eliminated_buses=1781,1820,1862,1905,1946,1989,2031,2078,2119,2160,2202,2240,2278,2313,2347,2380,2414,2451,2487,2523

New Line._virtual_line1840_line1886_line1928_line1972_line2017_line2061_line2102_line2143_line2182_line2223_line2260_line2297_line2330_line2364_line2398_line2433_line2470_line2506_line2541 bus1=2542.1.2.3.4 bus2=1800.1.2.3.4 phases=4 linecode=LC6 length=9.206282 units=m
! reduced_from=line1840,line1886,line1928,line1972,line2017,line2061,line2102,line2143,line2182,line2223,line2260,line2297,line2330,line2364,line2398,line2433,line2470,line2506,line2541
! eliminated_buses=1841,1887,1929,1973,2018,2062,2103,2144,2183,2224,2261,2298,2331,2365,2399,2434,2471,2507

New Line._virtual_line1841_line1887_line1929_line1973_line2018_line2062_line2103_line2144_line2183_line2224_line2261_line2298_line2331_line2365_line2399_line2434_line2471_line2507_line2542_line2580_line2615_line2650_line2687_line2723_line2760_line2797_line2831_line2868_line2904_line2938_line2972_line3002 bus1=3003.1.2.3.4 bus2=1800.1.2.3.4 phases=4 linecode=LC6 length=16.49768 units=m
! reduced_from=line1841,line1887,line1929,line1973,line2018,line2062,line2103,line2144,line2183,line2224,line2261,line2298,line2331,line2365,line2399,line2434,line2471,line2507,line2542,line2580,line2615,line2650,line2687,line2723,line2760,line2797,line2831,line2868,line2904,line2938,line2972,line3002
! eliminated_buses=1842,1888,1930,1974,2019,2063,2104,2145,2184,2225,2262,2299,2332,2366,2400,2435,2472,2508,2543,2581,2616,2651,2688,2724,2761,2798,2832,2869,2905,2939,2973

New Line._virtual_line1843_line1889_line1931_line1975_line2020_line2064_line2105_line2146_line2185_line2226_line2263_line2300_line2333_line2367_line2401_line2436_line2473_line2509_line2544_line2582_line2617_line2651_line2688_line2724_line2761_line2798_line2832_line2869_line2905_line2939_line2973_line3003_line3035_line3065_line3096_line3126_line3154_line3186_line3214_line3237_line3260_line3283_line3307 bus1=1800.1.2.3.4 bus2=3308.1.2.3.4 phases=4 linecode=LC6 length=29.117915 units=m
! reduced_from=line1843,line1889,line1931,line1975,line2020,line2064,line2105,line2146,line2185,line2226,line2263,line2300,line2333,line2367,line2401,line2436,line2473,line2509,line2544,line2582,line2617,line2651,line2688,line2724,line2761,line2798,line2832,line2869,line2905,line2939,line2973,line3003,line3035,line3065,line3096,line3126,line3154,line3186,line3214,line3237,line3260,line3283,line3307
! eliminated_buses=1844,1890,1932,1976,2021,2065,2106,2147,2186,2227,2264,2301,2334,2368,2402,2437,2474,2510,2545,2583,2618,2652,2689,2725,2762,2799,2833,2870,2906,2940,2974,3004,3036,3066,3097,3127,3155,3187,3215,3238,3261,3284

New Line._virtual_line1844_line1890_line1932_line1976_line2021_line2065_line2106_line2147_line2186_line2227_line2264_line2301_line2334_line2368_line2402_line2437_line2474_line2510_line2545_line2583_line2618 bus1=1800.1.2.3.4 bus2=2619.1.2.3.4 phases=4 linecode=LC9 length=31.9624 units=m
! reduced_from=line1844,line1890,line1932,line1976,line2021,line2065,line2106,line2147,line2186,line2227,line2264,line2301,line2334,line2368,line2402,line2437,line2474,line2510,line2545,line2583,line2618
! eliminated_buses=1845,1891,1933,1977,2022,2066,2107,2148,2187,2228,2265,2302,2335,2369,2403,2438,2475,2511,2546,2584

New Line._virtual_line1870_line1911 bus1=1912.1.2.3.4 bus2=1828.1.2.3.4 phases=4 linecode=LC9 length=0.43275 units=m
! reduced_from=line1870,line1911
! eliminated_buses=1871

New Line._virtual_line1871_line1912_line1956_line1998_line2041_line2084_line2125_line2165_line2207_line2245_line2283_line2318_line2352_line2385_line2419_line2456_line2490_line2525 bus1=1828.1.2.3.4 bus2=2526.1.2.3.4 phases=4 linecode=LC2 length=16.326516 units=m
! reduced_from=line1871,line1912,line1956,line1998,line2041,line2084,line2125,line2165,line2207,line2245,line2283,line2318,line2352,line2385,line2419,line2456,line2490,line2525
! eliminated_buses=1872,1913,1957,1999,2042,2085,2126,2166,2208,2246,2284,2319,2353,2386,2420,2457,2491

New Line._virtual_line1942_line1985_line2027_line2072_line2113_line2154 bus1=1902.1.2.3.4 bus2=2155.1.2.3.4 phases=4 linecode=LC6 length=4.159916 units=m
! reduced_from=line1942,line1985,line2027,line2072,line2113,line2154
! eliminated_buses=1943,1986,2028,2073,2114

New Line._virtual_line1955_line1997_line2040_line2083_line2124_line2164_line2206_line2244_line2282_line2317_line2351_line2384_line2418_line2455_line2489 bus1=2490.1.2.3.4 bus2=1912.1.2.3.4 phases=4 linecode=LC2 length=16.02001 units=m
! reduced_from=line1955,line1997,line2040,line2083,line2124,line2164,line2206,line2244,line2282,line2317,line2351,line2384,line2418,line2455,line2489
! eliminated_buses=1956,1998,2041,2084,2125,2165,2207,2245,2283,2318,2352,2385,2419,2456

New Line._virtual_line2002_line2045_line2087_line2128_line2168_line2210_line2248_line2285_line2319_line2353_line2387 bus1=1961.1.2.3.4 bus2=2388.1.2.3.4 phases=4 linecode=LC9 length=9.5788 units=m
! reduced_from=line2002,line2045,line2087,line2128,line2168,line2210,line2248,line2285,line2319,line2353,line2387
! eliminated_buses=2003,2046,2088,2129,2169,2211,2249,2286,2320,2354

New Line._virtual_line2003_line2046 bus1=1961.1.2.3.4 bus2=2047.1.2.3.4 phases=4 linecode=LC5 length=32.84155 units=m
! reduced_from=line2003,line2046
! eliminated_buses=2004

New Line._virtual_line2071_line2112_line2153_line2193_line2232_line2269_line2305_line2338_line2372_line2406_line2442_line2479_line2515_line2551_line2588_line2623_line2660_line2697_line2732_line2769 bus1=2770.1.2.3.4 bus2=2027.1.2.3.4 phases=4 linecode=LC6 length=15.15361 units=m
! reduced_from=line2071,line2112,line2153,line2193,line2232,line2269,line2305,line2338,line2372,line2406,line2442,line2479,line2515,line2551,line2588,line2623,line2660,line2697,line2732,line2769
! eliminated_buses=2072,2113,2154,2194,2233,2270,2306,2339,2373,2407,2443,2480,2516,2552,2589,2624,2661,2698,2733

New Line._virtual_line2074_line2115_line2156_line2197_line2235_line2272_line2308_line2342_line2376 bus1=2377.1.2.3.4 bus2=2030.1.2.3.4 phases=4 linecode=LC9 length=12.7117 units=m
! reduced_from=line2074,line2115,line2156,line2197,line2235,line2272,line2308,line2342,line2376
! eliminated_buses=2075,2116,2157,2198,2236,2273,2309,2343

New Line._virtual_line2075_line2116_line2157_line2199_line2237_line2274_line2309 bus1=2030.1.2.3.4 bus2=2310.1.2.3.4 phases=4 linecode=LC2 length=22.65024 units=m
! reduced_from=line2075,line2116,line2157,line2199,line2237,line2274,line2309
! eliminated_buses=2076,2117,2158,2200,2238,2275

New Line._virtual_line2076_line2117_line2158_line2200_line2238_line2275_line2310 bus1=2030.1.2.3.4 bus2=2311.1.2.3.4 phases=4 linecode=LC2 length=10.28687 units=m
! reduced_from=line2076,line2117,line2158,line2200,line2238,line2275,line2310
! eliminated_buses=2077,2118,2159,2201,2239,2276

New Line._virtual_line2088_line2129_line2169_line2211_line2249_line2286_line2320_line2354_line2388_line2424_line2461_line2497_line2532_line2568_line2603_line2637_line2674_line2709_line2745_line2783_line2818_line2851_line2889_line2924_line2958_line2989_line3020_line3051_line3082_line3112_line3141_line3173_line3203_line3229_line3253_line3275_line3298_line3319_line3341 bus1=3342.1.2.3.4 bus2=2047.1.2.3.4 phases=4 linecode=LC2 length=28.206787 units=m
! reduced_from=line2088,line2129,line2169,line2211,line2249,line2286,line2320,line2354,line2388,line2424,line2461,line2497,line2532,line2568,line2603,line2637,line2674,line2709,line2745,line2783,line2818,line2851,line2889,line2924,line2958,line2989,line3020,line3051,line3082,line3112,line3141,line3173,line3203,line3229,line3253,line3275,line3298,line3319,line3341
! eliminated_buses=2089,2130,2170,2212,2250,2287,2321,2355,2389,2425,2462,2498,2533,2569,2604,2638,2675,2710,2746,2784,2819,2852,2890,2925,2959,2990,3021,3052,3083,3113,3142,3174,3204,3230,3254,3276,3299,3320

New Line._virtual_line2109_line2151_line2189_line2230_line2267_line2304_line2337_line2371_line2405_line2440_line2477_line2513_line2548 bus1=2069.1.2.3.4 bus2=2549.1.2.3.4 phases=4 linecode=LC2 length=5.350969 units=m
! reduced_from=line2109,line2151,line2189,line2230,line2267,line2304,line2337,line2371,line2405,line2440,line2477,line2513,line2548
! eliminated_buses=2110,2152,2190,2231,2268,2305,2338,2372,2406,2441,2478,2514

New Line._virtual_line2130_line2170_line2212_line2250 bus1=2090.1.2.3.4 bus2=2251.1.2.3.4 phases=4 linecode=LC2 length=1.39882 units=m
! reduced_from=line2130,line2170,line2212,line2250
! eliminated_buses=2131,2171,2213

New Line._virtual_line2131_line2171_line2213_line2251_line2289_line2323_line2357_line2391_line2427_line2464_line2500_line2535_line2570_line2605_line2639_line2676_line2711_line2747_line2785_line2820_line2853 bus1=2854.1.2.3.4 bus2=2090.1.2.3.4 phases=4 linecode=LC2 length=15.710625 units=m
! reduced_from=line2131,line2171,line2213,line2251,line2289,line2323,line2357,line2391,line2427,line2464,line2500,line2535,line2570,line2605,line2639,line2676,line2711,line2747,line2785,line2820,line2853
! eliminated_buses=2132,2172,2214,2252,2290,2324,2358,2392,2428,2465,2501,2536,2571,2606,2640,2677,2712,2748,2786,2821

New Line._virtual_line2132_line2172_line2214_line2252_line2290_line2324_line2358_line2392_line2428_line2465_line2501_line2536_line2571_line2606_line2640_line2677_line2712_line2748_line2786_line2821 bus1=2090.1.2.3.4 bus2=2822.1.2.3.4 phases=4 linecode=LC5 length=36.41875 units=m
! reduced_from=line2132,line2172,line2214,line2252,line2290,line2324,line2358,line2392,line2428,line2465,line2501,line2536,line2571,line2606,line2640,line2677,line2712,line2748,line2786,line2821
! eliminated_buses=2133,2173,2215,2253,2291,2325,2359,2393,2429,2466,2502,2537,2572,2607,2641,2678,2713,2749,2787

New Line._virtual_line2195_line2233_line2270_line2306_line2339_line2373_line2407 bus1=2155.1.2.3.4 bus2=2408.1.2.3.4 phases=4 linecode=LC6 length=6.981201 units=m
! reduced_from=line2195,line2233,line2270,line2306,line2339,line2373,line2407
! eliminated_buses=2196,2234,2271,2307,2340,2374

New Line._virtual_line2287_line2321_line2355_line2389_line2425_line2462_line2498_line2533_line2569_line2604_line2638_line2675_line2710_line2746_line2784_line2819_line2852 bus1=2853.1.2.3.4 bus2=2251.1.2.3.4 phases=4 linecode=LC2 length=14.24126 units=m
! reduced_from=line2287,line2321,line2355,line2389,line2425,line2462,line2498,line2533,line2569,line2604,line2638,line2675,line2710,line2746,line2784,line2819,line2852
! eliminated_buses=2288,2322,2356,2390,2426,2463,2499,2534,2570,2605,2639,2676,2711,2747,2785,2820

New Line._virtual_line2344_line2377_line2411_line2448_line2484_line2520 bus1=2311.1.2.3.4 bus2=2521.1.2.3.4 phases=4 linecode=LC2 length=6.93675 units=m
! reduced_from=line2344,line2377,line2411,line2448,line2484,line2520
! eliminated_buses=2345,2378,2412,2449,2485

New Line._virtual_line2409_line2446_line2482_line2518_line2553_line2590_line2624_line2661_line2698 bus1=2377.1.2.3.4 bus2=2699.1.2.3.4 phases=4 linecode=LC9 length=16.40337 units=m
! reduced_from=line2409,line2446,line2482,line2518,line2553,line2590,line2624,line2661,line2698
! eliminated_buses=2410,2447,2483,2519,2554,2591,2625,2662

New Line._virtual_line2410_line2447_line2483_line2519_line2554_line2591_line2625_line2662_line2699_line2735 bus1=2377.1.2.3.4 bus2=2736.1.2.3.4 phases=4 linecode=LC2 length=9.36949 units=m
! reduced_from=line2410,line2447,line2483,line2519,line2554,line2591,line2625,line2662,line2699,line2735
! eliminated_buses=2411,2448,2484,2520,2555,2592,2626,2663,2700

New Line._virtual_line2421_line2458_line2492_line2527_line2560_line2595_line2629_line2666_line2701_line2737_line2775_line2810_line2843_line2882_line2917_line2951 bus1=2952.1.2.3.4 bus2=2388.1.2.3.4 phases=4 linecode=LC2 length=16.8388 units=m
! reduced_from=line2421,line2458,line2492,line2527,line2560,line2595,line2629,line2666,line2701,line2737,line2775,line2810,line2843,line2882,line2917,line2951
! eliminated_buses=2422,2459,2493,2528,2561,2596,2630,2667,2702,2738,2776,2811,2844,2883,2918

New Line._virtual_line2422_line2459_line2493_line2528_line2561_line2596_line2630_line2667_line2702_line2738_line2776_line2811_line2844_line2883_line2918_line2952 bus1=2388.1.2.3.4 bus2=2953.1.2.3.4 phases=4 linecode=LC2 length=16.59187 units=m
! reduced_from=line2422,line2459,line2493,line2528,line2561,line2596,line2630,line2667,line2702,line2738,line2776,line2811,line2844,line2883,line2918,line2952
! eliminated_buses=2423,2460,2494,2529,2562,2597,2631,2668,2703,2739,2777,2812,2845,2884,2919

New Line._virtual_line2423_line2460 bus1=2388.1.2.3.4 bus2=2461.1.2.3.4 phases=4 linecode=LC9 length=15.0091 units=m
! reduced_from=line2423,line2460
! eliminated_buses=2424

New Line._virtual_line2444_line2480_line2516_line2552_line2589 bus1=2408.1.2.3.4 bus2=2590.1.2.3.4 phases=4 linecode=LC6 length=11.68678 units=m
! reduced_from=line2444,line2480,line2516,line2552,line2589
! eliminated_buses=2445,2481,2517,2553

New Line._virtual_line2494_line2529_line2562_line2597_line2631_line2668_line2703_line2739_line2777_line2812_line2845 bus1=2461.1.2.3.4 bus2=2846.1.2.3.4 phases=4 linecode=LC2 length=15.19186 units=m
! reduced_from=line2494,line2529,line2562,line2597,line2631,line2668,line2703,line2739,line2777,line2812,line2845
! eliminated_buses=2495,2530,2563,2598,2632,2669,2704,2740,2778,2813

New Line._virtual_line2495_line2530_line2563_line2598_line2632_line2669_line2704_line2740_line2778_line2813_line2846_line2884_line2919_line2953 bus1=2461.1.2.3.4 bus2=2954.1.2.3.4 phases=4 linecode=LC2 length=15.78948 units=m
! reduced_from=line2495,line2530,line2563,line2598,line2632,line2669,line2704,line2740,line2778,line2813,line2846,line2884,line2919,line2953
! eliminated_buses=2496,2531,2564,2599,2633,2670,2705,2741,2779,2814,2847,2885,2920

New Line._virtual_line2496_line2531 bus1=2461.1.2.3.4 bus2=2532.1.2.3.4 phases=4 linecode=LC9 length=11.8407 units=m
! reduced_from=line2496,line2531
! eliminated_buses=2497

New Line._virtual_line2505_line2540_line2575_line2610_line2645_line2683_line2719_line2756_line2793_line2827_line2864_line2900_line2934_line2968_line2998_line3029_line3060_line3091_line3120_line3149 bus1=3150.1.2.3.4 bus2=2470.1.2.3.4 phases=4 linecode=LC6 length=10.844709 units=m
! reduced_from=line2505,line2540,line2575,line2610,line2645,line2683,line2719,line2756,line2793,line2827,line2864,line2900,line2934,line2968,line2998,line3029,line3060,line3091,line3120,line3149
! eliminated_buses=2506,2541,2576,2611,2646,2684,2720,2757,2794,2828,2865,2901,2935,2969,2999,3030,3061,3092,3121

New Line._virtual_line2556_line2592_line2626_line2663_line2700_line2736_line2774_line2809 bus1=2810.1.2.3.4 bus2=2521.1.2.3.4 phases=4 linecode=LC2 length=12.715 units=m
! reduced_from=line2556,line2592,line2626,line2663,line2700,line2736,line2774,line2809
! eliminated_buses=2557,2593,2627,2664,2701,2737,2775

New Line._virtual_line2564_line2599_line2633_line2670_line2705_line2741_line2779_line2814_line2847_line2885_line2920_line2954_line2985_line3016_line3047_line3078_line3108_line3137_line3169_line3199_line3225_line3249_line3271_line3294_line3317_line3339_line3360_line3380_line3401_line3429 bus1=3430.1.2.3.4 bus2=2532.1.2.3.4 phases=4 linecode=LC2 length=34.377035 units=m
! reduced_from=line2564,line2599,line2633,line2670,line2705,line2741,line2779,line2814,line2847,line2885,line2920,line2954,line2985,line3016,line3047,line3078,line3108,line3137,line3169,line3199,line3225,line3249,line3271,line3294,line3317,line3339,line3360,line3380,line3401,line3429
! eliminated_buses=2565,2600,2634,2671,2706,2742,2780,2815,2848,2886,2921,2955,2986,3017,3048,3079,3109,3138,3170,3200,3226,3250,3272,3295,3318,3340,3361,3381,3402

New Line._virtual_line2565_line2600_line2634_line2671_line2706_line2742_line2780_line2815_line2848_line2886_line2921_line2955_line2986_line3017_line3048_line3079_line3109_line3138_line3170_line3200_line3226_line3250_line3272_line3295 bus1=2532.1.2.3.4 bus2=3296.1.2.3.4 phases=4 linecode=LC2 length=33.862536 units=m
! reduced_from=line2565,line2600,line2634,line2671,line2706,line2742,line2780,line2815,line2848,line2886,line2921,line2955,line2986,line3017,line3048,line3079,line3109,line3138,line3170,line3200,line3226,line3250,line3272,line3295
! eliminated_buses=2566,2601,2635,2672,2707,2743,2781,2816,2849,2887,2922,2956,2987,3018,3049,3080,3110,3139,3171,3201,3227,3251,3273

New Line._virtual_line2566_line2601_line2635_line2672_line2707_line2743_line2781_line2816_line2849_line2887_line2922_line2956_line2987_line3018_line3049_line3080_line3110_line3139_line3171_line3201_line3227_line3251_line3273_line3296 bus1=2532.1.2.3.4 bus2=3297.1.2.3.4 phases=4 linecode=LC2 length=18.878498 units=m
! reduced_from=line2566,line2601,line2635,line2672,line2707,line2743,line2781,line2816,line2849,line2887,line2922,line2956,line2987,line3018,line3049,line3080,line3110,line3139,line3171,line3201,line3227,line3251,line3273,line3296
! eliminated_buses=2567,2602,2636,2673,2708,2744,2782,2817,2850,2888,2923,2957,2988,3019,3050,3081,3111,3140,3172,3202,3228,3252,3274

New Line._virtual_line2567_line2602_line2636_line2673_line2708_line2744_line2782_line2817_line2850_line2888_line2923_line2957_line2988_line3019_line3050_line3081_line3111_line3140_line3172_line3202_line3228_line3252_line3274_line3297_line3318_line3340_line3361_line3381_line3402_line3430_line3457_line3486_line3516_line3544 bus1=2532.1.2.3.4 bus2=3545.1.2.3.4 phases=4 linecode=LC2 length=19.31195 units=m
! reduced_from=line2567,line2602,line2636,line2673,line2708,line2744,line2782,line2817,line2850,line2888,line2923,line2957,line2988,line3019,line3050,line3081,line3111,line3140,line3172,line3202,line3228,line3252,line3274,line3297,line3318,line3340,line3361,line3381,line3402,line3430,line3457,line3486,line3516,line3544
! eliminated_buses=2568,2603,2637,2674,2709,2745,2783,2818,2851,2889,2924,2958,2989,3020,3051,3082,3112,3141,3173,3203,3229,3253,3275,3298,3319,3341,3362,3382,3403,3431,3458,3487,3517

New Line._virtual_line2576_line2611_line2646_line2684_line2720_line2757_line2794_line2828_line2865_line2901_line2935_line2969_line2999_line3030_line3061_line3092_line3121_line3150 bus1=3151.1.2.3.4 bus2=2542.1.2.3.4 phases=4 linecode=LC6 length=43.8514 units=m
! reduced_from=line2576,line2611,line2646,line2684,line2720,line2757,line2794,line2828,line2865,line2901,line2935,line2969,line2999,line3030,line3061,line3092,line3121,line3150
! eliminated_buses=2577,2612,2647,2685,2721,2758,2795,2829,2866,2902,2936,2970,3000,3031,3062,3093,3122

New Line._virtual_line2578_line2613_line2648_line2686_line2722_line2759_line2796_line2830_line2867_line2903_line2937_line2971_line3001_line3032_line3063_line3094 bus1=2542.1.2.3.4 bus2=3095.1.2.3.4 phases=4 linecode=LC6 length=18.714985 units=m
! reduced_from=line2578,line2613,line2648,line2686,line2722,line2759,line2796,line2830,line2867,line2903,line2937,line2971,line3001,line3032,line3063,line3094
! eliminated_buses=2579,2614,2649,2687,2723,2760,2797,2831,2868,2904,2938,2972,3002,3033,3064

New Line._virtual_line2619_line2657_line2694 bus1=2585.1.2.3.4 bus2=2695.1.2.3.4 phases=4 linecode=LC2 length=7.091 units=m
! reduced_from=line2619,line2657,line2694
! eliminated_buses=2620,2658

New Line._virtual_line2652_line2689_line2725_line2762_line2799_line2833_line2870_line2906_line2940_line2974_line3004_line3036_line3066_line3097_line3127_line3155_line3187_line3215_line3238_line3261_line3284_line3308_line3331_line3352_line3372_line3393_line3421_line3449_line3479_line3510_line3538 bus1=3539.1.2.3.4 bus2=2619.1.2.3.4 phases=4 linecode=LC9 length=45.89117 units=m
! reduced_from=line2652,line2689,line2725,line2762,line2799,line2833,line2870,line2906,line2940,line2974,line3004,line3036,line3066,line3097,line3127,line3155,line3187,line3215,line3238,line3261,line3284,line3308,line3331,line3352,line3372,line3393,line3421,line3449,line3479,line3510,line3538
! eliminated_buses=2653,2690,2726,2763,2800,2834,2871,2907,2941,2975,3005,3037,3067,3098,3128,3156,3188,3216,3239,3262,3285,3309,3332,3353,3373,3394,3422,3450,3480,3511

New Line._virtual_line2653_line2690_line2726_line2763_line2800_line2834_line2871_line2907_line2941_line2975_line3005_line3037_line3067_line3098_line3128 bus1=2619.1.2.3.4 bus2=3129.1.2.3.4 phases=4 linecode=LC6 length=8.624921 units=m
! reduced_from=line2653,line2690,line2726,line2763,line2800,line2834,line2871,line2907,line2941,line2975,line3005,line3037,line3067,line3098,line3128
! eliminated_buses=2654,2691,2727,2764,2801,2835,2872,2908,2942,2976,3006,3038,3068,3099

New Line._virtual_line2655_line2692_line2728_line2765_line2802_line2836_line2873_line2909_line2943_line2977_line3008_line3040_line3070_line3101_line3130 bus1=2619.1.2.3.4 bus2=3131.1.2.3.4 phases=4 linecode=LC6 length=10.34661 units=m
! reduced_from=line2655,line2692,line2728,line2765,line2802,line2836,line2873,line2909,line2943,line2977,line3008,line3040,line3070,line3101,line3130
! eliminated_buses=2656,2693,2729,2766,2803,2837,2874,2910,2944,2978,3009,3041,3071,3102

New Line._virtual_line2656_line2693_line2729_line2766_line2803_line2837_line2874_line2910_line2944_line2978_line3009_line3041_line3071_line3102_line3131_line3162 bus1=3163.1.2.3.4 bus2=2619.1.2.3.4 phases=4 linecode=LC6 length=17.22241 units=m
! reduced_from=line2656,line2693,line2729,line2766,line2803,line2837,line2874,line2910,line2944,line2978,line3009,line3041,line3071,line3102,line3131,line3162
! eliminated_buses=2657,2694,2730,2767,2804,2838,2875,2911,2945,2979,3010,3042,3072,3103,3132

New Line._virtual_line2733_line2770_line2806_line2840_line2877_line2913_line2947_line2981_line3012_line3044_line3075_line3106_line3135_line3166_line3197_line3223_line3246_line3269_line3292_line3316_line3338_line3359_line3379_line3400_line3428_line3456_line3485_line3515 bus1=2699.1.2.3.4 bus2=3516.1.2.3.4 phases=4 linecode=LC9 length=35.70765 units=m
! reduced_from=line2733,line2770,line2806,line2840,line2877,line2913,line2947,line2981,line3012,line3044,line3075,line3106,line3135,line3166,line3197,line3223,line3246,line3269,line3292,line3316,line3338,line3359,line3379,line3400,line3428,line3456,line3485,line3515
! eliminated_buses=2734,2771,2807,2841,2878,2914,2948,2982,3013,3045,3076,3107,3136,3167,3198,3224,3247,3270,3293,3317,3339,3360,3380,3401,3429,3457,3486

New Line._virtual_line2734_line2771_line2807_line2841 bus1=2699.1.2.3.4 bus2=2842.1.2.3.4 phases=4 linecode=LC9 length=5.82664 units=m
! reduced_from=line2734,line2771,line2807,line2841
! eliminated_buses=2735,2772,2808

New Line._virtual_line2773_line2808_line2842_line2881_line2916_line2950_line2984_line3015 bus1=2736.1.2.3.4 bus2=3016.1.2.3.4 phases=4 linecode=LC2 length=14.04147 units=m
! reduced_from=line2773,line2808,line2842,line2881,line2916,line2950,line2984,line3015
! eliminated_buses=2774,2809,2843,2882,2917,2951,2985

New Line._virtual_line2854_line2890_line2925_line2959_line2990_line3021_line3052_line3083_line3113_line3142_line3174_line3204_line3230 bus1=2822.1.2.3.4 bus2=3231.1.2.3.4 phases=4 linecode=LC2 length=15.524433 units=m
! reduced_from=line2854,line2890,line2925,line2959,line2990,line3021,line3052,line3083,line3113,line3142,line3174,line3204,line3230
! eliminated_buses=2855,2891,2926,2960,2991,3022,3053,3084,3114,3143,3175,3205

New Line._virtual_line2855_line2892_line2927_line2961_line2992_line3023_line3054_line3085_line3115_line3144_line3176_line3206_line3231_line3254_line3276_line3299_line3320_line3342_line3362_line3382_line3403_line3431_line3458_line3487_line3517_line3545_line3575_line3606_line3642_line3681_line3720_line3759 bus1=3760.1.2.3.4 bus2=2822.1.2.3.4 phases=4 linecode=LC2 length=22.417831 units=m
! reduced_from=line2855,line2892,line2927,line2961,line2992,line3023,line3054,line3085,line3115,line3144,line3176,line3206,line3231,line3254,line3276,line3299,line3320,line3342,line3362,line3382,line3403,line3431,line3458,line3487,line3517,line3545,line3575,line3606,line3642,line3681,line3720,line3759
! eliminated_buses=2856,2893,2928,2962,2993,3024,3055,3086,3116,3145,3177,3207,3232,3255,3277,3300,3321,3343,3363,3383,3404,3432,3459,3488,3518,3546,3576,3607,3643,3682,3721

New Line._virtual_line2856_line2894_line2929_line2963_line2994_line3025_line3056_line3087_line3117_line3146_line3178_line3208_line3233_line3256 bus1=2822.1.2.3.4 bus2=3257.1.2.3.4 phases=4 linecode=LC5 length=9.15662 units=m
! reduced_from=line2856,line2894,line2929,line2963,line2994,line3025,line3056,line3087,line3117,line3146,line3178,line3208,line3233,line3256
! eliminated_buses=2857,2895,2930,2964,2995,3026,3057,3088,3118,3147,3179,3209,3234

New Line._virtual_line2857_line2896_line2931_line2966_line2997_line3028_line3059_line3090_line3119_line3148_line3180_line3210 bus1=3211.1.2.3.4 bus2=2822.1.2.3.4 phases=4 linecode=LC2 length=28.95914 units=m
! reduced_from=line2857,line2896,line2931,line2966,line2997,line3028,line3059,line3090,line3119,line3148,line3180,line3210
! eliminated_buses=2858,2897,2932,2967,2998,3029,3060,3091,3120,3149,3181

New Line._virtual_line2879_line2914_line2948_line2982_line3013_line3045_line3076 bus1=3077.1.2.3.4 bus2=2842.1.2.3.4 phases=4 linecode=LC6 length=13.61188 units=m
! reduced_from=line2879,line2914,line2948,line2982,line3013,line3045,line3076
! eliminated_buses=2880,2915,2949,2983,3014,3046

New Line._virtual_line2880_line2915_line2949_line2983_line3014_line3046_line3077_line3107_line3136 bus1=3137.1.2.3.4 bus2=2842.1.2.3.4 phases=4 linecode=LC6 length=6.42022 units=m
! reduced_from=line2880,line2915,line2949,line2983,line3014,line3046,line3077,line3107,line3136
! eliminated_buses=2881,2916,2950,2984,3015,3047,3078,3108

New Line._virtual_line3034_line3064_line3095_line3125_line3153_line3185_line3213 bus1=3214.1.2.3.4 bus2=3003.1.2.3.4 phases=4 linecode=LC6 length=10.037461 units=m
! reduced_from=line3034,line3064,line3095,line3125,line3153,line3185,line3213
! eliminated_buses=3035,3065,3096,3126,3154,3186

New Line._virtual_line3124_line3152_line3184_line3212_line3236_line3259_line3281 bus1=3282.1.2.3.4 bus2=3095.1.2.3.4 phases=4 linecode=LC6 length=2.621249 units=m
! reduced_from=line3124,line3152,line3184,line3212,line3236,line3259,line3281
! eliminated_buses=3125,3153,3185,3213,3237,3260

New Line._virtual_line3157_line3189_line3217_line3240_line3263_line3286_line3310_line3333_line3354_line3374_line3395_line3423_line3451_line3481_line3512_line3539_line3570_line3600 bus1=3601.1.2.3.4 bus2=3129.1.2.3.4 phases=4 linecode=LC6 length=11.78851 units=m
! reduced_from=line3157,line3189,line3217,line3240,line3263,line3286,line3310,line3333,line3354,line3374,line3395,line3423,line3451,line3481,line3512,line3539,line3570,line3600
! eliminated_buses=3158,3190,3218,3241,3264,3287,3311,3334,3355,3375,3396,3424,3452,3482,3513,3540,3571

New Line._virtual_line3158_line3190_line3218_line3241_line3264_line3287_line3311_line3334_line3355_line3375_line3396_line3424_line3452 bus1=3453.1.2.3.4 bus2=3129.1.2.3.4 phases=4 linecode=LC6 length=9.14888 units=m
! reduced_from=line3158,line3190,line3218,line3241,line3264,line3287,line3311,line3334,line3355,line3375,line3396,line3424,line3452
! eliminated_buses=3159,3191,3219,3242,3265,3288,3312,3335,3356,3376,3397,3425

New Line._virtual_line3168_line3198_line3224 bus1=3137.1.2.3.4 bus2=3225.1.2.3.4 phases=4 linecode=LC6 length=6.94696 units=m
! reduced_from=line3168,line3198,line3224
! eliminated_buses=3169,3199

New Line._virtual_line3182_line3211_line3235_line3258_line3280_line3303_line3326_line3348_line3368_line3389_line3414_line3442 bus1=3443.1.2.3.4 bus2=3150.1.2.3.4 phases=4 linecode=LC6 length=9.7538 units=m
! reduced_from=line3182,line3211,line3235,line3258,line3280,line3303,line3326,line3348,line3368,line3389,line3414,line3442
! eliminated_buses=3183,3212,3236,3259,3281,3304,3327,3349,3369,3390,3415

New Line._virtual_line3248_line3270_line3293 bus1=3294.1.2.3.4 bus2=3225.1.2.3.4 phases=4 linecode=LC6 length=10.1783 units=m
! reduced_from=line3248,line3270,line3293
! eliminated_buses=3249,3271

New Line._virtual_line3278_line3301_line3322_line3344_line3364_line3384 bus1=3385.1.2.3.4 bus2=3257.1.2.3.4 phases=4 linecode=LC9 length=11.61815 units=m
! reduced_from=line3278,line3301,line3322,line3344,line3364,line3384
! eliminated_buses=3279,3302,3323,3345,3365

New Line._virtual_line3279_line3302 bus1=3303.1.2.3.4 bus2=3257.1.2.3.4 phases=4 linecode=LC9 length=6.3579 units=m
! reduced_from=line3279,line3302
! eliminated_buses=3280

New Line._virtual_line3305_line3327_line3349_line3369_line3390_line3415_line3443_line3473_line3504_line3534_line3564_line3594_line3630_line3668_line3708_line3746_line3784_line3823_line3864_line3905_line3946_line3987_line4025_line4062_line4098_line4132_line4166 bus1=3282.1.2.3.4 bus2=4167.1.2.3.4 phases=4 linecode=LC6 length=22.04902 units=m
! reduced_from=line3305,line3327,line3349,line3369,line3390,line3415,line3443,line3473,line3504,line3534,line3564,line3594,line3630,line3668,line3708,line3746,line3784,line3823,line3864,line3905,line3946,line3987,line4025,line4062,line4098,line4132,line4166
! eliminated_buses=3306,3328,3350,3370,3391,3416,3444,3474,3505,3535,3565,3595,3631,3669,3709,3747,3785,3824,3865,3906,3947,3988,4026,4063,4099,4133

New Line._virtual_line3323_line3345_line3365_line3386_line3409_line3437_line3464_line3495_line3525_line3555_line3585_line3621_line3659_line3698_line3736_line3774_line3813_line3856_line3897_line3939_line3980 bus1=3981.1.2.3.4 bus2=3303.1.2.3.4 phases=4 linecode=LC2 length=17.91026 units=m
! reduced_from=line3323,line3345,line3365,line3386,line3409,line3437,line3464,line3495,line3525,line3555,line3585,line3621,line3659,line3698,line3736,line3774,line3813,line3856,line3897,line3939,line3980
! eliminated_buses=3324,3346,3366,3387,3410,3438,3465,3496,3526,3556,3586,3622,3660,3699,3737,3775,3814,3857,3898,3940

New Line._virtual_line3324_line3346_line3366_line3387_line3410_line3438_line3465_line3496_line3526_line3556_line3586_line3622_line3660_line3699_line3737_line3775_line3814 bus1=3815.1.2.3.4 bus2=3303.1.2.3.4 phases=4 linecode=LC2 length=17.55047 units=m
! reduced_from=line3324,line3346,line3366,line3387,line3410,line3438,line3465,line3496,line3526,line3556,line3586,line3622,line3660,line3699,line3737,line3775,line3814
! eliminated_buses=3325,3347,3367,3388,3411,3439,3466,3497,3527,3557,3587,3623,3661,3700,3738,3776

New Line._virtual_line3325_line3347_line3367_line3388 bus1=3303.1.2.3.4 bus2=3389.1.2.3.4 phases=4 linecode=LC9 length=14.8306 units=m
! reduced_from=line3325,line3347,line3367,line3388
! eliminated_buses=3326,3348,3368

New Line._virtual_line3330_line3351_line3371_line3392_line3417_line3445_line3475_line3506_line3536_line3565_line3595 bus1=3596.1.2.3.4 bus2=3308.1.2.3.4 phases=4 linecode=LC6 length=10.416331 units=m
! reduced_from=line3330,line3351,line3371,line3392,line3417,line3445,line3475,line3506,line3536,line3565,line3595
! eliminated_buses=3331,3352,3372,3393,3418,3446,3476,3507,3537,3566

New Line._virtual_line3405_line3433_line3460 bus1=3461.1.2.3.4 bus2=3385.1.2.3.4 phases=4 linecode=LC9 length=15.3523 units=m
! reduced_from=line3405,line3433,line3460
! eliminated_buses=3406,3434

New Line._virtual_line3406_line3434_line3461_line3492_line3523_line3553_line3583_line3619_line3657_line3696_line3734_line3772_line3811_line3854_line3895_line3937_line3978_line4018_line4056_line4093_line4127_line4161_line4192_line4223_line4254_line4284_line4312_line4342_line4371_line4400_line4432_line4461_line4490 bus1=4491.1.2.3.4 bus2=3385.1.2.3.4 phases=4 linecode=LC2 length=17.231925 units=m
! reduced_from=line3406,line3434,line3461,line3492,line3523,line3553,line3583,line3619,line3657,line3696,line3734,line3772,line3811,line3854,line3895,line3937,line3978,line4018,line4056,line4093,line4127,line4161,line4192,line4223,line4254,line4284,line4312,line4342,line4371,line4400,line4432,line4461,line4490
! eliminated_buses=3407,3435,3462,3493,3524,3554,3584,3620,3658,3697,3735,3773,3812,3855,3896,3938,3979,4019,4057,4094,4128,4162,4193,4224,4255,4285,4313,4343,4372,4401,4433,4462

New Line._virtual_line3407_line3435_line3462_line3493_line3524_line3554_line3584_line3620_line3658_line3697_line3735_line3773_line3812_line3855_line3896_line3938_line3979_line4019_line4057_line4094_line4128_line4162_line4193_line4224_line4255_line4285_line4313_line4343_line4372_line4401_line4433_line4462_line4491_line4519_line4546 bus1=3385.1.2.3.4 bus2=4547.1.2.3.4 phases=4 linecode=LC2 length=16.52036 units=m
! reduced_from=line3407,line3435,line3462,line3493,line3524,line3554,line3584,line3620,line3658,line3697,line3735,line3773,line3812,line3855,line3896,line3938,line3979,line4019,line4057,line4094,line4128,line4162,line4193,line4224,line4255,line4285,line4313,line4343,line4372,line4401,line4433,line4462,line4491,line4519,line4546
! eliminated_buses=3408,3436,3463,3494,3525,3555,3585,3621,3659,3698,3736,3774,3813,3856,3897,3939,3980,4020,4058,4095,4129,4163,4194,4225,4256,4286,4314,4344,4373,4402,4434,4463,4492,4520

New Line._virtual_line3411_line3439_line3466_line3497_line3527_line3557_line3587_line3623_line3661_line3700_line3738_line3776_line3815_line3857_line3898_line3940_line3981_line4020 bus1=3389.1.2.3.4 bus2=4021.1.2.3.4 phases=4 linecode=LC2 length=16.024861 units=m
! reduced_from=line3411,line3439,line3466,line3497,line3527,line3557,line3587,line3623,line3661,line3700,line3738,line3776,line3815,line3857,line3898,line3940,line3981,line4020
! eliminated_buses=3412,3440,3467,3498,3528,3558,3588,3624,3662,3701,3739,3777,3816,3858,3899,3941,3982

New Line._virtual_line3412_line3440_line3467_line3498_line3528_line3558_line3588_line3624_line3662_line3701_line3739_line3777_line3816_line3858_line3899 bus1=3900.1.2.3.4 bus2=3389.1.2.3.4 phases=4 linecode=LC2 length=17.21154 units=m
! reduced_from=line3412,line3440,line3467,line3498,line3528,line3558,line3588,line3624,line3662,line3701,line3739,line3777,line3816,line3858,line3899
! eliminated_buses=3413,3441,3468,3499,3529,3559,3589,3625,3663,3702,3740,3778,3817,3859

New Line._virtual_line3413_line3441 bus1=3389.1.2.3.4 bus2=3442.1.2.3.4 phases=4 linecode=LC9 length=15.8118 units=m
! reduced_from=line3413,line3441
! eliminated_buses=3414

New Line._virtual_line3468_line3499_line3529_line3559_line3589_line3625_line3663_line3702_line3740_line3778_line3817_line3859_line3900_line3941_line3982 bus1=3983.1.2.3.4 bus2=3442.1.2.3.4 phases=4 linecode=LC2 length=18.33122 units=m
! reduced_from=line3468,line3499,line3529,line3559,line3589,line3625,line3663,line3702,line3740,line3778,line3817,line3859,line3900,line3941,line3982
! eliminated_buses=3469,3500,3530,3560,3590,3626,3664,3703,3741,3779,3818,3860,3901,3942

New Line._virtual_line3469_line3500_line3530_line3560_line3590_line3626_line3664_line3703_line3741_line3779_line3818_line3860_line3901_line3942_line3983_line4021_line4058 bus1=3442.1.2.3.4 bus2=4059.1.2.3.4 phases=4 linecode=LC2 length=18.092818 units=m
! reduced_from=line3469,line3500,line3530,line3560,line3590,line3626,line3664,line3703,line3741,line3779,line3818,line3860,line3901,line3942,line3983,line4021,line4058
! eliminated_buses=3470,3501,3531,3561,3591,3627,3665,3704,3742,3780,3819,3861,3902,3943,3984,4022

New Line._virtual_line3470_line3501_line3531_line3561_line3591_line3627_line3665_line3704_line3742_line3780_line3819_line3861_line3902_line3943_line3984_line4022_line4059_line4095_line4129_line4163 bus1=4164.1.2.3.4 bus2=3442.1.2.3.4 phases=4 linecode=LC2 length=21.7546 units=m
! reduced_from=line3470,line3501,line3531,line3561,line3591,line3627,line3665,line3704,line3742,line3780,line3819,line3861,line3902,line3943,line3984,line4022,line4059,line4095,line4129,line4163
! eliminated_buses=3471,3502,3532,3562,3592,3628,3666,3705,3743,3781,3820,3862,3903,3944,3985,4023,4060,4096,4130

New Line._virtual_line3471_line3502_line3532_line3562_line3592_line3628_line3666_line3705_line3743_line3781_line3820_line3862_line3903_line3944_line3985_line4023_line4060_line4096_line4130_line4164_line4194_line4225_line4256 bus1=3442.1.2.3.4 bus2=4257.1.2.3.4 phases=4 linecode=LC2 length=20.89548 units=m
! reduced_from=line3471,line3502,line3532,line3562,line3592,line3628,line3666,line3705,line3743,line3781,line3820,line3862,line3903,line3944,line3985,line4023,line4060,line4096,line4130,line4164,line4194,line4225,line4256
! eliminated_buses=3472,3503,3533,3563,3593,3629,3667,3706,3744,3782,3821,3863,3904,3945,3986,4024,4061,4097,4131,4165,4195,4226

New Line._virtual_line3472_line3503_line3533_line3563_line3593_line3629_line3667_line3707_line3745_line3783_line3822_line3863_line3904_line3945_line3986_line4024_line4061_line4097_line4131_line4165_line4195 bus1=3442.1.2.3.4 bus2=4196.1.2.3.4 phases=4 linecode=LC9 length=21.61368 units=m
! reduced_from=line3472,line3503,line3533,line3563,line3593,line3629,line3667,line3707,line3745,line3783,line3822,line3863,line3904,line3945,line3986,line4024,line4061,line4097,line4131,line4165,line4195
! eliminated_buses=3473,3504,3534,3564,3594,3630,3668,3708,3746,3784,3823,3864,3905,3946,3987,4025,4062,4098,4132,4166

New Line._virtual_line3489_line3520 bus1=3461.1.2.3.4 bus2=3521.1.2.3.4 phases=4 linecode=LC9 length=13.9771 units=m
! reduced_from=line3489,line3520
! eliminated_buses=3490

New Line._virtual_line3490_line3521_line3551_line3581_line3617_line3655_line3694_line3732_line3770_line3809_line3852_line3893_line3935_line3976_line4016_line4054_line4091_line4125_line4159_line4190_line4221_line4252_line4282_line4310_line4340_line4369_line4398_line4430_line4459_line4488_line4517_line4544_line4569_line4593_line4615_line4637_line4661_line4684_line4705_line4723 bus1=4724.1.2.3.4 bus2=3461.1.2.3.4 phases=4 linecode=LC2 length=17.686931 units=m
! reduced_from=line3490,line3521,line3551,line3581,line3617,line3655,line3694,line3732,line3770,line3809,line3852,line3893,line3935,line3976,line4016,line4054,line4091,line4125,line4159,line4190,line4221,line4252,line4282,line4310,line4340,line4369,line4398,line4430,line4459,line4488,line4517,line4544,line4569,line4593,line4615,line4637,line4661,line4684,line4705,line4723
! eliminated_buses=3491,3522,3552,3582,3618,3656,3695,3733,3771,3810,3853,3894,3936,3977,4017,4055,4092,4126,4160,4191,4222,4253,4283,4311,4341,4370,4399,4431,4460,4489,4518,4545,4570,4594,4616,4638,4662,4685,4706

New Line._virtual_line3491_line3522_line3552_line3582_line3618_line3656_line3695_line3733_line3771_line3810_line3853_line3894_line3936_line3977_line4017_line4055_line4092_line4126_line4160_line4191_line4222_line4253_line4283_line4311_line4341_line4370_line4399_line4431_line4460_line4489_line4518_line4545_line4570_line4594_line4616 bus1=3461.1.2.3.4 bus2=4617.1.2.3.4 phases=4 linecode=LC2 length=18.09843 units=m
! reduced_from=line3491,line3522,line3552,line3582,line3618,line3656,line3695,line3733,line3771,line3810,line3853,line3894,line3936,line3977,line4017,line4055,line4092,line4126,line4160,line4191,line4222,line4253,line4283,line4311,line4341,line4370,line4399,line4431,line4460,line4489,line4518,line4545,line4570,line4594,line4616
! eliminated_buses=3492,3523,3553,3583,3619,3657,3696,3734,3772,3811,3854,3895,3937,3978,4018,4056,4093,4127,4161,4192,4223,4254,4284,4312,4342,4371,4400,4432,4461,4490,4519,4546,4571,4595

New Line._virtual_line3542_line3573_line3603_line3639_line3678_line3717_line3756_line3794_line3833_line3875_line3914_line3956_line3996_line4034_line4071_line4105_line4139_line4171_line4199_line4232_line4262_line4290_line4318_line4347_line4376_line4408_line4438_line4467_line4496 bus1=3516.1.2.3.4 bus2=4497.1.2.3.4 phases=4 linecode=LC2 length=16.051786 units=m
! reduced_from=line3542,line3573,line3603,line3639,line3678,line3717,line3756,line3794,line3833,line3875,line3914,line3956,line3996,line4034,line4071,line4105,line4139,line4171,line4199,line4232,line4262,line4290,line4318,line4347,line4376,line4408,line4438,line4467,line4496
! eliminated_buses=3543,3574,3604,3640,3679,3718,3757,3795,3834,3876,3915,3957,3997,4035,4072,4106,4140,4172,4200,4233,4263,4291,4319,4348,4377,4409,4439,4468

New Line._virtual_line3543_line3574_line3605 bus1=3516.1.2.3.4 bus2=3606.1.2.3.4 phases=4 linecode=LC9 length=17.972 units=m
! reduced_from=line3543,line3574,line3605
! eliminated_buses=3544,3575

New Line._virtual_line3548_line3578_line3609_line3645_line3684_line3722_line3760_line3797_line3836_line3878_line3917_line3958_line3998_line4036_line4073_line4107_line4141_line4173_line4201_line4234_line4264_line4291_line4319_line4348_line4377_line4409_line4439_line4468_line4497_line4524_line4550_line4574_line4598_line4620_line4641_line4665_line4688_line4709 bus1=4710.1.2.3.4 bus2=3521.1.2.3.4 phases=4 linecode=LC2 length=18.050532 units=m
! reduced_from=line3548,line3578,line3609,line3645,line3684,line3722,line3760,line3797,line3836,line3878,line3917,line3958,line3998,line4036,line4073,line4107,line4141,line4173,line4201,line4234,line4264,line4291,line4319,line4348,line4377,line4409,line4439,line4468,line4497,line4524,line4550,line4574,line4598,line4620,line4641,line4665,line4688,line4709
! eliminated_buses=3549,3579,3610,3646,3685,3723,3761,3798,3837,3879,3918,3959,3999,4037,4074,4108,4142,4174,4202,4235,4265,4292,4320,4349,4378,4410,4440,4469,4498,4525,4551,4575,4599,4621,4642,4666,4689

New Line._virtual_line3549_line3579_line3610_line3646_line3685_line3723_line3761_line3798_line3837_line3879_line3918_line3959_line3999_line4037_line4074_line4108_line4142_line4174_line4202_line4235_line4265_line4292_line4320_line4349_line4378_line4410_line4440_line4469_line4498_line4525_line4551_line4575_line4599_line4621_line4642_line4666_line4689_line4710 bus1=4711.1.2.3.4 bus2=3521.1.2.3.4 phases=4 linecode=LC2 length=16.312788 units=m
! reduced_from=line3549,line3579,line3610,line3646,line3685,line3723,line3761,line3798,line3837,line3879,line3918,line3959,line3999,line4037,line4074,line4108,line4142,line4174,line4202,line4235,line4265,line4292,line4320,line4349,line4378,line4410,line4440,line4469,line4498,line4525,line4551,line4575,line4599,line4621,line4642,line4666,line4689,line4710
! eliminated_buses=3550,3580,3611,3647,3686,3724,3762,3799,3838,3880,3919,3960,4000,4038,4075,4109,4143,4175,4203,4236,4266,4293,4321,4350,4379,4411,4441,4470,4499,4526,4552,4576,4600,4622,4643,4667,4690

New Line._virtual_line3550_line3580 bus1=3521.1.2.3.4 bus2=3581.1.2.3.4 phases=4 linecode=LC9 length=13.11108 units=m
! reduced_from=line3550,line3580
! eliminated_buses=3551

New Line._virtual_line3568_line3598_line3633_line3672_line3712_line3751_line3789_line3828 bus1=3539.1.2.3.4 bus2=3829.1.2.3.4 phases=4 linecode=LC2 length=8.26564 units=m
! reduced_from=line3568,line3598,line3633,line3672,line3712,line3751,line3789,line3828
! eliminated_buses=3569,3599,3634,3673,3713,3752,3790

New Line._virtual_line3569_line3599_line3634_line3673_line3713_line3752_line3790_line3829_line3871_line3910_line3951_line3992_line4031 bus1=4032.1.2.3.4 bus2=3539.1.2.3.4 phases=4 linecode=LC2 length=20.2645 units=m
! reduced_from=line3569,line3599,line3634,line3673,line3713,line3752,line3790,line3829,line3871,line3910,line3951,line3992,line4031
! eliminated_buses=3570,3600,3635,3674,3714,3753,3791,3830,3872,3911,3952,3993

New Line._virtual_line3611_line3647_line3686_line3724_line3762_line3799_line3838_line3880_line3919_line3960_line4000_line4038_line4075_line4109_line4143_line4175_line4203_line4236_line4266_line4293_line4321_line4350_line4379_line4411_line4441_line4470_line4499_line4526_line4552_line4576_line4600_line4622_line4643_line4667_line4690 bus1=4691.1.2.3.4 bus2=3581.1.2.3.4 phases=4 linecode=LC2 length=28.690789 units=m
! reduced_from=line3611,line3647,line3686,line3724,line3762,line3799,line3838,line3880,line3919,line3960,line4000,line4038,line4075,line4109,line4143,line4175,line4203,line4236,line4266,line4293,line4321,line4350,line4379,line4411,line4441,line4470,line4499,line4526,line4552,line4576,line4600,line4622,line4643,line4667,line4690
! eliminated_buses=3612,3648,3687,3725,3763,3800,3839,3881,3920,3961,4001,4039,4076,4110,4144,4176,4204,4237,4267,4294,4322,4351,4380,4412,4442,4471,4500,4527,4553,4577,4601,4623,4644,4668

New Line._virtual_line3612_line3649_line3688_line3726_line3764_line3801_line3840_line3882_line3921_line3962_line4002_line4040_line4077_line4111_line4145_line4177_line4205_line4238_line4268_line4295_line4323_line4352_line4381_line4413_line4443_line4472_line4501_line4528_line4554_line4578_line4602_line4624_line4645_line4669_line4691_line4711 bus1=3581.1.2.3.4 bus2=4712.1.2.3.4 phases=4 linecode=LC2 length=31.311101 units=m
! reduced_from=line3612,line3649,line3688,line3726,line3764,line3801,line3840,line3882,line3921,line3962,line4002,line4040,line4077,line4111,line4145,line4177,line4205,line4238,line4268,line4295,line4323,line4352,line4381,line4413,line4443,line4472,line4501,line4528,line4554,line4578,line4602,line4624,line4645,line4669,line4691,line4711
! eliminated_buses=3613,3650,3689,3727,3765,3802,3841,3883,3922,3963,4003,4041,4078,4112,4146,4178,4206,4239,4269,4296,4324,4353,4382,4414,4444,4473,4502,4529,4555,4579,4603,4625,4646,4670,4692

New Line._virtual_line3613_line3651_line3690_line3728_line3766_line3803_line3842_line3883_line3925_line3964_line4004_line4042_line4079_line4113_line4147_line4179_line4207_line4240_line4270_line4297_line4325_line4354_line4383_line4415_line4445_line4474_line4503_line4530_line4556_line4580_line4604_line4626_line4647_line4671_line4693 bus1=3581.1.2.3.4 bus2=4694.1.2.3.4 phases=4 linecode=LC2 length=28.191233 units=m
! reduced_from=line3613,line3651,line3690,line3728,line3766,line3803,line3842,line3883,line3925,line3964,line4004,line4042,line4079,line4113,line4147,line4179,line4207,line4240,line4270,line4297,line4325,line4354,line4383,line4415,line4445,line4474,line4503,line4530,line4556,line4580,line4604,line4626,line4647,line4671,line4693
! eliminated_buses=3614,3652,3691,3729,3767,3804,3843,3884,3926,3965,4005,4043,4080,4114,4148,4180,4208,4241,4271,4298,4326,4355,4384,4416,4446,4475,4504,4531,4557,4581,4605,4627,4648,4672

New Line._virtual_line3635_line3674_line3714_line3753_line3791_line3830_line3872_line3911_line3953_line3994_line4033_line4070_line4104_line4138 bus1=3601.1.2.3.4 bus2=4139.1.2.3.4 phases=4 linecode=LC6 length=13.28459 units=m
! reduced_from=line3635,line3674,line3714,line3753,line3791,line3830,line3872,line3911,line3953,line3994,line4033,line4070,line4104,line4138
! eliminated_buses=3636,3675,3715,3754,3792,3831,3873,3912,3954,3995,4034,4071,4105

New Line._virtual_line3636_line3675_line3715_line3754_line3792_line3831_line3873_line3912_line3954 bus1=3955.1.2.3.4 bus2=3601.1.2.3.4 phases=4 linecode=LC6 length=6.688415 units=m
! reduced_from=line3636,line3675,line3715,line3754,line3792,line3831,line3873,line3912,line3954
! eliminated_buses=3637,3676,3716,3755,3793,3832,3874,3913

New Line._virtual_line3641_line3680_line3719_line3758_line3796_line3835_line3877_line3916_line3957_line3997_line4035_line4072_line4106_line4140_line4172_line4200_line4233_line4263 bus1=3606.1.2.3.4 bus2=4264.1.2.3.4 phases=4 linecode=LC2 length=13.592994 units=m
! reduced_from=line3641,line3680,line3719,line3758,line3796,line3835,line3877,line3916,line3957,line3997,line4035,line4072,line4106,line4140,line4172,line4200,line4233,line4263
! eliminated_buses=3642,3681,3720,3759,3797,3836,3878,3917,3958,3998,4036,4073,4107,4141,4173,4201,4234

New Line._virtual_line3652_line3691_line3729_line3767 bus1=3768.1.2.3.4 bus2=3617.1.2.3.4 phases=4 linecode=LC9 length=13.8621 units=m
! reduced_from=line3652,line3691,line3729,line3767
! eliminated_buses=3653,3692,3730

New Line._virtual_line3653_line3692_line3730_line3768_line3807_line3850_line3891_line3933_line3974_line4014_line4052_line4089_line4123_line4157_line4188_line4219_line4250_line4280_line4308_line4338_line4367_line4396_line4428_line4457_line4486_line4515_line4542_line4567_line4591 bus1=4592.1.2.3.4 bus2=3617.1.2.3.4 phases=4 linecode=LC2 length=16.08433 units=m
! reduced_from=line3653,line3692,line3730,line3768,line3807,line3850,line3891,line3933,line3974,line4014,line4052,line4089,line4123,line4157,line4188,line4219,line4250,line4280,line4308,line4338,line4367,line4396,line4428,line4457,line4486,line4515,line4542,line4567,line4591
! eliminated_buses=3654,3693,3731,3769,3808,3851,3892,3934,3975,4015,4053,4090,4124,4158,4189,4220,4251,4281,4309,4339,4368,4397,4429,4458,4487,4516,4543,4568

New Line._virtual_line3654_line3693_line3731_line3769_line3808_line3851_line3892_line3934_line3975_line4015_line4053_line4090_line4124_line4158_line4189_line4220_line4251_line4281_line4309_line4339_line4368_line4397_line4429_line4458_line4487_line4516_line4543_line4568_line4592_line4614_line4636 bus1=3617.1.2.3.4 bus2=4637.1.2.3.4 phases=4 linecode=LC2 length=16.64486 units=m
! reduced_from=line3654,line3693,line3731,line3769,line3808,line3851,line3892,line3934,line3975,line4015,line4053,line4090,line4124,line4158,line4189,line4220,line4251,line4281,line4309,line4339,line4368,line4397,line4429,line4458,line4487,line4516,line4543,line4568,line4592,line4614,line4636
! eliminated_buses=3655,3694,3732,3770,3809,3852,3893,3935,3976,4016,4054,4091,4125,4159,4190,4221,4252,4282,4310,4340,4369,4398,4430,4459,4488,4517,4544,4569,4593,4615

New Line._virtual_line3805_line3848_line3889_line3931_line3972_line4012_line4050_line4087_line4121_line4155_line4186_line4217_line4248_line4278_line4306_line4336_line4365_line4394_line4426_line4455_line4484_line4513_line4540_line4565_line4589_line4612_line4634_line4659_line4682_line4703_line4721_line4733_line4743_line4750 bus1=4751.1.2.3.4 bus2=3768.1.2.3.4 phases=4 linecode=LC2 length=18.5993 units=m
! reduced_from=line3805,line3848,line3889,line3931,line3972,line4012,line4050,line4087,line4121,line4155,line4186,line4217,line4248,line4278,line4306,line4336,line4365,line4394,line4426,line4455,line4484,line4513,line4540,line4565,line4589,line4612,line4634,line4659,line4682,line4703,line4721,line4733,line4743,line4750
! eliminated_buses=3806,3849,3890,3932,3973,4013,4051,4088,4122,4156,4187,4218,4249,4279,4307,4337,4366,4395,4427,4456,4485,4514,4541,4566,4590,4613,4635,4660,4683,4704,4722,4734,4744

New Line._virtual_line3806_line3849_line3890_line3932_line3973_line4013_line4051_line4088_line4122_line4156_line4187_line4218_line4249_line4279_line4307_line4337_line4366_line4395_line4427_line4456_line4485_line4514_line4541_line4566_line4590_line4613_line4635_line4660_line4683_line4704_line4722_line4734 bus1=3768.1.2.3.4 bus2=4735.1.2.3.4 phases=4 linecode=LC2 length=15.45385 units=m
! reduced_from=line3806,line3849,line3890,line3932,line3973,line4013,line4051,line4088,line4122,line4156,line4187,line4218,line4249,line4279,line4307,line4337,line4366,line4395,line4427,line4456,line4485,line4514,line4541,line4566,line4590,line4613,line4635,line4660,line4683,line4704,line4722,line4734
! eliminated_buses=3807,3850,3891,3933,3974,4014,4052,4089,4123,4157,4188,4219,4250,4280,4308,4338,4367,4396,4428,4457,4486,4515,4542,4567,4591,4614,4636,4661,4684,4705,4723

New Line._virtual_line3843_line3884_line3926_line3965_line4005_line4043_line4080_line4114_line4148_line4180_line4208_line4241_line4271_line4298_line4328_line4357_line4386_line4418_line4448_line4477_line4506_line4533_line4558_line4582_line4606_line4628_line4649_line4673_line4694_line4712_line4727_line4738 bus1=4739.1.2.3.4 bus2=3805.1.2.3.4 phases=4 linecode=LC2 length=26.76964 units=m
! reduced_from=line3843,line3884,line3926,line3965,line4005,line4043,line4080,line4114,line4148,line4180,line4208,line4241,line4271,line4298,line4328,line4357,line4386,line4418,line4448,line4477,line4506,line4533,line4558,line4582,line4606,line4628,line4649,line4673,line4694,line4712,line4727,line4738
! eliminated_buses=3844,3885,3927,3966,4006,4044,4081,4115,4149,4181,4209,4242,4272,4299,4329,4358,4387,4419,4449,4478,4507,4534,4559,4583,4607,4629,4650,4674,4695,4713,4728

New Line._virtual_line3844_line3886_line3928_line3967_line4007_line4045_line4082_line4116_line4150_line4182_line4210_line4243_line4273_line4300_line4330_line4359_line4388_line4420_line4450_line4479_line4508_line4535_line4560_line4584_line4608 bus1=3805.1.2.3.4 bus2=4609.1.2.3.4 phases=4 linecode=LC2 length=28.082472 units=m
! reduced_from=line3844,line3886,line3928,line3967,line4007,line4045,line4082,line4116,line4150,line4182,line4210,line4243,line4273,line4300,line4330,line4359,line4388,line4420,line4450,line4479,line4508,line4535,line4560,line4584,line4608
! eliminated_buses=3845,3887,3929,3968,4008,4046,4083,4117,4151,4183,4211,4244,4274,4301,4331,4360,4389,4421,4451,4480,4509,4536,4561,4585

New Line._virtual_line3847_line3888_line3930 bus1=3805.1.2.3.4 bus2=3931.1.2.3.4 phases=4 linecode=LC9 length=13.0806 units=m
! reduced_from=line3847,line3888,line3930
! eliminated_buses=3848,3889

New Line._virtual_line3870_line3909_line3950_line3991_line4030 bus1=3829.1.2.3.4 bus2=4031.1.2.3.4 phases=4 linecode=LC2 length=4.72722 units=m
! reduced_from=line3870,line3909,line3950,line3991,line4030
! eliminated_buses=3871,3910,3951,3992

New Line._virtual_line3969_line4009_line4047_line4084_line4118_line4152_line4183_line4214_line4245_line4275_line4303_line4333_line4362_line4391_line4423_line4452_line4481_line4510_line4537_line4562_line4586_line4609_line4631 bus1=4632.1.2.3.4 bus2=3931.1.2.3.4 phases=4 linecode=LC9 length=21.69723 units=m
! reduced_from=line3969,line4009,line4047,line4084,line4118,line4152,line4183,line4214,line4245,line4275,line4303,line4333,line4362,line4391,line4423,line4452,line4481,line4510,line4537,line4562,line4586,line4609,line4631
! eliminated_buses=3970,4010,4048,4085,4119,4153,4184,4215,4246,4276,4304,4334,4363,4392,4424,4453,4482,4511,4538,4563,4587,4610

New Line._virtual_line3970_line4010_line4048_line4085_line4119_line4153_line4184_line4215_line4246_line4276_line4304_line4334_line4363_line4392_line4424_line4453_line4482_line4511_line4538_line4563_line4587_line4610_line4632_line4657_line4680_line4701_line4719 bus1=3931.1.2.3.4 bus2=4720.1.2.3.4 phases=4 linecode=LC2 length=16.82028 units=m
! reduced_from=line3970,line4010,line4048,line4085,line4119,line4153,line4184,line4215,line4246,line4276,line4304,line4334,line4363,line4392,line4424,line4453,line4482,line4511,line4538,line4563,line4587,line4610,line4632,line4657,line4680,line4701,line4719
! eliminated_buses=3971,4011,4049,4086,4120,4154,4185,4216,4247,4277,4305,4335,4364,4393,4425,4454,4483,4512,4539,4564,4588,4611,4633,4658,4681,4702

New Line._virtual_line3971_line4011_line4049_line4086_line4120_line4154_line4185_line4216_line4247_line4277_line4305_line4335_line4364_line4393_line4425_line4454_line4483_line4512_line4539_line4564_line4588_line4611_line4633_line4658_line4681_line4702_line4720 bus1=3931.1.2.3.4 bus2=4721.1.2.3.4 phases=4 linecode=LC2 length=16.0482 units=m
! reduced_from=line3971,line4011,line4049,line4086,line4120,line4154,line4185,line4216,line4247,line4277,line4305,line4335,line4364,line4393,line4425,line4454,line4483,line4512,line4539,line4564,line4588,line4611,line4633,line4658,line4681,line4702,line4720
! eliminated_buses=3972,4012,4050,4087,4121,4155,4186,4217,4248,4278,4306,4336,4365,4394,4426,4455,4484,4513,4540,4565,4589,4612,4634,4659,4682,4703

New Line._virtual_line4068_line4102_line4136_line4170_line4198_line4231 bus1=4031.1.2.3.4 bus2=4232.1.2.3.4 phases=4 linecode=LC2 length=11.79759 units=m
! reduced_from=line4068,line4102,line4136,line4170,line4198,line4231
! eliminated_buses=4069,4103,4137,4171,4199

New Line._virtual_line4226_line4257_line4286_line4314_line4344_line4373_line4402_line4434_line4463_line4492_line4520 bus1=4196.1.2.3.4 bus2=4521.1.2.3.4 phases=4 linecode=LC2 length=18.930417 units=m
! reduced_from=line4226,line4257,line4286,line4314,line4344,line4373,line4402,line4434,line4463,line4492,line4520
! eliminated_buses=4227,4258,4287,4315,4345,4374,4403,4435,4464,4493

New Line._virtual_line4227_line4258_line4287_line4315_line4345_line4374_line4403 bus1=4196.1.2.3.4 bus2=4404.1.2.3.4 phases=4 linecode=LC2 length=18.3399 units=m
! reduced_from=line4227,line4258,line4287,line4315,line4345,line4374,line4403
! eliminated_buses=4228,4259,4288,4316,4346,4375

New Line._virtual_line4228_line4259_line4288_line4316_line4346_line4375 bus1=4376.1.2.3.4 bus2=4196.1.2.3.4 phases=4 linecode=LC9 length=2.91931 units=m
! reduced_from=line4228,line4259,line4288,line4316,line4346,line4375
! eliminated_buses=4229,4260,4289,4317,4347

New Line._virtual_line4404_line4435_line4464_line4493_line4521_line4547_line4571_line4595_line4617_line4638_line4662_line4685_line4706_line4724_line4735_line4744_line4751 bus1=4376.1.2.3.4 bus2=4752.1.2.3.4 phases=4 linecode=LC2 length=17.05395 units=m
! reduced_from=line4404,line4435,line4464,line4493,line4521,line4547,line4571,line4595,line4617,line4638,line4662,line4685,line4706,line4724,line4735,line4744,line4751
! eliminated_buses=4405,4436,4465,4494,4522,4548,4572,4596,4618,4639,4663,4686,4707,4725,4736,4745

New Line._virtual_line4405_line4436_line4465_line4494_line4522_line4548_line4572_line4596_line4618_line4639_line4663_line4686_line4707_line4725_line4736_line4745 bus1=4746.1.2.3.4 bus2=4376.1.2.3.4 phases=4 linecode=LC2 length=15.396646 units=m
! reduced_from=line4405,line4436,line4465,line4494,line4522,line4548,line4572,line4596,line4618,line4639,line4663,line4686,line4707,line4725,line4736,line4745
! eliminated_buses=4406,4437,4466,4495,4523,4549,4573,4597,4619,4640,4664,4687,4708,4726,4737

New Line._virtual_line4406_line4437_line4466_line4495_line4523_line4549_line4573_line4597_line4619_line4640_line4664_line4687_line4708_line4726_line4737_line4746_line4752_line4755_line4758 bus1=4376.1.2.3.4 bus2=4759.1.2.3.4 phases=4 linecode=LC2 length=16.466886 units=m
! reduced_from=line4406,line4437,line4466,line4495,line4523,line4549,line4573,line4597,line4619,line4640,line4664,line4687,line4708,line4726,line4737,line4746,line4752,line4755,line4758
! eliminated_buses=4407,4438,4467,4496,4524,4550,4574,4598,4620,4641,4665,4688,4709,4727,4738,4747,4753,4756

New Line._virtual_line4652_line4676_line4697_line4715_line4729_line4739_line4747 bus1=4632.1.2.3.4 bus2=4748.1.2.3.4 phases=4 linecode=LC2 length=17.30713 units=m
! reduced_from=line4652,line4676,line4697,line4715,line4729,line4739,line4747
! eliminated_buses=4653,4677,4698,4716,4730,4740

New Line._virtual_line4653_line4678_line4699_line4717_line4731_line4741_line4748_line4753_line4756_line4759_line4761_line4763_line4765_line4767 bus1=4768.1.2.3.4 bus2=4632.1.2.3.4 phases=4 linecode=LC2 length=18.380899 units=m
! reduced_from=line4653,line4678,line4699,line4717,line4731,line4741,line4748,line4753,line4756,line4759,line4761,line4763,line4765,line4767
! eliminated_buses=4654,4679,4700,4718,4732,4742,4749,4754,4757,4760,4762,4764,4766

New Line.LINE174 bus1=168.1.2.3.4 bus2=175.1.2.3.4 phases=4 linecode=LC1 length=7.5087 units=m

New Line.LINE187 bus1=182.1.2.3.4 bus2=188.1.2.3.4 phases=4 linecode=LC1 length=7.8562 units=m

New Line.LINE201 bus1=195.1.2.3.4 bus2=202.1.2.3.4 phases=4 linecode=LC7 length=6.4917 units=m

New Line.LINE446 bus1=438.1.2.3.4 bus2=447.1.2.3.4 phases=4 linecode=LC7 length=7.4332 units=m

New Line.LINE447 bus1=439.1.2.3.4 bus2=448.1.2.3.4 phases=4 linecode=LC2 length=9.2528 units=m

New Line.LINE492 bus1=483.1.2.3.4 bus2=493.1.2.3.4 phases=4 linecode=LC1 length=6.4002 units=m

New Line.LINE499 bus1=487.1.2.3.4 bus2=500.1.2.3.4 phases=4 linecode=LC7 length=0.42236 units=m

New Line.LINE512 bus1=501.1.2.3.4 bus2=513.1.2.3.4 phases=4 linecode=LC2 length=6.7158 units=m

New Line.LINE676 bus1=667.1.2.3.4 bus2=677.1.2.3.4 phases=4 linecode=LC1 length=4.0219 units=m

New Line.LINE744 bus1=728.1.2.3.4 bus2=745.1.2.3.4 phases=4 linecode=LC7 length=9.8385 units=m

New Line.LINE760 bus1=745.1.2.3.4 bus2=761.1.2.3.4 phases=4 linecode=LC5 length=3.158 units=m

New Line.LINE774 bus1=761.1.2.3.4 bus2=775.1.2.3.4 phases=4 linecode=LC7 length=0.82125 units=m

New Line.LINE789 bus1=775.1.2.3.4 bus2=790.1.2.3.4 phases=4 linecode=LC7 length=7.3389 units=m

New Line.LINE809 bus1=793.1.2.3.4 bus2=810.1.2.3.4 phases=4 linecode=LC9 length=1.7092 units=m

New Line.LINE850 bus1=828.1.2.3.4 bus2=851.1.2.3.4 phases=4 linecode=LC7 length=4.544 units=m

New Line.LINE1073 bus1=1049.1.2.3.4 bus2=1074.1.2.3.4 phases=4 linecode=LC1 length=15.6067 units=m

New Line.LINE1074 bus1=1049.1.2.3.4 bus2=1075.1.2.3.4 phases=4 linecode=LC1 length=15.6067 units=m

New Line.LINE1325 bus1=1296.1.2.3.4 bus2=1326.1.2.3.4 phases=4 linecode=LC2 length=5.8642 units=m

New Line.LINE1329 bus1=1299.1.2.3.4 bus2=1330.1.2.3.4 phases=4 linecode=LC6 length=7.144 units=m

New Line.LINE1471 bus1=1441.1.2.3.4 bus2=1472.1.2.3.4 phases=4 linecode=LC6 length=6.9825 units=m

New Line.LINE1564 bus1=1534.1.2.3.4 bus2=1565.1.2.3.4 phases=4 linecode=LC6 length=7.0683 units=m

New Line.LINE1565 bus1=1534.1.2.3.4 bus2=1566.1.2.3.4 phases=4 linecode=LC6 length=7.0683 units=m

New Line.LINE1739 bus1=1702.1.2.3.4 bus2=1740.1.2.3.4 phases=4 linecode=LC6 length=6.8072 units=m

New Line.LINE1740 bus1=1702.1.2.3.4 bus2=1741.1.2.3.4 phases=4 linecode=LC6 length=5.9936 units=m

New Line.LINE1779 bus1=1741.1.2.3.4 bus2=1780.1.2.3.4 phases=4 linecode=LC6 length=6.5206 units=m

New Line.LINE1863 bus1=1822.1.2.3.4 bus2=1864.1.2.3.4 phases=4 linecode=LC6 length=8.4334 units=m

New Line.LINE1864 bus1=1822.1.2.3.4 bus2=1865.1.2.3.4 phases=4 linecode=LC6 length=8.4334 units=m

New Line.LINE1941 bus1=1902.1.2.3.4 bus2=1942.1.2.3.4 phases=4 linecode=LC6 length=8.1775 units=m

New Line.LINE2032 bus1=1991.1.2.3.4 bus2=2033.1.2.3.4 phases=4 linecode=LC6 length=8.0062 units=m

New Line.LINE2033 bus1=1991.1.2.3.4 bus2=2034.1.2.3.4 phases=4 linecode=LC6 length=8.0062 units=m

New Line.LINE2070 bus1=2027.1.2.3.4 bus2=2071.1.2.3.4 phases=4 linecode=LC6 length=7.5751 units=m

New Line.LINE2089 bus1=2047.1.2.3.4 bus2=2090.1.2.3.4 phases=4 linecode=LC5 length=1.1012 units=m

New Line.LINE2110 bus1=2069.1.2.3.4 bus2=2111.1.2.3.4 phases=4 linecode=LC2 length=2.6906 units=m

New Line.LINE2194 bus1=2155.1.2.3.4 bus2=2195.1.2.3.4 phases=4 linecode=LC6 length=5.9381 units=m

New Line.LINE2288 bus1=2251.1.2.3.4 bus2=2289.1.2.3.4 phases=4 linecode=LC2 length=0.3254 units=m

New Line.LINE2343 bus1=2311.1.2.3.4 bus2=2344.1.2.3.4 phases=4 linecode=LC1 length=8.5587 units=m

New Line.LINE2443 bus1=2408.1.2.3.4 bus2=2444.1.2.3.4 phases=4 linecode=LC6 length=5.1433 units=m

New Line.LINE2504 bus1=2470.1.2.3.4 bus2=2505.1.2.3.4 phases=4 linecode=LC6 length=5.3407 units=m

New Line.LINE2555 bus1=2521.1.2.3.4 bus2=2556.1.2.3.4 phases=4 linecode=LC2 length=6.4167 units=m

New Line.LINE2584 bus1=2549.1.2.3.4 bus2=2585.1.2.3.4 phases=4 linecode=LC2 length=5.1411 units=m

New Line.LINE2585 bus1=2549.1.2.3.4 bus2=2586.1.2.3.4 phases=4 linecode=LC2 length=1.2546 units=m

New Line.LINE2620 bus1=2585.1.2.3.4 bus2=2621.1.2.3.4 phases=4 linecode=LC2 length=1.0973 units=m

New Line.LINE2772 bus1=2736.1.2.3.4 bus2=2773.1.2.3.4 phases=4 linecode=LC2 length=8.526 units=m

New Line.LINE3033 bus1=3003.1.2.3.4 bus2=3034.1.2.3.4 phases=4 linecode=LC6 length=7.0232 units=m

New Line.LINE3123 bus1=3095.1.2.3.4 bus2=3124.1.2.3.4 phases=4 linecode=LC6 length=7.7513 units=m

New Line.LINE3160 bus1=3131.1.2.3.4 bus2=3161.1.2.3.4 phases=4 linecode=LC6 length=1.9483 units=m

New Line.LINE3161 bus1=3131.1.2.3.4 bus2=3162.1.2.3.4 phases=4 linecode=LC6 length=1.9483 units=m

New Line.LINE3167 bus1=3137.1.2.3.4 bus2=3168.1.2.3.4 phases=4 linecode=LC6 length=6.9549 units=m

New Line.LINE3181 bus1=3150.1.2.3.4 bus2=3182.1.2.3.4 phases=4 linecode=LC6 length=5.7283 units=m

New Line.LINE3192 bus1=3163.1.2.3.4 bus2=3193.1.2.3.4 phases=4 linecode=LC6 length=1.9375 units=m

New Line.LINE3193 bus1=3163.1.2.3.4 bus2=3194.1.2.3.4 phases=4 linecode=LC6 length=1.9375 units=m

New Line.LINE3247 bus1=3225.1.2.3.4 bus2=3248.1.2.3.4 phases=4 linecode=LC6 length=5.0061 units=m

New Line.LINE3304 bus1=3282.1.2.3.4 bus2=3305.1.2.3.4 phases=4 linecode=LC6 length=7.4505 units=m

New Line.LINE3329 bus1=3308.1.2.3.4 bus2=3330.1.2.3.4 phases=4 linecode=LC6 length=6.1698 units=m

New Line.LINE3616 bus1=3581.1.2.3.4 bus2=3617.1.2.3.4 phases=4 linecode=LC9 length=2.9508 units=m

New Line.LINE3804 bus1=3768.1.2.3.4 bus2=3805.1.2.3.4 phases=4 linecode=LC9 length=3.1006 units=m

New Line.LINE3869 bus1=3829.1.2.3.4 bus2=3870.1.2.3.4 phases=4 linecode=LC2 length=8.1783 units=m

New Line.LINE4067 bus1=4031.1.2.3.4 bus2=4068.1.2.3.4 phases=4 linecode=LC2 length=4.8259 units=m
