! Reduced enabled lines.

New Line._virtual_line0_line1_line2_line3_line4_line5_line6_line7_line8_line9_line10_line11_line12_line13_line14_line15_line16_line17_line18_line19_line20_line21_line22_line23_line24_line25_line26_line27_line28_line29_line30_line31_line32_line33_line34_line35_line36_line37_line38_line39_line40_line41_line42_line43_line44_line45_line46 bus1=47.1.2.3.4 bus2=sourcebus.1.2.3.4 phases=4 linecode=LC8 length=89.863113 units=m
! reduced_from=line0,line1,line2,line3,line4,line5,line6,line7,line8,line9,line10,line11,line12,line13,line14,line15,line16,line17,line18,line19,line20,line21,line22,line23,line24,line25,line26,line27,line28,line29,line30,line31,line32,line33,line34,line35,line36,line37,line38,line39,line40,line41,line42,line43,line44,line45,line46
! eliminated_buses=1,2,3,4,5,6,7,8,9,10,11,12,13,14,15,16,17,18,19,20,21,22,23,24,25,26,27,28,29,30,31,32,33,34,35,36,37,38,39,40,41,42,43,44,45,46

New Line._virtual_line47_line49_line51_line53_line55_line57_line59_line62_line65_line68_line71_line74_line77_line80 bus1=47.1.2.3.4 bus2=81.1.2.3.4 phases=4 linecode=LC9 length=46.03663 units=m
! reduced_from=line47,line49,line51,line53,line55,line57,line59,line62,line65,line68,line71,line74,line77,line80
! eliminated_buses=48,50,52,54,56,58,60,63,66,69,72,75,78

New Line._virtual_line48_line50_line52_line54_line56_line58 bus1=47.1.2.3.4 bus2=59.1.2.3.4 phases=4 linecode=LC8 length=28.9087 units=m
! reduced_from=line48,line50,line52,line54,line56,line58
! eliminated_buses=49,51,53,55,57

New Line._virtual_line60_line63_line66_line69_line72_line75_line78_line81_line86_line91_line96_line102_line109_line120 bus1=121.1.2.3.4 bus2=59.1.2.3.4 phases=4 linecode=LC1 length=12.823754 units=m
! reduced_from=line60,line63,line66,line69,line72,line75,line78,line81,line86,line91,line96,line102,line109,line120
! eliminated_buses=61,64,67,70,73,76,79,82,87,92,97,103,110

New Line._virtual_line61_line64_line67_line70_line73_line76_line79_line82_line87_line92_line97_line103_line110_line121_line134_line147_line163_line179_line198 bus1=199.1.2.3.4 bus2=59.1.2.3.4 phases=4 linecode=LC8 length=36.75688 units=m
! reduced_from=line61,line64,line67,line70,line73,line76,line79,line82,line87,line92,line97,line103,line110,line121,line134,line147,line163,line179,line198
! eliminated_buses=62,65,68,71,74,77,80,83,88,93,98,104,111,122,135,148,164,180

New Line._virtual_line83_line88_line93_line98 bus1=81.1.2.3.4 bus2=99.1.2.3.4 phases=4 linecode=LC9 length=20.80467 units=m
! reduced_from=line83,line88,line93,line98
! eliminated_buses=84,89,94

New Line._virtual_line84_line89_line94 bus1=95.1.2.3.4 bus2=81.1.2.3.4 phases=4 linecode=LC6 length=7.79627 units=m
! reduced_from=line84,line89,line94
! eliminated_buses=85,90

New Line._virtual_line85_line90_line95_line101_line108_line119 bus1=81.1.2.3.4 bus2=120.1.2.3.4 phases=4 linecode=LC6 length=7.46378 units=m
! reduced_from=line85,line90,line95,line101,line108,line119
! eliminated_buses=86,91,96,102,109

New Line._virtual_line99_line107_line118_line129_line144_line160_line176_line195_line215_line235 bus1=236.1.2.3.4 bus2=95.1.2.3.4 phases=4 linecode=LC6 length=15.72313 units=m
! reduced_from=line99,line107,line118,line129,line144,line160,line176,line195,line215,line235
! eliminated_buses=100,108,119,130,145,161,177,196,216

New Line._virtual_line106_line117_line128_line143_line159_line175 bus1=176.1.2.3.4 bus2=99.1.2.3.4 phases=4 linecode=LC2 length=6.64005 units=m
! reduced_from=line106,line117,line128,line143,line159,line175
! eliminated_buses=107,118,129,144,160

New Line._virtual_line113_line124_line137_line151_line167_line183_line202_line224_line243_line259_line275_line294_line311_line326_line341_line357_line373_line390_line408_line426_line444_line463_line483_line503_line525_line545_line565_line586_line607_line628_line647_line666_line686_line706_line726_line746_line767_line786_line805_line825_line844_line862_line880_line898_line918_line938_line959_line978_line996_line1013_line1032_line1051_line1071 bus1=106.1.2.3.4 bus2=1072.1.2.3.4 phases=4 linecode=LC6 length=27.019453 units=m
! reduced_from=line113,line124,line137,line151,line167,line183,line202,line224,line243,line259,line275,line294,line311,line326,line341,line357,line373,line390,line408,line426,line444,line463,line483,line503,line525,line545,line565,line586,line607,line628,line647,line666,line686,line706,line726,line746,line767,line786,line805,line825,line844,line862,line880,line898,line918,line938,line959,line978,line996,line1013,line1032,line1051,line1071
! eliminated_buses=114,125,138,152,168,184,203,225,244,260,276,295,312,327,342,358,374,391,409,427,445,464,484,504,526,546,566,587,608,629,648,667,687,707,727,747,768,787,806,826,845,863,881,899,919,939,960,979,997,1014,1033,1052

New Line._virtual_line114_line125 bus1=106.1.2.3.4 bus2=126.1.2.3.4 phases=4 linecode=LC9 length=10.9846 units=m
! reduced_from=line114,line125
! eliminated_buses=115

New Line._virtual_line116_line127_line142_line158_line174_line192_line211_line233_line252_line268_line287_line303_line318_line333_line349_line365 bus1=106.1.2.3.4 bus2=366.1.2.3.4 phases=4 linecode=LC1 length=14.936295 units=m
! reduced_from=line116,line127,line142,line158,line174,line192,line211,line233,line252,line268,line287,line303,line318,line333,line349,line365
! eliminated_buses=117,128,143,159,175,193,212,234,253,269,288,304,319,334,350

New Line._virtual_line130_line145_line161_line177_line196_line217_line237_line254_line270_line289 bus1=290.1.2.3.4 bus2=120.1.2.3.4 phases=4 linecode=LC6 length=15.81028 units=m
! reduced_from=line130,line145,line161,line177,line196,line217,line237,line254,line270,line289
! eliminated_buses=131,146,162,178,197,218,238,255,271

New Line._virtual_line132_line146_line162_line178_line197_line218_line238_line255_line271_line290_line305_line320_line335_line351_line366_line381_line399_line415_line433_line452_line470_line490_line510_line531_line551 bus1=552.1.2.3.4 bus2=121.1.2.3.4 phases=4 linecode=LC1 length=11.145862 units=m
! reduced_from=line132,line146,line162,line178,line197,line218,line238,line255,line271,line290,line305,line320,line335,line351,line366,line381,line399,line415,line433,line452,line470,line490,line510,line531,line551
! eliminated_buses=133,147,163,179,198,219,239,256,272,291,306,321,336,352,367,382,400,416,434,453,471,491,511,532

New Line._virtual_line139_line155_line171_line189_line208_line230_line249_line265 bus1=126.1.2.3.4 bus2=266.1.2.3.4 phases=4 linecode=LC2 length=5.16173 units=m
! reduced_from=line139,line155,line171,line189,line208,line230,line249,line265
! eliminated_buses=140,156,172,190,209,231,250

New Line._virtual_line140_line156_line172_line190_line209_line231_line250_line266 bus1=267.1.2.3.4 bus2=126.1.2.3.4 phases=4 linecode=LC2 length=5.96636 units=m
! reduced_from=line140,line156,line172,line190,line209,line231,line250,line266
! eliminated_buses=141,157,173,191,210,232,251

New Line._virtual_line152_line168 bus1=169.1.2.3.4 bus2=139.1.2.3.4 phases=4 linecode=LC9 length=4.4071 units=m
! reduced_from=line152,line168
! eliminated_buses=153

New Line._virtual_line153_line169_line187_line206_line228_line247_line263_line280_line301_line316_line331 bus1=332.1.2.3.4 bus2=139.1.2.3.4 phases=4 linecode=LC1 length=5.78234 units=m
! reduced_from=line153,line169,line187,line206,line228,line247,line263,line280,line301,line316,line331
! eliminated_buses=154,170,188,207,229,248,264,281,302,317

New Line._virtual_line184_line203_line225_line244_line260 bus1=261.1.2.3.4 bus2=169.1.2.3.4 phases=4 linecode=LC9 length=12.9806 units=m
! reduced_from=line184,line203,line225,line244,line260
! eliminated_buses=185,204,226,245

New Line._virtual_line185_line204_line226_line245_line261_line278 bus1=169.1.2.3.4 bus2=279.1.2.3.4 phases=4 linecode=LC2 length=14.51546 units=m
! reduced_from=line185,line204,line226,line245,line261,line278
! eliminated_buses=186,205,227,246,262

New Line._virtual_line219_line239_line256_line272_line291_line306_line321_line336_line352_line367 bus1=368.1.2.3.4 bus2=199.1.2.3.4 phases=4 linecode=LC9 length=24.90289 units=m
! reduced_from=line219,line239,line256,line272,line291,line306,line321,line336,line352,line367
! eliminated_buses=220,240,257,273,292,307,322,337,353

New Line._virtual_line220_line240_line257 bus1=199.1.2.3.4 bus2=258.1.2.3.4 phases=4 linecode=LC8 length=10.5713 units=m
! reduced_from=line220,line240,line257
! eliminated_buses=221,241

New Line._virtual_line273_line292 bus1=258.1.2.3.4 bus2=293.1.2.3.4 phases=4 linecode=LC9 length=9.1668 units=m
! reduced_from=line273,line292
! eliminated_buses=274

New Line._virtual_line277_line296_line312_line327_line342_line358_line374 bus1=375.1.2.3.4 bus2=261.1.2.3.4 phases=4 linecode=LC2 length=3.42635 units=m
! reduced_from=line277,line296,line312,line327,line342,line358,line374
! eliminated_buses=278,297,313,328,343,359

New Line._virtual_line307_line322_line337_line353_line368_line385_line403_line421_line439_line458_line478_line498_line520_line540_line560_line581_line602_line623_line642_line661_line681_line700_line720_line740 bus1=741.1.2.3.4 bus2=293.1.2.3.4 phases=4 linecode=LC1 length=8.720501 units=m
! reduced_from=line307,line322,line337,line353,line368,line385,line403,line421,line439,line458,line478,line498,line520,line540,line560,line581,line602,line623,line642,line661,line681,line700,line720,line740
! eliminated_buses=308,323,338,354,369,386,404,422,440,459,479,499,521,541,561,582,603,624,643,662,682,701,721

New Line._virtual_line308_line323_line338_line354_line369_line386_line404_line422_line440_line459_line479_line499_line521_line541_line561_line582_line603_line624_line643_line662_line682_line702_line722_line742_line762_line782_line801_line821_line840_line858_line876_line894_line912_line932 bus1=293.1.2.3.4 bus2=933.1.2.3.4 phases=4 linecode=LC1 length=12.425133 units=m
! reduced_from=line308,line323,line338,line354,line369,line386,line404,line422,line440,line459,line479,line499,line521,line541,line561,line582,line603,line624,line643,line662,line682,line702,line722,line742,line762,line782,line801,line821,line840,line858,line876,line894,line912,line932
! eliminated_buses=309,324,339,355,370,387,405,423,441,460,480,500,522,542,562,583,604,625,644,663,683,703,723,743,763,783,802,822,841,859,877,895,913

New Line._virtual_line309_line324_line339_line355 bus1=356.1.2.3.4 bus2=293.1.2.3.4 phases=4 linecode=LC9 length=15.9871 units=m
! reduced_from=line309,line324,line339,line355
! eliminated_buses=310,325,340

New Line._virtual_line346_line362_line376_line394_line411_line429 bus1=430.1.2.3.4 bus2=332.1.2.3.4 phases=4 linecode=LC1 length=2.61714 units=m
! reduced_from=line346,line362,line376,line394,line411,line429
! eliminated_buses=347,363,377,395,412

New Line._virtual_line347_line363_line377_line395_line412_line430_line449_line467_line487_line507_line528_line548_line568_line590_line611_line632_line651_line671_line690_line710_line730_line749_line770_line789 bus1=790.1.2.3.4 bus2=332.1.2.3.4 phases=4 linecode=LC1 length=17.099816 units=m
! reduced_from=line347,line363,line377,line395,line412,line430,line449,line467,line487,line507,line528,line548,line568,line590,line611,line632,line651,line671,line690,line710,line730,line749,line770,line789
! eliminated_buses=348,364,378,396,413,431,450,468,488,508,529,549,569,591,612,633,652,672,691,711,731,750,771

New Line._virtual_line370_line387_line405_line423_line441_line460_line480_line500_line522_line542_line562_line583_line604_line625_line644_line663_line683_line703_line723_line743 bus1=744.1.2.3.4 bus2=356.1.2.3.4 phases=4 linecode=LC1 length=9.803675 units=m
! reduced_from=line370,line387,line405,line423,line441,line460,line480,line500,line522,line542,line562,line583,line604,line625,line644,line663,line683,line703,line723,line743
! eliminated_buses=371,388,406,424,442,461,481,501,523,543,563,584,605,626,645,664,684,704,724

New Line._virtual_line371_line388_line406_line424_line442_line461_line481_line501_line523_line543_line563_line584_line605_line626_line645_line664_line684_line704_line724_line744_line765_line784_line803_line823_line842_line860_line878_line896 bus1=356.1.2.3.4 bus2=897.1.2.3.4 phases=4 linecode=LC9 length=40.82845 units=m
! reduced_from=line371,line388,line406,line424,line442,line461,line481,line501,line523,line543,line563,line584,line605,line626,line645,line664,line684,line704,line724,line744,line765,line784,line803,line823,line842,line860,line878,line896
! eliminated_buses=372,389,407,425,443,462,482,502,524,544,564,585,606,627,646,665,685,705,725,745,766,785,804,824,843,861,879

New Line._virtual_line382_line400_line416_line434_line453_line471_line491_line511_line532_line552_line573_line594_line615_line634_line653_line673_line692_line712_line732_line751_line772_line791_line811_line830_line848_line866_line884_line902_line922_line941_line962_line981_line999_line1016_line1035_line1054_line1072_line1090_line1110_line1129_line1149_line1169 bus1=1170.1.2.3.4 bus2=368.1.2.3.4 phases=4 linecode=LC2 length=16.602854 units=m
! reduced_from=line382,line400,line416,line434,line453,line471,line491,line511,line532,line552,line573,line594,line615,line634,line653,line673,line692,line712,line732,line751,line772,line791,line811,line830,line848,line866,line884,line902,line922,line941,line962,line981,line999,line1016,line1035,line1054,line1072,line1090,line1110,line1129,line1149,line1169
! eliminated_buses=383,401,417,435,454,472,492,512,533,553,574,595,616,635,654,674,693,713,733,752,773,792,812,831,849,867,885,903,923,942,963,982,1000,1017,1036,1055,1073,1091,1111,1130,1150

New Line._virtual_line383_line401_line417_line435_line454_line472_line492_line512_line533_line553_line574_line595_line616_line635_line654_line674_line693_line713_line733_line752_line773_line792_line812_line831_line849_line867_line885_line903_line923_line942_line963_line982_line1000_line1017_line1036_line1055_line1073_line1091_line1111_line1130_line1150_line1170_line1189_line1204_line1219_line1234_line1249_line1265_line1281_line1297_line1312_line1328_line1343_line1358_line1374_line1389_line1403 bus1=368.1.2.3.4 bus2=1404.1.2.3.4 phases=4 linecode=LC2 length=20.004959 units=m
! reduced_from=line383,line401,line417,line435,line454,line472,line492,line512,line533,line553,line574,line595,line616,line635,line654,line674,line693,line713,line733,line752,line773,line792,line812,line831,line849,line867,line885,line903,line923,line942,line963,line982,line1000,line1017,line1036,line1055,line1073,line1091,line1111,line1130,line1150,line1170,line1189,line1204,line1219,line1234,line1249,line1265,line1281,line1297,line1312,line1328,line1343,line1358,line1374,line1389,line1403
! eliminated_buses=384,402,418,436,455,473,493,513,534,554,575,596,617,636,655,675,694,714,734,753,774,793,813,832,850,868,886,904,924,943,964,983,1001,1018,1037,1056,1074,1092,1112,1131,1151,1171,1190,1205,1220,1235,1250,1266,1282,1298,1313,1329,1344,1359,1375,1390

New Line._virtual_line384_line402 bus1=368.1.2.3.4 bus2=403.1.2.3.4 phases=4 linecode=LC9 length=6.3582 units=m
! reduced_from=line384,line402
! eliminated_buses=385

New Line._virtual_line391_line409_line427_line445_line464_line484_line504_line526_line546_line566_line587_line608_line629_line648 bus1=649.1.2.3.4 bus2=375.1.2.3.4 phases=4 linecode=LC2 length=5.440454 units=m
! reduced_from=line391,line409,line427,line445,line464,line484,line504,line526,line546,line566,line587,line608,line629,line648
! eliminated_buses=392,410,428,446,465,485,505,527,547,567,588,609,630

New Line._virtual_line418_line436_line455_line473_line493_line513_line534_line554_line575_line596_line617_line636_line655_line675_line694_line714_line734_line753_line774_line793_line813_line832_line850_line868_line886_line904_line924_line943_line964_line983_line1001_line1018_line1037 bus1=1038.1.2.3.4 bus2=403.1.2.3.4 phases=4 linecode=LC6 length=9.357003 units=m
! reduced_from=line418,line436,line455,line473,line493,line513,line534,line554,line575,line596,line617,line636,line655,line675,line694,line714,line734,line753,line774,line793,line813,line832,line850,line868,line886,line904,line924,line943,line964,line983,line1001,line1018,line1037
! eliminated_buses=419,437,456,474,494,514,535,555,576,597,618,637,656,676,695,715,735,754,775,794,814,833,851,869,887,905,925,944,965,984,1002,1019

New Line._virtual_line419_line437_line456_line474_line494_line514_line535_line555_line576_line597_line618_line637_line656_line676_line695_line715_line735_line754_line775_line794_line814_line833_line851_line869_line887_line905_line925 bus1=926.1.2.3.4 bus2=403.1.2.3.4 phases=4 linecode=LC6 length=10.892635 units=m
! reduced_from=line419,line437,line456,line474,line494,line514,line535,line555,line576,line597,line618,line637,line656,line676,line695,line715,line735,line754,line775,line794,line814,line833,line851,line869,line887,line905,line925
! eliminated_buses=420,438,457,475,495,515,536,556,577,598,619,638,657,677,696,716,736,755,776,795,815,834,852,870,888,906

New Line._virtual_line420_line438_line457 bus1=458.1.2.3.4 bus2=403.1.2.3.4 phases=4 linecode=LC9 length=20.1724 units=m
! reduced_from=line420,line438,line457
! eliminated_buses=421,439

New Line._virtual_line447_line466_line486_line506_line527_line547_line567_line588_line609_line630_line649_line669_line688_line708_line728 bus1=729.1.2.3.4 bus2=430.1.2.3.4 phases=4 linecode=LC1 length=16.45692 units=m
! reduced_from=line447,line466,line486,line506,line527,line547,line567,line588,line609,line630,line649,line669,line688,line708,line728
! eliminated_buses=448,467,487,507,528,548,568,589,610,631,650,670,689,709

New Line._virtual_line475_line495_line515_line536_line556_line577_line598_line619_line638_line657_line677_line696_line716_line736_line755_line776_line795_line815_line834_line852_line870_line888_line906_line926_line946_line966_line985_line1003_line1020_line1039_line1059_line1076_line1094_line1114_line1133_line1153_line1173_line1192_line1208_line1223_line1238_line1253_line1269_line1285_line1300_line1316_line1331_line1346_line1361_line1377_line1392_line1406_line1419_line1430_line1441_line1452_line1461_line1470_line1478_line1486_line1494_line1502_line1511_line1520 bus1=458.1.2.3.4 bus2=1521.1.2.3.4 phases=4 linecode=LC2 length=24.037313 units=m
! reduced_from=line475,line495,line515,line536,line556,line577,line598,line619,line638,line657,line677,line696,line716,line736,line755,line776,line795,line815,line834,line852,line870,line888,line906,line926,line946,line966,line985,line1003,line1020,line1039,line1059,line1076,line1094,line1114,line1133,line1153,line1173,line1192,line1208,line1223,line1238,line1253,line1269,line1285,line1300,line1316,line1331,line1346,line1361,line1377,line1392,line1406,line1419,line1430,line1441,line1452,line1461,line1470,line1478,line1486,line1494,line1502,line1511,line1520
! eliminated_buses=476,496,516,537,557,578,599,620,639,658,678,697,717,737,756,777,796,816,835,853,871,889,907,927,947,967,986,1004,1021,1040,1060,1077,1095,1115,1134,1154,1174,1193,1209,1224,1239,1254,1270,1286,1301,1317,1332,1347,1362,1378,1393,1407,1420,1431,1442,1453,1462,1471,1479,1487,1495,1503,1512

New Line._virtual_line476_line496_line516_line537_line557_line578_line599_line620_line639_line658_line678_line697_line717_line737_line756_line777_line796_line816_line835_line853_line871_line889_line907_line927_line947_line967_line986_line1004_line1021_line1040_line1060_line1077_line1095_line1115_line1134_line1154_line1174_line1193_line1209_line1224_line1239_line1254_line1270_line1286_line1301_line1317_line1332_line1347_line1362_line1378_line1393_line1407_line1420_line1431_line1442_line1453_line1462_line1471_line1479_line1487_line1495 bus1=1496.1.2.3.4 bus2=458.1.2.3.4 phases=4 linecode=LC2 length=23.951557 units=m
! reduced_from=line476,line496,line516,line537,line557,line578,line599,line620,line639,line658,line678,line697,line717,line737,line756,line777,line796,line816,line835,line853,line871,line889,line907,line927,line947,line967,line986,line1004,line1021,line1040,line1060,line1077,line1095,line1115,line1134,line1154,line1174,line1193,line1209,line1224,line1239,line1254,line1270,line1286,line1301,line1317,line1332,line1347,line1362,line1378,line1393,line1407,line1420,line1431,line1442,line1453,line1462,line1471,line1479,line1487,line1495
! eliminated_buses=477,497,517,538,558,579,600,621,640,659,679,698,718,738,757,778,797,817,836,854,872,890,908,928,948,968,987,1005,1022,1041,1061,1078,1096,1116,1135,1155,1175,1194,1210,1225,1240,1255,1271,1287,1302,1318,1333,1348,1363,1379,1394,1408,1421,1432,1443,1454,1463,1472,1480,1488

New Line._virtual_line477_line497 bus1=458.1.2.3.4 bus2=498.1.2.3.4 phases=4 linecode=LC9 length=7.0914 units=m
! reduced_from=line477,line497
! eliminated_buses=478

New Line._virtual_line517_line538_line558_line579_line600_line621_line640_line659_line679_line698_line718_line738_line757_line778_line797_line817_line836_line854_line872_line890_line908_line928_line948_line968_line987_line1005_line1022_line1041_line1061_line1078_line1096_line1116 bus1=498.1.2.3.4 bus2=1117.1.2.3.4 phases=4 linecode=LC6 length=8.295329 units=m
! reduced_from=line517,line538,line558,line579,line600,line621,line640,line659,line679,line698,line718,line738,line757,line778,line797,line817,line836,line854,line872,line890,line908,line928,line948,line968,line987,line1005,line1022,line1041,line1061,line1078,line1096,line1116
! eliminated_buses=518,539,559,580,601,622,641,660,680,699,719,739,758,779,798,818,837,855,873,891,909,929,949,969,988,1006,1023,1042,1062,1079,1097

New Line._virtual_line518_line539_line559_line580_line601_line622_line641_line660_line680_line699_line719_line739_line758_line779_line798_line818_line837_line855_line873_line891_line909_line929_line949_line969_line988_line1006_line1023_line1042_line1062_line1079 bus1=1080.1.2.3.4 bus2=498.1.2.3.4 phases=4 linecode=LC6 length=7.546995 units=m
! reduced_from=line518,line539,line559,line580,line601,line622,line641,line660,line680,line699,line719,line739,line758,line779,line798,line818,line837,line855,line873,line891,line909,line929,line949,line969,line988,line1006,line1023,line1042,line1062,line1079
! eliminated_buses=519,540,560,581,602,623,642,661,681,700,720,740,759,780,799,819,838,856,874,892,910,930,950,970,989,1007,1024,1043,1063

New Line._virtual_line571_line593_line614_line633_line652_line672_line691_line711_line731_line750_line771_line790_line810_line829 bus1=830.1.2.3.4 bus2=552.1.2.3.4 phases=4 linecode=LC1 length=15.010945 units=m
! reduced_from=line571,line593,line614,line633,line652,line672,line691,line711,line731,line750,line771,line790,line810,line829
! eliminated_buses=572,594,615,634,653,673,692,712,732,751,772,791,811

New Line._virtual_line667_line687_line707_line727_line747_line768_line787_line806_line826_line845_line863_line881_line899_line919 bus1=920.1.2.3.4 bus2=649.1.2.3.4 phases=4 linecode=LC2 length=13.65206 units=m
! reduced_from=line667,line687,line707,line727,line747,line768,line787,line806,line826,line845,line863,line881,line899,line919
! eliminated_buses=668,688,708,728,748,769,788,807,827,846,864,882,900

New Line._virtual_line759_line780_line799_line819_line838_line856_line874_line892_line910_line930_line950_line970_line989 bus1=990.1.2.3.4 bus2=741.1.2.3.4 phases=4 linecode=LC1 length=15.553743 units=m
! reduced_from=line759,line780,line799,line819,line838,line856,line874,line892,line910,line930,line950,line970,line989
! eliminated_buses=760,781,800,820,839,857,875,893,911,931,951,971

New Line._virtual_line763_line783_line802_line822_line841_line859_line877_line895_line913_line933_line954_line973_line991_line1008_line1025_line1044_line1064_line1081_line1100 bus1=1101.1.2.3.4 bus2=744.1.2.3.4 phases=4 linecode=LC1 length=9.598204 units=m
! reduced_from=line763,line783,line802,line822,line841,line859,line877,line895,line913,line933,line954,line973,line991,line1008,line1025,line1044,line1064,line1081,line1100
! eliminated_buses=764,784,803,823,842,860,878,896,914,934,955,974,992,1009,1026,1045,1065,1082

New Line._virtual_line808_line828_line847_line865_line883_line901_line921_line940_line961_line980_line998_line1015_line1034_line1053 bus1=790.1.2.3.4 bus2=1054.1.2.3.4 phases=4 linecode=LC1 length=17.135518 units=m
! reduced_from=line808,line828,line847,line865,line883,line901,line921,line940,line961,line980,line998,line1015,line1034,line1053
! eliminated_buses=809,829,848,866,884,902,922,941,962,981,999,1016,1035

New Line._virtual_line914_line934_line955_line974_line992_line1009_line1026_line1045_line1065_line1082_line1101_line1121_line1140_line1159_line1179_line1197_line1213_line1228_line1243_line1259_line1275_line1291_line1306_line1322_line1337_line1352_line1367_line1383_line1398_line1410_line1422_line1433 bus1=1434.1.2.3.4 bus2=897.1.2.3.4 phases=4 linecode=LC1 length=12.923974 units=m
! reduced_from=line914,line934,line955,line974,line992,line1009,line1026,line1045,line1065,line1082,line1101,line1121,line1140,line1159,line1179,line1197,line1213,line1228,line1243,line1259,line1275,line1291,line1306,line1322,line1337,line1352,line1367,line1383,line1398,line1410,line1422,line1433
! eliminated_buses=915,935,956,975,993,1010,1027,1046,1066,1083,1102,1122,1141,1160,1180,1198,1214,1229,1244,1260,1276,1292,1307,1323,1338,1353,1368,1384,1399,1411,1423

New Line._virtual_line915_line935_line956_line975_line993_line1010_line1027_line1046_line1066_line1083_line1102_line1122_line1141_line1160_line1180_line1198_line1214_line1229_line1244_line1260_line1276_line1292_line1307_line1323_line1338_line1353 bus1=897.1.2.3.4 bus2=1354.1.2.3.4 phases=4 linecode=LC1 length=8.326503 units=m
! reduced_from=line915,line935,line956,line975,line993,line1010,line1027,line1046,line1066,line1083,line1102,line1122,line1141,line1160,line1180,line1198,line1214,line1229,line1244,line1260,line1276,line1292,line1307,line1323,line1338,line1353
! eliminated_buses=916,936,957,976,994,1011,1028,1047,1067,1084,1103,1123,1142,1161,1181,1199,1215,1230,1245,1261,1277,1293,1308,1324,1339

New Line._virtual_line916_line936_line957_line976_line994_line1011 bus1=897.1.2.3.4 bus2=1012.1.2.3.4 phases=4 linecode=LC9 length=24.0031 units=m
! reduced_from=line916,line936,line957,line976,line994,line1011
! eliminated_buses=917,937,958,977,995

New Line._virtual_line944_line965_line984_line1002_line1019_line1038_line1058_line1075_line1093_line1113_line1132_line1152_line1172_line1191_line1206_line1221_line1236_line1251_line1267_line1283_line1298 bus1=1299.1.2.3.4 bus2=926.1.2.3.4 phases=4 linecode=LC6 length=10.099968 units=m
! reduced_from=line944,line965,line984,line1002,line1019,line1038,line1058,line1075,line1093,line1113,line1132,line1152,line1172,line1191,line1206,line1221,line1236,line1251,line1267,line1283,line1298
! eliminated_buses=945,966,985,1003,1020,1039,1059,1076,1094,1114,1133,1153,1173,1192,1207,1222,1237,1252,1268,1284

New Line._virtual_line952_line972_line990_line1007_line1024_line1043_line1063_line1080_line1099_line1118_line1138_line1157_line1177 bus1=1178.1.2.3.4 bus2=933.1.2.3.4 phases=4 linecode=LC1 length=17.130188 units=m
! reduced_from=line952,line972,line990,line1007,line1024,line1043,line1063,line1080,line1099,line1118,line1138,line1157,line1177
! eliminated_buses=953,973,991,1008,1025,1044,1064,1081,1100,1119,1139,1158

New Line._virtual_line1028_line1047_line1067_line1084_line1103_line1123_line1142_line1161_line1181_line1199_line1215_line1230_line1245_line1261_line1277_line1293_line1308_line1324_line1339_line1354_line1370_line1385_line1400_line1412_line1424_line1435_line1446_line1456_line1465_line1474_line1482_line1490_line1498_line1507_line1515_line1524 bus1=1525.1.2.3.4 bus2=1012.1.2.3.4 phases=4 linecode=LC1 length=14.656436 units=m
! reduced_from=line1028,line1047,line1067,line1084,line1103,line1123,line1142,line1161,line1181,line1199,line1215,line1230,line1245,line1261,line1277,line1293,line1308,line1324,line1339,line1354,line1370,line1385,line1400,line1412,line1424,line1435,line1446,line1456,line1465,line1474,line1482,line1490,line1498,line1507,line1515,line1524
! eliminated_buses=1029,1048,1068,1085,1104,1124,1143,1162,1182,1200,1216,1231,1246,1262,1278,1294,1309,1325,1340,1355,1371,1386,1401,1413,1425,1436,1447,1457,1466,1475,1483,1491,1499,1508,1516

New Line._virtual_line1029_line1048_line1068_line1085_line1104_line1124_line1143_line1162_line1182_line1200_line1216_line1231_line1246_line1262_line1278_line1294_line1309_line1325_line1340_line1355_line1371_line1386_line1401_line1413_line1425_line1436_line1447_line1457_line1466_line1475_line1483_line1491_line1499_line1508 bus1=1509.1.2.3.4 bus2=1012.1.2.3.4 phases=4 linecode=LC1 length=10.6447 units=m
! reduced_from=line1029,line1048,line1068,line1085,line1104,line1124,line1143,line1162,line1182,line1200,line1216,line1231,line1246,line1262,line1278,line1294,line1309,line1325,line1340,line1355,line1371,line1386,line1401,line1413,line1425,line1436,line1447,line1457,line1466,line1475,line1483,line1491,line1499,line1508
! eliminated_buses=1030,1049,1069,1086,1105,1125,1144,1163,1183,1201,1217,1232,1247,1263,1279,1295,1310,1326,1341,1356,1372,1387,1402,1414,1426,1437,1448,1458,1467,1476,1484,1492,1500

New Line._virtual_line1056_line1074_line1092_line1112_line1131_line1151_line1171_line1190_line1205_line1220_line1235_line1250_line1266_line1282 bus1=1283.1.2.3.4 bus2=1038.1.2.3.4 phases=4 linecode=LC6 length=16.038375 units=m
! reduced_from=line1056,line1074,line1092,line1112,line1131,line1151,line1171,line1190,line1205,line1220,line1235,line1250,line1266,line1282
! eliminated_buses=1057,1075,1093,1113,1132,1152,1172,1191,1206,1221,1236,1251,1267

New Line._virtual_line1097_line1117_line1137_line1156_line1176_line1195_line1211_line1226_line1241_line1257_line1273_line1289_line1304_line1320_line1335_line1350_line1365_line1381_line1396 bus1=1397.1.2.3.4 bus2=1080.1.2.3.4 phases=4 linecode=LC6 length=19.83273 units=m
! reduced_from=line1097,line1117,line1137,line1156,line1176,line1195,line1211,line1226,line1241,line1257,line1273,line1289,line1304,line1320,line1335,line1350,line1365,line1381,line1396
! eliminated_buses=1098,1118,1138,1157,1177,1196,1212,1227,1242,1258,1274,1290,1305,1321,1336,1351,1366,1382

New Line._virtual_line1119_line1139_line1158_line1178_line1196_line1212_line1227_line1242_line1258_line1274_line1290_line1305_line1321_line1336_line1351_line1366_line1382_line1397_line1409_line1421_line1432 bus1=1101.1.2.3.4 bus2=1433.1.2.3.4 phases=4 linecode=LC1 length=15.511981 units=m
! reduced_from=line1119,line1139,line1158,line1178,line1196,line1212,line1227,line1242,line1258,line1274,line1290,line1305,line1321,line1336,line1351,line1366,line1382,line1397,line1409,line1421,line1432
! eliminated_buses=1120,1140,1159,1179,1197,1213,1228,1243,1259,1275,1291,1306,1322,1337,1352,1367,1383,1398,1410,1422

New Line._virtual_line1135_line1155_line1175_line1194_line1210_line1225_line1240_line1255_line1271_line1287_line1302_line1318_line1333_line1348_line1363_line1379_line1394_line1408 bus1=1117.1.2.3.4 bus2=1409.1.2.3.4 phases=4 linecode=LC6 length=17.54862 units=m
! reduced_from=line1135,line1155,line1175,line1194,line1210,line1225,line1240,line1255,line1271,line1287,line1302,line1318,line1333,line1348,line1363,line1379,line1394,line1408
! eliminated_buses=1136,1156,1176,1195,1211,1226,1241,1256,1272,1288,1303,1319,1334,1349,1364,1380,1395

New Line._virtual_line1187_line1203_line1218_line1233_line1248_line1264_line1280_line1296_line1311_line1327_line1342_line1357_line1373_line1388_line1402_line1414_line1426_line1437_line1448_line1458_line1467 bus1=1468.1.2.3.4 bus2=1170.1.2.3.4 phases=4 linecode=LC2 length=18.651621 units=m
! reduced_from=line1187,line1203,line1218,line1233,line1248,line1264,line1280,line1296,line1311,line1327,line1342,line1357,line1373,line1388,line1402,line1414,line1426,line1437,line1448,line1458,line1467
! eliminated_buses=1188,1204,1219,1234,1249,1265,1281,1297,1312,1328,1343,1358,1374,1389,1403,1415,1427,1438,1449,1459

New Line._virtual_line1313_line1329_line1344_line1359_line1375_line1390_line1404_line1417_line1428_line1439_line1450_line1460_line1469_line1477_line1485_line1493_line1501_line1510_line1519_line1527_line1537_line1545_line1552_line1560 bus1=1561.1.2.3.4 bus2=1299.1.2.3.4 phases=4 linecode=LC6 length=15.807991 units=m
! reduced_from=line1313,line1329,line1344,line1359,line1375,line1390,line1404,line1417,line1428,line1439,line1450,line1460,line1469,line1477,line1485,line1493,line1501,line1510,line1519,line1527,line1537,line1545,line1552,line1560
! eliminated_buses=1314,1330,1345,1360,1376,1391,1405,1418,1429,1440,1451,1461,1470,1478,1486,1494,1502,1511,1520,1528,1538,1546,1553

New Line._virtual_line1368_line1384_line1399_line1411_line1423_line1434_line1445_line1455_line1464_line1473_line1481_line1489_line1497_line1506_line1514_line1523_line1532_line1541_line1549_line1557_line1565 bus1=1566.1.2.3.4 bus2=1354.1.2.3.4 phases=4 linecode=LC1 length=19.168316 units=m
! reduced_from=line1368,line1384,line1399,line1411,line1423,line1434,line1445,line1455,line1464,line1473,line1481,line1489,line1497,line1506,line1514,line1523,line1532,line1541,line1549,line1557,line1565
! eliminated_buses=1369,1385,1400,1412,1424,1435,1446,1456,1465,1474,1482,1490,1498,1507,1515,1524,1533,1542,1550,1558

New Line._virtual_line1415_line1427_line1438_line1449_line1459_line1468_line1476_line1484_line1492_line1500_line1509_line1518_line1526_line1536_line1544 bus1=1404.1.2.3.4 bus2=1545.1.2.3.4 phases=4 linecode=LC2 length=19.329993 units=m
! reduced_from=line1415,line1427,line1438,line1449,line1459,line1468,line1476,line1484,line1492,line1500,line1509,line1518,line1526,line1536,line1544
! eliminated_buses=1416,1428,1439,1450,1460,1469,1477,1485,1493,1501,1510,1519,1527,1537

New Line._virtual_line1443_line1454_line1463_line1472_line1480_line1488_line1496_line1505_line1513_line1522_line1531_line1540_line1548_line1555_line1563_line1570 bus1=1571.1.2.3.4 bus2=1434.1.2.3.4 phases=4 linecode=LC1 length=17.415324 units=m
! reduced_from=line1443,line1454,line1463,line1472,line1480,line1488,line1496,line1505,line1513,line1522,line1531,line1540,line1548,line1555,line1563,line1570
! eliminated_buses=1444,1455,1464,1473,1481,1489,1497,1506,1514,1523,1532,1541,1549,1556,1564

New Line._virtual_line1503_line1512_line1521_line1530_line1539_line1547_line1554_line1562_line1569_line1575_line1580_line1586_line1592_line1598_line1604_line1610_line1616_line1621_line1625_line1629_line1633_line1636_line1638_line1640 bus1=1496.1.2.3.4 bus2=1641.1.2.3.4 phases=4 linecode=LC2 length=17.746992 units=m
! reduced_from=line1503,line1512,line1521,line1530,line1539,line1547,line1554,line1562,line1569,line1575,line1580,line1586,line1592,line1598,line1604,line1610,line1616,line1621,line1625,line1629,line1633,line1636,line1638,line1640
! eliminated_buses=1504,1513,1522,1531,1540,1548,1555,1563,1570,1576,1581,1587,1593,1599,1605,1611,1617,1622,1626,1630,1634,1637,1639

New Line._virtual_line1516_line1525_line1535_line1543_line1551_line1559_line1567_line1573_line1578_line1583_line1589_line1595_line1601_line1607_line1613_line1618 bus1=1509.1.2.3.4 bus2=1619.1.2.3.4 phases=4 linecode=LC1 length=19.040325 units=m
! reduced_from=line1516,line1525,line1535,line1543,line1551,line1559,line1567,line1573,line1578,line1583,line1589,line1595,line1601,line1607,line1613,line1618
! eliminated_buses=1517,1526,1536,1544,1552,1560,1568,1574,1579,1584,1590,1596,1602,1608,1614

New Line._virtual_line1528_line1538_line1546_line1553_line1561_line1568_line1574_line1579_line1585_line1591_line1597_line1603_line1609_line1615_line1620_line1624_line1628_line1632_line1635 bus1=1636.1.2.3.4 bus2=1521.1.2.3.4 phases=4 linecode=LC2 length=20.3537 units=m
! reduced_from=line1528,line1538,line1546,line1553,line1561,line1568,line1574,line1579,line1585,line1591,line1597,line1603,line1609,line1615,line1620,line1624,line1628,line1632,line1635
! eliminated_buses=1529,1539,1547,1554,1562,1569,1575,1580,1586,1592,1598,1604,1610,1616,1621,1625,1629,1633

New Line._virtual_line1533_line1542_line1550_line1558_line1566_line1572_line1577_line1582_line1588_line1594_line1600_line1606_line1612 bus1=1613.1.2.3.4 bus2=1525.1.2.3.4 phases=4 linecode=LC1 length=16.68546 units=m
! reduced_from=line1533,line1542,line1550,line1558,line1566,line1572,line1577,line1582,line1588,line1594,line1600,line1606,line1612
! eliminated_buses=1534,1543,1551,1559,1567,1573,1578,1583,1589,1595,1601,1607

New Line.LINE100 bus1=95.1.2.3.4 bus2=101.1.2.3.4 phases=4 linecode=LC2 length=6.0774 units=m

New Line.LINE105 bus1=99.1.2.3.4 bus2=106.1.2.3.4 phases=4 linecode=LC9 length=1.3975 units=m

New Line.LINE131 bus1=120.1.2.3.4 bus2=132.1.2.3.4 phases=4 linecode=LC2 length=6.9696 units=m

New Line.LINE133 bus1=121.1.2.3.4 bus2=134.1.2.3.4 phases=4 linecode=LC1 length=5.2987 units=m

New Line.LINE138 bus1=126.1.2.3.4 bus2=139.1.2.3.4 phases=4 linecode=LC9 length=6.8205 units=m

New Line.LINE193 bus1=176.1.2.3.4 bus2=194.1.2.3.4 phases=4 linecode=LC2 length=9.1152 units=m

New Line.LINE194 bus1=176.1.2.3.4 bus2=195.1.2.3.4 phases=4 linecode=LC2 length=9.1152 units=m

New Line.LINE212 bus1=194.1.2.3.4 bus2=213.1.2.3.4 phases=4 linecode=LC2 length=9.6342 units=m

New Line.LINE213 bus1=194.1.2.3.4 bus2=214.1.2.3.4 phases=4 linecode=LC2 length=11.9626 units=m

New Line.LINE214 bus1=194.1.2.3.4 bus2=215.1.2.3.4 phases=4 linecode=LC2 length=9.6342 units=m

New Line.LINE282 bus1=266.1.2.3.4 bus2=283.1.2.3.4 phases=4 linecode=LC2 length=8.2492 units=m

New Line.LINE283 bus1=266.1.2.3.4 bus2=284.1.2.3.4 phases=4 linecode=LC2 length=8.2492 units=m

New Line.LINE284 bus1=267.1.2.3.4 bus2=285.1.2.3.4 phases=4 linecode=LC2 length=8.9243 units=m

New Line.LINE285 bus1=267.1.2.3.4 bus2=286.1.2.3.4 phases=4 linecode=LC2 length=8.9243 units=m

New Line.LINE297 bus1=279.1.2.3.4 bus2=298.1.2.3.4 phases=4 linecode=LC2 length=8.2986 units=m

New Line.LINE298 bus1=279.1.2.3.4 bus2=299.1.2.3.4 phases=4 linecode=LC2 length=8.2986 units=m

New Line.LINE299 bus1=279.1.2.3.4 bus2=300.1.2.3.4 phases=4 linecode=LC2 length=8.2986 units=m

New Line.LINE379 bus1=366.1.2.3.4 bus2=380.1.2.3.4 phases=4 linecode=LC1 length=8.9644 units=m

New Line.LINE380 bus1=366.1.2.3.4 bus2=381.1.2.3.4 phases=4 linecode=LC1 length=8.9644 units=m

New Line.LINE392 bus1=375.1.2.3.4 bus2=393.1.2.3.4 phases=4 linecode=LC2 length=5.8004 units=m

New Line.LINE397 bus1=380.1.2.3.4 bus2=398.1.2.3.4 phases=4 linecode=LC1 length=10.2281 units=m

New Line.LINE398 bus1=380.1.2.3.4 bus2=399.1.2.3.4 phases=4 linecode=LC1 length=10.2281 units=m

New Line.LINE448 bus1=430.1.2.3.4 bus2=449.1.2.3.4 phases=4 linecode=LC1 length=6.2228 units=m

New Line.LINE572 bus1=552.1.2.3.4 bus2=573.1.2.3.4 phases=4 linecode=LC1 length=5.464 units=m

New Line.LINE668 bus1=649.1.2.3.4 bus2=669.1.2.3.4 phases=4 linecode=LC2 length=5.8733 units=m

New Line.LINE760 bus1=741.1.2.3.4 bus2=761.1.2.3.4 phases=4 linecode=LC1 length=6.5332 units=m

New Line.LINE764 bus1=744.1.2.3.4 bus2=765.1.2.3.4 phases=4 linecode=LC1 length=6.9491 units=m

New Line.LINE809 bus1=790.1.2.3.4 bus2=810.1.2.3.4 phases=4 linecode=LC1 length=5.7658 units=m

New Line.LINE945 bus1=926.1.2.3.4 bus2=946.1.2.3.4 phases=4 linecode=LC6 length=6.1938 units=m

New Line.LINE953 bus1=933.1.2.3.4 bus2=954.1.2.3.4 phases=4 linecode=LC1 length=6.5802 units=m

New Line.LINE1057 bus1=1038.1.2.3.4 bus2=1058.1.2.3.4 phases=4 linecode=LC6 length=6.1164 units=m

New Line.LINE1088 bus1=1072.1.2.3.4 bus2=1089.1.2.3.4 phases=4 linecode=LC6 length=9.0339 units=m

New Line.LINE1089 bus1=1072.1.2.3.4 bus2=1090.1.2.3.4 phases=4 linecode=LC6 length=9.0339 units=m

New Line.LINE1098 bus1=1080.1.2.3.4 bus2=1099.1.2.3.4 phases=4 linecode=LC6 length=6.8635 units=m

New Line.LINE1107 bus1=1089.1.2.3.4 bus2=1108.1.2.3.4 phases=4 linecode=LC6 length=10.9938 units=m

New Line.LINE1108 bus1=1089.1.2.3.4 bus2=1109.1.2.3.4 phases=4 linecode=LC6 length=10.9938 units=m

New Line.LINE1109 bus1=1089.1.2.3.4 bus2=1110.1.2.3.4 phases=4 linecode=LC6 length=8.6078 units=m

New Line.LINE1120 bus1=1101.1.2.3.4 bus2=1121.1.2.3.4 phases=4 linecode=LC1 length=6.1832 units=m

New Line.LINE1136 bus1=1117.1.2.3.4 bus2=1137.1.2.3.4 phases=4 linecode=LC6 length=7.8878 units=m

New Line.LINE1188 bus1=1170.1.2.3.4 bus2=1189.1.2.3.4 phases=4 linecode=LC2 length=6.4562 units=m

New Line.LINE1314 bus1=1299.1.2.3.4 bus2=1315.1.2.3.4 phases=4 linecode=LC6 length=6.2322 units=m

New Line.LINE1369 bus1=1354.1.2.3.4 bus2=1370.1.2.3.4 phases=4 linecode=LC1 length=6.7131 units=m

New Line.LINE1416 bus1=1404.1.2.3.4 bus2=1417.1.2.3.4 phases=4 linecode=LC2 length=5.9361 units=m

New Line.LINE1444 bus1=1434.1.2.3.4 bus2=1445.1.2.3.4 phases=4 linecode=LC1 length=6.9191 units=m

New Line.LINE1504 bus1=1496.1.2.3.4 bus2=1505.1.2.3.4 phases=4 linecode=LC2 length=6.0927 units=m

New Line.LINE1517 bus1=1509.1.2.3.4 bus2=1518.1.2.3.4 phases=4 linecode=LC1 length=7.02 units=m

New Line.LINE1529 bus1=1521.1.2.3.4 bus2=1530.1.2.3.4 phases=4 linecode=LC2 length=7.04 units=m

New Line.LINE1534 bus1=1525.1.2.3.4 bus2=1535.1.2.3.4 phases=4 linecode=LC1 length=6.1906 units=m
