! Reduced enabled lines.

New Line._virtual_line0_line1_line2_line3_line4_line5_line6_line7_line8_line9_line10_line11_line12_line13_line14_line15_line16_line17_line18_line19_line20_line21_line22_line23_line24_line25_line26_line27_line28_line29_line30_line31_line32_line33_line34_line35_line36_line40_line45_line52_line59_line67_line75_line83 bus1=sourcebus.1.2.3.4 bus2=84.1.2.3.4 phases=4 linecode=LC8 length=103.320225 units=m
! reduced_from=line0,line1,line2,line3,line4,line5,line6,line7,line8,line9,line10,line11,line12,line13,line14,line15,line16,line17,line18,line19,line20,line21,line22,line23,line24,line25,line26,line27,line28,line29,line30,line31,line32,line33,line34,line35,line36,line40,line45,line52,line59,line67,line75,line83
! eliminated_buses=1,2,3,4,5,6,7,8,9,10,11,12,13,14,15,16,17,18,19,20,21,22,23,24,25,26,27,28,29,30,31,32,33,34,35,36,37,41,46,53,60,68,76

New Line._virtual_line90_line96_line101_line106_line111_line116_line119_line122_line126_line130_line134_line138_line142_line146_line150_line154_line158 bus1=159.1.2.3.4 bus2=84.1.2.3.4 phases=4 linecode=LC8 length=22.197561 units=m
! reduced_from=line90,line96,line101,line106,line111,line116,line119,line122,line126,line130,line134,line138,line142,line146,line150,line154,line158
! eliminated_buses=91,97,102,107,112,117,120,123,127,131,135,139,143,147,151,155

New Line._virtual_line91_line97_line102_line107_line112_line117_line120_line123_line127_line131_line135_line139_line143_line147_line151_line155_line160_line167 bus1=168.1.2.3.4 bus2=84.1.2.3.4 phases=4 linecode=LC9 length=18.64052 units=m
! reduced_from=line91,line97,line102,line107,line112,line117,line120,line123,line127,line131,line135,line139,line143,line147,line151,line155,line160,line167
! eliminated_buses=92,98,103,108,113,118,121,124,128,132,136,140,144,148,152,156,161

New Line._virtual_line163_line170_line179_line188_line198_line208_line219_line229_line241_line253_line266_line280_line294_line308_line326_line341_line357_line373_line390 bus1=391.1.2.3.4 bus2=159.1.2.3.4 phases=4 linecode=LC8 length=20.56864 units=m
! reduced_from=line163,line170,line179,line188,line198,line208,line219,line229,line241,line253,line266,line280,line294,line308,line326,line341,line357,line373,line390
! eliminated_buses=164,171,180,189,199,209,220,230,242,254,267,281,295,309,327,342,358,374

New Line._virtual_line164_line171_line180_line189_line199_line209_line220_line230_line242_line254_line267_line281_line295_line309_line327_line342_line358_line374_line391_line410_line429_line448_line468 bus1=469.1.2.3.4 bus2=159.1.2.3.4 phases=4 linecode=LC1 length=9.917998 units=m
! reduced_from=line164,line171,line180,line189,line199,line209,line220,line230,line242,line254,line267,line281,line295,line309,line327,line342,line358,line374,line391,line410,line429,line448,line468
! eliminated_buses=165,172,181,190,200,210,221,231,243,255,268,282,296,310,328,343,359,375,392,411,430,449

New Line._virtual_line165_line172_line181_line190_line200_line210_line221_line231_line243_line255_line268_line282_line296_line310_line328_line343_line359_line375_line392_line411_line430_line449_line469_line488_line506_line524_line541_line558_line576_line594_line607_line618_line630_line645_line660 bus1=661.1.2.3.4 bus2=159.1.2.3.4 phases=4 linecode=LC1 length=9.876812 units=m
! reduced_from=line165,line172,line181,line190,line200,line210,line221,line231,line243,line255,line268,line282,line296,line310,line328,line343,line359,line375,line392,line411,line430,line449,line469,line488,line506,line524,line541,line558,line576,line594,line607,line618,line630,line645,line660
! eliminated_buses=166,173,182,191,201,211,222,232,244,256,269,283,297,311,329,344,360,376,393,412,431,450,470,489,507,525,542,559,577,595,608,619,631,646

New Line._virtual_line174_line183 bus1=168.1.2.3.4 bus2=184.1.2.3.4 phases=4 linecode=LC9 length=9.0297 units=m
! reduced_from=line174,line183
! eliminated_buses=175

New Line._virtual_line175_line184_line194_line204_line215_line226_line238_line250_line263_line277_line291 bus1=292.1.2.3.4 bus2=168.1.2.3.4 phases=4 linecode=LC1 length=5.67962 units=m
! reduced_from=line175,line184,line194,line204,line215,line226,line238,line250,line263,line277,line291
! eliminated_buses=176,185,195,205,216,227,239,251,264,278

New Line._virtual_line192_line202_line212_line223_line233_line245_line257_line270_line284_line298_line312_line329_line344_line360_line376_line393_line412_line431_line450_line470 bus1=471.1.2.3.4 bus2=184.1.2.3.4 phases=4 linecode=LC1 length=8.057716 units=m
! reduced_from=line192,line202,line212,line223,line233,line245,line257,line270,line284,line298,line312,line329,line344,line360,line376,line393,line412,line431,line450,line470
! eliminated_buses=193,203,213,224,234,246,258,271,285,299,313,330,345,361,377,394,413,432,451

New Line._virtual_line193_line203_line213_line224 bus1=184.1.2.3.4 bus2=225.1.2.3.4 phases=4 linecode=LC9 length=15.8777 units=m
! reduced_from=line193,line203,line213,line224
! eliminated_buses=194,204,214

New Line._virtual_line235_line247_line259_line272_line286_line300_line314_line331_line346_line362_line378_line395_line414 bus1=225.1.2.3.4 bus2=415.1.2.3.4 phases=4 linecode=LC1 length=6.836804 units=m
! reduced_from=line235,line247,line259,line272,line286,line300,line314,line331,line346,line362,line378,line395,line414
! eliminated_buses=236,248,260,273,287,301,315,332,347,363,379,396

New Line._virtual_line236_line248 bus1=225.1.2.3.4 bus2=249.1.2.3.4 phases=4 linecode=LC9 length=8.8036 units=m
! reduced_from=line236,line248
! eliminated_buses=237

New Line._virtual_line260_line274_line288_line302 bus1=249.1.2.3.4 bus2=303.1.2.3.4 phases=4 linecode=LC9 length=16.6902 units=m
! reduced_from=line260,line274,line288,line302
! eliminated_buses=261,275,289

New Line._virtual_line261_line275_line289_line303_line319_line337_line354_line370 bus1=249.1.2.3.4 bus2=371.1.2.3.4 phases=4 linecode=LC1 length=2.12403 units=m
! reduced_from=line261,line275,line289,line303,line319,line337,line354,line370
! eliminated_buses=262,276,290,304,320,338,355

New Line._virtual_line316_line333 bus1=303.1.2.3.4 bus2=334.1.2.3.4 phases=4 linecode=LC9 length=9.53847 units=m
! reduced_from=line316,line333
! eliminated_buses=317

New Line._virtual_line317_line335_line352_line368_line384_line401_line420_line440_line460_line478 bus1=303.1.2.3.4 bus2=479.1.2.3.4 phases=4 linecode=LC1 length=6.479369 units=m
! reduced_from=line317,line335,line352,line368,line384,line401,line420,line440,line460,line478
! eliminated_buses=318,336,353,369,385,402,421,441,461

New Line._virtual_line348_line364_line380_line397_line416_line436_line455_line473_line492_line510_line527_line544_line561_line579_line597_line609 bus1=610.1.2.3.4 bus2=334.1.2.3.4 phases=4 linecode=LC9 length=28.95696 units=m
! reduced_from=line348,line364,line380,line397,line416,line436,line455,line473,line492,line510,line527,line544,line561,line579,line597,line609
! eliminated_buses=349,365,381,398,417,437,456,474,493,511,528,545,562,580,598

New Line._virtual_line349_line365_line381_line398_line417_line437_line457_line475_line494_line512_line530_line547 bus1=334.1.2.3.4 bus2=548.1.2.3.4 phases=4 linecode=LC1 length=8.95479 units=m
! reduced_from=line349,line365,line381,line398,line417,line437,line457,line475,line494,line512,line530,line547
! eliminated_buses=350,366,382,399,418,438,458,476,495,513,531

New Line._virtual_line387_line405_line424_line443_line463_line481_line500_line518_line533_line549_line567_line585 bus1=371.1.2.3.4 bus2=586.1.2.3.4 phases=4 linecode=LC1 length=12.89025 units=m
! reduced_from=line387,line405,line424,line443,line463,line481,line500,line518,line533,line549,line567,line585
! eliminated_buses=388,406,425,444,464,482,501,519,534,550,568

New Line._virtual_line408_line427_line446_line466_line484_line503_line521 bus1=391.1.2.3.4 bus2=522.1.2.3.4 phases=4 linecode=LC8 length=28.48475 units=m
! reduced_from=line408,line427,line446,line466,line484,line503,line521
! eliminated_buses=409,428,447,467,485,504

New Line._virtual_line409_line428_line447_line467_line485_line504_line522_line539_line556_line574_line592_line605_line616_line628 bus1=629.1.2.3.4 bus2=391.1.2.3.4 phases=4 linecode=LC9 length=21.23982 units=m
! reduced_from=line409,line428,line447,line467,line485,line504,line522,line539,line556,line574,line592,line605,line616,line628
! eliminated_buses=410,429,448,468,486,505,523,540,557,575,593,606,617

New Line._virtual_line486_line505_line523_line540_line557_line575_line593_line606_line617_line629_line644_line659_line674_line689_line701_line713_line726 bus1=469.1.2.3.4 bus2=727.1.2.3.4 phases=4 linecode=LC1 length=18.63847 units=m
! reduced_from=line486,line505,line523,line540,line557,line575,line593,line606,line617,line629,line644,line659,line674,line689,line701,line713,line726
! eliminated_buses=487,506,524,541,558,576,594,607,618,630,645,660,675,690,702,714

New Line._virtual_line536_line553_line571_line589_line602_line613_line625_line637_line652_line667_line682_line694_line706_line717_line730_line741_line752_line763_line774_line785_line796_line807_line818_line829_line841_line852_line862_line872_line882_line893_line903_line913_line924 bus1=925.1.2.3.4 bus2=522.1.2.3.4 phases=4 linecode=LC1 length=11.062227 units=m
! reduced_from=line536,line553,line571,line589,line602,line613,line625,line637,line652,line667,line682,line694,line706,line717,line730,line741,line752,line763,line774,line785,line796,line807,line818,line829,line841,line852,line862,line872,line882,line893,line903,line913,line924
! eliminated_buses=537,554,572,590,603,614,626,638,653,668,683,695,707,718,731,742,753,764,775,786,797,808,819,830,842,853,863,873,883,894,904,914

New Line._virtual_line537_line554_line572_line590_line603_line614_line626_line638_line653_line668_line683_line695_line707_line718_line731_line742_line753_line764_line775_line786_line797_line808_line819_line830_line842_line853_line863_line873 bus1=874.1.2.3.4 bus2=522.1.2.3.4 phases=4 linecode=LC1 length=11.392857 units=m
! reduced_from=line537,line554,line572,line590,line603,line614,line626,line638,line653,line668,line683,line695,line707,line718,line731,line742,line753,line764,line775,line786,line797,line808,line819,line830,line842,line853,line863,line873
! eliminated_buses=538,555,573,591,604,615,627,639,654,669,684,696,708,719,732,743,754,765,776,787,798,809,820,831,843,854,864

New Line._virtual_line619_line631_line646_line661_line677_line691_line703_line715_line728_line739_line750_line761_line772_line783_line794_line805_line816_line827_line839_line850_line860_line870_line880_line891_line901_line911_line922_line932_line943 bus1=610.1.2.3.4 bus2=944.1.2.3.4 phases=4 linecode=LC1 length=11.071284 units=m
! reduced_from=line619,line631,line646,line661,line677,line691,line703,line715,line728,line739,line750,line761,line772,line783,line794,line805,line816,line827,line839,line850,line860,line870,line880,line891,line901,line911,line922,line932,line943
! eliminated_buses=620,632,647,662,678,692,704,716,729,740,751,762,773,784,795,806,817,828,840,851,861,871,881,892,902,912,923,933

New Line._virtual_line620_line632_line647_line662_line678_line692_line704_line716_line729_line740_line751_line762_line773_line784_line795_line806_line817_line828_line840_line851_line861_line871_line881_line892_line902_line912_line923_line933_line944_line956_line966 bus1=610.1.2.3.4 bus2=967.1.2.3.4 phases=4 linecode=LC1 length=12.143344 units=m
! reduced_from=line620,line632,line647,line662,line678,line692,line704,line716,line729,line740,line751,line762,line773,line784,line795,line806,line817,line828,line840,line851,line861,line871,line881,line892,line902,line912,line923,line933,line944,line956,line966
! eliminated_buses=621,633,648,663,679,693,705,717,730,741,752,763,774,785,796,807,818,829,841,852,862,872,882,893,903,913,924,934,945,957

New Line._virtual_line642_line657_line672_line687_line699_line711_line724_line736_line747_line758_line769_line780_line791_line802_line813_line824_line835_line847_line857_line867_line877_line888_line898_line908 bus1=909.1.2.3.4 bus2=629.1.2.3.4 phases=4 linecode=LC1 length=10.894835 units=m
! reduced_from=line642,line657,line672,line687,line699,line711,line724,line736,line747,line758,line769,line780,line791,line802,line813,line824,line835,line847,line857,line867,line877,line888,line898,line908
! eliminated_buses=643,658,673,688,700,712,725,737,748,759,770,781,792,803,814,825,836,848,858,868,878,889,899

New Line._virtual_line643_line658_line673_line688_line700_line712_line725_line737_line748_line759_line770_line781_line792_line803_line814_line825_line836_line848_line858_line868_line878_line889_line899_line909_line920_line930_line941_line952_line963 bus1=629.1.2.3.4 bus2=964.1.2.3.4 phases=4 linecode=LC1 length=11.79905 units=m
! reduced_from=line643,line658,line673,line688,line700,line712,line725,line737,line748,line759,line770,line781,line792,line803,line814,line825,line836,line848,line858,line868,line878,line889,line899,line909,line920,line930,line941,line952,line963
! eliminated_buses=644,659,674,689,701,713,726,738,749,760,771,782,793,804,815,826,837,849,859,869,879,890,900,910,921,931,942,953

New Line._virtual_line655_line670_line685_line697_line709_line720_line733_line744_line755_line766_line777_line788_line799_line810_line821_line832_line844_line854_line864_line874_line885_line895_line905_line915_line926_line937_line947_line959_line969_line981_line991_line1001 bus1=642.1.2.3.4 bus2=1002.1.2.3.4 phases=4 linecode=LC9 length=50.802898 units=m
! reduced_from=line655,line670,line685,line697,line709,line720,line733,line744,line755,line766,line777,line788,line799,line810,line821,line832,line844,line854,line864,line874,line885,line895,line905,line915,line926,line937,line947,line959,line969,line981,line991,line1001
! eliminated_buses=656,671,686,698,710,721,734,745,756,767,778,789,800,811,822,833,845,855,865,875,886,896,906,916,927,938,948,960,970,982,992

New Line._virtual_line656_line671_line686_line698_line710 bus1=711.1.2.3.4 bus2=642.1.2.3.4 phases=4 linecode=LC9 length=21.1133 units=m
! reduced_from=line656,line671,line686,line698,line710
! eliminated_buses=657,672,687,699

New Line._virtual_line675_line690_line702_line714_line727_line738_line749_line760_line771_line782_line793_line804_line815_line826 bus1=661.1.2.3.4 bus2=827.1.2.3.4 phases=4 linecode=LC1 length=10.22454 units=m
! reduced_from=line675,line690,line702,line714,line727,line738,line749,line760,line771,line782,line793,line804,line815,line826
! eliminated_buses=676,691,703,715,728,739,750,761,772,783,794,805,816

New Line._virtual_line721_line734_line745_line756_line767_line778_line789_line800_line811_line822_line833_line845_line855_line865_line875_line886_line896_line906_line916_line927_line938 bus1=939.1.2.3.4 bus2=711.1.2.3.4 phases=4 linecode=LC1 length=9.657889 units=m
! reduced_from=line721,line734,line745,line756,line767,line778,line789,line800,line811,line822,line833,line845,line855,line865,line875,line886,line896,line906,line916,line927,line938
! eliminated_buses=722,735,746,757,768,779,790,801,812,823,834,846,856,866,876,887,897,907,917,928

New Line._virtual_line722_line735_line746_line757_line768_line779_line790_line801_line812_line823_line834_line846_line856_line866_line876_line887_line897_line907_line917_line928_line939_line950_line961_line971_line983 bus1=711.1.2.3.4 bus2=984.1.2.3.4 phases=4 linecode=LC1 length=10.634819 units=m
! reduced_from=line722,line735,line746,line757,line768,line779,line790,line801,line812,line823,line834,line846,line856,line866,line876,line887,line897,line907,line917,line928,line939,line950,line961,line971,line983
! eliminated_buses=723,736,747,758,769,780,791,802,813,824,835,847,857,867,877,888,898,908,918,929,940,951,962,972

New Line._virtual_line837_line849_line859_line869_line879_line890_line900_line910_line921_line931_line942_line953_line964_line975_line986 bus1=827.1.2.3.4 bus2=987.1.2.3.4 phases=4 linecode=LC1 length=16.079235 units=m
! reduced_from=line837,line849,line859,line869,line879,line890,line900,line910,line921,line931,line942,line953,line964,line975,line986
! eliminated_buses=838,850,860,870,880,891,901,911,922,932,943,954,965,976

New Line._virtual_line883_line894_line904_line914_line925_line936_line946_line958_line968_line980_line990_line1000_line1009_line1020_line1031_line1042_line1055 bus1=874.1.2.3.4 bus2=1056.1.2.3.4 phases=4 linecode=LC1 length=17.48379 units=m
! reduced_from=line883,line894,line904,line914,line925,line936,line946,line958,line968,line980,line990,line1000,line1009,line1020,line1031,line1042,line1055
! eliminated_buses=884,895,905,915,926,937,947,959,969,981,991,1001,1010,1021,1032,1043

New Line._virtual_line918_line929_line940_line951_line962_line972_line984_line995_line1004_line1015_line1026_line1037_line1050_line1062_line1073_line1083_line1093_line1104_line1114 bus1=1115.1.2.3.4 bus2=909.1.2.3.4 phases=4 linecode=LC1 length=16.358341 units=m
! reduced_from=line918,line929,line940,line951,line962,line972,line984,line995,line1004,line1015,line1026,line1037,line1050,line1062,line1073,line1083,line1093,line1104,line1114
! eliminated_buses=919,930,941,952,963,973,985,996,1005,1016,1027,1038,1051,1063,1074,1084,1094,1105

New Line._virtual_line934_line945_line957_line967_line979_line989_line999_line1008_line1019_line1030_line1041_line1054_line1066_line1077_line1087_line1098_line1108_line1118 bus1=1119.1.2.3.4 bus2=925.1.2.3.4 phases=4 linecode=LC1 length=18.774818 units=m
! reduced_from=line934,line945,line957,line967,line979,line989,line999,line1008,line1019,line1030,line1041,line1054,line1066,line1077,line1087,line1098,line1108,line1118
! eliminated_buses=935,946,958,968,980,990,1000,1009,1020,1031,1042,1055,1067,1078,1088,1099,1109

New Line._virtual_line948_line960_line970_line982_line992_line1002_line1013_line1024_line1035_line1048_line1060_line1071_line1081_line1091_line1102_line1112_line1122_line1130_line1138 bus1=939.1.2.3.4 bus2=1139.1.2.3.4 phases=4 linecode=LC1 length=16.473528 units=m
! reduced_from=line948,line960,line970,line982,line992,line1002,line1013,line1024,line1035,line1048,line1060,line1071,line1081,line1091,line1102,line1112,line1122,line1130,line1138
! eliminated_buses=949,961,971,983,993,1003,1014,1025,1036,1049,1061,1072,1082,1092,1103,1113,1123,1131

New Line._virtual_line954_line965_line976_line987_line997_line1006_line1017_line1028_line1039_line1052_line1064_line1075_line1085 bus1=1086.1.2.3.4 bus2=944.1.2.3.4 phases=4 linecode=LC1 length=7.93116 units=m
! reduced_from=line954,line965,line976,line987,line997,line1006,line1017,line1028,line1039,line1052,line1064,line1075,line1085
! eliminated_buses=955,966,977,988,998,1007,1018,1029,1040,1053,1065,1076

New Line._virtual_line973_line985_line996_line1005_line1016_line1027_line1038_line1051_line1063_line1074_line1084_line1094_line1105_line1115_line1124_line1132_line1140 bus1=1141.1.2.3.4 bus2=964.1.2.3.4 phases=4 linecode=LC1 length=16.926379 units=m
! reduced_from=line973,line985,line996,line1005,line1016,line1027,line1038,line1051,line1063,line1074,line1084,line1094,line1105,line1115,line1124,line1132,line1140
! eliminated_buses=974,986,997,1006,1017,1028,1039,1052,1064,1075,1085,1095,1106,1116,1125,1133

New Line._virtual_line977_line988_line998_line1007_line1018_line1029_line1040_line1053_line1065_line1076_line1086_line1097_line1107_line1117_line1126_line1134_line1142 bus1=1143.1.2.3.4 bus2=967.1.2.3.4 phases=4 linecode=LC1 length=15.52493 units=m
! reduced_from=line977,line988,line998,line1007,line1018,line1029,line1040,line1053,line1065,line1076,line1086,line1097,line1107,line1117,line1126,line1134,line1142
! eliminated_buses=978,989,999,1008,1019,1030,1041,1054,1066,1077,1087,1098,1108,1118,1127,1135

New Line._virtual_line993_line1003_line1014_line1025_line1036_line1049_line1061_line1072_line1082_line1092_line1103_line1113_line1123_line1131_line1139 bus1=1140.1.2.3.4 bus2=984.1.2.3.4 phases=4 linecode=LC1 length=16.79414 units=m
! reduced_from=line993,line1003,line1014,line1025,line1036,line1049,line1061,line1072,line1082,line1092,line1103,line1113,line1123,line1131,line1139
! eliminated_buses=994,1004,1015,1026,1037,1050,1062,1073,1083,1093,1104,1114,1124,1132

New Line._virtual_line1010_line1021_line1032_line1043_line1056_line1067_line1078_line1088_line1099_line1109_line1119_line1127_line1135_line1143_line1147_line1151_line1155 bus1=1002.1.2.3.4 bus2=1156.1.2.3.4 phases=4 linecode=LC1 length=7.951133 units=m
! reduced_from=line1010,line1021,line1032,line1043,line1056,line1067,line1078,line1088,line1099,line1109,line1119,line1127,line1135,line1143,line1147,line1151,line1155
! eliminated_buses=1011,1022,1033,1044,1057,1068,1079,1089,1100,1110,1120,1128,1136,1144,1148,1152

New Line._virtual_line1011_line1022_line1033_line1044_line1057_line1068_line1079_line1089_line1100_line1110_line1120_line1128_line1136_line1144_line1148_line1152_line1156_line1161_line1166_line1170 bus1=1002.1.2.3.4 bus2=1171.1.2.3.4 phases=4 linecode=LC1 length=8.438414 units=m
! reduced_from=line1011,line1022,line1033,line1044,line1057,line1068,line1079,line1089,line1100,line1110,line1120,line1128,line1136,line1144,line1148,line1152,line1156,line1161,line1166,line1170
! eliminated_buses=1012,1023,1034,1045,1058,1069,1080,1090,1101,1111,1121,1129,1137,1145,1149,1153,1157,1162,1167

New Line._virtual_line1012_line1023_line1034 bus1=1002.1.2.3.4 bus2=1035.1.2.3.4 phases=4 linecode=LC9 length=18.9588 units=m
! reduced_from=line1012,line1023,line1034
! eliminated_buses=1013,1024

New Line._virtual_line1045_line1058_line1069_line1080_line1090_line1101_line1111_line1121_line1129_line1137_line1145_line1149_line1153_line1157 bus1=1035.1.2.3.4 bus2=1158.1.2.3.4 phases=4 linecode=LC1 length=3.74538 units=m
! reduced_from=line1045,line1058,line1069,line1080,line1090,line1101,line1111,line1121,line1129,line1137,line1145,line1149,line1153,line1157
! eliminated_buses=1046,1059,1070,1081,1091,1102,1112,1122,1130,1138,1146,1150,1154

New Line._virtual_line1095_line1106_line1116_line1125_line1133_line1141_line1146_line1150_line1154_line1158_line1164 bus1=1086.1.2.3.4 bus2=1165.1.2.3.4 phases=4 linecode=LC1 length=15.64484 units=m
! reduced_from=line1095,line1106,line1116,line1125,line1133,line1141,line1146,line1150,line1154,line1158,line1164
! eliminated_buses=1096,1107,1117,1126,1134,1142,1147,1151,1155,1159

New Line._virtual_line1159_line1165_line1169_line1174_line1179_line1183_line1187_line1191_line1195_line1199_line1203_line1207_line1211_line1215_line1218_line1221_line1224 bus1=1225.1.2.3.4 bus2=1156.1.2.3.4 phases=4 linecode=LC1 length=16.720299 units=m
! reduced_from=line1159,line1165,line1169,line1174,line1179,line1183,line1187,line1191,line1195,line1199,line1203,line1207,line1211,line1215,line1218,line1221,line1224
! eliminated_buses=1160,1166,1170,1175,1180,1184,1188,1192,1196,1200,1204,1208,1212,1216,1219,1222

New Line._virtual_line1162_line1167_line1171_line1177_line1181_line1185_line1189_line1193_line1197_line1201_line1205_line1209_line1213_line1217_line1220_line1223_line1226_line1228 bus1=1158.1.2.3.4 bus2=1229.1.2.3.4 phases=4 linecode=LC1 length=17.018867 units=m
! reduced_from=line1162,line1167,line1171,line1177,line1181,line1185,line1189,line1193,line1197,line1201,line1205,line1209,line1213,line1217,line1220,line1223,line1226,line1228
! eliminated_buses=1163,1168,1172,1178,1182,1186,1190,1194,1198,1202,1206,1210,1214,1218,1221,1224,1227

New Line._virtual_line1163_line1168_line1173 bus1=1174.1.2.3.4 bus2=1158.1.2.3.4 phases=4 linecode=LC6 length=7.94233 units=m
! reduced_from=line1163,line1168,line1173
! eliminated_buses=1164,1169

New Line._virtual_line1175_line1180_line1184_line1188_line1192_line1196_line1200_line1204_line1208_line1212_line1216_line1219_line1222_line1225_line1227_line1229_line1230_line1231_line1233_line1235 bus1=1171.1.2.3.4 bus2=1236.1.2.3.4 phases=4 linecode=LC1 length=16.632155 units=m
! reduced_from=line1175,line1180,line1184,line1188,line1192,line1196,line1200,line1204,line1208,line1212,line1216,line1219,line1222,line1225,line1227,line1229,line1230,line1231,line1233,line1235
! eliminated_buses=1176,1181,1185,1189,1193,1197,1201,1205,1209,1213,1217,1220,1223,1226,1228,1230,1231,1232,1234

New Line.LINE305 bus1=292.1.2.3.4 bus2=306.1.2.3.4 phases=4 linecode=LC1 length=10.085 units=m

New Line.LINE306 bus1=292.1.2.3.4 bus2=307.1.2.3.4 phases=4 linecode=LC1 length=10.085 units=m

New Line.LINE321 bus1=306.1.2.3.4 bus2=322.1.2.3.4 phases=4 linecode=LC1 length=9.7691 units=m

New Line.LINE322 bus1=306.1.2.3.4 bus2=323.1.2.3.4 phases=4 linecode=LC1 length=9.7691 units=m

New Line.LINE323 bus1=306.1.2.3.4 bus2=324.1.2.3.4 phases=4 linecode=LC1 length=9.7691 units=m

New Line.LINE386 bus1=371.1.2.3.4 bus2=387.1.2.3.4 phases=4 linecode=LC1 length=3.7203 units=m

New Line.LINE403 bus1=387.1.2.3.4 bus2=404.1.2.3.4 phases=4 linecode=LC1 length=9.7341 units=m

New Line.LINE404 bus1=387.1.2.3.4 bus2=405.1.2.3.4 phases=4 linecode=LC1 length=9.7341 units=m

New Line.LINE422 bus1=404.1.2.3.4 bus2=423.1.2.3.4 phases=4 linecode=LC1 length=9.4184 units=m

New Line.LINE423 bus1=404.1.2.3.4 bus2=424.1.2.3.4 phases=4 linecode=LC1 length=9.4184 units=m

New Line.LINE433 bus1=415.1.2.3.4 bus2=434.1.2.3.4 phases=4 linecode=LC1 length=9.8789 units=m

New Line.LINE434 bus1=415.1.2.3.4 bus2=435.1.2.3.4 phases=4 linecode=LC1 length=9.8789 units=m

New Line.LINE452 bus1=434.1.2.3.4 bus2=453.1.2.3.4 phases=4 linecode=LC1 length=9.888 units=m

New Line.LINE453 bus1=434.1.2.3.4 bus2=454.1.2.3.4 phases=4 linecode=LC1 length=9.888 units=m

New Line.LINE487 bus1=469.1.2.3.4 bus2=488.1.2.3.4 phases=4 linecode=LC1 length=7.1475 units=m

New Line.LINE489 bus1=471.1.2.3.4 bus2=490.1.2.3.4 phases=4 linecode=LC1 length=8.6145 units=m

New Line.LINE490 bus1=471.1.2.3.4 bus2=491.1.2.3.4 phases=4 linecode=LC1 length=8.6145 units=m

New Line.LINE496 bus1=479.1.2.3.4 bus2=497.1.2.3.4 phases=4 linecode=LC1 length=9.7055 units=m

New Line.LINE497 bus1=479.1.2.3.4 bus2=498.1.2.3.4 phases=4 linecode=LC1 length=9.7055 units=m

New Line.LINE507 bus1=490.1.2.3.4 bus2=508.1.2.3.4 phases=4 linecode=LC1 length=8.945 units=m

New Line.LINE508 bus1=490.1.2.3.4 bus2=509.1.2.3.4 phases=4 linecode=LC1 length=8.945 units=m

New Line.LINE514 bus1=497.1.2.3.4 bus2=515.1.2.3.4 phases=4 linecode=LC1 length=9.8599 units=m

New Line.LINE515 bus1=497.1.2.3.4 bus2=516.1.2.3.4 phases=4 linecode=LC1 length=9.8599 units=m

New Line.LINE564 bus1=548.1.2.3.4 bus2=565.1.2.3.4 phases=4 linecode=LC1 length=9.3258 units=m

New Line.LINE565 bus1=548.1.2.3.4 bus2=566.1.2.3.4 phases=4 linecode=LC1 length=9.3258 units=m

New Line.LINE582 bus1=565.1.2.3.4 bus2=583.1.2.3.4 phases=4 linecode=LC1 length=9.8126 units=m

New Line.LINE583 bus1=565.1.2.3.4 bus2=584.1.2.3.4 phases=4 linecode=LC1 length=9.8126 units=m

New Line.LINE641 bus1=629.1.2.3.4 bus2=642.1.2.3.4 phases=4 linecode=LC9 length=3.4195 units=m

New Line.LINE676 bus1=661.1.2.3.4 bus2=677.1.2.3.4 phases=4 linecode=LC1 length=6.6508 units=m

New Line.LINE838 bus1=827.1.2.3.4 bus2=839.1.2.3.4 phases=4 linecode=LC1 length=6.4628 units=m

New Line.LINE884 bus1=874.1.2.3.4 bus2=885.1.2.3.4 phases=4 linecode=LC1 length=6.3433 units=m

New Line.LINE919 bus1=909.1.2.3.4 bus2=920.1.2.3.4 phases=4 linecode=LC1 length=7.5928 units=m

New Line.LINE935 bus1=925.1.2.3.4 bus2=936.1.2.3.4 phases=4 linecode=LC1 length=6.3524 units=m

New Line.LINE949 bus1=939.1.2.3.4 bus2=950.1.2.3.4 phases=4 linecode=LC1 length=6.6863 units=m

New Line.LINE955 bus1=944.1.2.3.4 bus2=956.1.2.3.4 phases=4 linecode=LC1 length=5.4511 units=m

New Line.LINE974 bus1=964.1.2.3.4 bus2=975.1.2.3.4 phases=4 linecode=LC1 length=7.2033 units=m

New Line.LINE978 bus1=967.1.2.3.4 bus2=979.1.2.3.4 phases=4 linecode=LC1 length=5.7039 units=m

New Line.LINE994 bus1=984.1.2.3.4 bus2=995.1.2.3.4 phases=4 linecode=LC1 length=6.4702 units=m

New Line.LINE1096 bus1=1086.1.2.3.4 bus2=1097.1.2.3.4 phases=4 linecode=LC1 length=5.1995 units=m

New Line.LINE1160 bus1=1156.1.2.3.4 bus2=1161.1.2.3.4 phases=4 linecode=LC1 length=7.4925 units=m

New Line.LINE1176 bus1=1171.1.2.3.4 bus2=1177.1.2.3.4 phases=4 linecode=LC1 length=7.0395 units=m
