! Reduced enabled lines.

New Line._virtual_line0_line1_line2_line3_line4 bus1=sourcebus.1.2.3.4 bus2=5.1.2.3.4 phases=4 linecode=LC8 length=2.022096 units=m
! reduced_from=line0,line1,line2,line3,line4
! eliminated_buses=1,2,3,4

New Line._virtual_line10_line17_line18_line19_line20_line21_line22_line23_line24_line25_line26_line27_line28_line29_line30_line31_line32_line33_line34_line35_line36_line37_line38_line39_line40_line41_line42_line43_line44_line45_line46_line47_line48_line49_line50_line51_line52_line53_line54_line55_line56_line57_line58_line59_line60_line61_line62_line63_line64_line65_line66_line67_line68_line69_line70_line71_line72_line73_line74_line75_line76_line77 bus1=78.1.2.3.4 bus2=9.1.2.3.4 phases=4 linecode=LC8 length=86.664429 units=m
! reduced_from=line10,line17,line18,line19,line20,line21,line22,line23,line24,line25,line26,line27,line28,line29,line30,line31,line32,line33,line34,line35,line36,line37,line38,line39,line40,line41,line42,line43,line44,line45,line46,line47,line48,line49,line50,line51,line52,line53,line54,line55,line56,line57,line58,line59,line60,line61,line62,line63,line64,line65,line66,line67,line68,line69,line70,line71,line72,line73,line74,line75,line76,line77
! eliminated_buses=11,18,19,20,21,22,23,24,25,26,27,28,29,30,31,32,33,34,35,36,37,38,39,40,41,42,43,44,45,46,47,48,49,50,51,52,53,54,55,56,57,58,59,60,61,62,63,64,65,66,67,68,69,70,71,72,73,74,75,76,77

New Line._virtual_line78_line81_line84_line88 bus1=89.1.2.3.4 bus2=78.1.2.3.4 phases=4 linecode=LC6 length=7.87651 units=m
! reduced_from=line78,line81,line84,line88
! eliminated_buses=79,82,85

New Line._virtual_line80_line83 bus1=84.1.2.3.4 bus2=78.1.2.3.4 phases=4 linecode=LC8 length=20.7308 units=m
! reduced_from=line80,line83
! eliminated_buses=81

New Line._virtual_line86_line90_line95_line100_line106_line113_line118_line124 bus1=125.1.2.3.4 bus2=84.1.2.3.4 phases=4 linecode=LC6 length=10.86948 units=m
! reduced_from=line86,line90,line95,line100,line106,line113,line118,line124
! eliminated_buses=87,91,96,101,107,114,119

New Line._virtual_line87_line91 bus1=92.1.2.3.4 bus2=84.1.2.3.4 phases=4 linecode=LC8 length=3.3971 units=m
! reduced_from=line87,line91
! eliminated_buses=88

New Line._virtual_line92_line98_line104_line111_line117 bus1=89.1.2.3.4 bus2=118.1.2.3.4 phases=4 linecode=LC6 length=6.03005 units=m
! reduced_from=line92,line98,line104,line111,line117
! eliminated_buses=93,99,105,112

New Line._virtual_line96_line101_line107_line114_line119_line125_line130_line134_line138_line143_line148_line151_line154_line157_line160_line163 bus1=92.1.2.3.4 bus2=164.1.2.3.4 phases=4 linecode=LC5 length=26.93008 units=m
! reduced_from=line96,line101,line107,line114,line119,line125,line130,line134,line138,line143,line148,line151,line154,line157,line160,line163
! eliminated_buses=97,102,108,115,120,126,131,135,139,144,149,152,155,158,161

New Line._virtual_line97_line103_line110_line116_line121_line127_line132_line136 bus1=92.1.2.3.4 bus2=137.1.2.3.4 phases=4 linecode=LC8 length=14.55352 units=m
! reduced_from=line97,line103,line110,line116,line121,line127,line132,line136
! eliminated_buses=98,104,111,117,122,128,133

New Line._virtual_line128_line133_line137_line142_line147 bus1=148.1.2.3.4 bus2=125.1.2.3.4 phases=4 linecode=LC6 length=9.84843 units=m
! reduced_from=line128,line133,line137,line142,line147
! eliminated_buses=129,134,138,143

New Line._virtual_line140_line145_line149_line152_line155_line158_line161_line164_line167_line170_line173 bus1=137.1.2.3.4 bus2=174.1.2.3.4 phases=4 linecode=LC3 length=32.17886 units=m
! reduced_from=line140,line145,line149,line152,line155,line158,line161,line164,line167,line170,line173
! eliminated_buses=141,146,150,153,156,159,162,165,168,171

New Line._virtual_line176_line180_line183_line187_line191_line195_line199_line204_line210_line215_line221 bus1=174.1.2.3.4 bus2=222.1.2.3.4 phases=4 linecode=LC3 length=10.90282 units=m
! reduced_from=line176,line180,line183,line187,line191,line195,line199,line204,line210,line215,line221
! eliminated_buses=177,181,184,188,192,196,200,205,211,216

New Line._virtual_line177_line181 bus1=174.1.2.3.4 bus2=182.1.2.3.4 phases=4 linecode=LC3 length=5.9013 units=m
! reduced_from=line177,line181
! eliminated_buses=178

New Line._virtual_line184_line188_line192_line196 bus1=197.1.2.3.4 bus2=182.1.2.3.4 phases=4 linecode=LC3 length=16.6036 units=m
! reduced_from=line184,line188,line192,line196
! eliminated_buses=185,189,193

New Line._virtual_line185_line189_line193_line197_line202 bus1=203.1.2.3.4 bus2=182.1.2.3.4 phases=4 linecode=LC6 length=6.82408 units=m
! reduced_from=line185,line189,line193,line197,line202
! eliminated_buses=186,190,194,198

New Line._virtual_line200_line205_line211 bus1=197.1.2.3.4 bus2=212.1.2.3.4 phases=4 linecode=LC3 length=9.8513 units=m
! reduced_from=line200,line205,line211
! eliminated_buses=201,206

New Line._virtual_line201_line206_line212_line218_line225_line233_line241_line249_line258 bus1=259.1.2.3.4 bus2=197.1.2.3.4 phases=4 linecode=LC6 length=11.23332 units=m
! reduced_from=line201,line206,line212,line218,line225,line233,line241,line249,line258
! eliminated_buses=202,207,213,219,226,234,242,250

New Line._virtual_line207_line213_line219_line226_line234 bus1=203.1.2.3.4 bus2=235.1.2.3.4 phases=4 linecode=LC6 length=12.25578 units=m
! reduced_from=line207,line213,line219,line226,line234
! eliminated_buses=208,214,220,227

New Line._virtual_line217_line224_line232_line240_line248_line257_line268_line278 bus1=279.1.2.3.4 bus2=212.1.2.3.4 phases=4 linecode=LC2 length=10.57727 units=m
! reduced_from=line217,line224,line232,line240,line248,line257,line268,line278
! eliminated_buses=218,225,233,241,249,258,269

New Line._virtual_line222_line230_line238 bus1=239.1.2.3.4 bus2=217.1.2.3.4 phases=4 linecode=LC3 length=17.7504 units=m
! reduced_from=line222,line230,line238
! eliminated_buses=223,231

New Line._virtual_line223_line231_line239_line247_line256 bus1=257.1.2.3.4 bus2=217.1.2.3.4 phases=4 linecode=LC6 length=7.19769 units=m
! reduced_from=line223,line231,line239,line247,line256
! eliminated_buses=224,232,240,248

New Line._virtual_line228_line235_line242_line250 bus1=222.1.2.3.4 bus2=251.1.2.3.4 phases=4 linecode=LC3 length=17.2308 units=m
! reduced_from=line228,line235,line242,line250
! eliminated_buses=229,236,243

New Line._virtual_line229_line237_line244_line252_line262_line273 bus1=274.1.2.3.4 bus2=222.1.2.3.4 phases=4 linecode=LC6 length=7.83578 units=m
! reduced_from=line229,line237,line244,line252,line262,line273
! eliminated_buses=230,238,245,253,263

New Line._virtual_line245_line253_line263_line274 bus1=239.1.2.3.4 bus2=275.1.2.3.4 phases=4 linecode=LC3 length=11.2948 units=m
! reduced_from=line245,line253,line263,line274
! eliminated_buses=246,254,264

New Line._virtual_line246_line255_line265_line276_line287_line298_line307_line317_line324_line331_line338_line344_line350_line357_line365_line371_line377_line382_line388 bus1=239.1.2.3.4 bus2=389.1.2.3.4 phases=4 linecode=LC2 length=13.95022 units=m
! reduced_from=line246,line255,line265,line276,line287,line298,line307,line317,line324,line331,line338,line344,line350,line357,line365,line371,line377,line382,line388
! eliminated_buses=247,256,266,277,288,299,308,318,325,332,339,345,351,358,366,372,378,383

New Line._virtual_line259_line269_line279_line289_line300_line308_line318 bus1=319.1.2.3.4 bus2=251.1.2.3.4 phases=4 linecode=LC3 length=15.69448 units=m
! reduced_from=line259,line269,line279,line289,line300,line308,line318
! eliminated_buses=260,270,280,290,301,309

New Line._virtual_line260_line271_line281_line291_line301 bus1=251.1.2.3.4 bus2=302.1.2.3.4 phases=4 linecode=LC6 length=7.35888 units=m
! reduced_from=line260,line271,line281,line291,line301
! eliminated_buses=261,272,282,292

New Line._virtual_line266_line277_line288_line299 bus1=257.1.2.3.4 bus2=300.1.2.3.4 phases=4 linecode=LC6 length=10.25393 units=m
! reduced_from=line266,line277,line288,line299
! eliminated_buses=267,278,289

New Line._virtual_line283_line293_line303_line312 bus1=313.1.2.3.4 bus2=274.1.2.3.4 phases=4 linecode=LC6 length=11.3592 units=m
! reduced_from=line283,line293,line303,line312
! eliminated_buses=284,294,304

New Line._virtual_line285_line294_line304_line313_line321 bus1=322.1.2.3.4 bus2=275.1.2.3.4 phases=4 linecode=LC2 length=11.12805 units=m
! reduced_from=line285,line294,line304,line313,line321
! eliminated_buses=286,295,305,314

New Line._virtual_line295_line305_line314_line322_line329_line336_line342_line348 bus1=349.1.2.3.4 bus2=287.1.2.3.4 phases=4 linecode=LC6 length=7.50826 units=m
! reduced_from=line295,line305,line314,line322,line329,line336,line342,line348
! eliminated_buses=296,306,315,323,330,337,343

New Line._virtual_line296_line306 bus1=307.1.2.3.4 bus2=287.1.2.3.4 phases=4 linecode=LC3 length=17.62997 units=m
! reduced_from=line296,line306
! eliminated_buses=297

New Line._virtual_line309_line319_line327_line334 bus1=335.1.2.3.4 bus2=302.1.2.3.4 phases=4 linecode=LC6 length=11.2402 units=m
! reduced_from=line309,line319,line327,line334
! eliminated_buses=310,320,328

New Line._virtual_line315_line323_line330_line337_line343_line349_line356_line364_line370_line376_line381_line387_line394 bus1=307.1.2.3.4 bus2=395.1.2.3.4 phases=4 linecode=LC6 length=7.343298 units=m
! reduced_from=line315,line323,line330,line337,line343,line349,line356,line364,line370,line376,line381,line387,line394
! eliminated_buses=316,324,331,338,344,350,357,365,371,377,382,388

New Line._virtual_line325_line332_line339_line345_line351 bus1=352.1.2.3.4 bus2=319.1.2.3.4 phases=4 linecode=LC3 length=18.8977 units=m
! reduced_from=line325,line332,line339,line345,line351
! eliminated_buses=326,333,340,346

New Line._virtual_line326_line333_line340_line346_line352 bus1=353.1.2.3.4 bus2=319.1.2.3.4 phases=4 linecode=LC6 length=7.49632 units=m
! reduced_from=line326,line333,line340,line346,line352
! eliminated_buses=327,334,341,347

New Line._virtual_line354_line363 bus1=349.1.2.3.4 bus2=364.1.2.3.4 phases=4 linecode=LC6 length=10.0234 units=m
! reduced_from=line354,line363
! eliminated_buses=355

New Line._virtual_line358_line366_line372_line378_line383_line389_line395 bus1=352.1.2.3.4 bus2=396.1.2.3.4 phases=4 linecode=LC6 length=7.44053 units=m
! reduced_from=line358,line366,line372,line378,line383,line389,line395
! eliminated_buses=359,367,373,379,384,390

New Line._virtual_line359_line367_line373_line379 bus1=380.1.2.3.4 bus2=352.1.2.3.4 phases=4 linecode=LC3 length=23.2682 units=m
! reduced_from=line359,line367,line373,line379
! eliminated_buses=360,368,374

New Line._virtual_line360_line368_line374_line380_line386_line393 bus1=394.1.2.3.4 bus2=353.1.2.3.4 phases=4 linecode=LC6 length=11.21992 units=m
! reduced_from=line360,line368,line374,line380,line386,line393
! eliminated_buses=361,369,375,381,387

New Line._virtual_line384_line390_line396_line403_line409_line413 bus1=414.1.2.3.4 bus2=380.1.2.3.4 phases=4 linecode=LC2 length=5.08555 units=m
! reduced_from=line384,line390,line396,line403,line409,line413
! eliminated_buses=385,391,397,404,410

New Line._virtual_line391_line397_line404_line410_line414_line419_line423_line427_line431 bus1=432.1.2.3.4 bus2=386.1.2.3.4 phases=4 linecode=LC6 length=7.53968 units=m
! reduced_from=line391,line397,line404,line410,line414,line419,line423,line427,line431
! eliminated_buses=392,398,405,411,415,420,424,428

New Line._virtual_line399_line407 bus1=395.1.2.3.4 bus2=408.1.2.3.4 phases=4 linecode=LC6 length=10.0949 units=m
! reduced_from=line399,line407
! eliminated_buses=400

New Line._virtual_line401_line408_line412_line416 bus1=417.1.2.3.4 bus2=396.1.2.3.4 phases=4 linecode=LC6 length=11.64834 units=m
! reduced_from=line401,line408,line412,line416
! eliminated_buses=402,409,413

New Line._virtual_line417_line421_line425_line429_line433_line438_line442 bus1=443.1.2.3.4 bus2=414.1.2.3.4 phases=4 linecode=LC6 length=13.147661 units=m
! reduced_from=line417,line421,line425,line429,line433,line438,line442
! eliminated_buses=418,422,426,430,434,439

New Line._virtual_line418_line422_line426_line430_line434_line439_line443_line446_line449_line452_line455_line458_line461_line463_line465_line467 bus1=414.1.2.3.4 bus2=468.1.2.3.4 phases=4 linecode=LC2 length=11.43229 units=m
! reduced_from=line418,line422,line426,line430,line434,line439,line443,line446,line449,line452,line455,line458,line461,line463,line465,line467
! eliminated_buses=419,423,427,431,435,440,444,447,450,453,456,459,462,464,466

New Line._virtual_line435_line440_line444_line447_line450_line453_line456_line459_line462_line464_line466_line468_line469_line470 bus1=432.1.2.3.4 bus2=471.1.2.3.4 phases=4 linecode=LC6 length=12.75069 units=m
! reduced_from=line435,line440,line444,line447,line450,line453,line456,line459,line462,line464,line466,line468,line469,line470
! eliminated_buses=436,441,445,448,451,454,457,460,463,465,467,469,470

New Line.LINE5 bus1=5.1.2.3.4 bus2=6.1.2.3.4 phases=4 linecode=LC8 length=0.070711 units=m

New Line.LINE6 bus1=5.1.2.3.4 bus2=7.1.2.3.4 phases=4 linecode=LC1 length=16.6108 units=m

New Line.LINE7 bus1=5.1.2.3.4 bus2=8.1.2.3.4 phases=4 linecode=LC1 length=40.6871 units=m

New Line.LINE8 bus1=6.1.2.3.4 bus2=9.1.2.3.4 phases=4 linecode=LC8 length=0.063246 units=m

New Line.LINE9 bus1=6.1.2.3.4 bus2=10.1.2.3.4 phases=4 linecode=LC1 length=21.3405 units=m

New Line.LINE11 bus1=9.1.2.3.4 bus2=12.1.2.3.4 phases=4 linecode=LC1 length=23.2763 units=m

New Line.LINE12 bus1=9.1.2.3.4 bus2=13.1.2.3.4 phases=4 linecode=LC1 length=39.184 units=m

New Line.LINE13 bus1=9.1.2.3.4 bus2=14.1.2.3.4 phases=4 linecode=LC1 length=41.7386 units=m

New Line.LINE14 bus1=9.1.2.3.4 bus2=15.1.2.3.4 phases=4 linecode=LC1 length=43.9407 units=m

New Line.LINE15 bus1=9.1.2.3.4 bus2=16.1.2.3.4 phases=4 linecode=LC1 length=47.3657 units=m

New Line.LINE16 bus1=9.1.2.3.4 bus2=17.1.2.3.4 phases=4 linecode=LC1 length=50.2015 units=m

New Line.LINE93 bus1=89.1.2.3.4 bus2=94.1.2.3.4 phases=4 linecode=LC6 length=7.245 units=m

New Line.LINE122 bus1=118.1.2.3.4 bus2=123.1.2.3.4 phases=4 linecode=LC6 length=3.2956 units=m

New Line.LINE123 bus1=118.1.2.3.4 bus2=124.1.2.3.4 phases=4 linecode=LC6 length=3.2956 units=m

New Line.LINE129 bus1=125.1.2.3.4 bus2=130.1.2.3.4 phases=4 linecode=LC6 length=5.0912 units=m

New Line.LINE208 bus1=203.1.2.3.4 bus2=209.1.2.3.4 phases=4 linecode=LC6 length=4.459 units=m

New Line.LINE216 bus1=212.1.2.3.4 bus2=217.1.2.3.4 phases=4 linecode=LC3 length=7.7561 units=m

New Line.LINE267 bus1=257.1.2.3.4 bus2=268.1.2.3.4 phases=4 linecode=LC6 length=3.7119 units=m

New Line.LINE284 bus1=274.1.2.3.4 bus2=285.1.2.3.4 phases=4 linecode=LC6 length=5.989 units=m

New Line.LINE286 bus1=275.1.2.3.4 bus2=287.1.2.3.4 phases=4 linecode=LC3 length=6.6952 units=m

New Line.LINE310 bus1=302.1.2.3.4 bus2=311.1.2.3.4 phases=4 linecode=LC6 length=3.7995 units=m

New Line.LINE355 bus1=349.1.2.3.4 bus2=356.1.2.3.4 phases=4 linecode=LC6 length=4.0474 units=m

New Line.LINE361 bus1=353.1.2.3.4 bus2=362.1.2.3.4 phases=4 linecode=LC6 length=5.5935 units=m

New Line.LINE385 bus1=380.1.2.3.4 bus2=386.1.2.3.4 phases=4 linecode=LC3 length=9.0644 units=m

New Line.LINE400 bus1=395.1.2.3.4 bus2=401.1.2.3.4 phases=4 linecode=LC6 length=3.0121 units=m

New Line.LINE402 bus1=396.1.2.3.4 bus2=403.1.2.3.4 phases=4 linecode=LC6 length=6.4784 units=m

New Line.LINE436 bus1=432.1.2.3.4 bus2=437.1.2.3.4 phases=4 linecode=LC6 length=5.4489 units=m
