! Reduced enabled lines.

New Line._virtual_line0_line1_line2_line3_line4_line5_line6_line7_line8_line9_line10_line11_line12_line13_line14_line15_line16_line17_line18_line19_line20_line21_line22_line23_line24_line25_line26_line27_line28_line29_line30_line31_line32_line33_line34_line35_line36_line37_line38_line39_line40_line41_line42_line43_line44_line45_line46_line47_line48_line49_line50_line51_line52_line53_line54_line55_line56_line57_line58_line59_line60_line61_line63_line65_line67_line69_line71_line73_line75_line77_line79_line81_line83_line84_line85_line86_line87_line88_line89_line90_line91_line92_line93_line94_line95_line96_line97_line98_line99_line100_line101_line102_line103_line104_line105_line106_line107_line108_line109_line110_line111_line112_line113_line114_line115_line116_line117_line118_line119_line120_line121_line122_line123_line124_line125_line126_line127_line128_line129_line130_line131_line132_line133_line134_line135_line136_line137_line138_line139_line140_line141_line142_line143_line144_line145_line146_line147_line148_line149_line150_line151_line152 bus1=sourcebus.1.2.3.4 bus2=153.1.2.3.4 phases=4 linecode=LC8 length=193.989151 units=m
! reduced_from=line0,line1,line2,line3,line4,line5,line6,line7,line8,line9,line10,line11,line12,line13,line14,line15,line16,line17,line18,line19,line20,line21,line22,line23,line24,line25,line26,line27,line28,line29,line30,line31,line32,line33,line34,line35,line36,line37,line38,line39,line40,line41,line42,line43,line44,line45,line46,line47,line48,line49,line50,line51,line52,line53,line54,line55,line56,line57,line58,line59,line60,line61,line63,line65,line67,line69,line71,line73,line75,line77,line79,line81,line83,line84,line85,line86,line87,line88,line89,line90,line91,line92,line93,line94,line95,line96,line97,line98,line99,line100,line101,line102,line103,line104,line105,line106,line107,line108,line109,line110,line111,line112,line113,line114,line115,line116,line117,line118,line119,line120,line121,line122,line123,line124,line125,line126,line127,line128,line129,line130,line131,line132,line133,line134,line135,line136,line137,line138,line139,line140,line141,line142,line143,line144,line145,line146,line147,line148,line149,line150,line151,line152
! eliminated_buses=1,2,3,4,5,6,7,8,9,10,11,12,13,14,15,16,17,18,19,20,21,22,23,24
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
New Line._virtual_line153_line155_line157_line159_line162_line166_line170_line174_line178_line182_line187_line192_line197_line201 bus1=202.1.2.3.4 bus2=153.1.2.3.4 phases=4 linecode=LC6 length=9.706681 units=m
! reduced_from=line153,line155,line157,line159,line162,line166,line170,line174,line178,line182,line187,line192,line197,line201
! eliminated_buses=154,156,158,160,163,167,171,175,179,183,188,193,198

New Line._virtual_line154_line156_line158 bus1=159.1.2.3.4 bus2=153.1.2.3.4 phases=4 linecode=LC8 length=6.07878 units=m
! reduced_from=line154,line156,line158
! eliminated_buses=155,157

New Line._virtual_line160_line163_line167_line171_line175_line179_line183_line188_line193 bus1=159.1.2.3.4 bus2=194.1.2.3.4 phases=4 linecode=LC6 length=10.62451 units=m
! reduced_from=line160,line163,line167,line171,line175,line179,line183,line188,line193
! eliminated_buses=161,164,168,172,176,180,184,189

New Line._virtual_line164_line168_line172_line176_line180 bus1=162.1.2.3.4 bus2=181.1.2.3.4 phases=4 linecode=LC4 length=2.44 units=m
! reduced_from=line164,line168,line172,line176,line180
! eliminated_buses=165,169,173,177

New Line._virtual_line165_line169_line173_line177_line181_line186_line191_line196_line200_line205_line209_line214_line220_line228_line236_line244_line252_line260_line268_line277 bus1=162.1.2.3.4 bus2=278.1.2.3.4 phases=4 linecode=LC8 length=18.47777 units=m
! reduced_from=line165,line169,line173,line177,line181,line186,line191,line196,line200,line205,line209,line214,line220,line228,line236,line244,line252,line260,line268,line277
! eliminated_buses=166,170,174,178,182,187,192,197,201,206,210,215,221,229,237,245,253,261,269

New Line._virtual_line184_line189_line194_line198_line202_line206_line210_line215_line221_line229_line237 bus1=181.1.2.3.4 bus2=238.1.2.3.4 phases=4 linecode=LC6 length=10.5311 units=m
! reduced_from=line184,line189,line194,line198,line202,line206,line210,line215,line221,line229,line237
! eliminated_buses=185,190,195,199,203,207,211,216,222,230

New Line._virtual_line185_line190_line195_line199 bus1=200.1.2.3.4 bus2=181.1.2.3.4 phases=4 linecode=LC4 length=15.1721 units=m
! reduced_from=line185,line190,line195,line199
! eliminated_buses=186,191,196

New Line._virtual_line203_line207_line211_line216_line222_line230_line238_line245_line253_line261_line269_line278_line288 bus1=289.1.2.3.4 bus2=200.1.2.3.4 phases=4 linecode=LC6 length=11.48538 units=m
! reduced_from=line203,line207,line211,line216,line222,line230,line238,line245,line253,line261,line269,line278,line288
! eliminated_buses=204,208,212,217,223,231,239,246,254,262,270,279

New Line._virtual_line204_line208 bus1=209.1.2.3.4 bus2=200.1.2.3.4 phases=4 linecode=LC4 length=3.37048 units=m
! reduced_from=line204,line208
! eliminated_buses=205

New Line._virtual_line212_line217_line223_line231_line239_line246_line254_line262_line270_line279_line289_line299_line308_line316 bus1=209.1.2.3.4 bus2=317.1.2.3.4 phases=4 linecode=LC6 length=11.794562 units=m
! reduced_from=line212,line217,line223,line231,line239,line246,line254,line262,line270,line279,line289,line299,line308,line316
! eliminated_buses=213,218,224,232,240,247,255,263,271,280,290,300,309

New Line._virtual_line213_line219_line227 bus1=209.1.2.3.4 bus2=228.1.2.3.4 phases=4 linecode=LC4 length=9.3246 units=m
! reduced_from=line213,line219,line227
! eliminated_buses=214,220

New Line._virtual_line234_line242_line249_line257_line265_line273_line282_line291_line300_line309_line317_line326_line335_line345_line356 bus1=228.1.2.3.4 bus2=357.1.2.3.4 phases=4 linecode=LC6 length=13.84046 units=m
! reduced_from=line234,line242,line249,line257,line265,line273,line282,line291,line300,line309,line317,line326,line335,line345,line356
! eliminated_buses=235,243,250,258,266,274,283,292,301,310,318,327,336,346

New Line._virtual_line235_line243 bus1=228.1.2.3.4 bus2=244.1.2.3.4 phases=4 linecode=LC4 length=7.7822 units=m
! reduced_from=line235,line243
! eliminated_buses=236

New Line._virtual_line250_line258_line266_line274_line283_line292_line301 bus1=302.1.2.3.4 bus2=244.1.2.3.4 phases=4 linecode=LC6 length=11.97909 units=m
! reduced_from=line250,line258,line266,line274,line283,line292,line301
! eliminated_buses=251,259,267,275,284,293

New Line._virtual_line251_line259_line267 bus1=244.1.2.3.4 bus2=268.1.2.3.4 phases=4 linecode=LC4 length=8.0187 units=m
! reduced_from=line251,line259,line267
! eliminated_buses=252,260

New Line._virtual_line275_line284_line293_line302_line310_line318_line327_line336_line346_line357 bus1=268.1.2.3.4 bus2=358.1.2.3.4 phases=4 linecode=LC6 length=10.85461 units=m
! reduced_from=line275,line284,line293,line302,line310,line318,line327,line336,line346,line357
! eliminated_buses=276,285,294,303,311,319,328,337,347

New Line._virtual_line276_line285 bus1=286.1.2.3.4 bus2=268.1.2.3.4 phases=4 linecode=LC4 length=7.0987 units=m
! reduced_from=line276,line285
! eliminated_buses=277

New Line._virtual_line286_line296_line305_line313_line321_line330_line339_line350 bus1=278.1.2.3.4 bus2=351.1.2.3.4 phases=4 linecode=LC6 length=4.57191 units=m
! reduced_from=line286,line296,line305,line313,line321,line330,line339,line350
! eliminated_buses=287,297,306,314,322,331,340

New Line._virtual_line287_line298_line307_line315 bus1=316.1.2.3.4 bus2=278.1.2.3.4 phases=4 linecode=LC8 length=14.8283 units=m
! reduced_from=line287,line298,line307,line315
! eliminated_buses=288,299,308

New Line._virtual_line294_line303_line311_line319_line328_line337_line347_line358_line369_line379_line390_line401_line413_line424_line434 bus1=435.1.2.3.4 bus2=286.1.2.3.4 phases=4 linecode=LC6 length=8.23734 units=m
! reduced_from=line294,line303,line311,line319,line328,line337,line347,line358,line369,line379,line390,line401,line413,line424,line434
! eliminated_buses=295,304,312,320,329,338,348,359,370,380,391,402,414,425

New Line._virtual_line295_line304_line312_line320_line329_line338 bus1=286.1.2.3.4 bus2=339.1.2.3.4 phases=4 linecode=LC4 length=13.70521 units=m
! reduced_from=line295,line304,line312,line320,line329,line338
! eliminated_buses=296,305,313,321,330

New Line._virtual_line323_line332_line341_line352_line364_line374_line384_line395 bus1=396.1.2.3.4 bus2=316.1.2.3.4 phases=4 linecode=LC6 length=9.4663 units=m
! reduced_from=line323,line332,line341,line352,line364,line374,line384,line395
! eliminated_buses=324,333,342,353,365,375,385

New Line._virtual_line324_line333_line342_line353_line365_line375_line385_line396_line407 bus1=408.1.2.3.4 bus2=316.1.2.3.4 phases=4 linecode=LC6 length=8.37834 units=m
! reduced_from=line324,line333,line342,line353,line365,line375,line385,line396,line407
! eliminated_buses=325,334,343,354,366,376,386,397

New Line._virtual_line325_line334 bus1=316.1.2.3.4 bus2=335.1.2.3.4 phases=4 linecode=LC8 length=9.3985 units=m
! reduced_from=line325,line334
! eliminated_buses=326

New Line._virtual_line343_line354_line366_line376_line386_line397_line408_line419 bus1=335.1.2.3.4 bus2=420.1.2.3.4 phases=4 linecode=LC6 length=9.25792 units=m
! reduced_from=line343,line354,line366,line376,line386,line397,line408,line419
! eliminated_buses=344,355,367,377,387,398,409

New Line._virtual_line344_line355 bus1=356.1.2.3.4 bus2=335.1.2.3.4 phases=4 linecode=LC8 length=6.8716 units=m
! reduced_from=line344,line355
! eliminated_buses=345

New Line._virtual_line348_line359_line370_line380_line391_line402_line414_line425_line435_line446_line458_line470_line482_line493_line503 bus1=504.1.2.3.4 bus2=339.1.2.3.4 phases=4 linecode=LC6 length=11.97728 units=m
! reduced_from=line348,line359,line370,line380,line391,line402,line414,line425,line435,line446,line458,line470,line482,line493,line503
! eliminated_buses=349,360,371,381,392,403,415,426,436,447,459,471,483,494

New Line._virtual_line349_line360_line371_line381_line392 bus1=339.1.2.3.4 bus2=393.1.2.3.4 phases=4 linecode=LC4 length=14.7358 units=m
! reduced_from=line349,line360,line371,line381,line392
! eliminated_buses=350,361,372,382

New Line._virtual_line361_line372_line382_line393_line405_line417_line428_line438_line450_line462_line474_line486_line497 bus1=498.1.2.3.4 bus2=351.1.2.3.4 phases=4 linecode=LC6 length=8.997232 units=m
! reduced_from=line361,line372,line382,line393,line405,line417,line428,line438,line450,line462,line474,line486,line497
! eliminated_buses=362,373,383,394,406,418,429,439,451,463,475,487

New Line._virtual_line367_line377_line387_line398_line409_line420_line430 bus1=356.1.2.3.4 bus2=431.1.2.3.4 phases=4 linecode=LC6 length=9.70275 units=m
! reduced_from=line367,line377,line387,line398,line409,line420,line430
! eliminated_buses=368,378,388,399,410,421

New Line._virtual_line368_line378 bus1=356.1.2.3.4 bus2=379.1.2.3.4 phases=4 linecode=LC8 length=7.5882 units=m
! reduced_from=line368,line378
! eliminated_buses=369

New Line._virtual_line388_line399_line410_line421_line431_line440_line452_line464_line476_line488_line499_line508_line516_line523_line530_line539 bus1=379.1.2.3.4 bus2=540.1.2.3.4 phases=4 linecode=LC6 length=10.54743 units=m
! reduced_from=line388,line399,line410,line421,line431,line440,line452,line464,line476,line488,line499,line508,line516,line523,line530,line539
! eliminated_buses=389,400,411,422,432,441,453,465,477,489,500,509,517,524,531

New Line._virtual_line389_line400 bus1=379.1.2.3.4 bus2=401.1.2.3.4 phases=4 linecode=LC8 length=6.0032 units=m
! reduced_from=line389,line400
! eliminated_buses=390

New Line._virtual_line403_line415_line426_line436_line447_line459_line471_line483_line494 bus1=393.1.2.3.4 bus2=495.1.2.3.4 phases=4 linecode=LC6 length=11.28404 units=m
! reduced_from=line403,line415,line426,line436,line447,line459,line471,line483,line494
! eliminated_buses=404,416,427,437,448,460,472,484

New Line._virtual_line404_line416_line427_line437 bus1=438.1.2.3.4 bus2=393.1.2.3.4 phases=4 linecode=LC4 length=6.30795 units=m
! reduced_from=line404,line416,line427,line437
! eliminated_buses=405,417,428

New Line._virtual_line411_line422_line432_line441_line453_line465_line477 bus1=401.1.2.3.4 bus2=478.1.2.3.4 phases=4 linecode=LC6 length=9.01704 units=m
! reduced_from=line411,line422,line432,line441,line453,line465,line477
! eliminated_buses=412,423,433,442,454,466

New Line._virtual_line412_line423_line433 bus1=434.1.2.3.4 bus2=401.1.2.3.4 phases=4 linecode=LC8 length=8.47224 units=m
! reduced_from=line412,line423,line433
! eliminated_buses=413,424

New Line._virtual_line442_line454_line466_line478_line489_line500_line509 bus1=434.1.2.3.4 bus2=510.1.2.3.4 phases=4 linecode=LC6 length=12.421109 units=m
! reduced_from=line442,line454,line466,line478,line489,line500,line509
! eliminated_buses=443,455,467,479,490,501

New Line._virtual_line443_line456_line468_line480_line491_line502_line511 bus1=434.1.2.3.4 bus2=512.1.2.3.4 phases=4 linecode=LC8 length=23.82586 units=m
! reduced_from=line443,line456,line468,line480,line491,line502,line511
! eliminated_buses=444,457,469,481,492,503

New Line._virtual_line444_line457_line469_line481_line492 bus1=493.1.2.3.4 bus2=435.1.2.3.4 phases=4 linecode=LC6 length=13.60291 units=m
! reduced_from=line444,line457,line469,line481,line492
! eliminated_buses=445,458,470,482

New Line._virtual_line448_line460_line472_line484_line495_line504_line512 bus1=513.1.2.3.4 bus2=438.1.2.3.4 phases=4 linecode=LC6 length=9.5617 units=m
! reduced_from=line448,line460,line472,line484,line495,line504,line512
! eliminated_buses=449,461,473,485,496,505

New Line._virtual_line449_line461_line473_line485_line496 bus1=497.1.2.3.4 bus2=438.1.2.3.4 phases=4 linecode=LC4 length=9.45138 units=m
! reduced_from=line449,line461,line473,line485,line496
! eliminated_buses=450,462,474,486

New Line._virtual_line505_line513_line520_line527_line536_line545_line551_line558_line565_line572_line579_line587_line595_line602_line610_line618_line625 bus1=497.1.2.3.4 bus2=626.1.2.3.4 phases=4 linecode=LC6 length=12.37528 units=m
! reduced_from=line505,line513,line520,line527,line536,line545,line551,line558,line565,line572,line579,line587,line595,line602,line610,line618,line625
! eliminated_buses=506,514,521,528,537,546,552,559,566,573,580,588,596,603,611,619

New Line._virtual_line506_line514_line521_line528_line537_line546_line552_line559_line566_line573_line580_line588_line596 bus1=497.1.2.3.4 bus2=597.1.2.3.4 phases=4 linecode=LC4 length=18.447758 units=m
! reduced_from=line506,line514,line521,line528,line537,line546,line552,line559,line566,line573,line580,line588,line596
! eliminated_buses=507,515,522,529,538,547,553,560,567,574,581,589

New Line._virtual_line518_line525_line532_line541_line548_line554_line561_line568_line575_line582_line590_line598_line606_line613_line621 bus1=622.1.2.3.4 bus2=512.1.2.3.4 phases=4 linecode=LC6 length=7.39116 units=m
! reduced_from=line518,line525,line532,line541,line548,line554,line561,line568,line575,line582,line590,line598,line606,line613,line621
! eliminated_buses=519,526,533,542,549,555,562,569,576,583,591,599,607,614

New Line._virtual_line519_line526_line535_line544_line550 bus1=551.1.2.3.4 bus2=512.1.2.3.4 phases=4 linecode=LC8 length=5.959702 units=m
! reduced_from=line519,line526,line535,line544,line550
! eliminated_buses=520,527,536,545

New Line._virtual_line556_line563_line570_line577_line584_line592_line600_line608 bus1=609.1.2.3.4 bus2=551.1.2.3.4 phases=4 linecode=LC6 length=5.92105 units=m
! reduced_from=line556,line563,line570,line577,line584,line592,line600,line608
! eliminated_buses=557,564,571,578,585,593,601

New Line._virtual_line557_line564_line571_line578_line586_line594_line601_line609_line617_line624_line632_line638_line644_line649_line654_line659_line664_line669_line676_line682_line687_line692_line698_line702_line706_line710_line715_line720_line725_line730_line735_line741_line746_line751_line757_line763_line768_line773_line779_line785_line791_line797_line803_line808_line812_line817_line822_line828_line833_line838_line843_line848_line853_line858_line863_line868_line873_line878_line883_line888_line892_line898_line901_line903_line905_line907 bus1=551.1.2.3.4 bus2=908.1.2.3.4 phases=4 linecode=LC8 length=73.68216 units=m
! reduced_from=line557,line564,line571,line578,line586,line594,line601,line609,line617,line624,line632,line638,line644,line649,line654,line659,line664,line669,line676,line682,line687,line692,line698,line702,line706,line710,line715,line720,line725,line730,line735,line741,line746,line751,line757,line763,line768,line773,line779,line785,line791,line797,line803,line808,line812,line817,line822,line828,line833,line838,line843,line848,line853,line858,line863,line868,line873,line878,line883,line888,line892,line898,line901,line903,line905,line907
! eliminated_buses=558,565,572,579,587,595,602,610,618,625,633,639,645,650,655,660,665,670,677,683,688,693,699,703,707,711,716,721,726,731,736,742,747,752,758,764,769,774,780,786,792,798,804,809,813,818,823,829,834,839,844,849,854,859,864,869,874,879,884,889,893,899,902,904,906

New Line._virtual_line603_line611_line619_line626_line633_line639_line645_line650_line655_line660_line665 bus1=597.1.2.3.4 bus2=666.1.2.3.4 phases=4 linecode=LC6 length=6.872469 units=m
! reduced_from=line603,line611,line619,line626,line633,line639,line645,line650,line655,line660,line665
! eliminated_buses=604,612,620,627,634,640,646,651,656,661

New Line._virtual_line604_line612_line620_line627_line634_line640_line646_line651_line656_line661_line666 bus1=597.1.2.3.4 bus2=667.1.2.3.4 phases=4 linecode=LC4 length=8.16431 units=m
! reduced_from=line604,line612,line620,line627,line634,line640,line646,line651,line656,line661,line666
! eliminated_buses=605,613,621,628,635,641,647,652,657,662

New Line._virtual_line615_line623_line631_line637_line643_line648_line653_line658_line663_line668_line675_line681 bus1=609.1.2.3.4 bus2=682.1.2.3.4 phases=4 linecode=LC6 length=13.85787 units=m
! reduced_from=line615,line623,line631,line637,line643,line648,line653,line658,line663,line668,line675,line681
! eliminated_buses=616,624,632,638,644,649,654,659,664,669,676

New Line._virtual_line628_line635_line641_line647_line652_line657_line662_line667_line674_line680_line686_line691_line697 bus1=698.1.2.3.4 bus2=622.1.2.3.4 phases=4 linecode=LC6 length=13.17317 units=m
! reduced_from=line628,line635,line641,line647,line652,line657,line662,line667,line674,line680,line686,line691,line697
! eliminated_buses=629,636,642,648,653,658,663,668,675,681,687,692

New Line._virtual_line670_line677_line683_line688_line693 bus1=666.1.2.3.4 bus2=694.1.2.3.4 phases=4 linecode=LC6 length=14.30296 units=m
! reduced_from=line670,line677,line683,line688,line693
! eliminated_buses=671,678,684,689

New Line._virtual_line672_line678_line684_line689_line694_line699_line703_line707_line711_line716_line721_line726_line731_line736_line742_line747_line752_line758 bus1=667.1.2.3.4 bus2=759.1.2.3.4 phases=4 linecode=LC6 length=16.556189 units=m
! reduced_from=line672,line678,line684,line689,line694,line699,line703,line707,line711,line716,line721,line726,line731,line736,line742,line747,line752,line758
! eliminated_buses=673,679,685,690,695,700,704,708,712,717,722,727,732,737,743,748,753

New Line._virtual_line673_line679_line685_line690 bus1=691.1.2.3.4 bus2=667.1.2.3.4 phases=4 linecode=LC4 length=10.35697 units=m
! reduced_from=line673,line679,line685,line690
! eliminated_buses=674,680,686

New Line._virtual_line695_line700_line704_line708_line712_line717_line722_line727_line732_line737 bus1=691.1.2.3.4 bus2=738.1.2.3.4 phases=4 linecode=LC6 length=12.49148 units=m
! reduced_from=line695,line700,line704,line708,line712,line717,line722,line727,line732,line737
! eliminated_buses=696,701,705,709,713,718,723,728,733

New Line._virtual_line696_line701_line705_line709 bus1=710.1.2.3.4 bus2=691.1.2.3.4 phases=4 linecode=LC4 length=9.2899 units=m
! reduced_from=line696,line701,line705,line709
! eliminated_buses=697,702,706

New Line._virtual_line713_line718_line723_line728_line733_line738_line743_line748_line753_line759_line764_line769_line774_line780_line786 bus1=787.1.2.3.4 bus2=710.1.2.3.4 phases=4 linecode=LC6 length=15.596892 units=m
! reduced_from=line713,line718,line723,line728,line733,line738,line743,line748,line753,line759,line764,line769,line774,line780,line786
! eliminated_buses=714,719,724,729,734,739,744,749,754,760,765,770,775,781

New Line._virtual_line714_line719_line724_line729_line734_line739_line744_line749 bus1=750.1.2.3.4 bus2=710.1.2.3.4 phases=4 linecode=LC4 length=10.7479 units=m
! reduced_from=line714,line719,line724,line729,line734,line739,line744,line749
! eliminated_buses=715,720,725,730,735,740,745

New Line._virtual_line754_line760_line765_line770 bus1=750.1.2.3.4 bus2=771.1.2.3.4 phases=4 linecode=LC4 length=7.8766 units=m
! reduced_from=line754,line760,line765,line770
! eliminated_buses=755,761,766

New Line._virtual_line755_line761_line766_line771_line777_line783_line789_line794_line800_line806 bus1=750.1.2.3.4 bus2=807.1.2.3.4 phases=4 linecode=LC6 length=10.5293 units=m
! reduced_from=line755,line761,line766,line771,line777,line783,line789,line794,line800,line806
! eliminated_buses=756,762,767,772,778,784,790,795,801

New Line._virtual_line775_line781_line787_line792_line798_line804_line809_line813_line818 bus1=771.1.2.3.4 bus2=819.1.2.3.4 phases=4 linecode=LC4 length=16.31274 units=m
! reduced_from=line775,line781,line787,line792,line798,line804,line809,line813,line818
! eliminated_buses=776,782,788,793,799,805,810,814

New Line._virtual_line776_line782_line788_line793_line799_line805_line810_line815_line820_line826_line831_line836_line842_line847_line852 bus1=771.1.2.3.4 bus2=853.1.2.3.4 phases=4 linecode=LC6 length=15.574348 units=m
! reduced_from=line776,line782,line788,line793,line799,line805,line810,line815,line820,line826,line831,line836,line842,line847,line852
! eliminated_buses=777,783,789,794,800,806,811,816,821,827,832,837,843,848

New Line._virtual_line823_line829_line834_line839_line844_line849_line854 bus1=855.1.2.3.4 bus2=819.1.2.3.4 phases=4 linecode=LC4 length=21.03911 units=m
! reduced_from=line823,line829,line834,line839,line844,line849,line854
! eliminated_buses=824,830,835,840,845,850

New Line._virtual_line824_line830_line835_line841_line846_line851 bus1=852.1.2.3.4 bus2=819.1.2.3.4 phases=4 linecode=LC6 length=7.89398 units=m
! reduced_from=line824,line830,line835,line841,line846,line851
! eliminated_buses=825,831,836,842,847

New Line._virtual_line856_line862_line867_line872_line877_line882_line887_line891_line897 bus1=852.1.2.3.4 bus2=898.1.2.3.4 phases=4 linecode=LC6 length=12.77174 units=m
! reduced_from=line856,line862,line867,line872,line877,line882,line887,line891,line897
! eliminated_buses=857,863,868,873,878,883,888,892

New Line._virtual_line859_line864_line869_line874_line879_line884_line889 bus1=855.1.2.3.4 bus2=890.1.2.3.4 phases=4 linecode=LC4 length=4.68702 units=m
! reduced_from=line859,line864,line869,line874,line879,line884,line889
! eliminated_buses=860,865,870,875,880,885

New Line._virtual_line860_line865_line870_line875_line880_line885_line890_line896_line900 bus1=901.1.2.3.4 bus2=855.1.2.3.4 phases=4 linecode=LC6 length=13.294567 units=m
! reduced_from=line860,line865,line870,line875,line880,line885,line890,line896,line900
! eliminated_buses=861,866,871,876,881,886,891,897

New Line._virtual_line894_line899_line902_line904_line906_line908_line911_line914_line917_line920 bus1=890.1.2.3.4 bus2=921.1.2.3.4 phases=4 linecode=LC6 length=19.410863 units=m
! reduced_from=line894,line899,line902,line904,line906,line908,line911,line914,line917,line920
! eliminated_buses=895,900,903,905,907,909,912,915,918

New Line._virtual_line909_line912_line915_line918_line921_line923_line926 bus1=908.1.2.3.4 bus2=927.1.2.3.4 phases=4 linecode=LC6 length=17.65571 units=m
! reduced_from=line909,line912,line915,line918,line921,line923,line926
! eliminated_buses=910,913,916,919,922,924

New Line._virtual_line910_line913_line916_line919_line922 bus1=908.1.2.3.4 bus2=923.1.2.3.4 phases=4 linecode=LC8 length=3.12358 units=m
! reduced_from=line910,line913,line916,line919,line922
! eliminated_buses=911,914,917,920

New Line._virtual_line924_line927_line931_line934_line937_line941_line945_line950_line956_line963_line970_line977_line984_line993_line1001_line1009_line1017_line1025_line1033_line1042 bus1=923.1.2.3.4 bus2=1043.1.2.3.4 phases=4 linecode=LC4 length=10.23694 units=m
! reduced_from=line924,line927,line931,line934,line937,line941,line945,line950,line956,line963,line970,line977,line984,line993,line1001,line1009,line1017,line1025,line1033,line1042
! eliminated_buses=925,928,932,935,938,942,946,951,957,964,971,978,985,994,1002,1010,1018,1026,1034

New Line._virtual_line925_line928_line932 bus1=923.1.2.3.4 bus2=933.1.2.3.4 phases=4 linecode=LC8 length=20.2694 units=m
! reduced_from=line925,line928,line932
! eliminated_buses=926,929

New Line._virtual_line929_line933_line936_line940_line944_line949_line955_line962_line969 bus1=970.1.2.3.4 bus2=927.1.2.3.4 phases=4 linecode=LC6 length=14.21129 units=m
! reduced_from=line929,line933,line936,line940,line944,line949,line955,line962,line969
! eliminated_buses=930,934,937,941,945,950,956,963

New Line._virtual_line938_line942_line946_line951_line957_line964_line971_line978 bus1=979.1.2.3.4 bus2=936.1.2.3.4 phases=4 linecode=LC6 length=7.984511 units=m
! reduced_from=line938,line942,line946,line951,line957,line964,line971,line978
! eliminated_buses=939,943,947,952,958,965,972

New Line._virtual_line939_line943 bus1=936.1.2.3.4 bus2=944.1.2.3.4 phases=4 linecode=LC3 length=15.1772 units=m
! reduced_from=line939,line943
! eliminated_buses=940

New Line._virtual_line947_line952_line958_line965_line972_line979_line987_line995_line1003_line1011_line1019_line1027_line1035_line1043_line1052_line1061 bus1=1062.1.2.3.4 bus2=944.1.2.3.4 phases=4 linecode=LC6 length=11.110382 units=m
! reduced_from=line947,line952,line958,line965,line972,line979,line987,line995,line1003,line1011,line1019,line1027,line1035,line1043,line1052,line1061
! eliminated_buses=948,953,959,966,973,980,988,996,1004,1012,1020,1028,1036,1044,1053

New Line._virtual_line948_line954 bus1=955.1.2.3.4 bus2=944.1.2.3.4 phases=4 linecode=LC3 length=17.865 units=m
! reduced_from=line948,line954
! eliminated_buses=949

New Line._virtual_line960_line967_line974_line981_line989_line997_line1004_line1012_line1020_line1028_line1036_line1044_line1053_line1062_line1071 bus1=1072.1.2.3.4 bus2=955.1.2.3.4 phases=4 linecode=LC6 length=11.520625 units=m
! reduced_from=line960,line967,line974,line981,line989,line997,line1004,line1012,line1020,line1028,line1036,line1044,line1053,line1062,line1071
! eliminated_buses=961,968,975,982,990,998,1005,1013,1021,1029,1037,1045,1054,1063

New Line._virtual_line961_line968 bus1=969.1.2.3.4 bus2=955.1.2.3.4 phases=4 linecode=LC3 length=16.524 units=m
! reduced_from=line961,line968
! eliminated_buses=962

New Line._virtual_line975_line982_line990_line998_line1005_line1013_line1021_line1029_line1037_line1045_line1054_line1063_line1072_line1081_line1089 bus1=969.1.2.3.4 bus2=1090.1.2.3.4 phases=4 linecode=LC6 length=16.63236 units=m
! reduced_from=line975,line982,line990,line998,line1005,line1013,line1021,line1029,line1037,line1045,line1054,line1063,line1072,line1081,line1089
! eliminated_buses=976,983,991,999,1006,1014,1022,1030,1038,1046,1055,1064,1073,1082

New Line._virtual_line976_line983_line992_line1000 bus1=969.1.2.3.4 bus2=1001.1.2.3.4 phases=4 linecode=LC3 length=11.04715 units=m
! reduced_from=line976,line983,line992,line1000
! eliminated_buses=977,984,993

New Line._virtual_line985_line994_line1002_line1010_line1018_line1026_line1034 bus1=979.1.2.3.4 bus2=1035.1.2.3.4 phases=4 linecode=LC6 length=10.96995 units=m
! reduced_from=line985,line994,line1002,line1010,line1018,line1026,line1034
! eliminated_buses=986,995,1003,1011,1019,1027

New Line._virtual_line1007_line1015_line1023_line1031_line1039_line1047_line1056_line1064_line1073_line1082_line1090_line1096_line1104_line1111_line1118_line1126_line1135_line1142_line1148_line1154 bus1=1155.1.2.3.4 bus2=1001.1.2.3.4 phases=4 linecode=LC6 length=13.017698 units=m
! reduced_from=line1007,line1015,line1023,line1031,line1039,line1047,line1056,line1064,line1073,line1082,line1090,line1096,line1104,line1111,line1118,line1126,line1135,line1142,line1148,line1154
! eliminated_buses=1008,1016,1024,1032,1040,1048,1057,1065,1074,1083,1091,1097,1105,1112,1119,1127,1136,1143,1149

New Line._virtual_line1008_line1016_line1024_line1032 bus1=1001.1.2.3.4 bus2=1033.1.2.3.4 phases=4 linecode=LC3 length=6.68341 units=m
! reduced_from=line1008,line1016,line1024,line1032
! eliminated_buses=1009,1017,1025

New Line._virtual_line1040_line1048_line1057_line1065_line1074_line1083_line1091_line1097_line1105_line1112_line1119 bus1=1033.1.2.3.4 bus2=1120.1.2.3.4 phases=4 linecode=LC6 length=8.92485 units=m
! reduced_from=line1040,line1048,line1057,line1065,line1074,line1083,line1091,line1097,line1105,line1112,line1119
! eliminated_buses=1041,1049,1058,1066,1075,1084,1092,1098,1106,1113

New Line._virtual_line1041_line1049 bus1=1033.1.2.3.4 bus2=1050.1.2.3.4 phases=4 linecode=LC3 length=1.8036 units=m
! reduced_from=line1041,line1049
! eliminated_buses=1042

New Line._virtual_line1050_line1059_line1067_line1076_line1085_line1093 bus1=1043.1.2.3.4 bus2=1094.1.2.3.4 phases=4 linecode=LC6 length=7.12612 units=m
! reduced_from=line1050,line1059,line1067,line1076,line1085,line1093
! eliminated_buses=1051,1060,1068,1077,1086

New Line._virtual_line1051_line1060_line1068_line1077_line1087_line1095 bus1=1043.1.2.3.4 bus2=1096.1.2.3.4 phases=4 linecode=LC4 length=20.0013 units=m
! reduced_from=line1051,line1060,line1068,line1077,line1087,line1095
! eliminated_buses=1052,1061,1069,1078,1088

New Line._virtual_line1058_line1066_line1075_line1084_line1092_line1098_line1106_line1113_line1120_line1129_line1137_line1143_line1149_line1155_line1160_line1166_line1172_line1178_line1184_line1190_line1197 bus1=1198.1.2.3.4 bus2=1050.1.2.3.4 phases=4 linecode=LC6 length=17.130835 units=m
! reduced_from=line1058,line1066,line1075,line1084,line1092,line1098,line1106,line1113,line1120,line1129,line1137,line1143,line1149,line1155,line1160,line1166,line1172,line1178,line1184,line1190,line1197
! eliminated_buses=1059,1067,1076,1085,1093,1099,1107,1114,1121,1130,1138,1144,1150,1156,1161,1167,1173,1179,1185,1191

New Line._virtual_line1069_line1078 bus1=1062.1.2.3.4 bus2=1079.1.2.3.4 phases=4 linecode=LC6 length=10.4224 units=m
! reduced_from=line1069,line1078
! eliminated_buses=1070

New Line._virtual_line1079_line1088 bus1=1072.1.2.3.4 bus2=1089.1.2.3.4 phases=4 linecode=LC6 length=10.8082 units=m
! reduced_from=line1079,line1088
! eliminated_buses=1080

New Line._virtual_line1099_line1107_line1114_line1121_line1130_line1138 bus1=1139.1.2.3.4 bus2=1094.1.2.3.4 phases=4 linecode=LC6 length=13.30455 units=m
! reduced_from=line1099,line1107,line1114,line1121,line1130,line1138
! eliminated_buses=1100,1108,1115,1122,1131

New Line._virtual_line1102_line1109_line1116_line1123_line1132_line1139_line1144_line1150_line1156_line1161_line1167_line1173_line1179_line1185 bus1=1096.1.2.3.4 bus2=1186.1.2.3.4 phases=4 linecode=LC6 length=10.40833 units=m
! reduced_from=line1102,line1109,line1116,line1123,line1132,line1139,line1144,line1150,line1156,line1161,line1167,line1173,line1179,line1185
! eliminated_buses=1103,1110,1117,1124,1133,1140,1145,1151,1157,1162,1168,1174,1180

New Line._virtual_line1103_line1110_line1117 bus1=1118.1.2.3.4 bus2=1096.1.2.3.4 phases=4 linecode=LC4 length=12.02739 units=m
! reduced_from=line1103,line1110,line1117
! eliminated_buses=1104,1111

New Line._virtual_line1124_line1133_line1140_line1145_line1151_line1157_line1162_line1168_line1174_line1180_line1186_line1193_line1199_line1205_line1210_line1215_line1220_line1224_line1228 bus1=1118.1.2.3.4 bus2=1229.1.2.3.4 phases=4 linecode=LC6 length=12.24945 units=m
! reduced_from=line1124,line1133,line1140,line1145,line1151,line1157,line1162,line1168,line1174,line1180,line1186,line1193,line1199,line1205,line1210,line1215,line1220,line1224,line1228
! eliminated_buses=1125,1134,1141,1146,1152,1158,1163,1169,1175,1181,1187,1194,1200,1206,1211,1216,1221,1225

New Line._virtual_line1125_line1134_line1141 bus1=1142.1.2.3.4 bus2=1118.1.2.3.4 phases=4 linecode=LC4 length=7.2664 units=m
! reduced_from=line1125,line1134,line1141
! eliminated_buses=1126,1135

New Line._virtual_line1127_line1136 bus1=1120.1.2.3.4 bus2=1137.1.2.3.4 phases=4 linecode=LC6 length=13.2356 units=m
! reduced_from=line1127,line1136
! eliminated_buses=1128

New Line._virtual_line1146_line1152_line1158_line1163_line1169_line1175_line1181_line1187_line1194_line1200_line1206_line1211_line1216 bus1=1142.1.2.3.4 bus2=1217.1.2.3.4 phases=4 linecode=LC6 length=15.33392 units=m
! reduced_from=line1146,line1152,line1158,line1163,line1169,line1175,line1181,line1187,line1194,line1200,line1206,line1211,line1216
! eliminated_buses=1147,1153,1159,1164,1170,1176,1182,1188,1195,1201,1207,1212

New Line._virtual_line1147_line1153_line1159 bus1=1160.1.2.3.4 bus2=1142.1.2.3.4 phases=4 linecode=LC4 length=14.307 units=m
! reduced_from=line1147,line1153,line1159
! eliminated_buses=1148,1154

New Line._virtual_line1164_line1170_line1176_line1182_line1188_line1195_line1201_line1207_line1212_line1217_line1221_line1225_line1229_line1234_line1238_line1241_line1244_line1247 bus1=1248.1.2.3.4 bus2=1160.1.2.3.4 phases=4 linecode=LC6 length=12.10145 units=m
! reduced_from=line1164,line1170,line1176,line1182,line1188,line1195,line1201,line1207,line1212,line1217,line1221,line1225,line1229,line1234,line1238,line1241,line1244,line1247
! eliminated_buses=1165,1171,1177,1183,1189,1196,1202,1208,1213,1218,1222,1226,1230,1235,1239,1242,1245

New Line._virtual_line1165_line1171_line1177_line1183_line1189_line1196_line1202_line1208 bus1=1160.1.2.3.4 bus2=1209.1.2.3.4 phases=4 linecode=LC4 length=16.45725 units=m
! reduced_from=line1165,line1171,line1177,line1183,line1189,line1196,line1202,line1208
! eliminated_buses=1166,1172,1178,1184,1190,1197,1203

New Line._virtual_line1191_line1198 bus1=1199.1.2.3.4 bus2=1186.1.2.3.4 phases=4 linecode=LC6 length=8.3936 units=m
! reduced_from=line1191,line1198
! eliminated_buses=1192

New Line._virtual_line1203_line1209 bus1=1210.1.2.3.4 bus2=1198.1.2.3.4 phases=4 linecode=LC6 length=10.1924 units=m
! reduced_from=line1203,line1209
! eliminated_buses=1204

New Line._virtual_line1213_line1218_line1222_line1226_line1230_line1235_line1239_line1242_line1245_line1248_line1250_line1252_line1254_line1256_line1258_line1260 bus1=1261.1.2.3.4 bus2=1209.1.2.3.4 phases=4 linecode=LC6 length=13.50756 units=m
! reduced_from=line1213,line1218,line1222,line1226,line1230,line1235,line1239,line1242,line1245,line1248,line1250,line1252,line1254,line1256,line1258,line1260
! eliminated_buses=1214,1219,1223,1227,1231,1236,1240,1243,1246,1249,1251,1253,1255,1257,1259

New Line._virtual_line1214_line1219_line1223_line1227_line1231_line1236_line1240_line1243_line1246_line1249_line1251_line1253_line1255_line1257_line1259_line1261_line1264_line1266_line1268_line1270_line1272_line1274_line1276_line1277 bus1=1209.1.2.3.4 bus2=1278.1.2.3.4 phases=4 linecode=LC4 length=15.8862 units=m
! reduced_from=line1214,line1219,line1223,line1227,line1231,line1236,line1240,line1243,line1246,line1249,line1251,line1253,line1255,line1257,line1259,line1261,line1264,line1266,line1268,line1270,line1272,line1274,line1276,line1277
! eliminated_buses=1215,1220,1224,1228,1232,1237,1241,1244,1247,1250,1252,1254,1256,1258,1260,1262,1265,1267,1269,1271,1273,1275,1277

New Line._virtual_line1232_line1237 bus1=1229.1.2.3.4 bus2=1238.1.2.3.4 phases=4 linecode=LC6 length=8.3405 units=m
! reduced_from=line1232,line1237
! eliminated_buses=1233

New Line._virtual_line1262_line1265_line1267_line1269_line1271_line1273_line1275 bus1=1276.1.2.3.4 bus2=1261.1.2.3.4 phases=4 linecode=LC6 length=9.45936 units=m
! reduced_from=line1262,line1265,line1267,line1269,line1271,line1273,line1275
! eliminated_buses=1263,1266,1268,1270,1272,1274

New Line._virtual_line1278_line1280_line1282_line1284_line1286_line1288_line1290_line1292_line1295_line1299_line1303_line1306_line1309_line1312_line1315_line1318_line1321_line1324_line1328_line1331_line1333_line1335 bus1=1336.1.2.3.4 bus2=1278.1.2.3.4 phases=4 linecode=LC6 length=13.638883 units=m
! reduced_from=line1278,line1280,line1282,line1284,line1286,line1288,line1290,line1292,line1295,line1299,line1303,line1306,line1309,line1312,line1315,line1318,line1321,line1324,line1328,line1331,line1333,line1335
! eliminated_buses=1279,1281,1283,1285,1287,1289,1291,1293,1296,1300,1304,1307,1310,1313,1316,1319,1322,1325,1329,1332,1334

New Line._virtual_line1279_line1281_line1283_line1285_line1287_line1289_line1291 bus1=1292.1.2.3.4 bus2=1278.1.2.3.4 phases=4 linecode=LC4 length=7.99829 units=m
! reduced_from=line1279,line1281,line1283,line1285,line1287,line1289,line1291
! eliminated_buses=1280,1282,1284,1286,1288,1290

New Line._virtual_line1293_line1296_line1300_line1304_line1307_line1310_line1313_line1316_line1319_line1322 bus1=1292.1.2.3.4 bus2=1323.1.2.3.4 phases=4 linecode=LC6 length=13.38527 units=m
! reduced_from=line1293,line1296,line1300,line1304,line1307,line1310,line1313,line1316,line1319,line1322
! eliminated_buses=1294,1297,1301,1305,1308,1311,1314,1317,1320

New Line._virtual_line1297_line1301_line1305_line1308_line1311_line1314_line1317_line1320_line1323_line1327_line1330_line1332_line1334_line1336_line1339_line1341 bus1=1295.1.2.3.4 bus2=1342.1.2.3.4 phases=4 linecode=LC6 length=12.991703 units=m
! reduced_from=line1297,line1301,line1305,line1308,line1311,line1314,line1317,line1320,line1323,line1327,line1330,line1332,line1334,line1336,line1339,line1341
! eliminated_buses=1298,1302,1306,1309,1312,1315,1318,1321,1324,1328,1331,1333,1335,1337,1340

New Line._virtual_line1325_line1329 bus1=1330.1.2.3.4 bus2=1323.1.2.3.4 phases=4 linecode=LC6 length=11.875 units=m
! reduced_from=line1325,line1329
! eliminated_buses=1326

New Line._virtual_line1337_line1340_line1342_line1345_line1347_line1348_line1349_line1350 bus1=1336.1.2.3.4 bus2=1351.1.2.3.4 phases=4 linecode=LC6 length=10.39611 units=m
! reduced_from=line1337,line1340,line1342,line1345,line1347,line1348,line1349,line1350
! eliminated_buses=1338,1341,1343,1346,1348,1349,1350

New Line._virtual_line1343_line1346 bus1=1347.1.2.3.4 bus2=1342.1.2.3.4 phases=4 linecode=LC6 length=11.9402 units=m
! reduced_from=line1343,line1346
! eliminated_buses=1344

New Line.LINE161 bus1=159.1.2.3.4 bus2=162.1.2.3.4 phases=4 linecode=LC8 length=3.3005 units=m

New Line.LINE362 bus1=351.1.2.3.4 bus2=363.1.2.3.4 phases=4 linecode=LC6 length=4.7724 units=m

New Line.LINE445 bus1=435.1.2.3.4 bus2=446.1.2.3.4 phases=4 linecode=LC6 length=4.8903 units=m

New Line.LINE616 bus1=609.1.2.3.4 bus2=617.1.2.3.4 phases=4 linecode=LC6 length=5.0435 units=m

New Line.LINE629 bus1=622.1.2.3.4 bus2=630.1.2.3.4 phases=4 linecode=LC6 length=4.4935 units=m

New Line.LINE671 bus1=666.1.2.3.4 bus2=672.1.2.3.4 phases=4 linecode=LC6 length=5.0153 units=m

New Line.LINE857 bus1=852.1.2.3.4 bus2=858.1.2.3.4 phases=4 linecode=LC6 length=5.5946 units=m

New Line.LINE930 bus1=927.1.2.3.4 bus2=931.1.2.3.4 phases=4 linecode=LC6 length=3.5901 units=m

New Line.LINE935 bus1=933.1.2.3.4 bus2=936.1.2.3.4 phases=4 linecode=LC3 length=8.3595 units=m

New Line.LINE986 bus1=979.1.2.3.4 bus2=987.1.2.3.4 phases=4 linecode=LC6 length=4.2679 units=m

New Line.LINE1070 bus1=1062.1.2.3.4 bus2=1071.1.2.3.4 phases=4 linecode=LC6 length=3.5106 units=m

New Line.LINE1080 bus1=1072.1.2.3.4 bus2=1081.1.2.3.4 phases=4 linecode=LC6 length=4.9858 units=m

New Line.LINE1100 bus1=1094.1.2.3.4 bus2=1101.1.2.3.4 phases=4 linecode=LC6 length=4.2058 units=m

New Line.LINE1128 bus1=1120.1.2.3.4 bus2=1129.1.2.3.4 phases=4 linecode=LC6 length=5.8883 units=m

New Line.LINE1192 bus1=1186.1.2.3.4 bus2=1193.1.2.3.4 phases=4 linecode=LC6 length=2.4357 units=m

New Line.LINE1204 bus1=1198.1.2.3.4 bus2=1205.1.2.3.4 phases=4 linecode=LC6 length=4.982 units=m

New Line.LINE1233 bus1=1229.1.2.3.4 bus2=1234.1.2.3.4 phases=4 linecode=LC6 length=0.81201 units=m

New Line.LINE1263 bus1=1261.1.2.3.4 bus2=1264.1.2.3.4 phases=4 linecode=LC6 length=2.5168 units=m

New Line.LINE1294 bus1=1292.1.2.3.4 bus2=1295.1.2.3.4 phases=4 linecode=LC4 length=1.3867 units=m

New Line.LINE1326 bus1=1323.1.2.3.4 bus2=1327.1.2.3.4 phases=4 linecode=LC6 length=3.9815 units=m

New Line.LINE1338 bus1=1336.1.2.3.4 bus2=1339.1.2.3.4 phases=4 linecode=LC6 length=3.5802 units=m

New Line.LINE1344 bus1=1342.1.2.3.4 bus2=1345.1.2.3.4 phases=4 linecode=LC6 length=5.6478 units=m
