! Reduced enabled lines.

New Line._virtual_line0_line1_line2_line3_line4_line5_line6_line7_line8_line9_line10_line11_line12_line13_line14_line15_line16_line17_line18_line19_line20_line21_line22_line23_line24_line25_line26_line27_line29_line32_line35_line38_line41_line44_line47_line50_line53_line55_line57_line59_line61_line63_line65_line67_line68_line69_line70_line71_line72_line73_line74_line75_line76_line77_line78_line79_line80_line81_line82_line83_line84_line85_line86_line87_line88_line89_line90_line91_line92_line93_line94_line95_line96_line97_line98_line99_line100_line101_line102_line103_line104_line105 bus1=sourcebus.1.2.3.4 bus2=106.1.2.3.4 phases=4 linecode=LC5 length=71.909033 units=m
! reduced_from=line0,line1,line2,line3,line4,line5,line6,line7,line8,line9,line10,line11,line12,line13,line14,line15,line16,line17,line18,line19,line20,line21,line22,line23,line24,line25,line26,line27,line29,line32,line35,line38,line41,line44,line47,line50,line53,line55,line57,line59,line61,line63,line65,line67,line68,line69,line70,line71,line72,line73,line74,line75,line76,line77,line78,line79,line80,line81,line82,line83,line84,line85,line86,line87,line88,line89,line90,line91,line92,line93,line94,line95,line96,line97,line98,line99,line100,line101,line102,line103,line104,line105
! eliminated_buses=1,2,3,4,5,6,7,8,9,10,11,12,13,14,15,16,17,18,19,20,21,22,23,24,25,26,27,28,30,33,36,39,42,45,48,51,54,56,58,60,62,64,66,68,69,70,71,72,73,74,75,76,77,78,79,80,81,82,83,84,85,86,87,88,89,90,91,92,93,94,95,96,97,98,99,100,101,102,103,104,105

New Line._virtual_line106_line107_line108_line109_line110_line111_line112_line113_line114_line115_line116_line117_line118_line119_line120_line121_line122_line123_line124_line125_line126_line127_line128_line129_line130 bus1=131.1.2.3.4 bus2=106.1.2.3.4 phases=4 linecode=LC8 length=18.878598 units=m
! reduced_from=line106,line107,line108,line109,line110,line111,line112,line113,line114,line115,line116,line117,line118,line119,line120,line121,line122,line123,line124,line125,line126,line127,line128,line129,line130
! eliminated_buses=107,108,109,110,111,112,113,114,115,116,117,118,119,120,121,122,123,124,125,126,127,128,129,130

New Line._virtual_line131_line133_line134_line135_line136 bus1=131.1.2.3.4 bus2=137.1.2.3.4 phases=4 linecode=LC8 length=10.18128 units=m
! reduced_from=line131,line133,line134,line135,line136
! eliminated_buses=132,134,135,136

New Line._virtual_line138_line139 bus1=137.1.2.3.4 bus2=140.1.2.3.4 phases=4 linecode=LC8 length=4.1548 units=m
! reduced_from=line138,line139
! eliminated_buses=139

New Line._virtual_line140_line141_line142_line143_line144_line145_line146_line147_line148_line149_line150_line151_line152_line153_line154 bus1=140.1.2.3.4 bus2=155.1.2.3.4 phases=4 linecode=LC5 length=10.46937 units=m
! reduced_from=line140,line141,line142,line143,line144,line145,line146,line147,line148,line149,line150,line151,line152,line153,line154
! eliminated_buses=141,142,143,144,145,146,147,148,149,150,151,152,153,154

New Line._virtual_line156_line159_line162_line165_line167_line170_line175_line180_line186_line192_line198_line204_line210_line216_line221_line226_line230 bus1=231.1.2.3.4 bus2=155.1.2.3.4 phases=4 linecode=LC6 length=23.43207 units=m
! reduced_from=line156,line159,line162,line165,line167,line170,line175,line180,line186,line192,line198,line204,line210,line216,line221,line226,line230
! eliminated_buses=157,160,163,166,168,171,176,181,187,193,199,205,211,217,222,227

New Line._virtual_line157_line160_line163_line166 bus1=156.1.2.3.4 bus2=167.1.2.3.4 phases=4 linecode=LC5 length=15.3668 units=m
! reduced_from=line157,line160,line163,line166
! eliminated_buses=158,161,164

New Line._virtual_line158_line161_line164 bus1=156.1.2.3.4 bus2=165.1.2.3.4 phases=4 linecode=LC6 length=18.8326 units=m
! reduced_from=line158,line161,line164
! eliminated_buses=159,162

New Line._virtual_line168_line171 bus1=172.1.2.3.4 bus2=167.1.2.3.4 phases=4 linecode=LC6 length=16.9144 units=m
! reduced_from=line168,line171
! eliminated_buses=169

New Line._virtual_line172_line176_line181_line187_line193_line199_line205_line211 bus1=170.1.2.3.4 bus2=212.1.2.3.4 phases=4 linecode=LC6 length=18.12402 units=m
! reduced_from=line172,line176,line181,line187,line193,line199,line205,line211
! eliminated_buses=173,177,182,188,194,200,206

New Line._virtual_line178_line183 bus1=184.1.2.3.4 bus2=175.1.2.3.4 phases=4 linecode=LC6 length=16.1995 units=m
! reduced_from=line178,line183
! eliminated_buses=179

New Line._virtual_line179_line185 bus1=175.1.2.3.4 bus2=186.1.2.3.4 phases=4 linecode=LC5 length=7.8295 units=m
! reduced_from=line179,line185
! eliminated_buses=180

New Line._virtual_line190_line196_line202_line208_line214_line219_line224_line228_line232_line235_line238_line241_line244_line247_line250_line253_line256 bus1=257.1.2.3.4 bus2=186.1.2.3.4 phases=4 linecode=LC6 length=19.304702 units=m
! reduced_from=line190,line196,line202,line208,line214,line219,line224,line228,line232,line235,line238,line241,line244,line247,line250,line253,line256
! eliminated_buses=191,197,203,209,215,220,225,229,233,236,239,242,245,248,251,254

New Line._virtual_line191_line197_line203_line209_line215_line220_line225_line229_line233_line236_line239_line242_line245_line248_line251_line254_line257_line258_line259_line260_line261_line262_line263_line264_line265_line266_line267_line268_line269_line270_line271 bus1=186.1.2.3.4 bus2=272.1.2.3.4 phases=4 linecode=LC5 length=29.38735 units=m
! reduced_from=line191,line197,line203,line209,line215,line220,line225,line229,line233,line236,line239,line242,line245,line248,line251,line254,line257,line258,line259,line260,line261,line262,line263,line264,line265,line266,line267,line268,line269,line270,line271
! eliminated_buses=192,198,204,210,216,221,226,230,234,237,240,243,246,249,252,255,258,259,260,261,262,263,264,265,266,267,268,269,270,271

New Line._virtual_line272_line274_line276_line278_line281_line284_line288_line292 bus1=272.1.2.3.4 bus2=293.1.2.3.4 phases=4 linecode=LC6 length=17.69984 units=m
! reduced_from=line272,line274,line276,line278,line281,line284,line288,line292
! eliminated_buses=273,275,277,279,282,285,289

New Line._virtual_line273_line275_line277 bus1=272.1.2.3.4 bus2=278.1.2.3.4 phases=4 linecode=LC5 length=5.88566 units=m
! reduced_from=line273,line275,line277
! eliminated_buses=274,276

New Line._virtual_line279_line282_line285_line289_line293_line297_line302 bus1=278.1.2.3.4 bus2=303.1.2.3.4 phases=4 linecode=LC6 length=14.93419 units=m
! reduced_from=line279,line282,line285,line289,line293,line297,line302
! eliminated_buses=280,283,286,290,294,298

New Line._virtual_line280_line283_line286_line290 bus1=291.1.2.3.4 bus2=278.1.2.3.4 phases=4 linecode=LC5 length=10.36636 units=m
! reduced_from=line280,line283,line286,line290
! eliminated_buses=281,284,287

New Line._virtual_line294_line298_line303_line307_line311_line315_line319 bus1=291.1.2.3.4 bus2=320.1.2.3.4 phases=4 linecode=LC5 length=12.16953 units=m
! reduced_from=line294,line298,line303,line307,line311,line315,line319
! eliminated_buses=295,299,304,308,312,316

New Line._virtual_line295_line300_line305_line309_line313_line317_line321_line326 bus1=291.1.2.3.4 bus2=327.1.2.3.4 phases=4 linecode=LC6 length=13.80515 units=m
! reduced_from=line295,line300,line305,line309,line313,line317,line321,line326
! eliminated_buses=296,301,306,310,314,318,322

New Line._virtual_line323_line328_line332 bus1=333.1.2.3.4 bus2=320.1.2.3.4 phases=4 linecode=LC5 length=4.6982 units=m
! reduced_from=line323,line328,line332
! eliminated_buses=324,329

New Line._virtual_line324_line329_line333_line340_line347_line355_line363_line371_line380_line389_line398_line407_line416_line425_line437_line449_line461_line471 bus1=320.1.2.3.4 bus2=472.1.2.3.4 phases=4 linecode=LC6 length=14.058925 units=m
! reduced_from=line324,line329,line333,line340,line347,line355,line363,line371,line380,line389,line398,line407,line416,line425,line437,line449,line461,line471
! eliminated_buses=325,330,334,341,348,356,364,372,381,390,399,408,417,426,438,450,462

New Line._virtual_line336_line343_line350_line357_line365_line373_line382_line391_line400_line409_line418_line427_line439_line451_line463_line473_line483_line494_line506_line519 bus1=333.1.2.3.4 bus2=520.1.2.3.4 phases=4 linecode=LC9 length=35.64295 units=m
! reduced_from=line336,line343,line350,line357,line365,line373,line382,line391,line400,line409,line418,line427,line439,line451,line463,line473,line483,line494,line506,line519
! eliminated_buses=337,344,351,358,366,374,383,392,401,410,419,428,440,452,464,474,484,495,507

New Line._virtual_line337_line345 bus1=346.1.2.3.4 bus2=333.1.2.3.4 phases=4 linecode=LC5 length=1.00106 units=m
! reduced_from=line337,line345
! eliminated_buses=338

New Line._virtual_line352_line359_line367 bus1=346.1.2.3.4 bus2=368.1.2.3.4 phases=4 linecode=LC5 length=4.50668 units=m
! reduced_from=line352,line359,line367
! eliminated_buses=353,360

New Line._virtual_line353_line362_line370_line379_line388_line397_line406_line415_line424_line436_line448 bus1=346.1.2.3.4 bus2=449.1.2.3.4 phases=4 linecode=LC1 length=14.4603 units=m
! reduced_from=line353,line362,line370,line379,line388,line397,line406,line415,line424,line436,line448
! eliminated_buses=354,363,371,380,389,398,407,416,425,437

New Line._virtual_line375_line384_line393_line402_line411_line420_line429_line441_line453_line465 bus1=466.1.2.3.4 bus2=368.1.2.3.4 phases=4 linecode=LC5 length=23.8905 units=m
! reduced_from=line375,line384,line393,line402,line411,line420,line429,line441,line453,line465
! eliminated_buses=376,385,394,403,412,421,430,442,454

New Line._virtual_line376_line386_line395_line404_line413_line422_line431_line443 bus1=444.1.2.3.4 bus2=368.1.2.3.4 phases=4 linecode=LC6 length=8.408229 units=m
! reduced_from=line376,line386,line395,line404,line413,line422,line431,line443
! eliminated_buses=377,387,396,405,414,423,432

New Line._virtual_line455_line467_line478_line488_line500_line512_line524 bus1=525.1.2.3.4 bus2=444.1.2.3.4 phases=4 linecode=LC6 length=6.68261 units=m
! reduced_from=line455,line467,line478,line488,line500,line512,line524
! eliminated_buses=456,468,479,489,501,513

New Line._virtual_line475_line485 bus1=466.1.2.3.4 bus2=486.1.2.3.4 phases=4 linecode=LC5 length=2.3809 units=m
! reduced_from=line475,line485
! eliminated_buses=476

New Line._virtual_line477_line487_line499_line511_line523_line538_line550 bus1=551.1.2.3.4 bus2=466.1.2.3.4 phases=4 linecode=LC6 length=13.90173 units=m
! reduced_from=line477,line487,line499,line511,line523,line538,line550
! eliminated_buses=478,488,500,512,524,539

New Line._virtual_line496_line508_line520_line535 bus1=536.1.2.3.4 bus2=486.1.2.3.4 phases=4 linecode=LC5 length=4.65294 units=m
! reduced_from=line496,line508,line520,line535
! eliminated_buses=497,509,521

New Line._virtual_line498_line510_line522_line537_line549_line563 bus1=486.1.2.3.4 bus2=564.1.2.3.4 phases=4 linecode=LC6 length=13.39319 units=m
! reduced_from=line498,line510,line522,line537,line549,line563
! eliminated_buses=499,511,523,538,550

New Line._virtual_line547_line559_line572 bus1=573.1.2.3.4 bus2=536.1.2.3.4 phases=4 linecode=LC5 length=9.0426 units=m
! reduced_from=line547,line559,line572
! eliminated_buses=548,560

New Line._virtual_line562_line574_line584_line595_line606_line618_line630 bus1=631.1.2.3.4 bus2=549.1.2.3.4 phases=4 linecode=LC6 length=14.5667 units=m
! reduced_from=line562,line574,line584,line595,line606,line618,line630
! eliminated_buses=563,575,585,596,607,619

New Line._virtual_line581_line592_line603_line613_line625_line636_line646_line658_line670 bus1=671.1.2.3.4 bus2=573.1.2.3.4 phases=4 linecode=LC6 length=13.57157 units=m
! reduced_from=line581,line592,line603,line613,line625,line636,line646,line658,line670
! eliminated_buses=582,593,604,614,626,637,647,659

New Line._virtual_line593_line604 bus1=583.1.2.3.4 bus2=605.1.2.3.4 phases=4 linecode=LC3 length=2.783916 units=m
! reduced_from=line593,line604
! eliminated_buses=594

New Line._virtual_line594_line605_line617_line629_line640_line652_line666_line678_line689_line699_line709_line721_line732 bus1=733.1.2.3.4 bus2=583.1.2.3.4 phases=4 linecode=LC4 length=18.16544 units=m
! reduced_from=line594,line605,line617,line629,line640,line652,line666,line678,line689,line699,line709,line721,line732
! eliminated_buses=595,606,618,630,641,653,667,679,690,700,710,722

New Line._virtual_line614_line626_line637_line647_line660_line671_line682_line692_line702_line712_line724_line735_line746 bus1=605.1.2.3.4 bus2=747.1.2.3.4 phases=4 linecode=LC6 length=13.433325 units=m
! reduced_from=line614,line626,line637,line647,line660,line671,line682,line692,line702,line712,line724,line735,line746
! eliminated_buses=615,627,638,648,661,672,683,693,703,713,725,736

New Line._virtual_line616_line628_line639 bus1=640.1.2.3.4 bus2=605.1.2.3.4 phases=4 linecode=LC3 length=6.361 units=m
! reduced_from=line616,line628,line639
! eliminated_buses=617,629

New Line._virtual_line650_line664_line676_line687_line697_line707_line719_line730_line740_line750_line761 bus1=762.1.2.3.4 bus2=640.1.2.3.4 phases=4 linecode=LC6 length=14.04509 units=m
! reduced_from=line650,line664,line676,line687,line697,line707,line719,line730,line740,line750,line761
! eliminated_buses=651,665,677,688,698,708,720,731,741,751

New Line._virtual_line663_line675_line686_line696_line706_line717_line729 bus1=650.1.2.3.4 bus2=730.1.2.3.4 phases=4 linecode=LC6 length=12.38844 units=m
! reduced_from=line663,line675,line686,line696,line706,line717,line729
! eliminated_buses=664,676,687,697,707,718

New Line._virtual_line673_line684_line694_line704 bus1=705.1.2.3.4 bus2=663.1.2.3.4 phases=4 linecode=LC3 length=11.0298 units=m
! reduced_from=line673,line684,line694,line704
! eliminated_buses=674,685,695

New Line._virtual_line674_line685_line695_line705_line716_line728_line739_line749_line760_line769_line777_line787_line795_line804_line815_line825_line836 bus1=663.1.2.3.4 bus2=837.1.2.3.4 phases=4 linecode=LC6 length=7.03885 units=m
! reduced_from=line674,line685,line695,line705,line716,line728,line739,line749,line760,line769,line777,line787,line795,line804,line815,line825,line836
! eliminated_buses=675,686,696,706,717,729,740,750,761,770,778,788,796,805,816,826

New Line._virtual_line715_line727_line738_line748_line759_line768_line776 bus1=777.1.2.3.4 bus2=705.1.2.3.4 phases=4 linecode=LC6 length=5.32279 units=m
! reduced_from=line715,line727,line738,line748,line759,line768,line776
! eliminated_buses=716,728,739,749,760,769

New Line._virtual_line737_line747 bus1=748.1.2.3.4 bus2=727.1.2.3.4 phases=4 linecode=LC3 length=3.1341 units=m
! reduced_from=line737,line747
! eliminated_buses=738

New Line._virtual_line742_line752_line762_line770_line778_line788_line796_line805_line816_line826_line838_line850_line859 bus1=733.1.2.3.4 bus2=860.1.2.3.4 phases=4 linecode=LC3 length=21.99483 units=m
! reduced_from=line742,line752,line762,line770,line778,line788,line796,line805,line816,line826,line838,line850,line859
! eliminated_buses=743,753,763,771,779,789,797,806,817,827,839,851

New Line._virtual_line754_line763_line771_line779_line789 bus1=744.1.2.3.4 bus2=790.1.2.3.4 phases=4 linecode=LC4 length=30.122 units=m
! reduced_from=line754,line763,line771,line779,line789
! eliminated_buses=755,764,772,780

New Line._virtual_line758_line767_line775_line783_line793_line802_line812_line824_line835_line847 bus1=848.1.2.3.4 bus2=748.1.2.3.4 phases=4 linecode=LC1 length=9.85336 units=m
! reduced_from=line758,line767,line775,line783,line793,line802,line812,line824,line835,line847
! eliminated_buses=759,768,776,784,794,803,813,825,836

New Line._virtual_line784_line794_line803 bus1=777.1.2.3.4 bus2=804.1.2.3.4 phases=4 linecode=LC6 length=1.08106 units=m
! reduced_from=line784,line794,line803
! eliminated_buses=785,795

New Line._virtual_line798_line808_line820_line831_line844_line856_line866_line879_line890 bus1=790.1.2.3.4 bus2=891.1.2.3.4 phases=4 linecode=LC6 length=13.17439 units=m
! reduced_from=line798,line808,line820,line831,line844,line856,line866,line879,line890
! eliminated_buses=799,809,821,832,845,857,867,880

New Line._virtual_line807_line819_line830_line843_line855_line865_line878 bus1=798.1.2.3.4 bus2=879.1.2.3.4 phases=4 linecode=LC6 length=12.79158 units=m
! reduced_from=line807,line819,line830,line843,line855,line865,line878
! eliminated_buses=808,820,831,844,856,866

New Line._virtual_line817_line827 bus1=807.1.2.3.4 bus2=828.1.2.3.4 phases=4 linecode=LC4 length=7.7767 units=m
! reduced_from=line817,line827
! eliminated_buses=818

New Line._virtual_line818_line829_line842_line854_line864_line877_line889_line900_line910_line921_line933_line946_line959_line970 bus1=971.1.2.3.4 bus2=807.1.2.3.4 phases=4 linecode=LC4 length=9.24225 units=m
! reduced_from=line818,line829,line842,line854,line864,line877,line889,line900,line910,line921,line933,line946,line959,line970
! eliminated_buses=819,830,843,855,865,878,890,901,911,922,934,947,960

New Line._virtual_line839_line851 bus1=852.1.2.3.4 bus2=828.1.2.3.4 phases=4 linecode=LC4 length=8.704 units=m
! reduced_from=line839,line851
! eliminated_buses=840

New Line._virtual_line840_line852_line862_line875_line888_line899_line909_line920_line932_line945 bus1=946.1.2.3.4 bus2=828.1.2.3.4 phases=4 linecode=LC6 length=7.40225 units=m
! reduced_from=line840,line852,line862,line875,line888,line899,line909,line920,line932,line945
! eliminated_buses=841,853,863,876,889,900,910,921,933

New Line._virtual_line861_line874_line887_line898_line908_line919_line931_line944_line956 bus1=852.1.2.3.4 bus2=957.1.2.3.4 phases=4 linecode=LC6 length=12.71928 units=m
! reduced_from=line861,line874,line887,line898,line908,line919,line931,line944,line956
! eliminated_buses=862,875,888,899,909,920,932,945

New Line._virtual_line869_line882 bus1=860.1.2.3.4 bus2=883.1.2.3.4 phases=4 linecode=LC3 length=13.7202 units=m
! reduced_from=line869,line882
! eliminated_buses=870

New Line._virtual_line870_line883_line894_line904_line914_line925_line937_line949_line962_line973_line985 bus1=860.1.2.3.4 bus2=986.1.2.3.4 phases=4 linecode=LC6 length=10.65455 units=m
! reduced_from=line870,line883,line894,line904,line914,line925,line937,line949,line962,line973,line985
! eliminated_buses=871,884,895,905,915,926,938,950,963,974

New Line._virtual_line872_line885_line896_line906 bus1=907.1.2.3.4 bus2=861.1.2.3.4 phases=4 linecode=LC4 length=10.89523 units=m
! reduced_from=line872,line885,line896,line906
! eliminated_buses=873,886,897

New Line._virtual_line873_line886_line897_line907_line918_line930_line943_line955_line968_line979_line991_line1003_line1014_line1025_line1036_line1046_line1055_line1064_line1073_line1082_line1092_line1101 bus1=1102.1.2.3.4 bus2=861.1.2.3.4 phases=4 linecode=LC6 length=14.179024 units=m
! reduced_from=line873,line886,line897,line907,line918,line930,line943,line955,line968,line979,line991,line1003,line1014,line1025,line1036,line1046,line1055,line1064,line1073,line1082,line1092,line1101
! eliminated_buses=874,887,898,908,919,931,944,956,969,980,992,1004,1015,1026,1037,1047,1056,1065,1074,1083,1093

New Line._virtual_line893_line903_line913_line923_line935_line948_line961_line972_line984_line996_line1008_line1019_line1030_line1040_line1049_line1058_line1067_line1076_line1085_line1095_line1104_line1111_line1117_line1123_line1129 bus1=1130.1.2.3.4 bus2=883.1.2.3.4 phases=4 linecode=LC2 length=21.51693 units=m
! reduced_from=line893,line903,line913,line923,line935,line948,line961,line972,line984,line996,line1008,line1019,line1030,line1040,line1049,line1058,line1067,line1076,line1085,line1095,line1104,line1111,line1117,line1123,line1129
! eliminated_buses=894,904,914,924,936,949,962,973,985,997,1009,1020,1031,1041,1050,1059,1068,1077,1086,1096,1105,1112,1118,1124

New Line._virtual_line916_line927_line939_line951_line964_line975_line987_line999_line1010_line1021_line1032_line1042_line1051_line1060_line1069_line1077_line1086_line1096_line1105_line1112_line1118_line1124_line1130_line1135_line1140_line1145_line1149_line1153_line1157 bus1=907.1.2.3.4 bus2=1158.1.2.3.4 phases=4 linecode=LC4 length=14.60132 units=m
! reduced_from=line916,line927,line939,line951,line964,line975,line987,line999,line1010,line1021,line1032,line1042,line1051,line1060,line1069,line1077,line1086,line1096,line1105,line1112,line1118,line1124,line1130,line1135,line1140,line1145,line1149,line1153,line1157
! eliminated_buses=917,928,940,952,965,976,988,1000,1011,1022,1033,1043,1052,1061,1070,1078,1087,1097,1106,1113,1119,1125,1131,1136,1141,1146,1150,1154

New Line._virtual_line917_line928 bus1=907.1.2.3.4 bus2=929.1.2.3.4 phases=4 linecode=LC4 length=9.2596 units=m
! reduced_from=line917,line928
! eliminated_buses=918

New Line._virtual_line940_line952_line965_line976_line988_line1000_line1011_line1022_line1033_line1043_line1052_line1061_line1070 bus1=929.1.2.3.4 bus2=1071.1.2.3.4 phases=4 linecode=LC4 length=7.74033 units=m
! reduced_from=line940,line952,line965,line976,line988,line1000,line1011,line1022,line1033,line1043,line1052,line1061,line1070
! eliminated_buses=941,953,966,977,989,1001,1012,1023,1034,1044,1053,1062

New Line._virtual_line941_line953_line966_line977_line989_line1001_line1012_line1023_line1034_line1044_line1053_line1062_line1071_line1080 bus1=929.1.2.3.4 bus2=1081.1.2.3.4 phases=4 linecode=LC6 length=12.841409 units=m
! reduced_from=line941,line953,line966,line977,line989,line1001,line1012,line1023,line1034,line1044,line1053,line1062,line1071,line1080
! eliminated_buses=942,954,967,978,990,1002,1013,1024,1035,1045,1054,1063,1072

New Line._virtual_line958_line969_line980_line992_line1004_line1015_line1026 bus1=946.1.2.3.4 bus2=1027.1.2.3.4 phases=4 linecode=LC6 length=11.550645 units=m
! reduced_from=line958,line969,line980,line992,line1004,line1015,line1026
! eliminated_buses=959,970,981,993,1005,1016

New Line._virtual_line981_line993_line1005_line1016_line1027_line1037_line1047_line1056_line1065_line1074_line1083_line1093_line1102_line1109 bus1=971.1.2.3.4 bus2=1110.1.2.3.4 phases=4 linecode=LC6 length=17.4246 units=m
! reduced_from=line981,line993,line1005,line1016,line1027,line1037,line1047,line1056,line1065,line1074,line1083,line1093,line1102,line1109
! eliminated_buses=982,994,1006,1017,1028,1038,1048,1057,1066,1075,1084,1094,1103

New Line._virtual_line982_line994_line1006_line1017_line1028_line1038_line1048_line1057_line1066_line1075_line1084_line1094_line1103_line1110_line1116_line1122_line1128_line1134_line1139_line1144_line1148_line1152_line1156_line1160_line1165_line1170_line1175_line1180_line1185 bus1=971.1.2.3.4 bus2=1186.1.2.3.4 phases=4 linecode=LC6 length=28.002361 units=m
! reduced_from=line982,line994,line1006,line1017,line1028,line1038,line1048,line1057,line1066,line1075,line1084,line1094,line1103,line1110,line1116,line1122,line1128,line1134,line1139,line1144,line1148,line1152,line1156,line1160,line1165,line1170,line1175,line1180,line1185
! eliminated_buses=983,995,1007,1018,1029,1039,1049,1058,1067,1076,1085,1095,1104,1111,1117,1123,1129,1135,1140,1145,1149,1153,1157,1161,1166,1171,1176,1181

New Line._virtual_line998_line1009_line1020_line1031_line1041_line1050_line1059_line1068 bus1=1069.1.2.3.4 bus2=986.1.2.3.4 phases=4 linecode=LC6 length=11.33837 units=m
! reduced_from=line998,line1009,line1020,line1031,line1041,line1050,line1059,line1068
! eliminated_buses=999,1010,1021,1032,1042,1051,1060

New Line._virtual_line1078_line1087_line1097_line1106_line1113_line1119_line1125_line1131_line1136_line1141 bus1=1071.1.2.3.4 bus2=1142.1.2.3.4 phases=4 linecode=LC4 length=3.81507 units=m
! reduced_from=line1078,line1087,line1097,line1106,line1113,line1119,line1125,line1131,line1136,line1141
! eliminated_buses=1079,1088,1098,1107,1114,1120,1126,1132,1137

New Line._virtual_line1079_line1088_line1098_line1107_line1114_line1120_line1126_line1132_line1137_line1142_line1147_line1151_line1155_line1159_line1164_line1169_line1174_line1179_line1184_line1189 bus1=1071.1.2.3.4 bus2=1190.1.2.3.4 phases=4 linecode=LC6 length=11.053336 units=m
! reduced_from=line1079,line1088,line1098,line1107,line1114,line1120,line1126,line1132,line1137,line1142,line1147,line1151,line1155,line1159,line1164,line1169,line1174,line1179,line1184,line1189
! eliminated_buses=1080,1089,1099,1108,1115,1121,1127,1133,1138,1143,1148,1152,1156,1160,1165,1170,1175,1180,1185

New Line._virtual_line1090_line1099 bus1=1081.1.2.3.4 bus2=1100.1.2.3.4 phases=4 linecode=LC6 length=10.0514 units=m
! reduced_from=line1090,line1099
! eliminated_buses=1091

New Line._virtual_line1146_line1150_line1154_line1158_line1163_line1168_line1173_line1178_line1183_line1188_line1192_line1197_line1201_line1204_line1207_line1211_line1215_line1220_line1225_line1230_line1235_line1240_line1246_line1253_line1259_line1266_line1273_line1280_line1287 bus1=1288.1.2.3.4 bus2=1142.1.2.3.4 phases=4 linecode=LC6 length=20.85639 units=m
! reduced_from=line1146,line1150,line1154,line1158,line1163,line1168,line1173,line1178,line1183,line1188,line1192,line1197,line1201,line1204,line1207,line1211,line1215,line1220,line1225,line1230,line1235,line1240,line1246,line1253,line1259,line1266,line1273,line1280,line1287
! eliminated_buses=1147,1151,1155,1159,1164,1169,1174,1179,1184,1189,1193,1198,1202,1205,1208,1212,1216,1221,1226,1231,1236,1241,1247,1254,1260,1267,1274,1281

New Line._virtual_line1161_line1166_line1171_line1176_line1181_line1186_line1190_line1195_line1199_line1202_line1205 bus1=1158.1.2.3.4 bus2=1206.1.2.3.4 phases=4 linecode=LC4 length=12.39012 units=m
! reduced_from=line1161,line1166,line1171,line1176,line1181,line1186,line1190,line1195,line1199,line1202,line1205
! eliminated_buses=1162,1167,1172,1177,1182,1187,1191,1196,1200,1203

New Line._virtual_line1162_line1167_line1172_line1177_line1182_line1187_line1191_line1196_line1200_line1203_line1206_line1210_line1214_line1219_line1224_line1229_line1234_line1239_line1245_line1252_line1258_line1265_line1272_line1279_line1286_line1293 bus1=1158.1.2.3.4 bus2=1294.1.2.3.4 phases=4 linecode=LC2 length=20.225488 units=m
! reduced_from=line1162,line1167,line1172,line1177,line1182,line1187,line1191,line1196,line1200,line1203,line1206,line1210,line1214,line1219,line1224,line1229,line1234,line1239,line1245,line1252,line1258,line1265,line1272,line1279,line1286,line1293
! eliminated_buses=1163,1168,1173,1178,1183,1188,1192,1197,1201,1204,1207,1211,1215,1220,1225,1230,1235,1240,1246,1253,1259,1266,1273,1280,1287

New Line._virtual_line1194_line1198 bus1=1190.1.2.3.4 bus2=1199.1.2.3.4 phases=4 linecode=LC6 length=5.2849 units=m
! reduced_from=line1194,line1198
! eliminated_buses=1195

New Line._virtual_line1208_line1212 bus1=1206.1.2.3.4 bus2=1213.1.2.3.4 phases=4 linecode=LC4 length=2.6437 units=m
! reduced_from=line1208,line1212
! eliminated_buses=1209

New Line._virtual_line1209_line1213_line1218_line1223_line1228_line1233_line1238_line1244_line1251_line1257_line1264_line1271_line1278_line1285_line1292_line1300_line1307_line1312_line1317_line1322_line1327_line1332_line1337_line1341 bus1=1206.1.2.3.4 bus2=1342.1.2.3.4 phases=4 linecode=LC6 length=17.648777 units=m
! reduced_from=line1209,line1213,line1218,line1223,line1228,line1233,line1238,line1244,line1251,line1257,line1264,line1271,line1278,line1285,line1292,line1300,line1307,line1312,line1317,line1322,line1327,line1332,line1337,line1341
! eliminated_buses=1210,1214,1219,1224,1229,1234,1239,1245,1252,1258,1265,1272,1279,1286,1293,1301,1308,1313,1318,1323,1328,1333,1338

New Line._virtual_line1216_line1221_line1226_line1231_line1236 bus1=1237.1.2.3.4 bus2=1213.1.2.3.4 phases=4 linecode=LC4 length=5.55615 units=m
! reduced_from=line1216,line1221,line1226,line1231,line1236
! eliminated_buses=1217,1222,1227,1232

New Line._virtual_line1217_line1222_line1227_line1232_line1237_line1243_line1250 bus1=1213.1.2.3.4 bus2=1251.1.2.3.4 phases=4 linecode=LC6 length=20.6186 units=m
! reduced_from=line1217,line1222,line1227,line1232,line1237,line1243,line1250
! eliminated_buses=1218,1223,1228,1233,1238,1244

New Line._virtual_line1241_line1247_line1254 bus1=1237.1.2.3.4 bus2=1255.1.2.3.4 phases=4 linecode=LC4 length=6.97905 units=m
! reduced_from=line1241,line1247,line1254
! eliminated_buses=1242,1248

New Line._virtual_line1242_line1249_line1256_line1263_line1270_line1277_line1284_line1291_line1299_line1306_line1311_line1316_line1321_line1326_line1331_line1336 bus1=1237.1.2.3.4 bus2=1337.1.2.3.4 phases=4 linecode=LC6 length=15.0549 units=m
! reduced_from=line1242,line1249,line1256,line1263,line1270,line1277,line1284,line1291,line1299,line1306,line1311,line1316,line1321,line1326,line1331,line1336
! eliminated_buses=1243,1250,1257,1264,1271,1278,1285,1292,1300,1307,1312,1317,1322,1327,1332

New Line._virtual_line1260_line1267_line1274_line1281_line1288_line1296_line1304_line1309_line1314_line1319_line1324_line1329_line1334_line1339 bus1=1255.1.2.3.4 bus2=1340.1.2.3.4 phases=4 linecode=LC4 length=11.96677 units=m
! reduced_from=line1260,line1267,line1274,line1281,line1288,line1296,line1304,line1309,line1314,line1319,line1324,line1329,line1334,line1339
! eliminated_buses=1261,1268,1275,1282,1289,1297,1305,1310,1315,1320,1325,1330,1335

New Line._virtual_line1261_line1268_line1275_line1282_line1289_line1297_line1305_line1310_line1315_line1320_line1325_line1330_line1335_line1340_line1345_line1349_line1353_line1357_line1361_line1365_line1369_line1373 bus1=1255.1.2.3.4 bus2=1374.1.2.3.4 phases=4 linecode=LC6 length=21.33907 units=m
! reduced_from=line1261,line1268,line1275,line1282,line1289,line1297,line1305,line1310,line1315,line1320,line1325,line1330,line1335,line1340,line1345,line1349,line1353,line1357,line1361,line1365,line1369,line1373
! eliminated_buses=1262,1269,1276,1283,1290,1298,1306,1311,1316,1321,1326,1331,1336,1341,1346,1350,1354,1358,1362,1366,1370

New Line._virtual_line1295_line1303 bus1=1304.1.2.3.4 bus2=1288.1.2.3.4 phases=4 linecode=LC6 length=6.6808 units=m
! reduced_from=line1295,line1303
! eliminated_buses=1296

New Line._virtual_line1302_line1308_line1313_line1318_line1323_line1328_line1333_line1338_line1342_line1346_line1350_line1354_line1358_line1362_line1366_line1370_line1374_line1377_line1381_line1385_line1389 bus1=1294.1.2.3.4 bus2=1390.1.2.3.4 phases=4 linecode=LC2 length=10.830004 units=m
! reduced_from=line1302,line1308,line1313,line1318,line1323,line1328,line1333,line1338,line1342,line1346,line1350,line1354,line1358,line1362,line1366,line1370,line1374,line1377,line1381,line1385,line1389
! eliminated_buses=1303,1309,1314,1319,1324,1329,1334,1339,1343,1347,1351,1355,1359,1363,1367,1371,1375,1378,1382,1386

New Line._virtual_line1343_line1347_line1351_line1355 bus1=1356.1.2.3.4 bus2=1340.1.2.3.4 phases=4 linecode=LC4 length=7.1821 units=m
! reduced_from=line1343,line1347,line1351,line1355
! eliminated_buses=1344,1348,1352

New Line._virtual_line1344_line1348_line1352_line1356_line1360_line1364_line1368_line1372_line1376_line1380_line1384_line1388_line1392 bus1=1393.1.2.3.4 bus2=1340.1.2.3.4 phases=4 linecode=LC6 length=18.50872 units=m
! reduced_from=line1344,line1348,line1352,line1356,line1360,line1364,line1368,line1372,line1376,line1380,line1384,line1388,line1392
! eliminated_buses=1345,1349,1353,1357,1361,1365,1369,1373,1377,1381,1385,1389

New Line._virtual_line1359_line1363_line1367_line1371_line1375 bus1=1356.1.2.3.4 bus2=1376.1.2.3.4 phases=4 linecode=LC5 length=9.55603 units=m
! reduced_from=line1359,line1363,line1367,line1371,line1375
! eliminated_buses=1360,1364,1368,1372

New Line._virtual_line1378_line1382_line1386_line1390_line1393_line1395_line1397_line1399 bus1=1376.1.2.3.4 bus2=1400.1.2.3.4 phases=4 linecode=LC5 length=4.02654 units=m
! reduced_from=line1378,line1382,line1386,line1390,line1393,line1395,line1397,line1399
! eliminated_buses=1379,1383,1387,1391,1394,1396,1398

New Line._virtual_line1379_line1383_line1387_line1391_line1394_line1396_line1398_line1400_line1403_line1407_line1411_line1416_line1421_line1426 bus1=1376.1.2.3.4 bus2=1427.1.2.3.4 phases=4 linecode=LC6 length=16.06337 units=m
! reduced_from=line1379,line1383,line1387,line1391,line1394,line1396,line1398,line1400,line1403,line1407,line1411,line1416,line1421,line1426
! eliminated_buses=1380,1384,1388,1392,1395,1397,1399,1401,1404,1408,1412,1417,1422

New Line._virtual_line1401_line1404_line1408 bus1=1409.1.2.3.4 bus2=1400.1.2.3.4 phases=4 linecode=LC5 length=9.07927 units=m
! reduced_from=line1401,line1404,line1408
! eliminated_buses=1402,1405

New Line._virtual_line1402_line1406_line1410_line1415_line1420_line1425_line1430_line1433_line1436_line1439_line1442_line1445_line1448 bus1=1449.1.2.3.4 bus2=1400.1.2.3.4 phases=4 linecode=LC6 length=14.84406 units=m
! reduced_from=line1402,line1406,line1410,line1415,line1420,line1425,line1430,line1433,line1436,line1439,line1442,line1445,line1448
! eliminated_buses=1403,1407,1411,1416,1421,1426,1431,1434,1437,1440,1443,1446

New Line._virtual_line1413_line1418_line1423_line1428_line1432_line1435_line1438_line1441_line1444_line1447_line1450_line1452_line1454_line1456_line1458_line1460_line1462_line1464_line1466 bus1=1409.1.2.3.4 bus2=1467.1.2.3.4 phases=4 linecode=LC1 length=17.4582 units=m
! reduced_from=line1413,line1418,line1423,line1428,line1432,line1435,line1438,line1441,line1444,line1447,line1450,line1452,line1454,line1456,line1458,line1460,line1462,line1464,line1466
! eliminated_buses=1414,1419,1424,1429,1433,1436,1439,1442,1445,1448,1451,1453,1455,1457,1459,1461,1463,1465

New Line.LINE132 bus1=131.1.2.3.4 bus2=133.1.2.3.4 phases=4 linecode=LC1 length=14.6447 units=m

New Line.LINE137 bus1=137.1.2.3.4 bus2=138.1.2.3.4 phases=4 linecode=LC1 length=25.7451 units=m

New Line.LINE155 bus1=155.1.2.3.4 bus2=156.1.2.3.4 phases=4 linecode=LC5 length=7.6791 units=m

New Line.LINE169 bus1=167.1.2.3.4 bus2=170.1.2.3.4 phases=4 linecode=LC5 length=7.942 units=m

New Line.LINE174 bus1=170.1.2.3.4 bus2=175.1.2.3.4 phases=4 linecode=LC5 length=8.5604 units=m

New Line.LINE456 bus1=444.1.2.3.4 bus2=457.1.2.3.4 phases=4 linecode=LC6 length=5.3239 units=m

New Line.LINE534 bus1=520.1.2.3.4 bus2=535.1.2.3.4 phases=4 linecode=LC1 length=7.5419 units=m

New Line.LINE548 bus1=536.1.2.3.4 bus2=549.1.2.3.4 phases=4 linecode=LC5 length=1.0677 units=m

New Line.LINE582 bus1=573.1.2.3.4 bus2=583.1.2.3.4 phases=4 linecode=LC5 length=2.3302 units=m

New Line.LINE649 bus1=640.1.2.3.4 bus2=650.1.2.3.4 phases=4 linecode=LC3 length=5.6 units=m

New Line.LINE662 bus1=650.1.2.3.4 bus2=663.1.2.3.4 phases=4 linecode=LC3 length=5.286 units=m

New Line.LINE714 bus1=705.1.2.3.4 bus2=715.1.2.3.4 phases=4 linecode=LC3 length=1.3611 units=m

New Line.LINE726 bus1=715.1.2.3.4 bus2=727.1.2.3.4 phases=4 linecode=LC9 length=3.526 units=m

New Line.LINE743 bus1=733.1.2.3.4 bus2=744.1.2.3.4 phases=4 linecode=LC4 length=4.7668 units=m

New Line.LINE753 bus1=744.1.2.3.4 bus2=754.1.2.3.4 phases=4 linecode=LC1 length=8.4058 units=m

New Line.LINE785 bus1=777.1.2.3.4 bus2=786.1.2.3.4 phases=4 linecode=LC6 length=6.7285 units=m

New Line.LINE786 bus1=777.1.2.3.4 bus2=787.1.2.3.4 phases=4 linecode=LC6 length=6.7285 units=m

New Line.LINE797 bus1=790.1.2.3.4 bus2=798.1.2.3.4 phases=4 linecode=LC4 length=9.0199 units=m

New Line.LINE806 bus1=798.1.2.3.4 bus2=807.1.2.3.4 phases=4 linecode=LC4 length=9.7199 units=m

New Line.LINE813 bus1=804.1.2.3.4 bus2=814.1.2.3.4 phases=4 linecode=LC6 length=5.7646 units=m

New Line.LINE814 bus1=804.1.2.3.4 bus2=815.1.2.3.4 phases=4 linecode=LC6 length=4.7702 units=m

New Line.LINE848 bus1=837.1.2.3.4 bus2=849.1.2.3.4 phases=4 linecode=LC6 length=5.6502 units=m

New Line.LINE849 bus1=837.1.2.3.4 bus2=850.1.2.3.4 phases=4 linecode=LC6 length=5.6502 units=m

New Line.LINE860 bus1=852.1.2.3.4 bus2=861.1.2.3.4 phases=4 linecode=LC4 length=8.1085 units=m

New Line.LINE957 bus1=946.1.2.3.4 bus2=958.1.2.3.4 phases=4 linecode=LC6 length=6.4819 units=m

New Line.LINE997 bus1=986.1.2.3.4 bus2=998.1.2.3.4 phases=4 linecode=LC6 length=5.5874 units=m

New Line.LINE1089 bus1=1081.1.2.3.4 bus2=1090.1.2.3.4 phases=4 linecode=LC6 length=6.25 units=m

New Line.LINE1193 bus1=1190.1.2.3.4 bus2=1194.1.2.3.4 phases=4 linecode=LC6 length=2.0857 units=m

New Line.LINE1294 bus1=1288.1.2.3.4 bus2=1295.1.2.3.4 phases=4 linecode=LC6 length=3.7937 units=m

New Line.LINE1301 bus1=1294.1.2.3.4 bus2=1302.1.2.3.4 phases=4 linecode=LC2 length=2.8595 units=m
