! Reduced enabled lines.

New Line._virtual_line0_line1_line2_line3_line4_line5_line6_line7_line8_line9_line10_line11_line12_line13_line14_line15_line16_line17_line18_line19_line20_line21_line22_line23_line24_line25_line26_line27_line28_line29_line30_line31_line32_line34_line36_line38_line40_line42_line44_line46_line48_line50_line52 bus1=sourcebus.1.2.3.4 bus2=53.1.2.3.4 phases=4 linecode=LC8 length=79.866799 units=m
! reduced_from=line0,line1,line2,line3,line4,line5,line6,line7,line8,line9,line10,line11,line12,line13,line14,line15,line16,line17,line18,line19,line20,line21,line22,line23,line24,line25,line26,line27,line28,line29,line30,line31,line32,line34,line36,line38,line40,line42,line44,line46,line48,line50,line52
! eliminated_buses=1,2,3,4,5,6,7,8,9,10,11,12,13,14,15,16,17,18,19,20,21,22,23,24,25,26,27,28,29,30,31,32,33,35,37,39,41,43,45,47,49,51

New Line._virtual_line54_line57_line61_line67_line72_line79_line85_line91 bus1=92.1.2.3.4 bus2=53.1.2.3.4 phases=4 linecode=LC8 length=59.2901 units=m
! reduced_from=line54,line57,line61,line67,line72,line79,line85,line91
! eliminated_buses=55,58,62,68,73,80,86

New Line._virtual_line59_line65_line70_line77_line83_line89_line95 bus1=56.1.2.3.4 bus2=96.1.2.3.4 phases=4 linecode=LC2 length=4.99077 units=m
! reduced_from=line59,line65,line70,line77,line83,line89,line95
! eliminated_buses=60,66,71,78,84,90

New Line._virtual_line60_line66_line71_line78_line84_line90_line96 bus1=56.1.2.3.4 bus2=97.1.2.3.4 phases=4 linecode=LC2 length=7.3354 units=m
! reduced_from=line60,line66,line71,line78,line84,line90,line96
! eliminated_buses=61,67,72,79,85,91

New Line._virtual_line97_line106_line114_line122 bus1=123.1.2.3.4 bus2=92.1.2.3.4 phases=4 linecode=LC8 length=31.8093 units=m
! reduced_from=line97,line106,line114,line122
! eliminated_buses=98,107,115

New Line._virtual_line98_line107_line115_line123_line132_line142_line152_line162_line171_line180_line190_line199 bus1=200.1.2.3.4 bus2=92.1.2.3.4 phases=4 linecode=LC8 length=25.57014 units=m
! reduced_from=line98,line107,line115,line123,line132,line142,line152,line162,line171,line180,line190,line199
! eliminated_buses=99,108,116,124,133,143,153,163,172,181,191

New Line._virtual_line102_line110_line117_line125_line134_line144_line153_line163_line172_line181_line191_line200 bus1=201.1.2.3.4 bus2=96.1.2.3.4 phases=4 linecode=LC2 length=8.15639 units=m
! reduced_from=line102,line110,line117,line125,line134,line144,line153,line163,line172,line181,line191,line200
! eliminated_buses=103,111,118,126,135,145,154,164,173,182,192

New Line._virtual_line104_line111_line118_line126_line135_line145_line154_line164_line173_line182_line192_line201_line213 bus1=97.1.2.3.4 bus2=214.1.2.3.4 phases=4 linecode=LC2 length=8.176881 units=m
! reduced_from=line104,line111,line118,line126,line135,line145,line154,line164,line173,line182,line192,line201,line213
! eliminated_buses=105,112,119,127,136,146,155,165,174,183,193,202

New Line._virtual_line131_line141 bus1=123.1.2.3.4 bus2=142.1.2.3.4 phases=4 linecode=LC8 length=19.714 units=m
! reduced_from=line131,line141
! eliminated_buses=132

New Line._virtual_line139_line149_line158_line167_line176_line185_line194_line203_line214_line228_line242 bus1=131.1.2.3.4 bus2=243.1.2.3.4 phases=4 linecode=LC2 length=8.544922 units=m
! reduced_from=line139,line149,line158,line167,line176,line185,line194,line203,line214,line228,line242
! eliminated_buses=140,150,159,168,177,186,195,204,215,229

New Line._virtual_line151_line161_line170_line179_line188_line197 bus1=142.1.2.3.4 bus2=198.1.2.3.4 phases=4 linecode=LC8 length=32.18982 units=m
! reduced_from=line151,line161,line170,line179,line188,line197
! eliminated_buses=152,162,171,180,189

New Line._virtual_line159_line168_line177_line186_line195_line204 bus1=205.1.2.3.4 bus2=151.1.2.3.4 phases=4 linecode=LC2 length=3.39014 units=m
! reduced_from=line159,line168,line177,line186,line195,line204
! eliminated_buses=160,169,178,187,196

New Line._virtual_line160_line169_line178_line187_line196_line205_line217 bus1=151.1.2.3.4 bus2=218.1.2.3.4 phases=4 linecode=LC2 length=5.561817 units=m
! reduced_from=line160,line169,line178,line187,line196,line205,line217
! eliminated_buses=161,170,179,188,197,206

New Line._virtual_line206_line218_line232_line245_line260_line275_line290_line306_line322_line337 bus1=198.1.2.3.4 bus2=338.1.2.3.4 phases=4 linecode=LC2 length=6.53371 units=m
! reduced_from=line206,line218,line232,line245,line260,line275,line290,line306,line322,line337
! eliminated_buses=207,219,233,246,261,276,291,307,323

New Line._virtual_line207_line220_line234_line247_line262_line277 bus1=198.1.2.3.4 bus2=278.1.2.3.4 phases=4 linecode=LC8 length=21.46519 units=m
! reduced_from=line207,line220,line234,line247,line262,line277
! eliminated_buses=208,221,235,248,263

New Line._virtual_line209_line222_line236_line249_line264 bus1=200.1.2.3.4 bus2=265.1.2.3.4 phases=4 linecode=LC2 length=10.76208 units=m
! reduced_from=line209,line222,line236,line249,line264
! eliminated_buses=210,223,237,250

New Line._virtual_line212_line225_line240_line254_line270_line285_line301_line317_line332_line350_line370_line390_line411 bus1=201.1.2.3.4 bus2=412.1.2.3.4 phases=4 linecode=LC2 length=11.72995 units=m
! reduced_from=line212,line225,line240,line254,line270,line285,line301,line317,line332,line350,line370,line390,line411
! eliminated_buses=213,226,241,255,271,286,302,318,333,351,371,391

New Line._virtual_line215_line229_line243_line258_line273_line288_line304_line320_line335_line353_line372_line392_line413_line433 bus1=434.1.2.3.4 bus2=205.1.2.3.4 phases=4 linecode=LC2 length=12.02879 units=m
! reduced_from=line215,line229,line243,line258,line273,line288,line304,line320,line335,line353,line372,line392,line413,line433
! eliminated_buses=216,230,244,259,274,289,305,321,336,354,373,393,414

New Line._virtual_line223_line237_line250 bus1=211.1.2.3.4 bus2=251.1.2.3.4 phases=4 linecode=LC2 length=16.4452 units=m
! reduced_from=line223,line237,line250
! eliminated_buses=224,238

New Line._virtual_line224_line239 bus1=211.1.2.3.4 bus2=240.1.2.3.4 phases=4 linecode=LC8 length=15.2677 units=m
! reduced_from=line224,line239
! eliminated_buses=225

New Line._virtual_line226_line241_line255_line271_line286_line302_line318_line333_line351 bus1=214.1.2.3.4 bus2=352.1.2.3.4 phases=4 linecode=LC2 length=14.89157 units=m
! reduced_from=line226,line241,line255,line271,line286,line302,line318,line333,line351
! eliminated_buses=227,242,256,272,287,303,319,334

New Line._virtual_line230_line244_line259_line274_line289_line305_line321_line336_line354_line373_line393_line414_line434_line456_line480 bus1=218.1.2.3.4 bus2=481.1.2.3.4 phases=4 linecode=LC2 length=12.162069 units=m
! reduced_from=line230,line244,line259,line274,line289,line305,line321,line336,line354,line373,line393,line414,line434,line456,line480
! eliminated_buses=231,245,260,275,290,306,322,337,355,374,394,415,435,457

New Line._virtual_line252_line268_line283 bus1=240.1.2.3.4 bus2=284.1.2.3.4 phases=4 linecode=LC8 length=18.4074 units=m
! reduced_from=line252,line268,line283
! eliminated_buses=253,269

New Line._virtual_line253_line269_line284_line300_line316_line331_line349_line369_line389_line410_line431_line455_line479_line503 bus1=240.1.2.3.4 bus2=504.1.2.3.4 phases=4 linecode=LC3 length=30.85629 units=m
! reduced_from=line253,line269,line284,line300,line316,line331,line349,line369,line389,line410,line431,line455,line479,line503
! eliminated_buses=254,270,285,301,317,332,350,370,390,411,432,456,480

New Line._virtual_line256_line272_line287_line303_line319_line334_line352_line371_line391_line412_line432 bus1=433.1.2.3.4 bus2=243.1.2.3.4 phases=4 linecode=LC2 length=14.001 units=m
! reduced_from=line256,line272,line287,line303,line319,line334,line352,line371,line391,line412,line432
! eliminated_buses=257,273,288,304,320,335,353,372,392,413

New Line._virtual_line265_line281_line296_line311_line326_line341_line360_line379_line399_line420 bus1=251.1.2.3.4 bus2=421.1.2.3.4 phases=4 linecode=LC2 length=21.82432 units=m
! reduced_from=line265,line281,line296,line311,line326,line341,line360,line379,line399,line420
! eliminated_buses=266,282,297,312,327,342,361,380,400

New Line._virtual_line279_line295 bus1=296.1.2.3.4 bus2=265.1.2.3.4 phases=4 linecode=LC2 length=8.1226 units=m
! reduced_from=line279,line295
! eliminated_buses=280

New Line._virtual_line298_line313_line328 bus1=329.1.2.3.4 bus2=284.1.2.3.4 phases=4 linecode=LC2 length=16.046 units=m
! reduced_from=line298,line313,line328
! eliminated_buses=299,314

New Line._virtual_line299_line315_line330 bus1=331.1.2.3.4 bus2=284.1.2.3.4 phases=4 linecode=LC8 length=21.868 units=m
! reduced_from=line299,line315,line330
! eliminated_buses=300,316

New Line._virtual_line308_line324_line339_line358_line377_line397_line418_line438_line460_line484_line508_line533 bus1=294.1.2.3.4 bus2=534.1.2.3.4 phases=4 linecode=LC2 length=8.36087 units=m
! reduced_from=line308,line324,line339,line358,line377,line397,line418,line438,line460,line484,line508,line533
! eliminated_buses=309,325,340,359,378,398,419,439,461,485,509

New Line._virtual_line343_line362_line381_line401_line422_line443 bus1=329.1.2.3.4 bus2=444.1.2.3.4 phases=4 linecode=LC2 length=5.60603 units=m
! reduced_from=line343,line362,line381,line401,line422,line443
! eliminated_buses=344,363,382,402,423

New Line._virtual_line344_line363_line382_line402_line423 bus1=329.1.2.3.4 bus2=424.1.2.3.4 phases=4 linecode=LC2 length=3.14004 units=m
! reduced_from=line344,line363,line382,line402,line423
! eliminated_buses=345,364,383,403

New Line._virtual_line346_line365_line384_line404_line424 bus1=425.1.2.3.4 bus2=331.1.2.3.4 phases=4 linecode=LC2 length=15.40438 units=m
! reduced_from=line346,line365,line384,line404,line424
! eliminated_buses=347,366,385,405

New Line._virtual_line355_line374_line394_line415_line435_line457_line481_line504 bus1=338.1.2.3.4 bus2=505.1.2.3.4 phases=4 linecode=LC2 length=2.76944 units=m
! reduced_from=line355,line374,line394,line415,line435,line457,line481,line504
! eliminated_buses=356,375,395,416,436,458,482

New Line._virtual_line356_line375_line395_line416_line436_line458_line482 bus1=483.1.2.3.4 bus2=338.1.2.3.4 phases=4 linecode=LC2 length=6.648323 units=m
! reduced_from=line356,line375,line395,line416,line436,line458,line482
! eliminated_buses=357,376,396,417,437,459

New Line._virtual_line368_line388_line409_line429_line453_line474_line499_line523 bus1=349.1.2.3.4 bus2=524.1.2.3.4 phases=4 linecode=LC8 length=43.1503 units=m
! reduced_from=line368,line388,line409,line429,line453,line474,line499,line523
! eliminated_buses=369,389,410,430,454,475,500

New Line._virtual_line386_line406_line426_line448_line468 bus1=469.1.2.3.4 bus2=368.1.2.3.4 phases=4 linecode=LC2 length=5.96 units=m
! reduced_from=line386,line406,line426,line448,line468
! eliminated_buses=387,407,427,449

New Line._virtual_line387_line407_line427_line449_line469_line493 bus1=494.1.2.3.4 bus2=368.1.2.3.4 phases=4 linecode=LC2 length=5.801291 units=m
! reduced_from=line387,line407,line427,line449,line469,line493
! eliminated_buses=388,408,428,450,470

New Line._virtual_line444_line465_line488_line512_line537_line563_line588_line617_line648_line679_line712 bus1=713.1.2.3.4 bus2=424.1.2.3.4 phases=4 linecode=LC2 length=10.25 units=m
! reduced_from=line444,line465,line488,line512,line537,line563,line588,line617,line648,line679,line712
! eliminated_buses=445,466,489,513,538,564,589,618,649,680

New Line._virtual_line446_line466_line489_line513_line538_line564 bus1=425.1.2.3.4 bus2=565.1.2.3.4 phases=4 linecode=LC2 length=6.90096 units=m
! reduced_from=line446,line466,line489,line513,line538,line564
! eliminated_buses=447,467,490,514,539

New Line._virtual_line447_line467_line490_line514_line539_line565_line591 bus1=592.1.2.3.4 bus2=425.1.2.3.4 phases=4 linecode=LC2 length=1.401143 units=m
! reduced_from=line447,line467,line490,line514,line539,line565,line591
! eliminated_buses=448,468,491,515,540,566

New Line._virtual_line463_line487_line511_line536_line562_line587_line616_line647_line678 bus1=679.1.2.3.4 bus2=444.1.2.3.4 phases=4 linecode=LC2 length=10.69284 units=m
! reduced_from=line463,line487,line511,line536,line562,line587,line616,line647,line678
! eliminated_buses=464,488,512,537,563,588,617,648

New Line._virtual_line491_line515_line540_line566_line592_line622_line652_line683_line716_line747 bus1=469.1.2.3.4 bus2=748.1.2.3.4 phases=4 linecode=LC2 length=13.84201 units=m
! reduced_from=line491,line515,line540,line566,line592,line622,line652,line683,line716,line747
! eliminated_buses=492,516,541,567,593,623,653,684,717

New Line._virtual_line505_line531_line556_line583_line612_line643_line674_line709_line741_line771_line800_line828_line853 bus1=483.1.2.3.4 bus2=854.1.2.3.4 phases=4 linecode=LC2 length=12.477526 units=m
! reduced_from=line505,line531,line556,line583,line612,line643,line674,line709,line741,line771,line800,line828,line853
! eliminated_buses=506,532,557,584,613,644,675,710,742,772,801,829

New Line._virtual_line516_line541_line567_line593_line623_line653_line684_line717_line748_line777 bus1=778.1.2.3.4 bus2=494.1.2.3.4 phases=4 linecode=LC2 length=13.20678 units=m
! reduced_from=line516,line541,line567,line593,line623,line653,line684,line717,line748,line777
! eliminated_buses=517,542,568,594,624,654,685,718,749

New Line._virtual_line529_line555_line582_line611_line642_line673_line708_line740_line770_line799_line827_line852_line877 bus1=878.1.2.3.4 bus2=505.1.2.3.4 phases=4 linecode=LC2 length=11.264769 units=m
! reduced_from=line529,line555,line582,line611,line642,line673,line708,line740,line770,line799,line827,line852,line877
! eliminated_buses=530,556,583,612,643,674,709,741,771,800,828,853

New Line._virtual_line547_line573_line599_line628_line658_line689_line722_line751_line780_line808_line836_line861_line884_line906_line923 bus1=924.1.2.3.4 bus2=524.1.2.3.4 phases=4 linecode=LC3 length=28.87262 units=m
! reduced_from=line547,line573,line599,line628,line658,line689,line722,line751,line780,line808,line836,line861,line884,line906,line923
! eliminated_buses=548,574,600,629,659,690,723,752,781,809,837,862,885,907

New Line._virtual_line548_line576 bus1=524.1.2.3.4 bus2=577.1.2.3.4 phases=4 linecode=LC8 length=12.7838 units=m
! reduced_from=line548,line576
! eliminated_buses=549

New Line._virtual_line551_line578_line606_line636_line666 bus1=528.1.2.3.4 bus2=667.1.2.3.4 phases=4 linecode=LC2 length=3.36087 units=m
! reduced_from=line551,line578,line606,line636,line666
! eliminated_buses=552,579,607,637

New Line._virtual_line552_line579_line607_line637_line667 bus1=528.1.2.3.4 bus2=668.1.2.3.4 phases=4 linecode=LC2 length=4.91212 units=m
! reduced_from=line552,line579,line607,line637,line667
! eliminated_buses=553,580,608,638

New Line._virtual_line553_line580_line608 bus1=529.1.2.3.4 bus2=609.1.2.3.4 phases=4 linecode=LC2 length=13.4326 units=m
! reduced_from=line553,line580,line608
! eliminated_buses=554,581

New Line._virtual_line554_line581_line610_line641_line672_line707_line739_line769_line798_line826_line851_line876_line899_line917_line934 bus1=529.1.2.3.4 bus2=935.1.2.3.4 phases=4 linecode=LC3 length=41.707605 units=m
! reduced_from=line554,line581,line610,line641,line672,line707,line739,line769,line798,line826,line851,line876,line899,line917,line934
! eliminated_buses=555,582,611,642,673,708,740,770,799,827,852,877,900,918

New Line._virtual_line558_line584_line613_line644_line675_line710_line742_line772_line801_line829_line854 bus1=855.1.2.3.4 bus2=534.1.2.3.4 phases=4 linecode=LC2 length=11.61301 units=m
! reduced_from=line558,line584,line613,line644,line675,line710,line742,line772,line801,line829,line854
! eliminated_buses=559,585,614,645,676,711,743,773,802,830

New Line._virtual_line590_line618_line649_line680_line713_line744_line774_line803_line831_line856_line879_line901_line919 bus1=920.1.2.3.4 bus2=565.1.2.3.4 phases=4 linecode=LC2 length=11.08135 units=m
! reduced_from=line590,line618,line649,line680,line713,line744,line774,line803,line831,line856,line879,line901,line919
! eliminated_buses=591,619,650,681,714,745,775,804,832,857,880,902

New Line._virtual_line602_line631_line661_line692_line725_line754_line783_line811 bus1=812.1.2.3.4 bus2=577.1.2.3.4 phases=4 linecode=LC2 length=10.63079 units=m
! reduced_from=line602,line631,line661,line692,line725,line754,line783,line811
! eliminated_buses=603,632,662,693,726,755,784

New Line._virtual_line620_line650_line681_line714_line745_line775_line804_line832_line857_line880_line902_line920 bus1=921.1.2.3.4 bus2=592.1.2.3.4 phases=4 linecode=LC2 length=13.02968 units=m
! reduced_from=line620,line650,line681,line714,line745,line775,line804,line832,line857,line880,line902,line920
! eliminated_buses=621,651,682,715,746,776,805,833,858,881,903

New Line._virtual_line633_line663_line694_line727_line756_line785_line813_line841 bus1=604.1.2.3.4 bus2=842.1.2.3.4 phases=4 linecode=LC2 length=16.91687 units=m
! reduced_from=line633,line663,line694,line727,line756,line785,line813,line841
! eliminated_buses=634,664,695,728,757,786,814

New Line._virtual_line639_line670_line705_line737_line767_line796 bus1=797.1.2.3.4 bus2=609.1.2.3.4 phases=4 linecode=LC2 length=10.82792 units=m
! reduced_from=line639,line670,line705,line737,line767,line796
! eliminated_buses=640,671,706,738,768

New Line._virtual_line664_line695_line728_line757_line786_line814_line842_line867 bus1=635.1.2.3.4 bus2=868.1.2.3.4 phases=4 linecode=LC2 length=11.11288 units=m
! reduced_from=line664,line695,line728,line757,line786,line814,line842,line867
! eliminated_buses=665,696,729,758,787,815,843

New Line._virtual_line665_line697_line730_line760_line789_line816_line844_line869_line892_line913_line930_line946_line963_line981_line1000_line1022_line1047_line1066_line1086_line1103_line1122_line1140_line1157_line1176_line1190_line1204_line1216_line1229_line1242_line1257_line1269_line1283_line1296 bus1=635.1.2.3.4 bus2=1297.1.2.3.4 phases=4 linecode=LC8 length=45.35888 units=m
! reduced_from=line665,line697,line730,line760,line789,line816,line844,line869,line892,line913,line930,line946,line963,line981,line1000,line1022,line1047,line1066,line1086,line1103,line1122,line1140,line1157,line1176,line1190,line1204,line1216,line1229,line1242,line1257,line1269,line1283,line1296
! eliminated_buses=666,698,731,761,790,817,845,870,893,914,931,947,964,982,1001,1023,1048,1067,1087,1104,1123,1141,1158,1177,1191,1205,1217,1230,1243,1258,1270,1284

New Line._virtual_line669_line704_line736_line766_line795_line823 bus1=824.1.2.3.4 bus2=639.1.2.3.4 phases=4 linecode=LC2 length=11.0374 units=m
! reduced_from=line669,line704,line736,line766,line795,line823
! eliminated_buses=670,705,737,767,796

New Line._virtual_line698_line731_line761_line790_line817_line845_line870_line893_line914_line931_line947_line964_line982_line1001 bus1=667.1.2.3.4 bus2=1002.1.2.3.4 phases=4 linecode=LC2 length=21.84471 units=m
! reduced_from=line698,line731,line761,line790,line817,line845,line870,line893,line914,line931,line947,line964,line982,line1001
! eliminated_buses=699,732,762,791,818,846,871,894,915,932,948,965,983

New Line._virtual_line700_line732_line762_line791_line818_line846_line871_line894_line915_line932_line948_line965_line983_line1002_line1026_line1049 bus1=668.1.2.3.4 bus2=1050.1.2.3.4 phases=4 linecode=LC2 length=21.70948 units=m
! reduced_from=line700,line732,line762,line791,line818,line846,line871,line894,line915,line932,line948,line965,line983,line1002,line1026,line1049
! eliminated_buses=701,733,763,792,819,847,872,895,916,933,949,966,984,1003,1027

New Line._virtual_line703_line735_line765_line794 bus1=795.1.2.3.4 bus2=669.1.2.3.4 phases=4 linecode=LC1 length=7.673 units=m
! reduced_from=line703,line735,line765,line794
! eliminated_buses=704,736,766

New Line._virtual_line733_line763_line792_line819_line847_line872 bus1=703.1.2.3.4 bus2=873.1.2.3.4 phases=4 linecode=LC2 length=19.83383 units=m
! reduced_from=line733,line763,line792,line819,line847,line872
! eliminated_buses=734,764,793,820,848

New Line._virtual_line734_line764_line793_line820_line848_line873 bus1=703.1.2.3.4 bus2=874.1.2.3.4 phases=4 linecode=LC1 length=1.24032 units=m
! reduced_from=line734,line764,line793,line820,line848,line873
! eliminated_buses=735,765,794,821,849

New Line._virtual_line840_line864_line887_line909_line926_line942_line959_line977_line996_line1018_line1042_line1063_line1083_line1100 bus1=812.1.2.3.4 bus2=1101.1.2.3.4 phases=4 linecode=LC2 length=16.53181 units=m
! reduced_from=line840,line864,line887,line909,line926,line942,line959,line977,line996,line1018,line1042,line1063,line1083,line1100
! eliminated_buses=841,865,888,910,927,943,960,978,997,1019,1043,1064,1084

New Line._virtual_line866_line888_line910_line927_line943_line960_line978_line997_line1019_line1043_line1064_line1084_line1101_line1120_line1138_line1155 bus1=842.1.2.3.4 bus2=1156.1.2.3.4 phases=4 linecode=LC2 length=11.631718 units=m
! reduced_from=line866,line888,line910,line927,line943,line960,line978,line997,line1019,line1043,line1064,line1084,line1101,line1120,line1138,line1155
! eliminated_buses=867,889,911,928,944,961,979,998,1020,1044,1065,1085,1102,1121,1139

New Line._virtual_line890_line911_line928_line944_line961_line979_line998_line1020 bus1=1021.1.2.3.4 bus2=868.1.2.3.4 phases=4 linecode=LC2 length=9.16643 units=m
! reduced_from=line890,line911,line928,line944,line961,line979,line998,line1020
! eliminated_buses=891,912,929,945,962,980,999

New Line._virtual_line951_line968_line985_line1004_line1028_line1052_line1072_line1090_line1107_line1127 bus1=1128.1.2.3.4 bus2=935.1.2.3.4 phases=4 linecode=LC3 length=12.20198 units=m
! reduced_from=line951,line968,line985,line1004,line1028,line1052,line1072,line1090,line1107,line1127
! eliminated_buses=952,969,986,1005,1029,1053,1073,1091,1108

New Line._virtual_line954_line972_line989_line1008_line1033_line1055_line1075_line1093_line1109 bus1=939.1.2.3.4 bus2=1110.1.2.3.4 phases=4 linecode=LC3 length=43.0851 units=m
! reduced_from=line954,line972,line989,line1008,line1033,line1055,line1075,line1093,line1109
! eliminated_buses=955,973,990,1009,1034,1056,1076,1094

New Line._virtual_line956_line975_line994_line1016_line1040_line1062_line1082_line1099_line1116_line1136_line1153_line1171_line1186_line1200 bus1=1201.1.2.3.4 bus2=941.1.2.3.4 phases=4 linecode=LC2 length=17.30548 units=m
! reduced_from=line956,line975,line994,line1016,line1040,line1062,line1082,line1099,line1116,line1136,line1153,line1171,line1186,line1200
! eliminated_buses=957,976,995,1017,1041,1063,1083,1100,1117,1137,1154,1172,1187

New Line._virtual_line966_line984_line1003_line1027_line1050_line1071_line1089_line1106_line1126_line1142_line1159_line1177_line1191 bus1=951.1.2.3.4 bus2=1192.1.2.3.4 phases=4 linecode=LC2 length=18.328435 units=m
! reduced_from=line966,line984,line1003,line1027,line1050,line1071,line1089,line1106,line1126,line1142,line1159,line1177,line1191
! eliminated_buses=967,985,1004,1028,1051,1072,1090,1107,1127,1143,1160,1178

New Line._virtual_line974_line993_line1015_line1039 bus1=956.1.2.3.4 bus2=1040.1.2.3.4 phases=4 linecode=LC3 length=16.41096 units=m
! reduced_from=line974,line993,line1015,line1039
! eliminated_buses=975,994,1016

New Line._virtual_line1010_line1035_line1057_line1077_line1095_line1111_line1132_line1149_line1167_line1183_line1197_line1210 bus1=991.1.2.3.4 bus2=1211.1.2.3.4 phases=4 linecode=LC2 length=13.65365 units=m
! reduced_from=line1010,line1035,line1057,line1077,line1095,line1111,line1132,line1149,line1167,line1183,line1197,line1210
! eliminated_buses=1011,1036,1058,1078,1096,1112,1133,1150,1168,1184,1198

New Line._virtual_line1012_line1036_line1058_line1078_line1096 bus1=992.1.2.3.4 bus2=1097.1.2.3.4 phases=4 linecode=LC2 length=11.84913 units=m
! reduced_from=line1012,line1036,line1058,line1078,line1096
! eliminated_buses=1013,1037,1059,1079

New Line._virtual_line1023_line1048_line1067_line1087_line1104_line1123_line1141_line1158 bus1=1002.1.2.3.4 bus2=1159.1.2.3.4 phases=4 linecode=LC2 length=12.41905 units=m
! reduced_from=line1023,line1048,line1067,line1087,line1104,line1123,line1141,line1158
! eliminated_buses=1024,1049,1068,1088,1105,1124,1142

New Line._virtual_line1061_line1081_line1098_line1115_line1135_line1152_line1170_line1185_line1199_line1212_line1225_line1238 bus1=1040.1.2.3.4 bus2=1239.1.2.3.4 phases=4 linecode=LC2 length=13.99061 units=m
! reduced_from=line1061,line1081,line1098,line1115,line1135,line1152,line1170,line1185,line1199,line1212,line1225,line1238
! eliminated_buses=1062,1082,1099,1116,1136,1153,1171,1186,1200,1213,1226

New Line._virtual_line1068_line1088_line1105 bus1=1106.1.2.3.4 bus2=1050.1.2.3.4 phases=4 linecode=LC2 length=6.32018 units=m
! reduced_from=line1068,line1088,line1105
! eliminated_buses=1069,1089

New Line._virtual_line1112_line1133_line1150_line1168_line1184_line1198_line1211_line1224_line1237 bus1=1097.1.2.3.4 bus2=1238.1.2.3.4 phases=4 linecode=LC2 length=6.833733 units=m
! reduced_from=line1112,line1133,line1150,line1168,line1184,line1198,line1211,line1224,line1237
! eliminated_buses=1113,1134,1151,1169,1185,1199,1212,1225

New Line._virtual_line1117_line1137_line1154_line1172_line1187_line1201_line1213_line1226_line1239_line1255_line1267 bus1=1101.1.2.3.4 bus2=1268.1.2.3.4 phases=4 linecode=LC2 length=15.32595 units=m
! reduced_from=line1117,line1137,line1154,line1172,line1187,line1201,line1213,line1226,line1239,line1255,line1267
! eliminated_buses=1118,1138,1155,1173,1188,1202,1214,1227,1240,1256

New Line._virtual_line1129_line1146 bus1=1147.1.2.3.4 bus2=1110.1.2.3.4 phases=4 linecode=LC2 length=14.7395 units=m
! reduced_from=line1129,line1146
! eliminated_buses=1130

New Line._virtual_line1130_line1147_line1165_line1182_line1196_line1209 bus1=1110.1.2.3.4 bus2=1210.1.2.3.4 phases=4 linecode=LC3 length=9.07449 units=m
! reduced_from=line1130,line1147,line1165,line1182,line1196,line1209
! eliminated_buses=1131,1148,1166,1183,1197

New Line._virtual_line1143_line1160_line1178_line1192_line1205_line1218_line1231_line1244_line1259 bus1=1128.1.2.3.4 bus2=1260.1.2.3.4 phases=4 linecode=LC3 length=12.09358 units=m
! reduced_from=line1143,line1160,line1178,line1192,line1205,line1218,line1231,line1244,line1259
! eliminated_buses=1144,1161,1179,1193,1206,1219,1232,1245

New Line._virtual_line1144_line1161_line1179_line1193_line1206_line1219_line1232_line1245_line1260_line1273_line1288_line1300_line1313_line1328_line1341 bus1=1128.1.2.3.4 bus2=1342.1.2.3.4 phases=4 linecode=LC2 length=21.175557 units=m
! reduced_from=line1144,line1161,line1179,line1193,line1206,line1219,line1232,line1245,line1260,line1273,line1288,line1300,line1313,line1328,line1341
! eliminated_buses=1145,1162,1180,1194,1207,1220,1233,1246,1261,1274,1289,1301,1314,1329

New Line._virtual_line1163_line1181_line1195_line1208_line1221_line1234 bus1=1147.1.2.3.4 bus2=1235.1.2.3.4 phases=4 linecode=LC2 length=5.938147 units=m
! reduced_from=line1163,line1181,line1195,line1208,line1221,line1234
! eliminated_buses=1164,1182,1196,1209,1222

New Line._virtual_line1174_line1188_line1202_line1214_line1227_line1240_line1256_line1268_line1282_line1295_line1307_line1321 bus1=1322.1.2.3.4 bus2=1156.1.2.3.4 phases=4 linecode=LC2 length=13.804816 units=m
! reduced_from=line1174,line1188,line1202,line1214,line1227,line1240,line1256,line1268,line1282,line1295,line1307,line1321
! eliminated_buses=1175,1189,1203,1215,1228,1241,1257,1269,1283,1296,1308

New Line._virtual_line1222_line1235_line1249_line1265_line1278_line1293_line1305_line1319_line1331_line1345_line1356 bus1=1210.1.2.3.4 bus2=1357.1.2.3.4 phases=4 linecode=LC8 length=14.27327 units=m
! reduced_from=line1222,line1235,line1249,line1265,line1278,line1293,line1305,line1319,line1331,line1345,line1356
! eliminated_buses=1223,1236,1250,1266,1279,1294,1306,1320,1332,1346

New Line._virtual_line1223_line1236_line1250_line1266_line1279_line1294_line1306_line1320_line1332_line1346_line1357_line1367_line1380_line1390_line1401 bus1=1402.1.2.3.4 bus2=1210.1.2.3.4 phases=4 linecode=LC2 length=22.613187 units=m
! reduced_from=line1223,line1236,line1250,line1266,line1279,line1294,line1306,line1320,line1332,line1346,line1357,line1367,line1380,line1390,line1401
! eliminated_buses=1224,1237,1251,1267,1280,1295,1307,1321,1333,1347,1358,1368,1381,1391

New Line._virtual_line1248_line1264_line1277_line1292_line1304_line1318 bus1=1319.1.2.3.4 bus2=1235.1.2.3.4 phases=4 linecode=LC2 length=11.54806 units=m
! reduced_from=line1248,line1264,line1277,line1292,line1304,line1318
! eliminated_buses=1249,1265,1278,1293,1305

New Line._virtual_line1262_line1275_line1290_line1302 bus1=1248.1.2.3.4 bus2=1303.1.2.3.4 phases=4 linecode=LC2 length=7.69014 units=m
! reduced_from=line1262,line1275,line1290,line1302
! eliminated_buses=1263,1276,1291

New Line._virtual_line1263_line1276_line1291_line1303_line1317_line1330 bus1=1248.1.2.3.4 bus2=1331.1.2.3.4 phases=4 linecode=LC2 length=7.522293 units=m
! reduced_from=line1263,line1276,line1291,line1303,line1317,line1330
! eliminated_buses=1264,1277,1292,1304,1318

New Line._virtual_line1271_line1286_line1298_line1311_line1326_line1339_line1351_line1362_line1374_line1384_line1394_line1405_line1416 bus1=1417.1.2.3.4 bus2=1260.1.2.3.4 phases=4 linecode=LC3 length=19.90191 units=m
! reduced_from=line1271,line1286,line1298,line1311,line1326,line1339,line1351,line1362,line1374,line1384,line1394,line1405,line1416
! eliminated_buses=1272,1287,1299,1312,1327,1340,1352,1363,1375,1385,1395,1406

New Line._virtual_line1272_line1287_line1299_line1312_line1327_line1340_line1352_line1363_line1375_line1385 bus1=1260.1.2.3.4 bus2=1386.1.2.3.4 phases=4 linecode=LC2 length=13.66641 units=m
! reduced_from=line1272,line1287,line1299,line1312,line1327,line1340,line1352,line1363,line1375,line1385
! eliminated_buses=1273,1288,1300,1313,1328,1341,1353,1364,1376

New Line._virtual_line1309_line1324_line1337_line1349_line1360_line1372_line1383_line1393_line1404_line1415_line1426_line1438_line1450_line1461_line1470_line1480_line1491_line1501_line1511_line1522_line1531_line1539 bus1=1540.1.2.3.4 bus2=1297.1.2.3.4 phases=4 linecode=LC8 length=32.711346 units=m
! reduced_from=line1309,line1324,line1337,line1349,line1360,line1372,line1383,line1393,line1404,line1415,line1426,line1438,line1450,line1461,line1470,line1480,line1491,line1501,line1511,line1522,line1531,line1539
! eliminated_buses=1310,1325,1338,1350,1361,1373,1384,1394,1405,1416,1427,1439,1451,1462,1471,1481,1492,1502,1512,1523,1532

New Line._virtual_line1322_line1335_line1347_line1358 bus1=1359.1.2.3.4 bus2=1309.1.2.3.4 phases=4 linecode=LC2 length=9.25007 units=m
! reduced_from=line1322,line1335,line1347,line1358
! eliminated_buses=1323,1336,1348

New Line._virtual_line1323_line1336_line1348_line1359 bus1=1360.1.2.3.4 bus2=1309.1.2.3.4 phases=4 linecode=LC2 length=3.83215 units=m
! reduced_from=line1323,line1336,line1348,line1359
! eliminated_buses=1324,1337,1349

New Line._virtual_line1353_line1364_line1376_line1386_line1397_line1407 bus1=1342.1.2.3.4 bus2=1408.1.2.3.4 phases=4 linecode=LC2 length=12.71498 units=m
! reduced_from=line1353,line1364,line1376,line1386,line1397,line1407
! eliminated_buses=1354,1365,1377,1387,1398

New Line._virtual_line1366_line1379_line1389_line1400_line1410_line1422_line1433_line1445 bus1=1446.1.2.3.4 bus2=1357.1.2.3.4 phases=4 linecode=LC3 length=11.04726 units=m
! reduced_from=line1366,line1379,line1389,line1400,line1410,line1422,line1433,line1445
! eliminated_buses=1367,1380,1390,1401,1411,1423,1434

New Line._virtual_line1369_line1381_line1391_line1402_line1413_line1424_line1436_line1447_line1459_line1468 bus1=1359.1.2.3.4 bus2=1469.1.2.3.4 phases=4 linecode=LC2 length=7.257082 units=m
! reduced_from=line1369,line1381,line1391,line1402,line1413,line1424,line1436,line1447,line1459,line1468
! eliminated_buses=1370,1382,1392,1403,1414,1425,1437,1448,1460

New Line._virtual_line1371_line1382_line1392_line1403_line1414_line1425_line1437_line1448 bus1=1449.1.2.3.4 bus2=1360.1.2.3.4 phases=4 linecode=LC2 length=13.0204 units=m
! reduced_from=line1371,line1382,line1392,line1403,line1414,line1425,line1437,line1448
! eliminated_buses=1372,1383,1393,1404,1415,1426,1438

New Line._virtual_line1395_line1406_line1417_line1429_line1442_line1454_line1464_line1473_line1483_line1495_line1505_line1516_line1525_line1534_line1542_line1551 bus1=1386.1.2.3.4 bus2=1552.1.2.3.4 phases=4 linecode=LC2 length=18.655965 units=m
! reduced_from=line1395,line1406,line1417,line1429,line1442,line1454,line1464,line1473,line1483,line1495,line1505,line1516,line1525,line1534,line1542,line1551
! eliminated_buses=1396,1407,1418,1430,1443,1455,1465,1474,1484,1496,1506,1517,1526,1535,1543

New Line._virtual_line1411_line1423 bus1=1402.1.2.3.4 bus2=1424.1.2.3.4 phases=4 linecode=LC2 length=7.0149 units=m
! reduced_from=line1411,line1423
! eliminated_buses=1412

New Line._virtual_line1427_line1439_line1451 bus1=1452.1.2.3.4 bus2=1417.1.2.3.4 phases=4 linecode=LC2 length=13.17203 units=m
! reduced_from=line1427,line1439,line1451
! eliminated_buses=1428,1440

New Line._virtual_line1434_line1446_line1458_line1467_line1476_line1488_line1498_line1508_line1519_line1528_line1537_line1545_line1554_line1563_line1572_line1581_line1590_line1599_line1608_line1617_line1625 bus1=1626.1.2.3.4 bus2=1424.1.2.3.4 phases=4 linecode=LC2 length=22.489367 units=m
! reduced_from=line1434,line1446,line1458,line1467,line1476,line1488,line1498,line1508,line1519,line1528,line1537,line1545,line1554,line1563,line1572,line1581,line1590,line1599,line1608,line1617,line1625
! eliminated_buses=1435,1447,1459,1468,1477,1489,1499,1509,1520,1529,1538,1546,1555,1564,1573,1582,1591,1600,1609,1618

New Line._virtual_line1457_line1466 bus1=1467.1.2.3.4 bus2=1446.1.2.3.4 phases=4 linecode=LC2 length=12.6322 units=m
! reduced_from=line1457,line1466
! eliminated_buses=1458

New Line._virtual_line1462_line1471_line1481_line1492_line1502 bus1=1503.1.2.3.4 bus2=1452.1.2.3.4 phases=4 linecode=LC2 length=4.46115 units=m
! reduced_from=line1462,line1471,line1481,line1492,line1502
! eliminated_buses=1463,1472,1482,1493

New Line._virtual_line1463_line1472_line1482 bus1=1452.1.2.3.4 bus2=1483.1.2.3.4 phases=4 linecode=LC2 length=4.98199 units=m
! reduced_from=line1463,line1472,line1482
! eliminated_buses=1464,1473

New Line._virtual_line1478_line1489_line1499_line1509_line1520_line1529 bus1=1469.1.2.3.4 bus2=1530.1.2.3.4 phases=4 linecode=LC2 length=11.04816 units=m
! reduced_from=line1478,line1489,line1499,line1509,line1520,line1529
! eliminated_buses=1479,1490,1500,1510,1521

New Line._virtual_line1484_line1496_line1506_line1517_line1526_line1535_line1543_line1552_line1561_line1570_line1579_line1588_line1597_line1606_line1615_line1623_line1631_line1638_line1645_line1653_line1660_line1667_line1675 bus1=1676.1.2.3.4 bus2=1475.1.2.3.4 phases=4 linecode=LC2 length=19.99679 units=m
! reduced_from=line1484,line1496,line1506,line1517,line1526,line1535,line1543,line1552,line1561,line1570,line1579,line1588,line1597,line1606,line1615,line1623,line1631,line1638,line1645,line1653,line1660,line1667,line1675
! eliminated_buses=1485,1497,1507,1518,1527,1536,1544,1553,1562,1571,1580,1589,1598,1607,1616,1624,1632,1639,1646,1654,1661,1668

New Line._virtual_line1486_line1497_line1507_line1518_line1527_line1536_line1544_line1553_line1562_line1571_line1580_line1589_line1598_line1607_line1616_line1624_line1632_line1639_line1646_line1654_line1661_line1668_line1676_line1687_line1695 bus1=1696.1.2.3.4 bus2=1476.1.2.3.4 phases=4 linecode=LC2 length=20.396941 units=m
! reduced_from=line1486,line1497,line1507,line1518,line1527,line1536,line1544,line1553,line1562,line1571,line1580,line1589,line1598,line1607,line1616,line1624,line1632,line1639,line1646,line1654,line1661,line1668,line1676,line1687,line1695
! eliminated_buses=1487,1498,1508,1519,1528,1537,1545,1554,1563,1572,1581,1590,1599,1608,1617,1625,1633,1640,1647,1655,1662,1669,1677,1688

New Line._virtual_line1493_line1503 bus1=1504.1.2.3.4 bus2=1483.1.2.3.4 phases=4 linecode=LC2 length=5.3834 units=m
! reduced_from=line1493,line1503
! eliminated_buses=1494

New Line._virtual_line1494_line1504_line1515_line1524_line1533_line1541_line1550_line1560_line1569_line1578_line1587_line1596_line1605_line1614_line1622_line1630_line1637_line1644_line1652_line1659_line1666_line1674 bus1=1483.1.2.3.4 bus2=1675.1.2.3.4 phases=4 linecode=LC2 length=6.126043 units=m
! reduced_from=line1494,line1504,line1515,line1524,line1533,line1541,line1550,line1560,line1569,line1578,line1587,line1596,line1605,line1614,line1622,line1630,line1637,line1644,line1652,line1659,line1666,line1674
! eliminated_buses=1495,1505,1516,1525,1534,1542,1551,1561,1570,1579,1588,1597,1606,1615,1623,1631,1638,1645,1653,1660,1667

New Line._virtual_line1512_line1523_line1532_line1540_line1549_line1559_line1568_line1577_line1586_line1595_line1604_line1613_line1621_line1629_line1636_line1643_line1651 bus1=1652.1.2.3.4 bus2=1503.1.2.3.4 phases=4 linecode=LC2 length=28.18889 units=m
! reduced_from=line1512,line1523,line1532,line1540,line1549,line1559,line1568,line1577,line1586,line1595,line1604,line1613,line1621,line1629,line1636,line1643,line1651
! eliminated_buses=1513,1524,1533,1541,1550,1560,1569,1578,1587,1596,1605,1614,1622,1630,1637,1644

New Line._virtual_line1548_line1558_line1567_line1576_line1585_line1594_line1603_line1612_line1620_line1628_line1635_line1642 bus1=1643.1.2.3.4 bus2=1540.1.2.3.4 phases=4 linecode=LC8 length=25.41092 units=m
! reduced_from=line1548,line1558,line1567,line1576,line1585,line1594,line1603,line1612,line1620,line1628,line1635,line1642
! eliminated_buses=1549,1559,1568,1577,1586,1595,1604,1613,1621,1629,1636

New Line._virtual_line1556_line1565_line1574_line1583_line1592 bus1=1548.1.2.3.4 bus2=1593.1.2.3.4 phases=4 linecode=LC2 length=5.112131 units=m
! reduced_from=line1556,line1565,line1574,line1583,line1592
! eliminated_buses=1557,1566,1575,1584

New Line._virtual_line1557_line1566_line1575_line1584_line1593_line1602 bus1=1548.1.2.3.4 bus2=1603.1.2.3.4 phases=4 linecode=LC2 length=8.6072 units=m
! reduced_from=line1557,line1566,line1575,line1584,line1593,line1602
! eliminated_buses=1558,1567,1576,1585,1594

New Line._virtual_line1601_line1609_line1618_line1626_line1633_line1640_line1647_line1655_line1662_line1669_line1677 bus1=1593.1.2.3.4 bus2=1678.1.2.3.4 phases=4 linecode=LC2 length=12.09514 units=m
! reduced_from=line1601,line1609,line1618,line1626,line1633,line1640,line1647,line1655,line1662,line1669,line1677
! eliminated_buses=1602,1610,1619,1627,1634,1641,1648,1656,1663,1670

New Line._virtual_line1611_line1619_line1627_line1634_line1641_line1648_line1656_line1663_line1670_line1678 bus1=1679.1.2.3.4 bus2=1603.1.2.3.4 phases=4 linecode=LC2 length=7.402634 units=m
! reduced_from=line1611,line1619,line1627,line1634,line1641,line1648,line1656,line1663,line1670,line1678
! eliminated_buses=1612,1620,1628,1635,1642,1649,1657,1664,1671

New Line._virtual_line1649_line1657_line1664_line1672 bus1=1673.1.2.3.4 bus2=1643.1.2.3.4 phases=4 linecode=LC1 length=15.96494 units=m
! reduced_from=line1649,line1657,line1664,line1672
! eliminated_buses=1650,1658,1665

New Line._virtual_line1650_line1658_line1665_line1673_line1682_line1692_line1699_line1706_line1712_line1718_line1723_line1728 bus1=1729.1.2.3.4 bus2=1643.1.2.3.4 phases=4 linecode=LC8 length=14.20152 units=m
! reduced_from=line1650,line1658,line1665,line1673,line1682,line1692,line1699,line1706,line1712,line1718,line1723,line1728
! eliminated_buses=1651,1659,1666,1674,1683,1693,1700,1707,1713,1719,1724

New Line._virtual_line1681_line1691_line1698_line1705_line1711_line1717_line1722_line1727_line1731_line1736_line1742_line1748_line1755_line1763 bus1=1673.1.2.3.4 bus2=1764.1.2.3.4 phases=4 linecode=LC1 length=18.876806 units=m
! reduced_from=line1681,line1691,line1698,line1705,line1711,line1717,line1722,line1727,line1731,line1736,line1742,line1748,line1755,line1763
! eliminated_buses=1682,1692,1699,1706,1712,1718,1723,1728,1732,1737,1743,1749,1756

New Line._virtual_line1683_line1693_line1700_line1707_line1713_line1719_line1724_line1729_line1734_line1740 bus1=1675.1.2.3.4 bus2=1741.1.2.3.4 phases=4 linecode=LC2 length=20.74307 units=m
! reduced_from=line1683,line1693,line1700,line1707,line1713,line1719,line1724,line1729,line1734,line1740
! eliminated_buses=1684,1694,1701,1708,1714,1720,1725,1730,1735

New Line._virtual_line1685_line1694 bus1=1676.1.2.3.4 bus2=1695.1.2.3.4 phases=4 linecode=LC2 length=6.4777 units=m
! reduced_from=line1685,line1694
! eliminated_buses=1686

New Line._virtual_line1689_line1696_line1703_line1709_line1714_line1720_line1725 bus1=1679.1.2.3.4 bus2=1726.1.2.3.4 phases=4 linecode=LC2 length=11.24022 units=m
! reduced_from=line1689,line1696,line1703,line1709,line1714,line1720,line1725
! eliminated_buses=1690,1697,1704,1710,1715,1721

New Line._virtual_line1701_line1708 bus1=1696.1.2.3.4 bus2=1709.1.2.3.4 phases=4 linecode=LC2 length=7.4621 units=m
! reduced_from=line1701,line1708
! eliminated_buses=1702

New Line._virtual_line1732_line1737_line1743_line1750 bus1=1729.1.2.3.4 bus2=1751.1.2.3.4 phases=4 linecode=LC3 length=13.4689 units=m
! reduced_from=line1732,line1737,line1743,line1750
! eliminated_buses=1733,1738,1744

New Line._virtual_line1739_line1746_line1753_line1761_line1769_line1776 bus1=1777.1.2.3.4 bus2=1734.1.2.3.4 phases=4 linecode=LC8 length=28.52089 units=m
! reduced_from=line1739,line1746,line1753,line1761,line1769,line1776
! eliminated_buses=1740,1747,1754,1762,1770

New Line._virtual_line1744_line1751_line1759_line1767_line1774 bus1=1775.1.2.3.4 bus2=1739.1.2.3.4 phases=4 linecode=LC2 length=9.071212 units=m
! reduced_from=line1744,line1751,line1759,line1767,line1774
! eliminated_buses=1745,1752,1760,1768

New Line._virtual_line1745_line1752_line1760_line1768_line1775_line1783_line1791_line1800 bus1=1801.1.2.3.4 bus2=1739.1.2.3.4 phases=4 linecode=LC2 length=3.530112 units=m
! reduced_from=line1745,line1752,line1760,line1768,line1775,line1783,line1791,line1800
! eliminated_buses=1746,1753,1761,1769,1776,1784,1792

New Line._virtual_line1757_line1765_line1772_line1779_line1788 bus1=1789.1.2.3.4 bus2=1751.1.2.3.4 phases=4 linecode=LC2 length=6.58221 units=m
! reduced_from=line1757,line1765,line1772,line1779,line1788
! eliminated_buses=1758,1766,1773,1780

New Line._virtual_line1758_line1766_line1773_line1780_line1789_line1798 bus1=1799.1.2.3.4 bus2=1751.1.2.3.4 phases=4 linecode=LC2 length=2.18848 units=m
! reduced_from=line1758,line1766,line1773,line1780,line1789,line1798
! eliminated_buses=1759,1767,1774,1781,1790

New Line._virtual_line1782_line1790_line1799_line1809_line1820_line1831_line1842_line1855_line1868_line1881_line1893 bus1=1894.1.2.3.4 bus2=1775.1.2.3.4 phases=4 linecode=LC2 length=15.130611 units=m
! reduced_from=line1782,line1790,line1799,line1809,line1820,line1831,line1842,line1855,line1868,line1881,line1893
! eliminated_buses=1783,1791,1800,1810,1821,1832,1843,1856,1869,1882

New Line._virtual_line1784_line1792_line1801_line1812_line1822_line1833_line1845_line1858_line1871_line1884_line1896_line1909_line1921_line1933_line1946_line1958_line1971_line1984_line1997_line2012_line2030_line2049_line2071_line2094_line2120 bus1=1777.1.2.3.4 bus2=2121.1.2.3.4 phases=4 linecode=LC3 length=46.654258 units=m
! reduced_from=line1784,line1792,line1801,line1812,line1822,line1833,line1845,line1858,line1871,line1884,line1896,line1909,line1921,line1933,line1946,line1958,line1971,line1984,line1997,line2012,line2030,line2049,line2071,line2094,line2120
! eliminated_buses=1785,1793,1802,1813,1823,1834,1846,1859,1872,1885,1897,1910,1922,1934,1947,1959,1972,1985,1998,2013,2031,2050,2072,2095

New Line._virtual_line1793_line1802 bus1=1786.1.2.3.4 bus2=1803.1.2.3.4 phases=4 linecode=LC8 length=26.4503 units=m
! reduced_from=line1793,line1802
! eliminated_buses=1794

New Line._virtual_line1794_line1804_line1816_line1827_line1838_line1851_line1864_line1877_line1890_line1904_line1915_line1927_line1941_line1954_line1967_line1981_line1994 bus1=1995.1.2.3.4 bus2=1786.1.2.3.4 phases=4 linecode=LC3 length=31.4584 units=m
! reduced_from=line1794,line1804,line1816,line1827,line1838,line1851,line1864,line1877,line1890,line1904,line1915,line1927,line1941,line1954,line1967,line1981,line1994
! eliminated_buses=1795,1805,1817,1828,1839,1852,1865,1878,1891,1905,1916,1928,1942,1955,1968,1982

New Line._virtual_line1797_line1806_line1818_line1829_line1840_line1853_line1866_line1879_line1891_line1905_line1916_line1928 bus1=1789.1.2.3.4 bus2=1929.1.2.3.4 phases=4 linecode=LC2 length=12.191618 units=m
! reduced_from=line1797,line1806,line1818,line1829,line1840,line1853,line1866,line1879,line1891,line1905,line1916,line1928
! eliminated_buses=1798,1807,1819,1830,1841,1854,1867,1880,1892,1906,1917

New Line._virtual_line1808_line1819_line1830_line1841_line1854_line1867_line1880_line1892_line1906_line1917_line1929_line1942_line1955 bus1=1799.1.2.3.4 bus2=1956.1.2.3.4 phases=4 linecode=LC2 length=6.905779 units=m
! reduced_from=line1808,line1819,line1830,line1841,line1854,line1867,line1880,line1892,line1906,line1917,line1929,line1942,line1955
! eliminated_buses=1809,1820,1831,1842,1855,1868,1881,1893,1907,1918,1930,1943

New Line._virtual_line1811_line1821_line1832_line1843_line1856_line1869_line1882_line1894_line1907_line1918_line1930_line1943 bus1=1944.1.2.3.4 bus2=1801.1.2.3.4 phases=4 linecode=LC2 length=11.433594 units=m
! reduced_from=line1811,line1821,line1832,line1843,line1856,line1869,line1882,line1894,line1907,line1918,line1930,line1943
! eliminated_buses=1812,1822,1833,1844,1857,1870,1883,1895,1908,1919,1931

New Line._virtual_line1813_line1823_line1834 bus1=1835.1.2.3.4 bus2=1803.1.2.3.4 phases=4 linecode=LC8 length=6.287 units=m
! reduced_from=line1813,line1823,line1834
! eliminated_buses=1814,1824

New Line._virtual_line1824_line1835_line1848_line1861_line1874_line1887_line1900_line1913_line1925 bus1=1815.1.2.3.4 bus2=1926.1.2.3.4 phases=4 linecode=LC2 length=8.40575 units=m
! reduced_from=line1824,line1835,line1848,line1861,line1874,line1887,line1900,line1913,line1925
! eliminated_buses=1825,1836,1849,1862,1875,1888,1901,1914

New Line._virtual_line1825_line1836_line1849_line1862_line1875_line1888 bus1=1815.1.2.3.4 bus2=1889.1.2.3.4 phases=4 linecode=LC2 length=5.6334 units=m
! reduced_from=line1825,line1836,line1849,line1862,line1875,line1888
! eliminated_buses=1826,1837,1850,1863,1876

New Line._virtual_line1846_line1859_line1872_line1885 bus1=1886.1.2.3.4 bus2=1835.1.2.3.4 phases=4 linecode=LC8 length=6.7821 units=m
! reduced_from=line1846,line1859,line1872,line1885
! eliminated_buses=1847,1860,1873

New Line._virtual_line1847_line1860_line1873_line1886_line1899_line1912_line1924_line1937 bus1=1835.1.2.3.4 bus2=1938.1.2.3.4 phases=4 linecode=LC2 length=13.31919 units=m
! reduced_from=line1847,line1860,line1873,line1886,line1899,line1912,line1924,line1937
! eliminated_buses=1848,1861,1874,1887,1900,1913,1925

New Line._virtual_line1897_line1910_line1922_line1934_line1947_line1959_line1972_line1985_line1998_line2013_line2031_line2050 bus1=1886.1.2.3.4 bus2=2051.1.2.3.4 phases=4 linecode=LC8 length=40.14348 units=m
! reduced_from=line1897,line1910,line1922,line1934,line1947,line1959,line1972,line1985,line1998,line2013,line2031,line2050
! eliminated_buses=1898,1911,1923,1935,1948,1960,1973,1986,1999,2014,2032

New Line._virtual_line1898_line1911_line1923_line1935_line1948_line1961_line1974_line1987 bus1=1886.1.2.3.4 bus2=1988.1.2.3.4 phases=4 linecode=LC9 length=8.41393 units=m
! reduced_from=line1898,line1911,line1923,line1935,line1948,line1961,line1974,line1987
! eliminated_buses=1899,1912,1924,1936,1949,1962,1975

New Line._virtual_line1902_line1914_line1926_line1940_line1953_line1966_line1979_line1992_line2006_line2023_line2041_line2062_line2085_line2109 bus1=1889.1.2.3.4 bus2=2110.1.2.3.4 phases=4 linecode=LC2 length=14.433883 units=m
! reduced_from=line1902,line1914,line1926,line1940,line1953,line1966,line1979,line1992,line2006,line2023,line2041,line2062,line2085,line2109
! eliminated_buses=1903,1915,1927,1941,1954,1967,1980,1993,2007,2024,2042,2063,2086

New Line._virtual_line1939_line1952_line1965_line1978_line1991_line2005_line2022_line2040_line2061_line2084_line2108_line2135_line2162 bus1=1926.1.2.3.4 bus2=2163.1.2.3.4 phases=4 linecode=LC2 length=13.72268 units=m
! reduced_from=line1939,line1952,line1965,line1978,line1991,line2005,line2022,line2040,line2061,line2084,line2108,line2135,line2162
! eliminated_buses=1940,1953,1966,1979,1992,2006,2023,2041,2062,2085,2109,2136

New Line._virtual_line1950_line1963_line1976_line1989_line2003 bus1=2004.1.2.3.4 bus2=1938.1.2.3.4 phases=4 linecode=LC2 length=6.24043 units=m
! reduced_from=line1950,line1963,line1976,line1989,line2003
! eliminated_buses=1951,1964,1977,1990

New Line._virtual_line1951_line1964_line1977_line1990_line2004 bus1=2005.1.2.3.4 bus2=1938.1.2.3.4 phases=4 linecode=LC2 length=2.10284 units=m
! reduced_from=line1951,line1964,line1977,line1990,line2004
! eliminated_buses=1952,1965,1978,1991

New Line._virtual_line1969_line1982_line1995_line2010_line2028_line2048_line2070_line2093_line2117_line2143_line2170_line2198_line2224_line2250 bus1=2251.1.2.3.4 bus2=1956.1.2.3.4 phases=4 linecode=LC2 length=14.258843 units=m
! reduced_from=line1969,line1982,line1995,line2010,line2028,line2048,line2070,line2093,line2117,line2143,line2170,line2198,line2224,line2250
! eliminated_buses=1970,1983,1996,2011,2029,2049,2071,2094,2118,2144,2171,2199,2225

New Line._virtual_line1999_line2014 bus1=1988.1.2.3.4 bus2=2015.1.2.3.4 phases=4 linecode=LC9 length=2.74405 units=m
! reduced_from=line1999,line2014
! eliminated_buses=2000

New Line._virtual_line2001_line2016_line2036_line2057_line2080_line2104_line2131_line2158_line2184_line2213_line2240_line2269_line2299 bus1=1988.1.2.3.4 bus2=2300.1.2.3.4 phases=4 linecode=LC2 length=18.56925 units=m
! reduced_from=line2001,line2016,line2036,line2057,line2080,line2104,line2131,line2158,line2184,line2213,line2240,line2269,line2299
! eliminated_buses=2002,2017,2037,2058,2081,2105,2132,2159,2185,2214,2241,2270

New Line._virtual_line2008_line2025 bus1=2026.1.2.3.4 bus2=1995.1.2.3.4 phases=4 linecode=LC1 length=11.5198 units=m
! reduced_from=line2008,line2025
! eliminated_buses=2009

New Line._virtual_line2019_line2038_line2059_line2082_line2106_line2133_line2160_line2186_line2215 bus1=2216.1.2.3.4 bus2=2004.1.2.3.4 phases=4 linecode=LC2 length=12.32635 units=m
! reduced_from=line2019,line2038,line2059,line2082,line2106,line2133,line2160,line2186,line2215
! eliminated_buses=2020,2039,2060,2083,2107,2134,2161,2187

New Line._virtual_line2021_line2039_line2060_line2083_line2107_line2134_line2161_line2187_line2216_line2242 bus1=2005.1.2.3.4 bus2=2243.1.2.3.4 phases=4 linecode=LC2 length=12.28058 units=m
! reduced_from=line2021,line2039,line2060,line2083,line2107,line2134,line2161,line2187,line2216,line2242
! eliminated_buses=2022,2040,2061,2084,2108,2135,2162,2188,2217

New Line._virtual_line2027_line2047_line2069_line2092_line2116_line2142_line2169_line2197_line2223_line2249_line2277_line2309 bus1=2010.1.2.3.4 bus2=2310.1.2.3.4 phases=4 linecode=LC3 length=35.27425 units=m
! reduced_from=line2027,line2047,line2069,line2092,line2116,line2142,line2169,line2197,line2223,line2249,line2277,line2309
! eliminated_buses=2028,2048,2070,2093,2117,2143,2170,2198,2224,2250,2278

New Line._virtual_line2033_line2054_line2077_line2101_line2128_line2155_line2182 bus1=2183.1.2.3.4 bus2=2015.1.2.3.4 phases=4 linecode=LC2 length=16.54472 units=m
! reduced_from=line2033,line2054,line2077,line2101,line2128,line2155,line2182
! eliminated_buses=2034,2055,2078,2102,2129,2156

New Line._virtual_line2034_line2055_line2078_line2102_line2129_line2156 bus1=2015.1.2.3.4 bus2=2157.1.2.3.4 phases=4 linecode=LC2 length=16.5537 units=m
! reduced_from=line2034,line2055,line2078,line2102,line2129,line2156
! eliminated_buses=2035,2056,2079,2103,2130

New Line._virtual_line2043_line2064_line2087_line2111_line2137_line2164 bus1=2026.1.2.3.4 bus2=2165.1.2.3.4 phases=4 linecode=LC2 length=6.49895 units=m
! reduced_from=line2043,line2064,line2087,line2111,line2137,line2164
! eliminated_buses=2044,2065,2088,2112,2138

New Line._virtual_line2044_line2065_line2088_line2112_line2138_line2165 bus1=2026.1.2.3.4 bus2=2166.1.2.3.4 phases=4 linecode=LC1 length=2.17128 units=m
! reduced_from=line2044,line2065,line2088,line2112,line2138,line2165
! eliminated_buses=2045,2066,2089,2113,2139

New Line._virtual_line2045_line2066_line2089_line2113_line2139_line2166 bus1=2167.1.2.3.4 bus2=2027.1.2.3.4 phases=4 linecode=LC2 length=7.82372 units=m
! reduced_from=line2045,line2066,line2089,line2113,line2139,line2166
! eliminated_buses=2046,2067,2090,2114,2140

New Line._virtual_line2046_line2067_line2090_line2114_line2140_line2167_line2195_line2221_line2247_line2275 bus1=2027.1.2.3.4 bus2=2276.1.2.3.4 phases=4 linecode=LC2 length=4.395059 units=m
! reduced_from=line2046,line2067,line2090,line2114,line2140,line2167,line2195,line2221,line2247,line2275
! eliminated_buses=2047,2068,2091,2115,2141,2168,2196,2222,2248

New Line._virtual_line2051_line2074_line2098_line2125_line2152_line2179 bus1=2180.1.2.3.4 bus2=2033.1.2.3.4 phases=4 linecode=LC9 length=12.06891 units=m
! reduced_from=line2051,line2074,line2098,line2125,line2152,line2179
! eliminated_buses=2052,2075,2099,2126,2153

New Line._virtual_line2052_line2075_line2099_line2126_line2153_line2180_line2210_line2237_line2266_line2296_line2327 bus1=2033.1.2.3.4 bus2=2328.1.2.3.4 phases=4 linecode=LC2 length=16.96801 units=m
! reduced_from=line2052,line2075,line2099,line2126,line2153,line2180,line2210,line2237,line2266,line2296,line2327
! eliminated_buses=2053,2076,2100,2127,2154,2181,2211,2238,2267,2297

New Line._virtual_line2053_line2076_line2100_line2127_line2154_line2181_line2211_line2238_line2267_line2297 bus1=2298.1.2.3.4 bus2=2033.1.2.3.4 phases=4 linecode=LC2 length=17.49655 units=m
! reduced_from=line2053,line2076,line2100,line2127,line2154,line2181,line2211,line2238,line2267,line2297
! eliminated_buses=2054,2077,2101,2128,2155,2182,2212,2239,2268

New Line._virtual_line2072_line2095_line2121_line2148_line2175_line2203_line2229_line2256_line2285 bus1=2051.1.2.3.4 bus2=2286.1.2.3.4 phases=4 linecode=LC8 length=21.65475 units=m
! reduced_from=line2072,line2095,line2121,line2148,line2175,line2203,line2229,line2256,line2285
! eliminated_buses=2073,2096,2122,2149,2176,2204,2230,2257

New Line._virtual_line2096_line2122_line2149_line2176_line2204_line2230_line2257_line2286_line2317_line2346 bus1=2347.1.2.3.4 bus2=2074.1.2.3.4 phases=4 linecode=LC2 length=4.606217 units=m
! reduced_from=line2096,line2122,line2149,line2176,line2204,line2230,line2257,line2286,line2317,line2346
! eliminated_buses=2097,2123,2150,2177,2205,2231,2258,2287,2318

New Line._virtual_line2097_line2123_line2150_line2177_line2205_line2231_line2258 bus1=2259.1.2.3.4 bus2=2074.1.2.3.4 phases=4 linecode=LC2 length=6.213506 units=m
! reduced_from=line2097,line2123,line2150,line2177,line2205,line2231,line2258
! eliminated_buses=2098,2124,2151,2178,2206,2232

New Line._virtual_line2146_line2172 bus1=2173.1.2.3.4 bus2=2121.1.2.3.4 phases=4 linecode=LC2 length=14.3362 units=m
! reduced_from=line2146,line2172
! eliminated_buses=2147

New Line._virtual_line2147_line2173_line2201_line2227 bus1=2228.1.2.3.4 bus2=2121.1.2.3.4 phases=4 linecode=LC2 length=13.04828 units=m
! reduced_from=line2147,line2173,line2201,line2227
! eliminated_buses=2148,2174,2202

New Line._virtual_line2190_line2218_line2244_line2272_line2302_line2331_line2360_line2391_line2417_line2444_line2470 bus1=2165.1.2.3.4 bus2=2471.1.2.3.4 phases=4 linecode=LC2 length=12.05257 units=m
! reduced_from=line2190,line2218,line2244,line2272,line2302,line2331,line2360,line2391,line2417,line2444,line2470
! eliminated_buses=2191,2219,2245,2273,2303,2332,2361,2392,2418,2445

New Line._virtual_line2192_line2219_line2245_line2273_line2303_line2332_line2361_line2392_line2418_line2445_line2471 bus1=2166.1.2.3.4 bus2=2472.1.2.3.4 phases=4 linecode=LC1 length=12.88521 units=m
! reduced_from=line2192,line2219,line2245,line2273,line2303,line2332,line2361,line2392,line2418,line2445,line2471
! eliminated_buses=2193,2220,2246,2274,2304,2333,2362,2393,2419,2446

New Line._virtual_line2194_line2220_line2246_line2274_line2304_line2333_line2362_line2393_line2419_line2446_line2472_line2495_line2516 bus1=2167.1.2.3.4 bus2=2517.1.2.3.4 phases=4 linecode=LC2 length=13.765399 units=m
! reduced_from=line2194,line2220,line2246,line2274,line2304,line2333,line2362,line2393,line2419,line2446,line2472,line2495,line2516
! eliminated_buses=2195,2221,2247,2275,2305,2334,2363,2394,2420,2447,2473,2496

New Line._virtual_line2199_line2225_line2251_line2280_line2310_line2339 bus1=2173.1.2.3.4 bus2=2340.1.2.3.4 phases=4 linecode=LC2 length=2.59007 units=m
! reduced_from=line2199,line2225,line2251,line2280,line2310,line2339
! eliminated_buses=2200,2226,2252,2281,2311

New Line._virtual_line2200_line2226_line2252_line2281_line2311_line2340 bus1=2173.1.2.3.4 bus2=2341.1.2.3.4 phases=4 linecode=LC2 length=4.45224 units=m
! reduced_from=line2200,line2226,line2252,line2281,line2311,line2340
! eliminated_buses=2201,2227,2253,2282,2312

New Line._virtual_line2208_line2234_line2261_line2291_line2321_line2350_line2383_line2410_line2437 bus1=2438.1.2.3.4 bus2=2180.1.2.3.4 phases=4 linecode=LC1 length=8.37153 units=m
! reduced_from=line2208,line2234,line2261,line2291,line2321,line2350,line2383,line2410,line2437
! eliminated_buses=2209,2235,2262,2292,2322,2351,2384,2411

New Line._virtual_line2209_line2236 bus1=2237.1.2.3.4 bus2=2180.1.2.3.4 phases=4 linecode=LC9 length=7.0058 units=m
! reduced_from=line2209,line2236
! eliminated_buses=2210

New Line._virtual_line2253_line2282_line2312_line2341_line2372_line2401 bus1=2402.1.2.3.4 bus2=2228.1.2.3.4 phases=4 linecode=LC2 length=3.83463 units=m
! reduced_from=line2253,line2282,line2312,line2341,line2372,line2401
! eliminated_buses=2254,2283,2313,2342,2373

New Line._virtual_line2254_line2283_line2313_line2342_line2373_line2402_line2430_line2456 bus1=2228.1.2.3.4 bus2=2457.1.2.3.4 phases=4 linecode=LC2 length=5.62145 units=m
! reduced_from=line2254,line2283,line2313,line2342,line2373,line2402,line2430,line2456
! eliminated_buses=2255,2284,2314,2343,2374,2403,2431

New Line._virtual_line2263_line2293_line2323_line2352_line2385_line2412_line2439_line2466_line2491_line2512 bus1=2513.1.2.3.4 bus2=2237.1.2.3.4 phases=4 linecode=LC2 length=15.591467 units=m
! reduced_from=line2263,line2293,line2323,line2352,line2385,line2412,line2439,line2466,line2491,line2512
! eliminated_buses=2264,2294,2324,2353,2386,2413,2440,2467,2492

New Line._virtual_line2265_line2295 bus1=2237.1.2.3.4 bus2=2296.1.2.3.4 phases=4 linecode=LC9 length=6.057 units=m
! reduced_from=line2265,line2295
! eliminated_buses=2266

New Line._virtual_line2288_line2318_line2347_line2380_line2408_line2436_line2462_line2489_line2510_line2532_line2552_line2570_line2588_line2604_line2618_line2631_line2644_line2658_line2671 bus1=2259.1.2.3.4 bus2=2672.1.2.3.4 phases=4 linecode=LC2 length=12.408518 units=m
! reduced_from=line2288,line2318,line2347,line2380,line2408,line2436,line2462,line2489,line2510,line2532,line2552,line2570,line2588,line2604,line2618,line2631,line2644,line2658,line2671
! eliminated_buses=2289,2319,2348,2381,2409,2437,2463,2490,2511,2533,2553,2571,2589,2605,2619,2632,2645,2659

New Line._virtual_line2306_line2334_line2363_line2394_line2420_line2447_line2473_line2496_line2517_line2536_line2555_line2571_line2589_line2605_line2619_line2632 bus1=2276.1.2.3.4 bus2=2633.1.2.3.4 phases=4 linecode=LC2 length=13.96667 units=m
! reduced_from=line2306,line2334,line2363,line2394,line2420,line2447,line2473,line2496,line2517,line2536,line2555,line2571,line2589,line2605,line2619,line2632
! eliminated_buses=2307,2335,2364,2395,2421,2448,2474,2497,2518,2537,2556,2572,2590,2606,2620

New Line._virtual_line2325_line2354_line2387_line2414_line2441_line2468 bus1=2296.1.2.3.4 bus2=2469.1.2.3.4 phases=4 linecode=LC2 length=15.84052 units=m
! reduced_from=line2325,line2354,line2387,line2414,line2441,line2468
! eliminated_buses=2326,2355,2388,2415,2442

New Line._virtual_line2337_line2366_line2397 bus1=2310.1.2.3.4 bus2=2398.1.2.3.4 phases=4 linecode=LC2 length=11.9089 units=m
! reduced_from=line2337,line2366,line2397
! eliminated_buses=2338,2367

New Line._virtual_line2338_line2367_line2398_line2425_line2452_line2478_line2501 bus1=2502.1.2.3.4 bus2=2310.1.2.3.4 phases=4 linecode=LC3 length=7.32675 units=m
! reduced_from=line2338,line2367,line2398,line2425,line2452,line2478,line2501
! eliminated_buses=2339,2368,2399,2426,2453,2479

New Line._virtual_line2344_line2375_line2404_line2432_line2458_line2485_line2506_line2528 bus1=2529.1.2.3.4 bus2=2317.1.2.3.4 phases=4 linecode=LC2 length=8.854828 units=m
! reduced_from=line2344,line2375,line2404,line2432,line2458,line2485,line2506,line2528
! eliminated_buses=2345,2376,2405,2433,2459,2486,2507

New Line._virtual_line2369_line2399_line2426_line2453_line2479_line2502_line2524_line2543_line2562_line2580 bus1=2340.1.2.3.4 bus2=2581.1.2.3.4 phases=4 linecode=LC2 length=8.82803 units=m
! reduced_from=line2369,line2399,line2426,line2453,line2479,line2502,line2524,line2543,line2562,line2580
! eliminated_buses=2370,2400,2427,2454,2480,2503,2525,2544,2563

New Line._virtual_line2371_line2400_line2427_line2454_line2480_line2503_line2525_line2544_line2563_line2581 bus1=2582.1.2.3.4 bus2=2341.1.2.3.4 phases=4 linecode=LC2 length=9.93371 units=m
! reduced_from=line2371,line2400,line2427,line2454,line2480,line2503,line2525,line2544,line2563,line2581
! eliminated_buses=2372,2401,2428,2455,2481,2504,2526,2545,2564

New Line._virtual_line2376_line2405_line2433_line2459_line2486_line2507_line2529_line2549_line2567_line2585 bus1=2346.1.2.3.4 bus2=2586.1.2.3.4 phases=4 linecode=LC2 length=6.86164 units=m
! reduced_from=line2376,line2405,line2433,line2459,line2486,line2507,line2529,line2549,line2567,line2585
! eliminated_buses=2377,2406,2434,2460,2487,2508,2530,2550,2568

New Line._virtual_line2377_line2406_line2434_line2460_line2487_line2508_line2530_line2550_line2568_line2586_line2602 bus1=2603.1.2.3.4 bus2=2346.1.2.3.4 phases=4 linecode=LC2 length=13.111895 units=m
! reduced_from=line2377,line2406,line2434,line2460,line2487,line2508,line2530,line2550,line2568,line2586,line2602
! eliminated_buses=2378,2407,2435,2461,2488,2509,2531,2551,2569,2587

New Line._virtual_line2379_line2407_line2435_line2461_line2488_line2509_line2531_line2551_line2569_line2587_line2603_line2617_line2630_line2643_line2657_line2670 bus1=2347.1.2.3.4 bus2=2671.1.2.3.4 phases=4 linecode=LC2 length=7.597821 units=m
! reduced_from=line2379,line2407,line2435,line2461,line2488,line2509,line2531,line2551,line2569,line2587,line2603,line2617,line2630,line2643,line2657,line2670
! eliminated_buses=2380,2408,2436,2462,2489,2510,2532,2552,2570,2588,2604,2618,2631,2644,2658

New Line._virtual_line2423_line2450_line2476_line2499_line2520_line2539_line2558 bus1=2398.1.2.3.4 bus2=2559.1.2.3.4 phases=4 linecode=LC2 length=8.793 units=m
! reduced_from=line2423,line2450,line2476,line2499,line2520,line2539,line2558
! eliminated_buses=2424,2451,2477,2500,2521,2540

New Line._virtual_line2424_line2451_line2477_line2500_line2521_line2540_line2559 bus1=2560.1.2.3.4 bus2=2398.1.2.3.4 phases=4 linecode=LC2 length=4.48688 units=m
! reduced_from=line2424,line2451,line2477,line2500,line2521,line2540,line2559
! eliminated_buses=2425,2452,2478,2501,2522,2541

New Line._virtual_line2429_line2455_line2481_line2504_line2526_line2545_line2564_line2582_line2599_line2613_line2627_line2640 bus1=2641.1.2.3.4 bus2=2402.1.2.3.4 phases=4 linecode=LC2 length=15.434 units=m
! reduced_from=line2429,line2455,line2481,line2504,line2526,line2545,line2564,line2582,line2599,line2613,line2627,line2640
! eliminated_buses=2430,2456,2482,2505,2527,2546,2565,2583,2600,2614,2628

New Line._virtual_line2483_line2505_line2527_line2546_line2565_line2583_line2600 bus1=2601.1.2.3.4 bus2=2457.1.2.3.4 phases=4 linecode=LC2 length=6.1587 units=m
! reduced_from=line2483,line2505,line2527,line2546,line2565,line2583,line2600
! eliminated_buses=2484,2506,2528,2547,2566,2584

New Line._virtual_line2522_line2541_line2560_line2578_line2593_line2609_line2623_line2636 bus1=2502.1.2.3.4 bus2=2637.1.2.3.4 phases=4 linecode=LC2 length=18.31578 units=m
! reduced_from=line2522,line2541,line2560,line2578,line2593,line2609,line2623,line2636
! eliminated_buses=2523,2542,2561,2579,2594,2610,2624

New Line._virtual_line2523_line2542_line2561_line2579_line2594_line2610_line2624_line2637_line2650 bus1=2651.1.2.3.4 bus2=2502.1.2.3.4 phases=4 linecode=LC3 length=9.16606 units=m
! reduced_from=line2523,line2542,line2561,line2579,line2594,line2610,line2624,line2637,line2650
! eliminated_buses=2524,2543,2562,2580,2595,2611,2625,2638

New Line._virtual_line2548_line2566_line2584_line2601_line2616_line2629_line2642_line2656_line2669_line2681 bus1=2682.1.2.3.4 bus2=2529.1.2.3.4 phases=4 linecode=LC2 length=7.601695 units=m
! reduced_from=line2548,line2566,line2584,line2601,line2616,line2629,line2642,line2656,line2669,line2681
! eliminated_buses=2549,2567,2585,2602,2617,2630,2643,2657,2670

New Line._virtual_line2575_line2591_line2607_line2621_line2634_line2646_line2660_line2672_line2684_line2696_line2708_line2721_line2734_line2746_line2758 bus1=2559.1.2.3.4 bus2=2759.1.2.3.4 phases=4 linecode=LC2 length=13.67486 units=m
! reduced_from=line2575,line2591,line2607,line2621,line2634,line2646,line2660,line2672,line2684,line2696,line2708,line2721,line2734,line2746,line2758
! eliminated_buses=2576,2592,2608,2622,2635,2647,2661,2673,2685,2697,2709,2722,2735,2747

New Line._virtual_line2577_line2592_line2608_line2622_line2635_line2647_line2661_line2673_line2685_line2697_line2709_line2722_line2735_line2747_line2759_line2766_line2773_line2780 bus1=2560.1.2.3.4 bus2=2781.1.2.3.4 phases=4 linecode=LC2 length=12.69684 units=m
! reduced_from=line2577,line2592,line2608,line2622,line2635,line2647,line2661,line2673,line2685,line2697,line2709,line2722,line2735,line2747,line2759,line2766,line2773,line2780
! eliminated_buses=2578,2593,2609,2623,2636,2648,2662,2674,2686,2698,2710,2723,2736,2748,2760,2767,2774

New Line._virtual_line2596_line2611_line2625_line2638_line2651_line2665_line2677_line2689_line2701_line2714_line2727_line2740_line2752 bus1=2753.1.2.3.4 bus2=2581.1.2.3.4 phases=4 linecode=LC2 length=13.14925 units=m
! reduced_from=line2596,line2611,line2625,line2638,line2651,line2665,line2677,line2689,line2701,line2714,line2727,line2740,line2752
! eliminated_buses=2597,2612,2626,2639,2652,2666,2678,2690,2702,2715,2728,2741

New Line._virtual_line2598_line2612_line2626_line2639_line2652_line2666_line2678_line2690_line2702_line2715_line2728 bus1=2729.1.2.3.4 bus2=2582.1.2.3.4 phases=4 linecode=LC2 length=13.18678 units=m
! reduced_from=line2598,line2612,line2626,line2639,line2652,line2666,line2678,line2690,line2702,line2715,line2728
! eliminated_buses=2599,2613,2627,2640,2653,2667,2679,2691,2703,2716

New Line._virtual_line2615_line2628_line2641_line2655_line2668_line2680_line2692_line2704_line2717_line2730_line2742_line2754 bus1=2755.1.2.3.4 bus2=2601.1.2.3.4 phases=4 linecode=LC2 length=11.96001 units=m
! reduced_from=line2615,line2628,line2641,line2655,line2668,line2680,line2692,line2704,line2717,line2730,line2742,line2754
! eliminated_buses=2616,2629,2642,2656,2669,2681,2693,2705,2718,2731,2743

New Line._virtual_line2648_line2662_line2674_line2686_line2698_line2710 bus1=2637.1.2.3.4 bus2=2711.1.2.3.4 phases=4 linecode=LC2 length=2.510049 units=m
! reduced_from=line2648,line2662,line2674,line2686,line2698,line2710
! eliminated_buses=2649,2663,2675,2687,2699

New Line._virtual_line2649_line2663_line2675_line2687_line2699 bus1=2700.1.2.3.4 bus2=2637.1.2.3.4 phases=4 linecode=LC2 length=1.042303 units=m
! reduced_from=line2649,line2663,line2675,line2687,line2699
! eliminated_buses=2650,2664,2676,2688

New Line._virtual_line2654_line2667_line2679_line2691_line2703_line2716_line2729_line2741_line2753 bus1=2641.1.2.3.4 bus2=2754.1.2.3.4 phases=4 linecode=LC2 length=11.31091 units=m
! reduced_from=line2654,line2667,line2679,line2691,line2703,line2716,line2729,line2741,line2753
! eliminated_buses=2655,2668,2680,2692,2704,2717,2730,2742

New Line._virtual_line2664_line2676_line2688_line2700_line2713_line2726 bus1=2727.1.2.3.4 bus2=2651.1.2.3.4 phases=4 linecode=LC2 length=11.97731 units=m
! reduced_from=line2664,line2676,line2688,line2700,line2713,line2726
! eliminated_buses=2665,2677,2689,2701,2714

New Line._virtual_line2683_line2695_line2707_line2720_line2733_line2745_line2757_line2765_line2772_line2779_line2788_line2795_line2801_line2808_line2813_line2819_line2823 bus1=2824.1.2.3.4 bus2=2671.1.2.3.4 phases=4 linecode=LC2 length=14.721552 units=m
! reduced_from=line2683,line2695,line2707,line2720,line2733,line2745,line2757,line2765,line2772,line2779,line2788,line2795,line2801,line2808,line2813,line2819,line2823
! eliminated_buses=2684,2696,2708,2721,2734,2746,2758,2766,2773,2780,2789,2796,2802,2809,2814,2820

New Line._virtual_line2693_line2705_line2718_line2731_line2743_line2755_line2764_line2771_line2778_line2786 bus1=2787.1.2.3.4 bus2=2682.1.2.3.4 phases=4 linecode=LC2 length=13.903718 units=m
! reduced_from=line2693,line2705,line2718,line2731,line2743,line2755,line2764,line2771,line2778,line2786
! eliminated_buses=2694,2706,2719,2732,2744,2756,2765,2772,2779

New Line._virtual_line2694_line2706_line2719_line2732_line2744_line2756 bus1=2757.1.2.3.4 bus2=2682.1.2.3.4 phases=4 linecode=LC2 length=6.6907 units=m
! reduced_from=line2694,line2706,line2719,line2732,line2744,line2756
! eliminated_buses=2695,2707,2720,2733,2745

New Line._virtual_line2712_line2725_line2737_line2749_line2761_line2768_line2775_line2782_line2790_line2797_line2804_line2809 bus1=2810.1.2.3.4 bus2=2700.1.2.3.4 phases=4 linecode=LC2 length=6.739836 units=m
! reduced_from=line2712,line2725,line2737,line2749,line2761,line2768,line2775,line2782,line2790,line2797,line2804,line2809
! eliminated_buses=2713,2726,2738,2750,2762,2769,2776,2783,2791,2798,2805

New Line._virtual_line2724_line2736_line2748_line2760_line2767_line2774_line2781_line2789_line2796 bus1=2711.1.2.3.4 bus2=2797.1.2.3.4 phases=4 linecode=LC2 length=6.700505 units=m
! reduced_from=line2724,line2736,line2748,line2760,line2767,line2774,line2781,line2789,line2796
! eliminated_buses=2725,2737,2749,2761,2768,2775,2782,2790

New Line._virtual_line2738_line2750_line2762_line2769_line2776_line2783 bus1=2784.1.2.3.4 bus2=2727.1.2.3.4 phases=4 linecode=LC2 length=5.154998 units=m
! reduced_from=line2738,line2750,line2762,line2769,line2776,line2783
! eliminated_buses=2739,2751,2763,2770,2777

New Line._virtual_line2739_line2751_line2763_line2770_line2777 bus1=2727.1.2.3.4 bus2=2778.1.2.3.4 phases=4 linecode=LC2 length=2.4177 units=m
! reduced_from=line2739,line2751,line2763,line2770,line2777
! eliminated_buses=2740,2752,2764,2771

New Line._virtual_line2785_line2793_line2799_line2806_line2811_line2817_line2821_line2826_line2830 bus1=2778.1.2.3.4 bus2=2831.1.2.3.4 phases=4 linecode=LC2 length=14.82283 units=m
! reduced_from=line2785,line2793,line2799,line2806,line2811,line2817,line2821,line2826,line2830
! eliminated_buses=2786,2794,2800,2807,2812,2818,2822,2827

New Line._virtual_line2792_line2798_line2805_line2810_line2816_line2820_line2825_line2829_line2833_line2836 bus1=2784.1.2.3.4 bus2=2837.1.2.3.4 phases=4 linecode=LC2 length=13.55912 units=m
! reduced_from=line2792,line2798,line2805,line2810,line2816,line2820,line2825,line2829,line2833,line2836
! eliminated_buses=2793,2799,2806,2811,2817,2821,2826,2830,2834

New Line.LINE55 bus1=53.1.2.3.4 bus2=56.1.2.3.4 phases=4 linecode=LC2 length=6.7095 units=m

New Line.LINE101 bus1=96.1.2.3.4 bus2=102.1.2.3.4 phases=4 linecode=LC2 length=3.3635 units=m

New Line.LINE103 bus1=97.1.2.3.4 bus2=104.1.2.3.4 phases=4 linecode=LC2 length=4.0329 units=m

New Line.LINE130 bus1=123.1.2.3.4 bus2=131.1.2.3.4 phases=4 linecode=LC2 length=7.2512 units=m

New Line.LINE140 bus1=131.1.2.3.4 bus2=141.1.2.3.4 phases=4 linecode=LC2 length=4.6693 units=m

New Line.LINE150 bus1=142.1.2.3.4 bus2=151.1.2.3.4 phases=4 linecode=LC2 length=6.0658 units=m

New Line.LINE210 bus1=200.1.2.3.4 bus2=211.1.2.3.4 phases=4 linecode=LC8 length=11.0652 units=m

New Line.LINE211 bus1=201.1.2.3.4 bus2=212.1.2.3.4 phases=4 linecode=LC2 length=4.0654 units=m

New Line.LINE216 bus1=205.1.2.3.4 bus2=217.1.2.3.4 phases=4 linecode=LC2 length=4.0018 units=m

New Line.LINE227 bus1=214.1.2.3.4 bus2=228.1.2.3.4 phases=4 linecode=LC2 length=4.2218 units=m

New Line.LINE231 bus1=218.1.2.3.4 bus2=232.1.2.3.4 phases=4 linecode=LC2 length=4.2077 units=m

New Line.LINE257 bus1=243.1.2.3.4 bus2=258.1.2.3.4 phases=4 linecode=LC2 length=5.0758 units=m

New Line.LINE266 bus1=251.1.2.3.4 bus2=267.1.2.3.4 phases=4 linecode=LC2 length=6.7974 units=m

New Line.LINE280 bus1=265.1.2.3.4 bus2=281.1.2.3.4 phases=4 linecode=LC2 length=2.815 units=m

New Line.LINE293 bus1=278.1.2.3.4 bus2=294.1.2.3.4 phases=4 linecode=LC2 length=7.5007 units=m

New Line.LINE309 bus1=294.1.2.3.4 bus2=310.1.2.3.4 phases=4 linecode=LC2 length=2.467 units=m

New Line.LINE348 bus1=331.1.2.3.4 bus2=349.1.2.3.4 phases=4 linecode=LC8 length=3.9607 units=m

New Line.LINE367 bus1=349.1.2.3.4 bus2=368.1.2.3.4 phases=4 linecode=LC2 length=4.3534 units=m

New Line.LINE440 bus1=421.1.2.3.4 bus2=441.1.2.3.4 phases=4 linecode=LC2 length=8.22 units=m

New Line.LINE441 bus1=421.1.2.3.4 bus2=442.1.2.3.4 phases=4 linecode=LC2 length=3.4826 units=m

New Line.LINE445 bus1=424.1.2.3.4 bus2=446.1.2.3.4 phases=4 linecode=LC2 length=4.5578 units=m

New Line.LINE464 bus1=444.1.2.3.4 bus2=465.1.2.3.4 phases=4 linecode=LC2 length=4.384 units=m

New Line.LINE492 bus1=469.1.2.3.4 bus2=493.1.2.3.4 phases=4 linecode=LC2 length=5.3207 units=m

New Line.LINE506 bus1=483.1.2.3.4 bus2=507.1.2.3.4 phases=4 linecode=LC2 length=3.5235 units=m

New Line.LINE517 bus1=494.1.2.3.4 bus2=518.1.2.3.4 phases=4 linecode=LC2 length=6.9692 units=m

New Line.LINE527 bus1=504.1.2.3.4 bus2=528.1.2.3.4 phases=4 linecode=LC2 length=7.2537 units=m

New Line.LINE528 bus1=504.1.2.3.4 bus2=529.1.2.3.4 phases=4 linecode=LC3 length=1.6403 units=m

New Line.LINE530 bus1=505.1.2.3.4 bus2=531.1.2.3.4 phases=4 linecode=LC2 length=5.3906 units=m

New Line.LINE559 bus1=534.1.2.3.4 bus2=560.1.2.3.4 phases=4 linecode=LC2 length=4.8635 units=m

New Line.LINE589 bus1=565.1.2.3.4 bus2=590.1.2.3.4 phases=4 linecode=LC2 length=3.7153 units=m

New Line.LINE603 bus1=577.1.2.3.4 bus2=604.1.2.3.4 phases=4 linecode=LC8 length=4.3797 units=m

New Line.LINE619 bus1=592.1.2.3.4 bus2=620.1.2.3.4 phases=4 linecode=LC2 length=4.7061 units=m

New Line.LINE634 bus1=604.1.2.3.4 bus2=635.1.2.3.4 phases=4 linecode=LC8 length=11.0783 units=m

New Line.LINE638 bus1=609.1.2.3.4 bus2=639.1.2.3.4 phases=4 linecode=LC2 length=1.1767 units=m

New Line.LINE668 bus1=639.1.2.3.4 bus2=669.1.2.3.4 phases=4 linecode=LC2 length=7.8365 units=m

New Line.LINE699 bus1=667.1.2.3.4 bus2=700.1.2.3.4 phases=4 linecode=LC2 length=5.4667 units=m

New Line.LINE701 bus1=668.1.2.3.4 bus2=702.1.2.3.4 phases=4 linecode=LC2 length=4.8917 units=m

New Line.LINE702 bus1=669.1.2.3.4 bus2=703.1.2.3.4 phases=4 linecode=LC1 length=7.7524 units=m

New Line.LINE821 bus1=795.1.2.3.4 bus2=822.1.2.3.4 phases=4 linecode=LC1 length=4.5613 units=m

New Line.LINE822 bus1=795.1.2.3.4 bus2=823.1.2.3.4 phases=4 linecode=LC1 length=4.5613 units=m

New Line.LINE839 bus1=812.1.2.3.4 bus2=840.1.2.3.4 phases=4 linecode=LC2 length=2.5106 units=m

New Line.LINE865 bus1=842.1.2.3.4 bus2=866.1.2.3.4 phases=4 linecode=LC2 length=5.6608 units=m

New Line.LINE889 bus1=868.1.2.3.4 bus2=890.1.2.3.4 phases=4 linecode=LC2 length=4.2233 units=m

New Line.LINE895 bus1=874.1.2.3.4 bus2=896.1.2.3.4 phases=4 linecode=LC1 length=2.5914 units=m

New Line.LINE896 bus1=874.1.2.3.4 bus2=897.1.2.3.4 phases=4 linecode=LC1 length=2.5914 units=m

New Line.LINE938 bus1=924.1.2.3.4 bus2=939.1.2.3.4 phases=4 linecode=LC3 length=3.6813 units=m

New Line.LINE940 bus1=924.1.2.3.4 bus2=941.1.2.3.4 phases=4 linecode=LC2 length=7.9167 units=m

New Line.LINE950 bus1=935.1.2.3.4 bus2=951.1.2.3.4 phases=4 linecode=LC2 length=13.2093 units=m

New Line.LINE955 bus1=939.1.2.3.4 bus2=956.1.2.3.4 phases=4 linecode=LC3 length=6.9605 units=m

New Line.LINE957 bus1=941.1.2.3.4 bus2=958.1.2.3.4 phases=4 linecode=LC2 length=5.1934 units=m

New Line.LINE967 bus1=951.1.2.3.4 bus2=968.1.2.3.4 phases=4 linecode=LC2 length=5.0257 units=m

New Line.LINE973 bus1=956.1.2.3.4 bus2=974.1.2.3.4 phases=4 linecode=LC3 length=4.4292 units=m

New Line.LINE990 bus1=974.1.2.3.4 bus2=991.1.2.3.4 phases=4 linecode=LC2 length=8.3175 units=m

New Line.LINE991 bus1=974.1.2.3.4 bus2=992.1.2.3.4 phases=4 linecode=LC3 length=15.1499 units=m

New Line.LINE1011 bus1=991.1.2.3.4 bus2=1012.1.2.3.4 phases=4 linecode=LC2 length=5.2332 units=m

New Line.LINE1024 bus1=1002.1.2.3.4 bus2=1025.1.2.3.4 phases=4 linecode=LC2 length=5.9953 units=m

New Line.LINE1025 bus1=1002.1.2.3.4 bus2=1026.1.2.3.4 phases=4 linecode=LC2 length=5.9953 units=m

New Line.LINE1044 bus1=1021.1.2.3.4 bus2=1045.1.2.3.4 phases=4 linecode=LC2 length=6.3831 units=m

New Line.LINE1045 bus1=1021.1.2.3.4 bus2=1046.1.2.3.4 phases=4 linecode=LC2 length=6.3831 units=m

New Line.LINE1069 bus1=1050.1.2.3.4 bus2=1070.1.2.3.4 phases=4 linecode=LC2 length=5.3474 units=m

New Line.LINE1070 bus1=1050.1.2.3.4 bus2=1071.1.2.3.4 phases=4 linecode=LC2 length=5.3474 units=m

New Line.LINE1113 bus1=1097.1.2.3.4 bus2=1114.1.2.3.4 phases=4 linecode=LC2 length=5.3997 units=m

New Line.LINE1118 bus1=1101.1.2.3.4 bus2=1119.1.2.3.4 phases=4 linecode=LC2 length=3.895 units=m

New Line.LINE1119 bus1=1101.1.2.3.4 bus2=1120.1.2.3.4 phases=4 linecode=LC2 length=3.895 units=m

New Line.LINE1124 bus1=1106.1.2.3.4 bus2=1125.1.2.3.4 phases=4 linecode=LC2 length=5.937 units=m

New Line.LINE1125 bus1=1106.1.2.3.4 bus2=1126.1.2.3.4 phases=4 linecode=LC2 length=5.937 units=m

New Line.LINE1164 bus1=1147.1.2.3.4 bus2=1165.1.2.3.4 phases=4 linecode=LC2 length=4.1276 units=m

New Line.LINE1173 bus1=1156.1.2.3.4 bus2=1174.1.2.3.4 phases=4 linecode=LC2 length=4.9159 units=m

New Line.LINE1247 bus1=1235.1.2.3.4 bus2=1248.1.2.3.4 phases=4 linecode=LC2 length=7.6118 units=m

New Line.LINE1251 bus1=1238.1.2.3.4 bus2=1252.1.2.3.4 phases=4 linecode=LC2 length=2.3274 units=m

New Line.LINE1252 bus1=1238.1.2.3.4 bus2=1253.1.2.3.4 phases=4 linecode=LC2 length=2.3274 units=m

New Line.LINE1253 bus1=1239.1.2.3.4 bus2=1254.1.2.3.4 phases=4 linecode=LC2 length=8.006 units=m

New Line.LINE1254 bus1=1239.1.2.3.4 bus2=1255.1.2.3.4 phases=4 linecode=LC2 length=8.006 units=m

New Line.LINE1280 bus1=1268.1.2.3.4 bus2=1281.1.2.3.4 phases=4 linecode=LC2 length=5.4981 units=m

New Line.LINE1281 bus1=1268.1.2.3.4 bus2=1282.1.2.3.4 phases=4 linecode=LC2 length=5.4981 units=m

New Line.LINE1308 bus1=1297.1.2.3.4 bus2=1309.1.2.3.4 phases=4 linecode=LC2 length=11.433 units=m

New Line.LINE1315 bus1=1303.1.2.3.4 bus2=1316.1.2.3.4 phases=4 linecode=LC2 length=6.8632 units=m

New Line.LINE1316 bus1=1303.1.2.3.4 bus2=1317.1.2.3.4 phases=4 linecode=LC2 length=6.8632 units=m

New Line.LINE1333 bus1=1322.1.2.3.4 bus2=1334.1.2.3.4 phases=4 linecode=LC2 length=5.1168 units=m

New Line.LINE1334 bus1=1322.1.2.3.4 bus2=1335.1.2.3.4 phases=4 linecode=LC2 length=5.1168 units=m

New Line.LINE1343 bus1=1331.1.2.3.4 bus2=1344.1.2.3.4 phases=4 linecode=LC2 length=3.3703 units=m

New Line.LINE1344 bus1=1331.1.2.3.4 bus2=1345.1.2.3.4 phases=4 linecode=LC2 length=3.3703 units=m

New Line.LINE1354 bus1=1342.1.2.3.4 bus2=1355.1.2.3.4 phases=4 linecode=LC2 length=3.7568 units=m

New Line.LINE1368 bus1=1359.1.2.3.4 bus2=1369.1.2.3.4 phases=4 linecode=LC2 length=6.5888 units=m

New Line.LINE1370 bus1=1360.1.2.3.4 bus2=1371.1.2.3.4 phases=4 linecode=LC2 length=5.1502 units=m

New Line.LINE1396 bus1=1386.1.2.3.4 bus2=1397.1.2.3.4 phases=4 linecode=LC2 length=3.2571 units=m

New Line.LINE1412 bus1=1402.1.2.3.4 bus2=1413.1.2.3.4 phases=4 linecode=LC2 length=3.4625 units=m

New Line.LINE1418 bus1=1408.1.2.3.4 bus2=1419.1.2.3.4 phases=4 linecode=LC2 length=4.4401 units=m

New Line.LINE1419 bus1=1408.1.2.3.4 bus2=1420.1.2.3.4 phases=4 linecode=LC2 length=4.4401 units=m

New Line.LINE1435 bus1=1424.1.2.3.4 bus2=1436.1.2.3.4 phases=4 linecode=LC2 length=4.3498 units=m

New Line.LINE1474 bus1=1467.1.2.3.4 bus2=1475.1.2.3.4 phases=4 linecode=LC2 length=0.49008 units=m

New Line.LINE1475 bus1=1467.1.2.3.4 bus2=1476.1.2.3.4 phases=4 linecode=LC2 length=2.0999 units=m

New Line.LINE1477 bus1=1469.1.2.3.4 bus2=1478.1.2.3.4 phases=4 linecode=LC2 length=6.0455 units=m

New Line.LINE1485 bus1=1475.1.2.3.4 bus2=1486.1.2.3.4 phases=4 linecode=LC2 length=4.0441 units=m

New Line.LINE1487 bus1=1476.1.2.3.4 bus2=1488.1.2.3.4 phases=4 linecode=LC2 length=3.2927 units=m

New Line.LINE1513 bus1=1503.1.2.3.4 bus2=1514.1.2.3.4 phases=4 linecode=LC2 length=4.8397 units=m

New Line.LINE1514 bus1=1503.1.2.3.4 bus2=1515.1.2.3.4 phases=4 linecode=LC2 length=7.2461 units=m

New Line.LINE1547 bus1=1540.1.2.3.4 bus2=1548.1.2.3.4 phases=4 linecode=LC2 length=11.6486 units=m

New Line.LINE1600 bus1=1593.1.2.3.4 bus2=1601.1.2.3.4 phases=4 linecode=LC2 length=4.121 units=m

New Line.LINE1610 bus1=1603.1.2.3.4 bus2=1611.1.2.3.4 phases=4 linecode=LC2 length=3.7745 units=m

New Line.LINE1680 bus1=1673.1.2.3.4 bus2=1681.1.2.3.4 phases=4 linecode=LC1 length=5.6849 units=m

New Line.LINE1684 bus1=1675.1.2.3.4 bus2=1685.1.2.3.4 phases=4 linecode=LC2 length=4.092 units=m

New Line.LINE1686 bus1=1676.1.2.3.4 bus2=1687.1.2.3.4 phases=4 linecode=LC2 length=2.6414 units=m

New Line.LINE1688 bus1=1679.1.2.3.4 bus2=1689.1.2.3.4 phases=4 linecode=LC2 length=4.3083 units=m

New Line.LINE1702 bus1=1696.1.2.3.4 bus2=1703.1.2.3.4 phases=4 linecode=LC2 length=3.5021 units=m

New Line.LINE1733 bus1=1729.1.2.3.4 bus2=1734.1.2.3.4 phases=4 linecode=LC8 length=4.1446 units=m

New Line.LINE1738 bus1=1734.1.2.3.4 bus2=1739.1.2.3.4 phases=4 linecode=LC2 length=6.0382 units=m

New Line.LINE1781 bus1=1775.1.2.3.4 bus2=1782.1.2.3.4 phases=4 linecode=LC2 length=5.0161 units=m

New Line.LINE1785 bus1=1777.1.2.3.4 bus2=1786.1.2.3.4 phases=4 linecode=LC8 length=13.6692 units=m

New Line.LINE1796 bus1=1789.1.2.3.4 bus2=1797.1.2.3.4 phases=4 linecode=LC2 length=4.6746 units=m

New Line.LINE1807 bus1=1799.1.2.3.4 bus2=1808.1.2.3.4 phases=4 linecode=LC2 length=2.9815 units=m

New Line.LINE1810 bus1=1801.1.2.3.4 bus2=1811.1.2.3.4 phases=4 linecode=LC2 length=4.1446 units=m

New Line.LINE1814 bus1=1803.1.2.3.4 bus2=1815.1.2.3.4 phases=4 linecode=LC2 length=6.1171 units=m

New Line.LINE1901 bus1=1889.1.2.3.4 bus2=1902.1.2.3.4 phases=4 linecode=LC2 length=5.1606 units=m

New Line.LINE1938 bus1=1926.1.2.3.4 bus2=1939.1.2.3.4 phases=4 linecode=LC2 length=3.3374 units=m

New Line.LINE1968 bus1=1956.1.2.3.4 bus2=1969.1.2.3.4 phases=4 linecode=LC2 length=4.7033 units=m

New Line.LINE2009 bus1=1995.1.2.3.4 bus2=2010.1.2.3.4 phases=4 linecode=LC3 length=3.1868 units=m

New Line.LINE2018 bus1=2004.1.2.3.4 bus2=2019.1.2.3.4 phases=4 linecode=LC2 length=5.3502 units=m

New Line.LINE2020 bus1=2005.1.2.3.4 bus2=2021.1.2.3.4 phases=4 linecode=LC2 length=3.3252 units=m

New Line.LINE2026 bus1=2010.1.2.3.4 bus2=2027.1.2.3.4 phases=4 linecode=LC2 length=8.3027 units=m

New Line.LINE2032 bus1=2015.1.2.3.4 bus2=2033.1.2.3.4 phases=4 linecode=LC9 length=0.81763 units=m

New Line.LINE2073 bus1=2051.1.2.3.4 bus2=2074.1.2.3.4 phases=4 linecode=LC8 length=15.6609 units=m

New Line.LINE2189 bus1=2165.1.2.3.4 bus2=2190.1.2.3.4 phases=4 linecode=LC2 length=5.2738 units=m

New Line.LINE2191 bus1=2166.1.2.3.4 bus2=2192.1.2.3.4 phases=4 linecode=LC1 length=6.0758 units=m

New Line.LINE2193 bus1=2167.1.2.3.4 bus2=2194.1.2.3.4 phases=4 linecode=LC2 length=4.2738 units=m

New Line.LINE2278 bus1=2251.1.2.3.4 bus2=2279.1.2.3.4 phases=4 linecode=LC2 length=3.5743 units=m

New Line.LINE2279 bus1=2251.1.2.3.4 bus2=2280.1.2.3.4 phases=4 linecode=LC2 length=3.5743 units=m

New Line.LINE2287 bus1=2259.1.2.3.4 bus2=2288.1.2.3.4 phases=4 linecode=LC2 length=4.0072 units=m

New Line.LINE2305 bus1=2276.1.2.3.4 bus2=2306.1.2.3.4 phases=4 linecode=LC2 length=3.8839 units=m

New Line.LINE2316 bus1=2286.1.2.3.4 bus2=2317.1.2.3.4 phases=4 linecode=LC2 length=13.2658 units=m

New Line.LINE2329 bus1=2300.1.2.3.4 bus2=2330.1.2.3.4 phases=4 linecode=LC2 length=4.4194 units=m

New Line.LINE2345 bus1=2317.1.2.3.4 bus2=2346.1.2.3.4 phases=4 linecode=LC2 length=3.2062 units=m

New Line.LINE2368 bus1=2340.1.2.3.4 bus2=2369.1.2.3.4 phases=4 linecode=LC2 length=4.5148 units=m

New Line.LINE2370 bus1=2341.1.2.3.4 bus2=2371.1.2.3.4 phases=4 linecode=LC2 length=5.2818 units=m

New Line.LINE2378 bus1=2347.1.2.3.4 bus2=2379.1.2.3.4 phases=4 linecode=LC2 length=3.6768 units=m

New Line.LINE2428 bus1=2402.1.2.3.4 bus2=2429.1.2.3.4 phases=4 linecode=LC2 length=4.4318 units=m

New Line.LINE2463 bus1=2438.1.2.3.4 bus2=2464.1.2.3.4 phases=4 linecode=LC1 length=6.8433 units=m

New Line.LINE2464 bus1=2438.1.2.3.4 bus2=2465.1.2.3.4 phases=4 linecode=LC1 length=6.8433 units=m

New Line.LINE2482 bus1=2457.1.2.3.4 bus2=2483.1.2.3.4 phases=4 linecode=LC2 length=4.9182 units=m

New Line.LINE2493 bus1=2469.1.2.3.4 bus2=2494.1.2.3.4 phases=4 linecode=LC2 length=3.6023 units=m

New Line.LINE2534 bus1=2513.1.2.3.4 bus2=2535.1.2.3.4 phases=4 linecode=LC2 length=6.9347 units=m

New Line.LINE2547 bus1=2529.1.2.3.4 bus2=2548.1.2.3.4 phases=4 linecode=LC2 length=4.3401 units=m

New Line.LINE2574 bus1=2559.1.2.3.4 bus2=2575.1.2.3.4 phases=4 linecode=LC2 length=4.7984 units=m

New Line.LINE2576 bus1=2560.1.2.3.4 bus2=2577.1.2.3.4 phases=4 linecode=LC2 length=3.6907 units=m

New Line.LINE2595 bus1=2581.1.2.3.4 bus2=2596.1.2.3.4 phases=4 linecode=LC2 length=5.1003 units=m

New Line.LINE2597 bus1=2582.1.2.3.4 bus2=2598.1.2.3.4 phases=4 linecode=LC2 length=5.2284 units=m

New Line.LINE2614 bus1=2601.1.2.3.4 bus2=2615.1.2.3.4 phases=4 linecode=LC2 length=3.3739 units=m

New Line.LINE2653 bus1=2641.1.2.3.4 bus2=2654.1.2.3.4 phases=4 linecode=LC2 length=4.7561 units=m

New Line.LINE2682 bus1=2671.1.2.3.4 bus2=2683.1.2.3.4 phases=4 linecode=LC2 length=4.633 units=m

New Line.LINE2711 bus1=2700.1.2.3.4 bus2=2712.1.2.3.4 phases=4 linecode=LC3 length=2.3329 units=m

New Line.LINE2723 bus1=2711.1.2.3.4 bus2=2724.1.2.3.4 phases=4 linecode=LC3 length=3.4674 units=m

New Line.LINE2784 bus1=2778.1.2.3.4 bus2=2785.1.2.3.4 phases=4 linecode=LC3 length=5.0962 units=m

New Line.LINE2791 bus1=2784.1.2.3.4 bus2=2792.1.2.3.4 phases=4 linecode=LC2 length=5.9373 units=m

New Line.LINE2802 bus1=2797.1.2.3.4 bus2=2803.1.2.3.4 phases=4 linecode=LC2 length=3.1556 units=m

New Line.LINE2803 bus1=2797.1.2.3.4 bus2=2804.1.2.3.4 phases=4 linecode=LC2 length=3.1556 units=m

New Line.LINE2814 bus1=2810.1.2.3.4 bus2=2815.1.2.3.4 phases=4 linecode=LC2 length=3.0263 units=m

New Line.LINE2815 bus1=2810.1.2.3.4 bus2=2816.1.2.3.4 phases=4 linecode=LC2 length=3.0263 units=m
