! Reduced enabled lines.

New Line._virtual_line0_line1_line2_line3_line4_line5_line6_line7_line8_line9_line10_line11_line12_line13_line14_line15_line16_line17_line18_line19_line20_line21_line22_line23_line24_line25_line26 bus1=27.1.2.3.4 bus2=sourcebus.1.2.3.4 phases=4 linecode=LC8 length=40.837898 units=m
! reduced_from=line0,line1,line2,line3,line4,line5,line6,line7,line8,line9,line10,line11,line12,line13,line14,line15,line16,line17,line18,line19,line20,line21,line22,line23,line24,line25,line26
! eliminated_buses=1,2,3,4,5,6,7,8,9,10,11,12,13,14,15,16,17,18,19,20,21,22,23,24,25,26

New Line._virtual_line30_line31_line32_line33_line34_line35_line36_line37_line38_line39_line40_line41_line43_line47 bus1=48.1.2.3.4 bus2=30.1.2.3.4 phases=4 linecode=LC8 length=18.244988 units=m
! reduced_from=line30,line31,line32,line33,line34,line35,line36,line37,line38,line39,line40,line41,line43,line47
! eliminated_buses=31,32,33,34,35,36,37,38,39,40,41,42,44

New Line._virtual_line52_line57_line64_line73_line81_line89_line97_line105_line114_line122_line128_line134_line140_line146_line152_line158_line164_line170_line176_line182_line189_line196_line202_line208_line214_line220_line226_line232_line238_line244_line250_line256_line261_line265_line269_line273_line277_line281_line285_line289_line293_line297_line301_line305_line309_line313_line317_line321_line325_line329_line333_line337_line341_line345_line349_line353_line357_line361_line365_line369_line372_line375_line378_line381_line384_line387_line389_line392_line394_line396_line398_line401_line404_line407_line411 bus1=412.1.2.3.4 bus2=48.1.2.3.4 phases=4 linecode=LC8 length=287.60962 units=m
! reduced_from=line52,line57,line64,line73,line81,line89,line97,line105,line114,line122,line128,line134,line140,line146,line152,line158,line164,line170,line176,line182,line189,line196,line202,line208,line214,line220,line226,line232,line238,line244,line250,line256,line261,line265,line269,line273,line277,line281,line285,line289,line293,line297,line301,line305,line309,line313,line317,line321,line325,line329,line333,line337,line341,line345,line349,line353,line357,line361,line365,line369,line372,line375,line378,line381,line384,line387,line389,line392,line394,line396,line398,line401,line404,line407,line411
! eliminated_buses=53,58,65,74,82,90,98,106,115,123,129,135,141,147,153,159,165,171,177,183,190,197,203,209,215,221,227,233,239,245,251,257,262,266,270,274,278,282,286,290,294,298,302,306,310,314,318,322,326,330,334,338,342,346,350,354,358,362,366,370,373,376,379,382,385,388,390,393,395,397,399,402,405,408

New Line._virtual_line59_line66_line75_line83_line91_line99_line107 bus1=54.1.2.3.4 bus2=108.1.2.3.4 phases=4 linecode=LC2 length=2.68855 units=m
! reduced_from=line59,line66,line75,line83,line91,line99,line107
! eliminated_buses=60,67,76,84,92,100

New Line._virtual_line60_line68_line77_line85_line93_line101 bus1=54.1.2.3.4 bus2=102.1.2.3.4 phases=4 linecode=LC2 length=5.75649 units=m
! reduced_from=line60,line68,line77,line85,line93,line101
! eliminated_buses=61,69,78,86,94

New Line._virtual_line110_line118_line125_line131_line137_line143_line149_line155_line161_line167_line173_line179_line186 bus1=187.1.2.3.4 bus2=102.1.2.3.4 phases=4 linecode=LC2 length=8.471274 units=m
! reduced_from=line110,line118,line125,line131,line137,line143,line149,line155,line161,line167,line173,line179,line186
! eliminated_buses=111,119,126,132,138,144,150,156,162,168,174,180

New Line._virtual_line116_line124_line130_line136_line142_line148_line154_line160_line166_line172_line178 bus1=108.1.2.3.4 bus2=179.1.2.3.4 phases=4 linecode=LC2 length=7.70214 units=m
! reduced_from=line116,line124,line130,line136,line142,line148,line154,line160,line166,line172,line178
! eliminated_buses=117,125,131,137,143,149,155,161,167,173

New Line._virtual_line184_line191_line198_line204_line210_line216_line222_line228_line234_line240_line246_line252_line258 bus1=179.1.2.3.4 bus2=259.1.2.3.4 phases=4 linecode=LC2 length=13.891884 units=m
! reduced_from=line184,line191,line198,line204,line210,line216,line222,line228,line234,line240,line246,line252,line258
! eliminated_buses=185,192,199,205,211,217,223,229,235,241,247,253

New Line._virtual_line193_line199_line205_line211_line217_line223_line229_line235_line241_line247_line253 bus1=187.1.2.3.4 bus2=254.1.2.3.4 phases=4 linecode=LC2 length=16.323191 units=m
! reduced_from=line193,line199,line205,line211,line217,line223,line229,line235,line241,line247,line253
! eliminated_buses=194,200,206,212,218,224,230,236,242,248

New Line._virtual_line415_line420_line425_line429_line433_line438_line443_line448_line453_line459 bus1=460.1.2.3.4 bus2=412.1.2.3.4 phases=4 linecode=LC2 length=3.591222 units=m
! reduced_from=line415,line420,line425,line429,line433,line438,line443,line448,line453,line459
! eliminated_buses=416,421,426,430,434,439,444,449,454

New Line.LINE29 bus1=27.1.2.3.4 bus2=30.1.2.3.4 phases=4 linecode=LC1 length=0.81449 units=m

New Line.LINE53 bus1=48.1.2.3.4 bus2=54.1.2.3.4 phases=4 linecode=LC2 length=11.9875 units=m

New Line.LINE109 bus1=102.1.2.3.4 bus2=110.1.2.3.4 phases=4 linecode=LC2 length=2.7893 units=m

New Line.LINE117 bus1=108.1.2.3.4 bus2=118.1.2.3.4 phases=4 linecode=LC2 length=6.0342 units=m

New Line.LINE185 bus1=179.1.2.3.4 bus2=186.1.2.3.4 phases=4 linecode=LC2 length=4.9741 units=m

New Line.LINE192 bus1=187.1.2.3.4 bus2=193.1.2.3.4 phases=4 linecode=LC2 length=3.9626 units=m
