! Reduced enabled lines.

New Line._virtual_line0_line1_line2_line3_line4_line5_line6_line7_line8_line9_line10_line11_line12_line13_line14_line15_line16_line17_line18_line19_line20_line21_line22_line23_line24_line25_line26_line27_line28_line29_line30_line31_line32_line33_line34_line35_line36_line37_line38_line39_line40_line41_line42_line44_line46 bus1=47.1.2.3.4 bus2=sourcebus.1.2.3.4 phases=4 linecode=LC8 length=73.803818 units=m
! reduced_from=line0,line1,line2,line3,line4,line5,line6,line7,line8,line9,line10,line11,line12,line13,line14,line15,line16,line17,line18,line19,line20,line21,line22,line23,line24,line25,line26,line27,line28,line29,line30,line31,line32,line33,line34,line35,line36,line37,line38,line39,line40,line41,line42,line44,line46
! eliminated_buses=1,2,3,4,5,6,7,8,9,10,11,12,13,14,15,16,17,18,19,20,21,22,23,24,25,26,27,28,29,30,31,32,33,34,35,36,37,38,39,40,41,42,43,45

New Line._virtual_line49_line53 bus1=54.1.2.3.4 bus2=47.1.2.3.4 phases=4 linecode=LC8 length=45.6272 units=m
! reduced_from=line49,line53
! eliminated_buses=50

New Line._virtual_line54_line60_line67_line75_line82_line89_line96 bus1=51.1.2.3.4 bus2=97.1.2.3.4 phases=4 linecode=LC2 length=3.97698 units=m
! reduced_from=line54,line60,line67,line75,line82,line89,line96
! eliminated_buses=55,61,68,76,83,90

New Line._virtual_line55_line61_line68_line76_line83_line90_line97 bus1=51.1.2.3.4 bus2=98.1.2.3.4 phases=4 linecode=LC2 length=4.141891 units=m
! reduced_from=line55,line61,line68,line76,line83,line90,line97
! eliminated_buses=56,62,69,77,84,91

New Line._virtual_line59_line66_line73_line80_line87_line94_line101_line109_line117_line123_line129_line135_line141_line147_line153_line160_line168_line176 bus1=54.1.2.3.4 bus2=177.1.2.3.4 phases=4 linecode=LC8 length=83.2647 units=m
! reduced_from=line59,line66,line73,line80,line87,line94,line101,line109,line117,line123,line129,line135,line141,line147,line153,line160,line168,line176
! eliminated_buses=60,67,74,81,88,95,102,110,118,124,130,136,142,148,154,161,169

New Line._virtual_line64_line71_line78_line85_line92_line99_line107 bus1=59.1.2.3.4 bus2=108.1.2.3.4 phases=4 linecode=LC2 length=5.0082 units=m
! reduced_from=line64,line71,line78,line85,line92,line99,line107
! eliminated_buses=65,72,79,86,93,100

New Line._virtual_line65_line72_line79_line86_line93_line100_line108 bus1=109.1.2.3.4 bus2=59.1.2.3.4 phases=4 linecode=LC2 length=7.548121 units=m
! reduced_from=line65,line72,line79,line86,line93,line100,line108
! eliminated_buses=66,73,80,87,94,101

New Line._virtual_line104_line111_line119_line125_line131_line137_line143_line149_line155_line162_line170_line178_line186 bus1=187.1.2.3.4 bus2=97.1.2.3.4 phases=4 linecode=LC2 length=8.84202 units=m
! reduced_from=line104,line111,line119,line125,line131,line137,line143,line149,line155,line162,line170,line178,line186
! eliminated_buses=105,112,120,126,132,138,144,150,156,163,171,179

New Line._virtual_line106_line112_line120_line126_line132_line138_line144_line150_line156_line163_line171_line179_line187 bus1=98.1.2.3.4 bus2=188.1.2.3.4 phases=4 linecode=LC2 length=7.90992 units=m
! reduced_from=line106,line112,line120,line126,line132,line138,line144,line150,line156,line163,line171,line179,line187
! eliminated_buses=107,113,121,127,133,139,145,151,157,164,172,180

New Line._virtual_line114_line121_line127_line133_line139_line145_line151_line157_line164_line172 bus1=108.1.2.3.4 bus2=173.1.2.3.4 phases=4 linecode=LC2 length=10.54764 units=m
! reduced_from=line114,line121,line127,line133,line139,line145,line151,line157,line164,line172
! eliminated_buses=115,122,128,134,140,146,152,158,165

New Line._virtual_line116_line122_line128_line134_line140_line146_line152_line158_line165_line173_line180_line188_line197_line206 bus1=109.1.2.3.4 bus2=207.1.2.3.4 phases=4 linecode=LC2 length=8.095808 units=m
! reduced_from=line116,line122,line128,line134,line140,line146,line152,line158,line165,line173,line180,line188,line197,line206
! eliminated_buses=117,123,129,135,141,147,153,159,166,174,181,189,198

New Line._virtual_line183_line190 bus1=191.1.2.3.4 bus2=177.1.2.3.4 phases=4 linecode=LC2 length=6.36419 units=m
! reduced_from=line183,line190
! eliminated_buses=184

New Line._virtual_line184_line191_line201 bus1=202.1.2.3.4 bus2=177.1.2.3.4 phases=4 linecode=LC8 length=41.5429 units=m
! reduced_from=line184,line191,line201
! eliminated_buses=185,192

New Line._virtual_line194_line204_line212_line222_line231_line241_line253_line264_line274_line286_line299_line313_line329_line346_line362_line381 bus1=187.1.2.3.4 bus2=382.1.2.3.4 phases=4 linecode=LC2 length=15.566996 units=m
! reduced_from=line194,line204,line212,line222,line231,line241,line253,line264,line274,line286,line299,line313,line329,line346,line362,line381
! eliminated_buses=195,205,213,223,232,242,254,265,275,287,300,314,330,347,363

New Line._virtual_line196_line205_line213_line223_line232_line242_line254_line265_line275_line287_line300_line314_line330_line347 bus1=348.1.2.3.4 bus2=188.1.2.3.4 phases=4 linecode=LC2 length=16.57002 units=m
! reduced_from=line196,line205,line213,line223,line232,line242,line254,line265,line275,line287,line300,line314,line330,line347
! eliminated_buses=197,206,214,224,233,243,255,266,276,288,301,315,331

New Line._virtual_line200_line208_line217_line226_line235_line245_line257_line268 bus1=191.1.2.3.4 bus2=269.1.2.3.4 phases=4 linecode=LC2 length=6.60306 units=m
! reduced_from=line200,line208,line217,line226,line235,line245,line257,line268
! eliminated_buses=201,209,218,227,236,246,258

New Line._virtual_line209_line218_line227_line236 bus1=237.1.2.3.4 bus2=202.1.2.3.4 phases=4 linecode=LC2 length=6.1183 units=m
! reduced_from=line209,line218,line227,line236
! eliminated_buses=210,219,228

New Line._virtual_line210_line220_line229_line239 bus1=240.1.2.3.4 bus2=202.1.2.3.4 phases=4 linecode=LC8 length=24.0901 units=m
! reduced_from=line210,line220,line229,line239
! eliminated_buses=211,221,230

New Line._virtual_line215_line224_line233_line243_line255_line266_line276_line288_line301_line315_line331_line348_line363_line382 bus1=207.1.2.3.4 bus2=383.1.2.3.4 phases=4 linecode=LC2 length=11.346017 units=m
! reduced_from=line215,line224,line233,line243,line255,line266,line276,line288,line301,line315,line331,line348,line363,line382
! eliminated_buses=216,225,234,244,256,267,277,289,302,316,332,349,364

New Line._virtual_line247_line258_line269_line280_line293_line306 bus1=237.1.2.3.4 bus2=307.1.2.3.4 phases=4 linecode=LC2 length=6.79371 units=m
! reduced_from=line247,line258,line269,line280,line293,line306
! eliminated_buses=248,259,270,281,294

New Line._virtual_line250_line261_line272_line283 bus1=240.1.2.3.4 bus2=284.1.2.3.4 phases=4 linecode=LC8 length=29.3625 units=m
! reduced_from=line250,line261,line272,line283
! eliminated_buses=251,262,273

New Line._virtual_line251_line262_line273_line285_line298_line312_line328_line345_line361_line380_line394_line408 bus1=240.1.2.3.4 bus2=409.1.2.3.4 phases=4 linecode=LC5 length=18.96037 units=m
! reduced_from=line251,line262,line273,line285,line298,line312,line328,line345,line361,line380,line394,line408
! eliminated_buses=252,263,274,286,299,313,329,346,362,381,395

New Line._virtual_line279_line292_line305_line319_line335_line352_line369_line384 bus1=385.1.2.3.4 bus2=269.1.2.3.4 phases=4 linecode=LC2 length=11.95737 units=m
! reduced_from=line279,line292,line305,line319,line335,line352,line369,line384
! eliminated_buses=280,293,306,320,336,353,370

New Line._virtual_line290_line303_line317_line333_line350 bus1=351.1.2.3.4 bus2=279.1.2.3.4 phases=4 linecode=LC2 length=8.72513 units=m
! reduced_from=line290,line303,line317,line333,line350
! eliminated_buses=291,304,318,334

New Line._virtual_line291_line304_line318_line334_line351 bus1=279.1.2.3.4 bus2=352.1.2.3.4 phases=4 linecode=LC2 length=8.21146 units=m
! reduced_from=line291,line304,line318,line334,line351
! eliminated_buses=292,305,319,335

New Line._virtual_line296_line310_line326_line343_line359 bus1=284.1.2.3.4 bus2=360.1.2.3.4 phases=4 linecode=LC2 length=12.35227 units=m
! reduced_from=line296,line310,line326,line343,line359
! eliminated_buses=297,311,327,344

New Line._virtual_line308_line323_line340_line356 bus1=357.1.2.3.4 bus2=296.1.2.3.4 phases=4 linecode=LC8 length=42.3649 units=m
! reduced_from=line308,line323,line340,line356
! eliminated_buses=309,324,341

New Line._virtual_line309_line325_line342_line358_line376_line391 bus1=296.1.2.3.4 bus2=392.1.2.3.4 phases=4 linecode=LC2 length=10.88752 units=m
! reduced_from=line309,line325,line342,line358,line376,line391
! eliminated_buses=310,326,343,359,377

New Line._virtual_line321_line338_line355_line372_line387_line398_line413 bus1=307.1.2.3.4 bus2=414.1.2.3.4 phases=4 linecode=LC2 length=11.96312 units=m
! reduced_from=line321,line338,line355,line372,line387,line398,line413
! eliminated_buses=322,339,356,373,388,399

New Line._virtual_line336_line353_line370_line385_line396 bus1=397.1.2.3.4 bus2=321.1.2.3.4 phases=4 linecode=LC2 length=8.01495 units=m
! reduced_from=line336,line353,line370,line385,line396
! eliminated_buses=337,354,371,386

New Line._virtual_line337_line354_line371_line386_line397 bus1=398.1.2.3.4 bus2=321.1.2.3.4 phases=4 linecode=LC2 length=8.0103 units=m
! reduced_from=line337,line354,line371,line386,line397
! eliminated_buses=338,355,372,387

New Line._virtual_line373_line388_line400_line415_line424 bus1=357.1.2.3.4 bus2=425.1.2.3.4 phases=4 linecode=LC8 length=24.65438 units=m
! reduced_from=line373,line388,line400,line415,line424
! eliminated_buses=374,389,401,416

New Line._virtual_line374_line389 bus1=390.1.2.3.4 bus2=357.1.2.3.4 phases=4 linecode=LC2 length=9.65465 units=m
! reduced_from=line374,line389
! eliminated_buses=375

New Line._virtual_line378_line392_line406_line420_line429_line440_line453_line466_line480_line494_line511_line528_line546 bus1=360.1.2.3.4 bus2=547.1.2.3.4 phases=4 linecode=LC2 length=15.5242 units=m
! reduced_from=line378,line392,line406,line420,line429,line440,line453,line466,line480,line494,line511,line528,line546
! eliminated_buses=379,393,407,421,430,441,454,467,481,495,512,529

New Line._virtual_line401_line416_line425_line436_line449_line463_line476_line491 bus1=390.1.2.3.4 bus2=492.1.2.3.4 phases=4 linecode=LC2 length=7.85955 units=m
! reduced_from=line401,line416,line425,line436,line449,line463,line476,line491
! eliminated_buses=402,417,426,437,450,464,477

New Line._virtual_line402_line417_line426_line437_line450_line464 bus1=390.1.2.3.4 bus2=465.1.2.3.4 phases=4 linecode=LC2 length=9.47056 units=m
! reduced_from=line402,line417,line426,line437,line450,line464
! eliminated_buses=403,418,427,438,451

New Line._virtual_line405_line419_line428_line439 bus1=440.1.2.3.4 bus2=392.1.2.3.4 phases=4 linecode=LC2 length=3.53963 units=m
! reduced_from=line405,line419,line428,line439
! eliminated_buses=406,420,429

New Line._virtual_line421_line431 bus1=409.1.2.3.4 bus2=432.1.2.3.4 phases=4 linecode=LC4 length=21.36164 units=m
! reduced_from=line421,line431
! eliminated_buses=422

New Line._virtual_line434_line446_line460 bus1=425.1.2.3.4 bus2=461.1.2.3.4 phases=4 linecode=LC2 length=15.2468 units=m
! reduced_from=line434,line446,line460
! eliminated_buses=435,447

New Line._virtual_line442_line455_line468_line482 bus1=483.1.2.3.4 bus2=432.1.2.3.4 phases=4 linecode=LC2 length=15.55822 units=m
! reduced_from=line442,line455,line468,line482
! eliminated_buses=443,456,469

New Line._virtual_line447_line461 bus1=462.1.2.3.4 bus2=436.1.2.3.4 phases=4 linecode=LC2 length=11.6902 units=m
! reduced_from=line447,line461
! eliminated_buses=448

New Line._virtual_line448_line462 bus1=463.1.2.3.4 bus2=436.1.2.3.4 phases=4 linecode=LC8 length=14.5738 units=m
! reduced_from=line448,line462
! eliminated_buses=449

New Line._virtual_line452_line465_line479_line493_line510_line527_line545_line564_line582_line597_line612_line627_line643_line660_line680_line699_line717_line735_line752_line766_line781 bus1=782.1.2.3.4 bus2=440.1.2.3.4 phases=4 linecode=LC2 length=24.13004 units=m
! reduced_from=line452,line465,line479,line493,line510,line527,line545,line564,line582,line597,line612,line627,line643,line660,line680,line699,line717,line735,line752,line766,line781
! eliminated_buses=453,466,480,494,511,528,546,565,583,598,613,628,644,661,681,700,718,736,753,767

New Line._virtual_line457_line472_line487_line502_line519 bus1=520.1.2.3.4 bus2=444.1.2.3.4 phases=4 linecode=LC4 length=33.6262 units=m
! reduced_from=line457,line472,line487,line502,line519
! eliminated_buses=458,473,488,503

New Line._virtual_line469_line483_line498_line514_line531_line549_line570_line586_line601_line616 bus1=617.1.2.3.4 bus2=457.1.2.3.4 phases=4 linecode=LC2 length=7.01431 units=m
! reduced_from=line469,line483,line498,line514,line531,line549,line570,line586,line601,line616
! eliminated_buses=470,484,499,515,532,550,571,587,602

New Line._virtual_line470_line484_line499_line515_line532_line550_line571_line587_line602_line617_line633_line648 bus1=457.1.2.3.4 bus2=649.1.2.3.4 phases=4 linecode=LC2 length=13.99566 units=m
! reduced_from=line470,line484,line499,line515,line532,line550,line571,line587,line602,line617,line633,line648
! eliminated_buses=471,485,500,516,533,551,572,588,603,618,634

New Line._virtual_line474_line489 bus1=490.1.2.3.4 bus2=463.1.2.3.4 phases=4 linecode=LC2 length=7.5534 units=m
! reduced_from=line474,line489
! eliminated_buses=475

New Line._virtual_line475_line490_line506 bus1=463.1.2.3.4 bus2=507.1.2.3.4 phases=4 linecode=LC8 length=16.0213 units=m
! reduced_from=line475,line490,line506
! eliminated_buses=476,491

New Line._virtual_line478_line492_line509_line526 bus1=465.1.2.3.4 bus2=527.1.2.3.4 phases=4 linecode=LC2 length=10.28319 units=m
! reduced_from=line478,line492,line509,line526
! eliminated_buses=479,493,510

New Line._virtual_line497_line513_line530_line548_line569_line585_line600_line615_line630_line646_line663_line683 bus1=483.1.2.3.4 bus2=684.1.2.3.4 phases=4 linecode=LC2 length=17.9505 units=m
! reduced_from=line497,line513,line530,line548,line569,line585,line600,line615,line630,line646,line663,line683
! eliminated_buses=498,514,531,549,570,586,601,616,631,647,664

New Line._virtual_line504_line521_line539_line557_line578_line594_line609 bus1=610.1.2.3.4 bus2=490.1.2.3.4 phases=4 linecode=LC2 length=5.48418 units=m
! reduced_from=line504,line521,line539,line557,line578,line594,line609
! eliminated_buses=505,522,540,558,579,595

New Line._virtual_line505_line522_line540_line558_line579_line595_line610_line625_line641_line658_line678_line697_line715_line733_line751 bus1=752.1.2.3.4 bus2=490.1.2.3.4 phases=4 linecode=LC2 length=10.19677 units=m
! reduced_from=line505,line522,line540,line558,line579,line595,line610,line625,line641,line658,line678,line697,line715,line733,line751
! eliminated_buses=506,523,541,559,580,596,611,626,642,659,679,698,716,734

New Line._virtual_line508_line525_line544_line563 bus1=492.1.2.3.4 bus2=564.1.2.3.4 phases=4 linecode=LC2 length=11.13588 units=m
! reduced_from=line508,line525,line544,line563
! eliminated_buses=509,526,545

New Line._virtual_line536_line554_line575_line591 bus1=592.1.2.3.4 bus2=520.1.2.3.4 phases=4 linecode=LC2 length=19.2592 units=m
! reduced_from=line536,line554,line575,line591
! eliminated_buses=537,555,576

New Line._virtual_line537_line556_line577_line593_line608 bus1=520.1.2.3.4 bus2=609.1.2.3.4 phases=4 linecode=LC4 length=16.01617 units=m
! reduced_from=line537,line556,line577,line593,line608
! eliminated_buses=538,557,578,594

New Line._virtual_line541_line559 bus1=560.1.2.3.4 bus2=524.1.2.3.4 phases=4 linecode=LC2 length=3.8912 units=m
! reduced_from=line541,line559
! eliminated_buses=542

New Line._virtual_line542_line560_line580 bus1=581.1.2.3.4 bus2=524.1.2.3.4 phases=4 linecode=LC2 length=6.14798 units=m
! reduced_from=line542,line560,line580
! eliminated_buses=543,561

New Line._virtual_line567_line583_line598_line613_line628_line644_line661_line681_line700_line718_line736_line753_line767_line782_line799 bus1=800.1.2.3.4 bus2=547.1.2.3.4 phases=4 linecode=LC2 length=17.13623 units=m
! reduced_from=line567,line583,line598,line613,line628,line644,line661,line681,line700,line718,line736,line753,line767,line782,line799
! eliminated_buses=568,584,599,614,629,645,662,682,701,719,737,754,768,783

New Line._virtual_line605_line620_line635_line650_line669_line687_line705_line723 bus1=592.1.2.3.4 bus2=724.1.2.3.4 phases=4 linecode=LC2 length=3.43465 units=m
! reduced_from=line605,line620,line635,line650,line669,line687,line705,line723
! eliminated_buses=606,621,636,651,670,688,706

New Line._virtual_line606_line621 bus1=622.1.2.3.4 bus2=592.1.2.3.4 phases=4 linecode=LC2 length=6.45 units=m
! reduced_from=line606,line621
! eliminated_buses=607

New Line._virtual_line623_line639_line655_line674 bus1=675.1.2.3.4 bus2=609.1.2.3.4 phases=4 linecode=LC4 length=38.76192 units=m
! reduced_from=line623,line639,line655,line674
! eliminated_buses=624,640,656

New Line._virtual_line624_line640_line657_line677_line696_line714_line732_line750_line765_line780_line796 bus1=609.1.2.3.4 bus2=797.1.2.3.4 phases=4 linecode=LC3 length=21.54794 units=m
! reduced_from=line624,line640,line657,line677,line696,line714,line732,line750,line765,line780,line796
! eliminated_buses=625,641,658,678,697,715,733,751,766,781

New Line._virtual_line632_line647_line664_line684_line702_line720_line738_line755_line769 bus1=617.1.2.3.4 bus2=770.1.2.3.4 phases=4 linecode=LC2 length=7.94768 units=m
! reduced_from=line632,line647,line664,line684,line702,line720,line738,line755,line769
! eliminated_buses=633,648,665,685,703,721,739,756

New Line._virtual_line637_line653_line672_line690 bus1=622.1.2.3.4 bus2=691.1.2.3.4 phases=4 linecode=LC2 length=5.14951 units=m
! reduced_from=line637,line653,line672,line690
! eliminated_buses=638,654,673

New Line._virtual_line651_line670_line688_line706 bus1=707.1.2.3.4 bus2=637.1.2.3.4 phases=4 linecode=LC2 length=4.47236 units=m
! reduced_from=line651,line670,line688,line706
! eliminated_buses=652,671,689

New Line._virtual_line652_line671_line689_line707_line724 bus1=637.1.2.3.4 bus2=725.1.2.3.4 phases=4 linecode=LC2 length=6.47779 units=m
! reduced_from=line652,line671,line689,line707,line724
! eliminated_buses=653,672,690,708

New Line._virtual_line667_line685_line703_line721_line739_line756 bus1=649.1.2.3.4 bus2=757.1.2.3.4 phases=4 linecode=LC2 length=7.32705 units=m
! reduced_from=line667,line685,line703,line721,line739,line756
! eliminated_buses=668,686,704,722,740

New Line._virtual_line692_line709 bus1=710.1.2.3.4 bus2=675.1.2.3.4 phases=4 linecode=LC4 length=6.56439 units=m
! reduced_from=line692,line709
! eliminated_buses=693

New Line._virtual_line710_line728_line746_line761_line776_line792_line808_line824_line840_line857 bus1=858.1.2.3.4 bus2=694.1.2.3.4 phases=4 linecode=LC2 length=3.61595 units=m
! reduced_from=line710,line728,line746,line761,line776,line792,line808,line824,line840,line857
! eliminated_buses=711,729,747,762,777,793,809,825,841

New Line._virtual_line711_line729_line747_line762_line777_line793_line809_line825_line841_line858_line874_line890_line906_line920_line935_line947 bus1=948.1.2.3.4 bus2=694.1.2.3.4 phases=4 linecode=LC2 length=17.75291 units=m
! reduced_from=line711,line729,line747,line762,line777,line793,line809,line825,line841,line858,line874,line890,line906,line920,line935,line947
! eliminated_buses=712,730,748,763,778,794,810,826,842,859,875,891,907,921,936

New Line._virtual_line726_line745_line760_line775 bus1=710.1.2.3.4 bus2=776.1.2.3.4 phases=4 linecode=LC2 length=22.4931 units=m
! reduced_from=line726,line745,line760,line775
! eliminated_buses=727,746,761

New Line._virtual_line741_line757_line772_line787_line803_line820_line835_line851_line867_line884_line900_line914 bus1=724.1.2.3.4 bus2=915.1.2.3.4 phases=4 linecode=LC2 length=7.32606 units=m
! reduced_from=line741,line757,line772,line787,line803,line820,line835,line851,line867,line884,line900,line914
! eliminated_buses=742,758,773,788,804,821,836,852,868,885,901

New Line._virtual_line743_line758_line773_line788_line804_line821_line836_line852 bus1=725.1.2.3.4 bus2=853.1.2.3.4 phases=4 linecode=LC2 length=11.34234 units=m
! reduced_from=line743,line758,line773,line788,line804,line821,line836,line852
! eliminated_buses=744,759,774,789,805,822,837

New Line._virtual_line771_line786_line802_line819_line834_line850_line866_line883_line899_line913_line927_line942 bus1=943.1.2.3.4 bus2=757.1.2.3.4 phases=4 linecode=LC2 length=18.21874 units=m
! reduced_from=line771,line786,line802,line819,line834,line850,line866,line883,line899,line913,line927,line942
! eliminated_buses=772,787,803,820,835,851,867,884,900,914,928

New Line._virtual_line785_line801_line818_line833_line849_line865_line882_line898_line912_line926_line941_line953_line969_line981_line993_line1005_line1016_line1028_line1038_line1049_line1062_line1074_line1087_line1099 bus1=770.1.2.3.4 bus2=1100.1.2.3.4 phases=4 linecode=LC2 length=21.93453 units=m
! reduced_from=line785,line801,line818,line833,line849,line865,line882,line898,line912,line926,line941,line953,line969,line981,line993,line1005,line1016,line1028,line1038,line1049,line1062,line1074,line1087,line1099
! eliminated_buses=786,802,819,834,850,866,883,899,913,927,942,954,970,982,994,1006,1017,1029,1039,1050,1063,1075,1088

New Line._virtual_line790_line806_line822 bus1=823.1.2.3.4 bus2=776.1.2.3.4 phases=4 linecode=LC2 length=1.03516 units=m
! reduced_from=line790,line806,line822
! eliminated_buses=791,807

New Line._virtual_line791_line807_line823_line839 bus1=776.1.2.3.4 bus2=840.1.2.3.4 phases=4 linecode=LC2 length=1.09313 units=m
! reduced_from=line791,line807,line823,line839
! eliminated_buses=792,808,824

New Line._virtual_line798_line814 bus1=782.1.2.3.4 bus2=815.1.2.3.4 phases=4 linecode=LC2 length=7.3863 units=m
! reduced_from=line798,line814
! eliminated_buses=799

New Line._virtual_line829_line844_line860_line876_line892_line907_line921_line936_line948_line963_line975_line987_line999 bus1=813.1.2.3.4 bus2=1000.1.2.3.4 phases=4 linecode=LC2 length=17.72656 units=m
! reduced_from=line829,line844,line860,line876,line892,line907,line921,line936,line948,line963,line975,line987,line999
! eliminated_buses=830,845,861,877,893,908,922,937,949,964,976,988

New Line._virtual_line830_line845_line861 bus1=814.1.2.3.4 bus2=862.1.2.3.4 phases=4 linecode=LC2 length=14.9238 units=m
! reduced_from=line830,line845,line861
! eliminated_buses=831,846

New Line._virtual_line831_line847_line863_line880 bus1=881.1.2.3.4 bus2=814.1.2.3.4 phases=4 linecode=LC3 length=42.09534 units=m
! reduced_from=line831,line847,line863,line880
! eliminated_buses=832,848,864

New Line._virtual_line837_line853_line868_line885_line901_line915_line930_line944 bus1=945.1.2.3.4 bus2=823.1.2.3.4 phases=4 linecode=LC2 length=7.129699 units=m
! reduced_from=line837,line853,line868,line885,line901,line915,line930,line944
! eliminated_buses=838,854,869,886,902,916,931

New Line._virtual_line838_line854_line869_line886_line902_line916_line931 bus1=823.1.2.3.4 bus2=932.1.2.3.4 phases=4 linecode=LC2 length=5.12374 units=m
! reduced_from=line838,line854,line869,line886,line902,line916,line931
! eliminated_buses=839,855,870,887,903,917

New Line._virtual_line855_line870_line887_line903_line917_line932 bus1=933.1.2.3.4 bus2=840.1.2.3.4 phases=4 linecode=LC2 length=5.27912 units=m
! reduced_from=line855,line870,line887,line903,line917,line932
! eliminated_buses=856,871,888,904,918

New Line._virtual_line856_line871_line888_line904_line918_line933_line945_line958_line972_line984_line996_line1008 bus1=1009.1.2.3.4 bus2=840.1.2.3.4 phases=4 linecode=LC2 length=6.927924 units=m
! reduced_from=line856,line871,line888,line904,line918,line933,line945,line958,line972,line984,line996,line1008
! eliminated_buses=857,872,889,905,919,934,946,959,973,985,997

New Line._virtual_line873_line889_line905_line919_line934_line946_line959_line973_line985_line997_line1009_line1021 bus1=858.1.2.3.4 bus2=1022.1.2.3.4 phases=4 linecode=LC2 length=8.39579 units=m
! reduced_from=line873,line889,line905,line919,line934,line946,line959,line973,line985,line997,line1009,line1021
! eliminated_buses=874,890,906,920,935,947,960,974,986,998,1010

New Line._virtual_line878_line893_line908_line922_line937_line949_line964_line976_line988_line1000_line1011_line1023 bus1=1024.1.2.3.4 bus2=862.1.2.3.4 phases=4 linecode=LC2 length=11.44483 units=m
! reduced_from=line878,line893,line908,line922,line937,line949,line964,line976,line988,line1000,line1011,line1023
! eliminated_buses=879,894,909,923,938,950,965,977,989,1001,1012

New Line._virtual_line895_line910_line924_line939_line951_line966_line978_line990_line1002_line1013_line1025_line1035_line1046 bus1=1047.1.2.3.4 bus2=881.1.2.3.4 phases=4 linecode=LC3 length=24.75066 units=m
! reduced_from=line895,line910,line924,line939,line951,line966,line978,line990,line1002,line1013,line1025,line1035,line1046
! eliminated_buses=896,911,925,940,952,967,979,991,1003,1014,1026,1036

New Line._virtual_line896_line911_line925_line940_line952_line968_line980_line992_line1004_line1015_line1027_line1037_line1048_line1061_line1073 bus1=881.1.2.3.4 bus2=1074.1.2.3.4 phases=4 linecode=LC3 length=32.97298 units=m
! reduced_from=line896,line911,line925,line940,line952,line968,line980,line992,line1004,line1015,line1027,line1037,line1048,line1061,line1073
! eliminated_buses=897,912,926,941,953,969,981,993,1005,1016,1028,1038,1049,1062

New Line._virtual_line929_line943_line954_line970_line982_line994_line1006_line1017_line1029_line1039_line1050_line1063_line1075_line1088_line1100_line1111_line1120_line1129_line1139 bus1=915.1.2.3.4 bus2=1140.1.2.3.4 phases=4 linecode=LC2 length=26.09478 units=m
! reduced_from=line929,line943,line954,line970,line982,line994,line1006,line1017,line1029,line1039,line1050,line1063,line1075,line1088,line1100,line1111,line1120,line1129,line1139
! eliminated_buses=930,944,955,971,983,995,1007,1018,1030,1040,1051,1064,1076,1089,1101,1112,1121,1130

New Line._virtual_line957_line971_line983_line995_line1007_line1018_line1030_line1040_line1051_line1064_line1076 bus1=945.1.2.3.4 bus2=1077.1.2.3.4 phases=4 linecode=LC2 length=18.96491 units=m
! reduced_from=line957,line971,line983,line995,line1007,line1018,line1030,line1040,line1051,line1064,line1076
! eliminated_buses=958,972,984,996,1008,1019,1031,1041,1052,1065

New Line._virtual_line962_line974_line986_line998_line1010_line1022_line1033_line1043 bus1=948.1.2.3.4 bus2=1044.1.2.3.4 phases=4 linecode=LC2 length=8.15672 units=m
! reduced_from=line962,line974,line986,line998,line1010,line1022,line1033,line1043
! eliminated_buses=963,975,987,999,1011,1023,1034

New Line._virtual_line1031_line1041_line1052_line1065_line1077_line1089 bus1=1090.1.2.3.4 bus2=1022.1.2.3.4 phases=4 linecode=LC2 length=6.11291 units=m
! reduced_from=line1031,line1041,line1052,line1065,line1077,line1089
! eliminated_buses=1032,1042,1053,1066,1078

New Line._virtual_line1032_line1042_line1053_line1066_line1078_line1090_line1101_line1112_line1121_line1130_line1140_line1149_line1159_line1168_line1177_line1185_line1193_line1201_line1212_line1220_line1229 bus1=1230.1.2.3.4 bus2=1022.1.2.3.4 phases=4 linecode=LC2 length=18.980297 units=m
! reduced_from=line1032,line1042,line1053,line1066,line1078,line1090,line1101,line1112,line1121,line1130,line1140,line1149,line1159,line1168,line1177,line1185,line1193,line1201,line1212,line1220,line1229
! eliminated_buses=1033,1043,1054,1067,1079,1091,1102,1113,1122,1131,1141,1150,1160,1169,1178,1186,1194,1202,1213,1221

New Line._virtual_line1055_line1067_line1079_line1091_line1102_line1113_line1122_line1131_line1141_line1150_line1160_line1169 bus1=1044.1.2.3.4 bus2=1170.1.2.3.4 phases=4 linecode=LC2 length=19.87153 units=m
! reduced_from=line1055,line1067,line1079,line1091,line1102,line1113,line1122,line1131,line1141,line1150,line1160,line1169
! eliminated_buses=1056,1068,1080,1092,1103,1114,1123,1132,1142,1151,1161

New Line._virtual_line1058_line1069_line1081_line1093_line1104_line1115_line1124 bus1=1125.1.2.3.4 bus2=1047.1.2.3.4 phases=4 linecode=LC2 length=16.60874 units=m
! reduced_from=line1058,line1069,line1081,line1093,line1104,line1115,line1124
! eliminated_buses=1059,1070,1082,1094,1105,1116

New Line._virtual_line1059_line1070_line1082_line1094_line1105_line1116_line1125_line1135_line1145_line1154_line1164_line1173_line1181_line1189 bus1=1190.1.2.3.4 bus2=1047.1.2.3.4 phases=4 linecode=LC3 length=15.907 units=m
! reduced_from=line1059,line1070,line1082,line1094,line1105,line1116,line1125,line1135,line1145,line1154,line1164,line1173,line1181,line1189
! eliminated_buses=1060,1071,1083,1095,1106,1117,1126,1136,1146,1155,1165,1174,1182

New Line._virtual_line1085_line1097_line1107_line1118_line1127_line1137_line1147 bus1=1074.1.2.3.4 bus2=1148.1.2.3.4 phases=4 linecode=LC2 length=16.99533 units=m
! reduced_from=line1085,line1097,line1107,line1118,line1127,line1137,line1147
! eliminated_buses=1086,1098,1108,1119,1128,1138

New Line._virtual_line1086_line1098_line1108_line1119_line1128_line1138_line1148_line1158_line1167_line1176_line1184_line1192_line1200_line1211_line1219_line1228_line1236 bus1=1237.1.2.3.4 bus2=1074.1.2.3.4 phases=4 linecode=LC3 length=14.84604 units=m
! reduced_from=line1086,line1098,line1108,line1119,line1128,line1138,line1148,line1158,line1167,line1176,line1184,line1192,line1200,line1211,line1219,line1228,line1236
! eliminated_buses=1087,1099,1109,1120,1129,1139,1149,1159,1168,1177,1185,1193,1201,1212,1220,1229

New Line._virtual_line1133_line1143_line1152_line1162_line1171_line1179_line1187_line1195 bus1=1196.1.2.3.4 bus2=1125.1.2.3.4 phases=4 linecode=LC2 length=6.045155 units=m
! reduced_from=line1133,line1143,line1152,line1162,line1171,line1179,line1187,line1195
! eliminated_buses=1134,1144,1153,1163,1172,1180,1188

New Line._virtual_line1134_line1144_line1153_line1163_line1172_line1180_line1188_line1196 bus1=1197.1.2.3.4 bus2=1125.1.2.3.4 phases=4 linecode=LC2 length=3.58482 units=m
! reduced_from=line1134,line1144,line1153,line1163,line1172,line1180,line1188,line1196
! eliminated_buses=1135,1145,1154,1164,1173,1181,1189

New Line._virtual_line1156_line1165_line1174_line1182_line1190_line1198_line1208_line1217 bus1=1218.1.2.3.4 bus2=1148.1.2.3.4 phases=4 linecode=LC2 length=3.04463 units=m
! reduced_from=line1156,line1165,line1174,line1182,line1190,line1198,line1208,line1217
! eliminated_buses=1157,1166,1175,1183,1191,1199,1209

New Line._virtual_line1157_line1166_line1175_line1183_line1191_line1199 bus1=1148.1.2.3.4 bus2=1200.1.2.3.4 phases=4 linecode=LC2 length=5.434946 units=m
! reduced_from=line1157,line1166,line1175,line1183,line1191,line1199
! eliminated_buses=1158,1167,1176,1184,1192

New Line._virtual_line1197_line1207_line1216_line1224_line1233_line1242 bus1=1190.1.2.3.4 bus2=1243.1.2.3.4 phases=4 linecode=LC2 length=13.534873 units=m
! reduced_from=line1197,line1207,line1216,line1224,line1233,line1242
! eliminated_buses=1198,1208,1217,1225,1234

New Line._virtual_line1204_line1214_line1222_line1231_line1240_line1246_line1253_line1260_line1267_line1274_line1281_line1289 bus1=1290.1.2.3.4 bus2=1196.1.2.3.4 phases=4 linecode=LC2 length=11.518622 units=m
! reduced_from=line1204,line1214,line1222,line1231,line1240,line1246,line1253,line1260,line1267,line1274,line1281,line1289
! eliminated_buses=1205,1215,1223,1232,1241,1247,1254,1261,1268,1275,1282

New Line._virtual_line1206_line1215_line1223_line1232_line1241_line1247_line1254_line1261_line1268_line1275_line1282_line1290_line1301_line1309_line1317_line1325 bus1=1326.1.2.3.4 bus2=1197.1.2.3.4 phases=4 linecode=LC2 length=9.95853 units=m
! reduced_from=line1206,line1215,line1223,line1232,line1241,line1247,line1254,line1261,line1268,line1275,line1282,line1290,line1301,line1309,line1317,line1325
! eliminated_buses=1207,1216,1224,1233,1242,1248,1255,1262,1269,1276,1283,1291,1302,1310,1318

New Line._virtual_line1210_line1218_line1227_line1235_line1244_line1251_line1258_line1265_line1272_line1279_line1287 bus1=1288.1.2.3.4 bus2=1200.1.2.3.4 phases=4 linecode=LC2 length=11.19727 units=m
! reduced_from=line1210,line1218,line1227,line1235,line1244,line1251,line1258,line1265,line1272,line1279,line1287
! eliminated_buses=1211,1219,1228,1236,1245,1252,1259,1266,1273,1280

New Line._virtual_line1226_line1234_line1243_line1250_line1257_line1264_line1271_line1278_line1286_line1294_line1304_line1312_line1320_line1328_line1338_line1346_line1354_line1362 bus1=1218.1.2.3.4 bus2=1363.1.2.3.4 phases=4 linecode=LC2 length=11.87662 units=m
! reduced_from=line1226,line1234,line1243,line1250,line1257,line1264,line1271,line1278,line1286,line1294,line1304,line1312,line1320,line1328,line1338,line1346,line1354,line1362
! eliminated_buses=1227,1235,1244,1251,1258,1265,1272,1279,1287,1295,1305,1313,1321,1329,1339,1347,1355

New Line._virtual_line1245_line1252_line1259_line1266_line1273_line1280_line1288 bus1=1237.1.2.3.4 bus2=1289.1.2.3.4 phases=4 linecode=LC2 length=15.255233 units=m
! reduced_from=line1245,line1252,line1259,line1266,line1273,line1280,line1288
! eliminated_buses=1246,1253,1260,1267,1274,1281

New Line._virtual_line1248_line1255_line1262_line1269_line1276_line1283 bus1=1284.1.2.3.4 bus2=1243.1.2.3.4 phases=4 linecode=LC2 length=2.85129 units=m
! reduced_from=line1248,line1255,line1262,line1269,line1276,line1283
! eliminated_buses=1249,1256,1263,1270,1277

New Line._virtual_line1249_line1256_line1263_line1270_line1277 bus1=1243.1.2.3.4 bus2=1278.1.2.3.4 phases=4 linecode=LC2 length=3.6524 units=m
! reduced_from=line1249,line1256,line1263,line1270,line1277
! eliminated_buses=1250,1257,1264,1271

New Line._virtual_line1285_line1293_line1303_line1311_line1319_line1327_line1337_line1345_line1353_line1361_line1370_line1379_line1387 bus1=1388.1.2.3.4 bus2=1278.1.2.3.4 phases=4 linecode=LC2 length=8.232838 units=m
! reduced_from=line1285,line1293,line1303,line1311,line1319,line1327,line1337,line1345,line1353,line1361,line1370,line1379,line1387
! eliminated_buses=1286,1294,1304,1312,1320,1328,1338,1346,1354,1362,1371,1380

New Line._virtual_line1292_line1302_line1310_line1318_line1326_line1336_line1344_line1352_line1360_line1369_line1378_line1386 bus1=1387.1.2.3.4 bus2=1284.1.2.3.4 phases=4 linecode=LC2 length=9.13558 units=m
! reduced_from=line1292,line1302,line1310,line1318,line1326,line1336,line1344,line1352,line1360,line1369,line1378,line1386
! eliminated_buses=1293,1303,1311,1319,1327,1337,1345,1353,1361,1370,1379

New Line._virtual_line1296_line1305_line1313_line1321_line1329_line1339_line1347_line1355_line1363_line1373_line1381_line1389_line1399_line1407 bus1=1288.1.2.3.4 bus2=1408.1.2.3.4 phases=4 linecode=LC2 length=14.054081 units=m
! reduced_from=line1296,line1305,line1313,line1321,line1329,line1339,line1347,line1355,line1363,line1373,line1381,line1389,line1399,line1407
! eliminated_buses=1297,1306,1314,1322,1330,1340,1348,1356,1364,1374,1382,1390,1400

New Line._virtual_line1297_line1306_line1314_line1322 bus1=1289.1.2.3.4 bus2=1323.1.2.3.4 phases=4 linecode=LC2 length=3.07338 units=m
! reduced_from=line1297,line1306,line1314,line1322
! eliminated_buses=1298,1307,1315

New Line._virtual_line1298_line1307_line1315_line1323_line1332_line1341_line1349_line1357 bus1=1358.1.2.3.4 bus2=1289.1.2.3.4 phases=4 linecode=LC2 length=4.41046 units=m
! reduced_from=line1298,line1307,line1315,line1323,line1332,line1341,line1349,line1357
! eliminated_buses=1299,1308,1316,1324,1333,1342,1350

New Line._virtual_line1300_line1308_line1316_line1324_line1333_line1342_line1350_line1358_line1367_line1376_line1384_line1392_line1402_line1410_line1417 bus1=1418.1.2.3.4 bus2=1290.1.2.3.4 phases=4 linecode=LC2 length=13.14885 units=m
! reduced_from=line1300,line1308,line1316,line1324,line1333,line1342,line1350,line1358,line1367,line1376,line1384,line1392,line1402,line1410,line1417
! eliminated_buses=1301,1309,1317,1325,1334,1343,1351,1359,1368,1377,1385,1393,1403,1411

New Line._virtual_line1331_line1340_line1348_line1356_line1364_line1374_line1382_line1390_line1400_line1408_line1415_line1422 bus1=1323.1.2.3.4 bus2=1423.1.2.3.4 phases=4 linecode=LC2 length=8.13876 units=m
! reduced_from=line1331,line1340,line1348,line1356,line1364,line1374,line1382,line1390,line1400,line1408,line1415,line1422
! eliminated_buses=1332,1341,1349,1357,1365,1375,1383,1391,1401,1409,1416

New Line._virtual_line1335_line1343_line1351_line1359_line1368_line1377_line1385_line1393_line1403_line1411_line1418_line1424_line1431_line1437 bus1=1326.1.2.3.4 bus2=1438.1.2.3.4 phases=4 linecode=LC2 length=12.77822 units=m
! reduced_from=line1335,line1343,line1351,line1359,line1368,line1377,line1385,line1393,line1403,line1411,line1418,line1424,line1431,line1437
! eliminated_buses=1336,1344,1352,1360,1369,1378,1386,1394,1404,1412,1419,1425,1432

New Line._virtual_line1366_line1375_line1383_line1391_line1401_line1409_line1416_line1423_line1430_line1436 bus1=1358.1.2.3.4 bus2=1437.1.2.3.4 phases=4 linecode=LC2 length=6.63987 units=m
! reduced_from=line1366,line1375,line1383,line1391,line1401,line1409,line1416,line1423,line1430,line1436
! eliminated_buses=1367,1376,1384,1392,1402,1410,1417,1424,1431

New Line._virtual_line1372_line1380_line1388_line1398_line1406_line1414_line1421_line1427_line1434_line1440 bus1=1441.1.2.3.4 bus2=1363.1.2.3.4 phases=4 linecode=LC2 length=12.48781 units=m
! reduced_from=line1372,line1380,line1388,line1398,line1406,line1414,line1421,line1427,line1434,line1440
! eliminated_buses=1373,1381,1389,1399,1407,1415,1422,1428,1435

New Line._virtual_line1395_line1404_line1412_line1419_line1425_line1432_line1438_line1444_line1448_line1452_line1456_line1460 bus1=1387.1.2.3.4 bus2=1461.1.2.3.4 phases=4 linecode=LC2 length=12.43988 units=m
! reduced_from=line1395,line1404,line1412,line1419,line1425,line1432,line1438,line1444,line1448,line1452,line1456,line1460
! eliminated_buses=1396,1405,1413,1420,1426,1433,1439,1445,1449,1453,1457

New Line._virtual_line1397_line1405_line1413_line1420_line1426_line1433_line1439_line1445_line1449_line1453_line1457_line1461_line1466_line1470_line1474 bus1=1388.1.2.3.4 bus2=1475.1.2.3.4 phases=4 linecode=LC2 length=13.033913 units=m
! reduced_from=line1397,line1405,line1413,line1420,line1426,line1433,line1439,line1445,line1449,line1453,line1457,line1461,line1466,line1470,line1474
! eliminated_buses=1398,1406,1414,1421,1427,1434,1440,1446,1450,1454,1458,1462,1467,1471

New Line._virtual_line1429_line1435_line1441_line1446_line1450_line1454_line1458_line1462_line1467_line1471_line1475_line1480_line1484 bus1=1423.1.2.3.4 bus2=1485.1.2.3.4 phases=4 linecode=LC2 length=9.09104 units=m
! reduced_from=line1429,line1435,line1441,line1446,line1450,line1454,line1458,line1462,line1467,line1471,line1475,line1480,line1484
! eliminated_buses=1430,1436,1442,1447,1451,1455,1459,1463,1468,1472,1476,1481

New Line._virtual_line1443_line1447_line1451_line1455_line1459_line1463_line1468_line1472_line1476_line1481_line1485 bus1=1437.1.2.3.4 bus2=1486.1.2.3.4 phases=4 linecode=LC2 length=10.32635 units=m
! reduced_from=line1443,line1447,line1451,line1455,line1459,line1463,line1468,line1472,line1476,line1481,line1485
! eliminated_buses=1444,1448,1452,1456,1460,1464,1469,1473,1477,1482

New Line._virtual_line1465_line1469_line1473_line1477_line1482_line1486_line1492_line1496_line1500_line1504_line1508_line1512_line1516_line1520_line1524 bus1=1461.1.2.3.4 bus2=1525.1.2.3.4 phases=4 linecode=LC2 length=15.36962 units=m
! reduced_from=line1465,line1469,line1473,line1477,line1482,line1486,line1492,line1496,line1500,line1504,line1508,line1512,line1516,line1520,line1524
! eliminated_buses=1466,1470,1474,1478,1483,1487,1493,1497,1501,1505,1509,1513,1517,1521

New Line._virtual_line1479_line1483_line1487_line1493_line1497_line1501_line1505_line1509_line1513_line1517_line1521_line1525_line1528_line1530 bus1=1531.1.2.3.4 bus2=1475.1.2.3.4 phases=4 linecode=LC2 length=11.39824 units=m
! reduced_from=line1479,line1483,line1487,line1493,line1497,line1501,line1505,line1509,line1513,line1517,line1521,line1525,line1528,line1530
! eliminated_buses=1480,1484,1488,1494,1498,1502,1506,1510,1514,1518,1522,1526,1529

New Line._virtual_line1489_line1494_line1498_line1502_line1506_line1510_line1514_line1518_line1522_line1526_line1529_line1531_line1532_line1533 bus1=1534.1.2.3.4 bus2=1485.1.2.3.4 phases=4 linecode=LC2 length=14.839953 units=m
! reduced_from=line1489,line1494,line1498,line1502,line1506,line1510,line1514,line1518,line1522,line1526,line1529,line1531,line1532,line1533
! eliminated_buses=1490,1495,1499,1503,1507,1511,1515,1519,1523,1527,1530,1532,1533

New Line._virtual_line1491_line1495_line1499_line1503_line1507_line1511_line1515_line1519_line1523_line1527 bus1=1486.1.2.3.4 bus2=1528.1.2.3.4 phases=4 linecode=LC2 length=11.42466 units=m
! reduced_from=line1491,line1495,line1499,line1503,line1507,line1511,line1515,line1519,line1523,line1527
! eliminated_buses=1492,1496,1500,1504,1508,1512,1516,1520,1524

New Line.LINE50 bus1=47.1.2.3.4 bus2=51.1.2.3.4 phases=4 linecode=LC2 length=6.3571 units=m

New Line.LINE58 bus1=54.1.2.3.4 bus2=59.1.2.3.4 phases=4 linecode=LC2 length=6.5276 units=m

New Line.LINE103 bus1=97.1.2.3.4 bus2=104.1.2.3.4 phases=4 linecode=LC2 length=3.5564 units=m

New Line.LINE105 bus1=98.1.2.3.4 bus2=106.1.2.3.4 phases=4 linecode=LC2 length=4.3132 units=m

New Line.LINE113 bus1=108.1.2.3.4 bus2=114.1.2.3.4 phases=4 linecode=LC2 length=4.3549 units=m

New Line.LINE115 bus1=109.1.2.3.4 bus2=116.1.2.3.4 phases=4 linecode=LC2 length=3.113 units=m

New Line.LINE193 bus1=187.1.2.3.4 bus2=194.1.2.3.4 phases=4 linecode=LC2 length=2.7077 units=m

New Line.LINE195 bus1=188.1.2.3.4 bus2=196.1.2.3.4 phases=4 linecode=LC2 length=4.1456 units=m

New Line.LINE199 bus1=191.1.2.3.4 bus2=200.1.2.3.4 phases=4 linecode=LC2 length=5.0178 units=m

New Line.LINE214 bus1=207.1.2.3.4 bus2=215.1.2.3.4 phases=4 linecode=LC2 length=2.9792 units=m

New Line.LINE246 bus1=237.1.2.3.4 bus2=247.1.2.3.4 phases=4 linecode=LC2 length=5.7233 units=m

New Line.LINE278 bus1=269.1.2.3.4 bus2=279.1.2.3.4 phases=4 linecode=LC2 length=9.0513 units=m

New Line.LINE295 bus1=284.1.2.3.4 bus2=296.1.2.3.4 phases=4 linecode=LC8 length=16.8578 units=m

New Line.LINE320 bus1=307.1.2.3.4 bus2=321.1.2.3.4 phases=4 linecode=LC2 length=8.9534 units=m

New Line.LINE365 bus1=351.1.2.3.4 bus2=366.1.2.3.4 phases=4 linecode=LC2 length=3.5182 units=m

New Line.LINE366 bus1=351.1.2.3.4 bus2=367.1.2.3.4 phases=4 linecode=LC2 length=3.5182 units=m

New Line.LINE367 bus1=352.1.2.3.4 bus2=368.1.2.3.4 phases=4 linecode=LC2 length=5.7275 units=m

New Line.LINE368 bus1=352.1.2.3.4 bus2=369.1.2.3.4 phases=4 linecode=LC2 length=5.7275 units=m

New Line.LINE377 bus1=360.1.2.3.4 bus2=378.1.2.3.4 phases=4 linecode=LC2 length=3.0639 units=m

New Line.LINE404 bus1=392.1.2.3.4 bus2=405.1.2.3.4 phases=4 linecode=LC2 length=3.6684 units=m

New Line.LINE409 bus1=397.1.2.3.4 bus2=410.1.2.3.4 phases=4 linecode=LC2 length=2.02 units=m

New Line.LINE410 bus1=397.1.2.3.4 bus2=411.1.2.3.4 phases=4 linecode=LC2 length=2.02 units=m

New Line.LINE411 bus1=398.1.2.3.4 bus2=412.1.2.3.4 phases=4 linecode=LC2 length=3.7331 units=m

New Line.LINE412 bus1=398.1.2.3.4 bus2=413.1.2.3.4 phases=4 linecode=LC2 length=3.7331 units=m

New Line.LINE435 bus1=425.1.2.3.4 bus2=436.1.2.3.4 phases=4 linecode=LC8 length=5.5845 units=m

New Line.LINE443 bus1=432.1.2.3.4 bus2=444.1.2.3.4 phases=4 linecode=LC4 length=3.7383 units=m

New Line.LINE451 bus1=440.1.2.3.4 bus2=452.1.2.3.4 phases=4 linecode=LC2 length=2.8778 units=m

New Line.LINE456 bus1=444.1.2.3.4 bus2=457.1.2.3.4 phases=4 linecode=LC2 length=5.9176 units=m

New Line.LINE477 bus1=465.1.2.3.4 bus2=478.1.2.3.4 phases=4 linecode=LC2 length=4.827 units=m

New Line.LINE496 bus1=483.1.2.3.4 bus2=497.1.2.3.4 phases=4 linecode=LC2 length=3.7578 units=m

New Line.LINE507 bus1=492.1.2.3.4 bus2=508.1.2.3.4 phases=4 linecode=LC2 length=4.9729 units=m

New Line.LINE523 bus1=507.1.2.3.4 bus2=524.1.2.3.4 phases=4 linecode=LC2 length=9.8871 units=m

New Line.LINE565 bus1=547.1.2.3.4 bus2=566.1.2.3.4 phases=4 linecode=LC2 length=2.9529 units=m

New Line.LINE566 bus1=547.1.2.3.4 bus2=567.1.2.3.4 phases=4 linecode=LC2 length=2.9529 units=m

New Line.LINE631 bus1=617.1.2.3.4 bus2=632.1.2.3.4 phases=4 linecode=LC2 length=5.0365 units=m

New Line.LINE636 bus1=622.1.2.3.4 bus2=637.1.2.3.4 phases=4 linecode=LC2 length=10.1351 units=m

New Line.LINE665 bus1=649.1.2.3.4 bus2=666.1.2.3.4 phases=4 linecode=LC2 length=4.4506 units=m

New Line.LINE666 bus1=649.1.2.3.4 bus2=667.1.2.3.4 phases=4 linecode=LC2 length=4.4506 units=m

New Line.LINE693 bus1=675.1.2.3.4 bus2=694.1.2.3.4 phases=4 linecode=LC2 length=5.7031 units=m

New Line.LINE740 bus1=724.1.2.3.4 bus2=741.1.2.3.4 phases=4 linecode=LC2 length=4.293 units=m

New Line.LINE742 bus1=725.1.2.3.4 bus2=743.1.2.3.4 phases=4 linecode=LC2 length=1.8769 units=m

New Line.LINE770 bus1=757.1.2.3.4 bus2=771.1.2.3.4 phases=4 linecode=LC2 length=5.1535 units=m

New Line.LINE784 bus1=770.1.2.3.4 bus2=785.1.2.3.4 phases=4 linecode=LC2 length=5.3109 units=m

New Line.LINE797 bus1=782.1.2.3.4 bus2=798.1.2.3.4 phases=4 linecode=LC2 length=4.0706 units=m

New Line.LINE812 bus1=797.1.2.3.4 bus2=813.1.2.3.4 phases=4 linecode=LC2 length=7.2653 units=m

New Line.LINE813 bus1=797.1.2.3.4 bus2=814.1.2.3.4 phases=4 linecode=LC3 length=1.8591 units=m

New Line.LINE815 bus1=800.1.2.3.4 bus2=816.1.2.3.4 phases=4 linecode=LC2 length=3.9397 units=m

New Line.LINE816 bus1=800.1.2.3.4 bus2=817.1.2.3.4 phases=4 linecode=LC2 length=3.9397 units=m

New Line.LINE828 bus1=813.1.2.3.4 bus2=829.1.2.3.4 phases=4 linecode=LC2 length=5.2662 units=m

New Line.LINE872 bus1=858.1.2.3.4 bus2=873.1.2.3.4 phases=4 linecode=LC2 length=5.52 units=m

New Line.LINE877 bus1=862.1.2.3.4 bus2=878.1.2.3.4 phases=4 linecode=LC2 length=4.0492 units=m

New Line.LINE928 bus1=915.1.2.3.4 bus2=929.1.2.3.4 phases=4 linecode=LC2 length=1.4203 units=m

New Line.LINE955 bus1=945.1.2.3.4 bus2=956.1.2.3.4 phases=4 linecode=LC2 length=3.5946 units=m

New Line.LINE956 bus1=945.1.2.3.4 bus2=957.1.2.3.4 phases=4 linecode=LC2 length=3.5946 units=m

New Line.LINE960 bus1=948.1.2.3.4 bus2=961.1.2.3.4 phases=4 linecode=LC2 length=5.896 units=m

New Line.LINE961 bus1=948.1.2.3.4 bus2=962.1.2.3.4 phases=4 linecode=LC2 length=5.896 units=m

New Line.LINE1019 bus1=1009.1.2.3.4 bus2=1020.1.2.3.4 phases=4 linecode=LC2 length=6.6052 units=m

New Line.LINE1020 bus1=1009.1.2.3.4 bus2=1021.1.2.3.4 phases=4 linecode=LC2 length=6.6052 units=m

New Line.LINE1054 bus1=1044.1.2.3.4 bus2=1055.1.2.3.4 phases=4 linecode=LC2 length=6.4201 units=m

New Line.LINE1109 bus1=1100.1.2.3.4 bus2=1110.1.2.3.4 phases=4 linecode=LC2 length=7.853 units=m

New Line.LINE1110 bus1=1100.1.2.3.4 bus2=1111.1.2.3.4 phases=4 linecode=LC2 length=7.853 units=m

New Line.LINE1203 bus1=1196.1.2.3.4 bus2=1204.1.2.3.4 phases=4 linecode=LC2 length=4.8154 units=m

New Line.LINE1205 bus1=1197.1.2.3.4 bus2=1206.1.2.3.4 phases=4 linecode=LC2 length=5.1199 units=m

New Line.LINE1209 bus1=1200.1.2.3.4 bus2=1210.1.2.3.4 phases=4 linecode=LC2 length=5.031 units=m

New Line.LINE1225 bus1=1218.1.2.3.4 bus2=1226.1.2.3.4 phases=4 linecode=LC2 length=5.6364 units=m

New Line.LINE1237 bus1=1230.1.2.3.4 bus2=1238.1.2.3.4 phases=4 linecode=LC2 length=2.9033 units=m

New Line.LINE1238 bus1=1230.1.2.3.4 bus2=1239.1.2.3.4 phases=4 linecode=LC2 length=2.9033 units=m

New Line.LINE1284 bus1=1278.1.2.3.4 bus2=1285.1.2.3.4 phases=4 linecode=LC2 length=4.25 units=m

New Line.LINE1291 bus1=1284.1.2.3.4 bus2=1292.1.2.3.4 phases=4 linecode=LC2 length=5.6122 units=m

New Line.LINE1295 bus1=1288.1.2.3.4 bus2=1296.1.2.3.4 phases=4 linecode=LC2 length=5.4356 units=m

New Line.LINE1299 bus1=1290.1.2.3.4 bus2=1300.1.2.3.4 phases=4 linecode=LC2 length=5.8275 units=m

New Line.LINE1330 bus1=1323.1.2.3.4 bus2=1331.1.2.3.4 phases=4 linecode=LC2 length=3.4503 units=m

New Line.LINE1334 bus1=1326.1.2.3.4 bus2=1335.1.2.3.4 phases=4 linecode=LC2 length=4.095 units=m

New Line.LINE1365 bus1=1358.1.2.3.4 bus2=1366.1.2.3.4 phases=4 linecode=LC2 length=4.4487 units=m

New Line.LINE1371 bus1=1363.1.2.3.4 bus2=1372.1.2.3.4 phases=4 linecode=LC2 length=4.3293 units=m

New Line.LINE1394 bus1=1387.1.2.3.4 bus2=1395.1.2.3.4 phases=4 linecode=LC2 length=5.0988 units=m

New Line.LINE1396 bus1=1388.1.2.3.4 bus2=1397.1.2.3.4 phases=4 linecode=LC2 length=3.9097 units=m

New Line.LINE1428 bus1=1423.1.2.3.4 bus2=1429.1.2.3.4 phases=4 linecode=LC2 length=1.733 units=m

New Line.LINE1442 bus1=1437.1.2.3.4 bus2=1443.1.2.3.4 phases=4 linecode=LC2 length=6.4539 units=m

New Line.LINE1464 bus1=1461.1.2.3.4 bus2=1465.1.2.3.4 phases=4 linecode=LC2 length=5.5541 units=m

New Line.LINE1478 bus1=1475.1.2.3.4 bus2=1479.1.2.3.4 phases=4 linecode=LC2 length=5.1458 units=m

New Line.LINE1488 bus1=1485.1.2.3.4 bus2=1489.1.2.3.4 phases=4 linecode=LC2 length=1.6821 units=m

New Line.LINE1490 bus1=1486.1.2.3.4 bus2=1491.1.2.3.4 phases=4 linecode=LC2 length=4.9056 units=m
