! Reduced enabled lines.

New Line._virtual_line0_line1_line2_line3_line4_line5_line6_line7_line8_line9_line10_line11_line12_line13_line14_line15_line16_line17_line18_line19_line20_line21_line22_line23_line24_line25_line26_line27_line28_line29_line30_line31_line32_line33_line34_line35_line36_line37_line38 bus1=sourcebus.1.2.3.4 bus2=39.1.2.3.4 phases=4 linecode=LC8 length=48.205057 units=m
! reduced_from=line0,line1,line2,line3,line4,line5,line6,line7,line8,line9,line10,line11,line12,line13,line14,line15,line16,line17,line18,line19,line20,line21,line22,line23,line24,line25,line26,line27,line28,line29,line30,line31,line32,line33,line34,line35,line36,line37,line38
! eliminated_buses=1,2,3,4,5,6,7,8,9,10,11,12,13,14,15,16,17,18,19,20,21,22,23,24,25,26,27,28,29,30,31,32,33,34,35,36,37,38

New Line._virtual_line39_line41_line44_line48_line52_line58_line64_line70_line76_line84_line92_line101_line109_line119_line129_line141_line152_line166_line181 bus1=39.1.2.3.4 bus2=182.1.2.3.4 phases=4 linecode=LC8 length=180.33739 units=m
! reduced_from=line39,line41,line44,line48,line52,line58,line64,line70,line76,line84,line92,line101,line109,line119,line129,line141,line152,line166,line181
! eliminated_buses=40,42,45,49,53,59,65,71,77,85,93,102,110,120,130,142,153,167

New Line._virtual_line42_line45_line49_line53_line59_line65_line71 bus1=72.1.2.3.4 bus2=41.1.2.3.4 phases=4 linecode=LC2 length=14.08716 units=m
! reduced_from=line42,line45,line49,line53,line59,line65,line71
! eliminated_buses=43,46,50,54,60,66

New Line._virtual_line43_line46 bus1=41.1.2.3.4 bus2=47.1.2.3.4 phases=4 linecode=LC8 length=30.3743 units=m
! reduced_from=line43,line46
! eliminated_buses=44

New Line._virtual_line51_line57_line63_line69_line75 bus1=76.1.2.3.4 bus2=47.1.2.3.4 phases=4 linecode=LC8 length=31.39853 units=m
! reduced_from=line51,line57,line63,line69,line75
! eliminated_buses=52,58,64,70

New Line._virtual_line54_line60_line66_line72_line79_line87_line94_line103 bus1=51.1.2.3.4 bus2=104.1.2.3.4 phases=4 linecode=LC2 length=3.7365 units=m
! reduced_from=line54,line60,line66,line72,line79,line87,line94,line103
! eliminated_buses=55,61,67,73,80,88,95

New Line._virtual_line55_line61_line67_line73_line80_line88 bus1=89.1.2.3.4 bus2=51.1.2.3.4 phases=4 linecode=LC2 length=6.37431 units=m
! reduced_from=line55,line61,line67,line73,line80,line88
! eliminated_buses=56,62,68,74,81

New Line._virtual_line78_line86 bus1=72.1.2.3.4 bus2=87.1.2.3.4 phases=4 linecode=LC2 length=9.0645 units=m
! reduced_from=line78,line86
! eliminated_buses=79

New Line._virtual_line82_line90_line98_line106_line115_line124_line134_line146 bus1=147.1.2.3.4 bus2=76.1.2.3.4 phases=4 linecode=LC2 length=12.92772 units=m
! reduced_from=line82,line90,line98,line106,line115,line124,line134,line146
! eliminated_buses=83,91,99,107,116,125,135

New Line._virtual_line83_line91 bus1=76.1.2.3.4 bus2=92.1.2.3.4 phases=4 linecode=LC8 length=16.0646 units=m
! reduced_from=line83,line91
! eliminated_buses=84

New Line._virtual_line96_line104_line113_line122_line132_line144_line156_line171_line187_line204_line224_line245_line265 bus1=266.1.2.3.4 bus2=89.1.2.3.4 phases=4 linecode=LC2 length=8.13686 units=m
! reduced_from=line96,line104,line113,line122,line132,line144,line156,line171,line187,line204,line224,line245,line265
! eliminated_buses=97,105,114,123,133,145,157,172,188,205,225,246

New Line._virtual_line99_line107 bus1=92.1.2.3.4 bus2=108.1.2.3.4 phases=4 linecode=LC8 length=27.6859 units=m
! reduced_from=line99,line107
! eliminated_buses=100

New Line._virtual_line100_line108_line118_line128_line140_line151_line165_line180 bus1=92.1.2.3.4 bus2=181.1.2.3.4 phases=4 linecode=LC2 length=11.47103 units=m
! reduced_from=line100,line108,line118,line128,line140,line151,line165,line180
! eliminated_buses=101,109,119,129,141,152,166

New Line._virtual_line112_line121_line131_line143_line155_line170_line186_line203_line223_line244_line264_line286_line312_line338_line364 bus1=365.1.2.3.4 bus2=104.1.2.3.4 phases=4 linecode=LC2 length=8.411102 units=m
! reduced_from=line112,line121,line131,line143,line155,line170,line186,line203,line223,line244,line264,line286,line312,line338,line364
! eliminated_buses=113,122,132,144,156,171,187,204,224,245,265,287,313,339

New Line._virtual_line116_line125_line135_line147_line160_line174_line189_line206 bus1=207.1.2.3.4 bus2=108.1.2.3.4 phases=4 linecode=LC4 length=23.03866 units=m
! reduced_from=line116,line125,line135,line147,line160,line174,line189,line206
! eliminated_buses=117,126,136,148,161,175,190

New Line._virtual_line136_line148_line161_line175_line190 bus1=191.1.2.3.4 bus2=127.1.2.3.4 phases=4 linecode=LC2 length=2.64085 units=m
! reduced_from=line136,line148,line161,line175,line190
! eliminated_buses=137,149,162,176

New Line._virtual_line137_line149_line162_line176_line191_line209 bus1=127.1.2.3.4 bus2=210.1.2.3.4 phases=4 linecode=LC2 length=7.79695 units=m
! reduced_from=line137,line149,line162,line176,line191,line209
! eliminated_buses=138,150,163,177,192

New Line._virtual_line139_line150_line164 bus1=128.1.2.3.4 bus2=165.1.2.3.4 phases=4 linecode=LC8 length=34.69159 units=m
! reduced_from=line139,line150,line164
! eliminated_buses=140,151

New Line._virtual_line159_line173 bus1=147.1.2.3.4 bus2=174.1.2.3.4 phases=4 linecode=LC2 length=9.6384 units=m
! reduced_from=line159,line173
! eliminated_buses=160

New Line._virtual_line178_line193_line211_line232_line253 bus1=254.1.2.3.4 bus2=165.1.2.3.4 phases=4 linecode=LC8 length=34.2188 units=m
! reduced_from=line178,line193,line211,line232,line253
! eliminated_buses=179,194,212,233

New Line._virtual_line179_line194 bus1=195.1.2.3.4 bus2=165.1.2.3.4 phases=4 linecode=LC2 length=12.00106 units=m
! reduced_from=line179,line194
! eliminated_buses=180

New Line._virtual_line196_line215_line236 bus1=181.1.2.3.4 bus2=237.1.2.3.4 phases=4 linecode=LC2 length=10.62024 units=m
! reduced_from=line196,line215,line236
! eliminated_buses=197,216

New Line._virtual_line197_line216_line237_line257_line279_line304 bus1=182.1.2.3.4 bus2=305.1.2.3.4 phases=4 linecode=LC8 length=54.4858 units=m
! reduced_from=line197,line216,line237,line257,line279,line304
! eliminated_buses=198,217,238,258,280

New Line._virtual_line208_line228_line250_line271_line295_line321_line346_line373_line406_line435 bus1=191.1.2.3.4 bus2=436.1.2.3.4 phases=4 linecode=LC2 length=7.43592 units=m
! reduced_from=line208,line228,line250,line271,line295,line321,line346,line373,line406,line435
! eliminated_buses=209,229,251,272,296,322,347,374,407

New Line._virtual_line213_line234_line255_line277_line302_line328_line353 bus1=354.1.2.3.4 bus2=195.1.2.3.4 phases=4 linecode=LC2 length=6.302291 units=m
! reduced_from=line213,line234,line255,line277,line302,line328,line353
! eliminated_buses=214,235,256,278,303,329

New Line._virtual_line214_line235_line256_line278_line303_line329_line354 bus1=355.1.2.3.4 bus2=195.1.2.3.4 phases=4 linecode=LC2 length=5.672701 units=m
! reduced_from=line214,line235,line256,line278,line303,line329,line354
! eliminated_buses=215,236,257,279,304,330

New Line._virtual_line217_line239_line259_line281_line307_line334_line359 bus1=360.1.2.3.4 bus2=199.1.2.3.4 phases=4 linecode=LC2 length=4.22762 units=m
! reduced_from=line217,line239,line259,line281,line307,line334,line359
! eliminated_buses=218,240,260,282,308,335

New Line._virtual_line218_line240_line260_line282_line308_line335 bus1=336.1.2.3.4 bus2=199.1.2.3.4 phases=4 linecode=LC2 length=4.54177 units=m
! reduced_from=line218,line240,line260,line282,line308,line335
! eliminated_buses=219,241,261,283,309

New Line._virtual_line226_line247_line267_line290_line315 bus1=207.1.2.3.4 bus2=316.1.2.3.4 phases=4 linecode=LC2 length=15.83998 units=m
! reduced_from=line226,line247,line267,line290,line315
! eliminated_buses=227,248,268,291

New Line._virtual_line227_line249 bus1=250.1.2.3.4 bus2=207.1.2.3.4 phases=4 linecode=LC4 length=16.7095 units=m
! reduced_from=line227,line249
! eliminated_buses=228

New Line._virtual_line230_line251_line272_line296_line322_line347_line374_line407_line436_line466_line499 bus1=210.1.2.3.4 bus2=500.1.2.3.4 phases=4 linecode=LC2 length=12.73937 units=m
! reduced_from=line230,line251,line272,line296,line322,line347,line374,line407,line436,line466,line499
! eliminated_buses=231,252,273,297,323,348,375,408,437,467

New Line._virtual_line269_line292_line317_line342_line368 bus1=250.1.2.3.4 bus2=369.1.2.3.4 phases=4 linecode=LC2 length=12.18544 units=m
! reduced_from=line269,line292,line317,line342,line368
! eliminated_buses=270,293,318,343

New Line._virtual_line274_line298_line324 bus1=325.1.2.3.4 bus2=254.1.2.3.4 phases=4 linecode=LC8 length=13.27487 units=m
! reduced_from=line274,line298,line324
! eliminated_buses=275,299

New Line._virtual_line288_line313_line339_line365_line397_line426_line457_line491_line524_line559_line592_line625_line661_line698_line732 bus1=266.1.2.3.4 bus2=733.1.2.3.4 phases=4 linecode=LC2 length=14.398787 units=m
! reduced_from=line288,line313,line339,line365,line397,line426,line457,line491,line524,line559,line592,line625,line661,line698,line732
! eliminated_buses=289,314,340,366,398,427,458,492,525,560,593,626,662,699

New Line._virtual_line293_line318_line343_line369_line402 bus1=271.1.2.3.4 bus2=403.1.2.3.4 phases=4 linecode=LC2 length=12.62904 units=m
! reduced_from=line293,line318,line343,line369,line402
! eliminated_buses=294,319,344,370

New Line._virtual_line299_line325_line350_line378_line412_line442 bus1=443.1.2.3.4 bus2=276.1.2.3.4 phases=4 linecode=LC2 length=5.98205 units=m
! reduced_from=line299,line325,line350,line378,line412,line442
! eliminated_buses=300,326,351,379,413

New Line._virtual_line300_line326_line351_line379_line413_line443_line476_line508 bus1=509.1.2.3.4 bus2=276.1.2.3.4 phases=4 linecode=LC2 length=5.56752 units=m
! reduced_from=line300,line326,line351,line379,line413,line443,line476,line508
! eliminated_buses=301,327,352,380,414,444,477

New Line._virtual_line319_line344_line370_line403_line432_line461_line494 bus1=495.1.2.3.4 bus2=295.1.2.3.4 phases=4 linecode=LC2 length=12.5757 units=m
! reduced_from=line319,line344,line370,line403,line432,line461,line494
! eliminated_buses=320,345,371,404,433,462

New Line._virtual_line320_line345 bus1=346.1.2.3.4 bus2=295.1.2.3.4 phases=4 linecode=LC4 length=15.4897 units=m
! reduced_from=line320,line345
! eliminated_buses=321

New Line._virtual_line330_line355_line385_line417_line447_line480_line512_line547 bus1=305.1.2.3.4 bus2=548.1.2.3.4 phases=4 linecode=LC5 length=26.04046 units=m
! reduced_from=line330,line355,line385,line417,line447,line480,line512,line547
! eliminated_buses=331,356,386,418,448,481,513

New Line._virtual_line331_line356_line387 bus1=388.1.2.3.4 bus2=305.1.2.3.4 phases=4 linecode=LC8 length=36.8332 units=m
! reduced_from=line331,line356,line387
! eliminated_buses=332,357

New Line._virtual_line348_line375_line408_line437_line467_line500_line532_line567_line600_line634_line670_line707_line741 bus1=325.1.2.3.4 bus2=742.1.2.3.4 phases=4 linecode=LC2 length=18.23872 units=m
! reduced_from=line348,line375,line408,line437,line467,line500,line532,line567,line600,line634,line670,line707,line741
! eliminated_buses=349,376,409,438,468,501,533,568,601,635,671,708

New Line._virtual_line349_line377 bus1=325.1.2.3.4 bus2=378.1.2.3.4 phases=4 linecode=LC8 length=17.8306 units=m
! reduced_from=line349,line377
! eliminated_buses=350

New Line._virtual_line361_line392_line423_line454_line488_line521_line556_line589_line622_line659 bus1=660.1.2.3.4 bus2=336.1.2.3.4 phases=4 linecode=LC2 length=7.06655 units=m
! reduced_from=line361,line392,line423,line454,line488,line521,line556,line589,line622,line659
! eliminated_buses=362,393,424,455,489,522,557,590,623

New Line._virtual_line371_line404_line433_line462 bus1=346.1.2.3.4 bus2=463.1.2.3.4 phases=4 linecode=LC4 length=14.6333 units=m
! reduced_from=line371,line404,line433,line462
! eliminated_buses=372,405,434

New Line._virtual_line372_line405_line434_line463_line497_line530 bus1=531.1.2.3.4 bus2=346.1.2.3.4 phases=4 linecode=LC1 length=9.86243 units=m
! reduced_from=line372,line405,line434,line463,line497,line530
! eliminated_buses=373,406,435,464,498

New Line._virtual_line382_line415_line445_line478_line510_line544_line577_line609_line643_line680_line716_line750_line781_line811_line838_line864 bus1=865.1.2.3.4 bus2=354.1.2.3.4 phases=4 linecode=LC2 length=11.6468 units=m
! reduced_from=line382,line415,line445,line478,line510,line544,line577,line609,line643,line680,line716,line750,line781,line811,line838,line864
! eliminated_buses=383,416,446,479,511,545,578,610,644,681,717,751,782,812,839

New Line._virtual_line384_line416_line446_line479_line511_line545_line578_line610_line644_line681_line717_line751_line782_line812_line839 bus1=840.1.2.3.4 bus2=355.1.2.3.4 phases=4 linecode=LC2 length=13.52478 units=m
! reduced_from=line384,line416,line446,line479,line511,line545,line578,line610,line644,line681,line717,line751,line782,line812,line839
! eliminated_buses=385,417,447,480,512,546,579,611,645,682,718,752,783,813

New Line._virtual_line391_line422_line453_line487_line520_line555_line588_line621_line658_line694_line729_line763_line794 bus1=795.1.2.3.4 bus2=360.1.2.3.4 phases=4 linecode=LC2 length=7.63755 units=m
! reduced_from=line391,line422,line453,line487,line520,line555,line588,line621,line658,line694,line729,line763,line794
! eliminated_buses=392,423,454,488,521,556,589,622,659,695,730,764

New Line._virtual_line396_line425_line456_line490_line523_line558_line591_line624_line660_line697_line731_line765 bus1=766.1.2.3.4 bus2=365.1.2.3.4 phases=4 linecode=LC2 length=14.31898 units=m
! reduced_from=line396,line425,line456,line490,line523,line558,line591,line624,line660,line697,line731,line765
! eliminated_buses=397,426,457,491,524,559,592,625,661,698,732

New Line._virtual_line401_line429 bus1=369.1.2.3.4 bus2=430.1.2.3.4 phases=4 linecode=LC2 length=6.7731 units=m
! reduced_from=line401,line429
! eliminated_buses=402

New Line._virtual_line411_line441_line473_line506_line539_line573 bus1=378.1.2.3.4 bus2=574.1.2.3.4 phases=4 linecode=LC2 length=8.80982 units=m
! reduced_from=line411,line441,line473,line506,line539,line573
! eliminated_buses=412,442,474,507,540

New Line._virtual_line419_line449_line483_line516_line551_line584 bus1=585.1.2.3.4 bus2=388.1.2.3.4 phases=4 linecode=LC8 length=45.284195 units=m
! reduced_from=line419,line449,line483,line516,line551,line584
! eliminated_buses=420,450,484,517,552

New Line._virtual_line431_line460_line493 bus1=403.1.2.3.4 bus2=494.1.2.3.4 phases=4 linecode=LC2 length=7.70971 units=m
! reduced_from=line431,line460,line493
! eliminated_buses=432,461

New Line._virtual_line450_line484_line517_line552_line585_line618 bus1=619.1.2.3.4 bus2=421.1.2.3.4 phases=4 linecode=LC2 length=3.43354 units=m
! reduced_from=line450,line484,line517,line552,line585,line618
! eliminated_buses=451,485,518,553,586

New Line._virtual_line451_line485_line518_line553_line586_line619 bus1=421.1.2.3.4 bus2=620.1.2.3.4 phases=4 linecode=LC2 length=6.33056 units=m
! reduced_from=line451,line485,line518,line553,line586,line619
! eliminated_buses=452,486,519,554,587

New Line._virtual_line465_line498_line531_line566_line599_line633_line669_line706_line740_line773_line803_line832_line859 bus1=436.1.2.3.4 bus2=860.1.2.3.4 phases=4 linecode=LC2 length=16.1869 units=m
! reduced_from=line465,line498,line531,line566,line599,line633,line669,line706,line740,line773,line803,line832,line859
! eliminated_buses=466,499,532,567,600,634,670,707,741,774,804,833

New Line._virtual_line469_line502_line534_line569_line601_line635 bus1=636.1.2.3.4 bus2=440.1.2.3.4 phases=4 linecode=LC2 length=2.41551 units=m
! reduced_from=line469,line502,line534,line569,line601,line635
! eliminated_buses=470,503,535,570,602

New Line._virtual_line470_line503_line535_line570 bus1=440.1.2.3.4 bus2=571.1.2.3.4 phases=4 linecode=LC2 length=15.1955 units=m
! reduced_from=line470,line503,line535,line570
! eliminated_buses=471,504,536

New Line._virtual_line475_line507_line540_line574_line606_line640_line677_line713_line747_line778_line808 bus1=443.1.2.3.4 bus2=809.1.2.3.4 phases=4 linecode=LC2 length=13.79845 units=m
! reduced_from=line475,line507,line540,line574,line606,line640,line677,line713,line747,line778,line808
! eliminated_buses=476,508,541,575,607,641,678,714,748,779

New Line._virtual_line495_line528_line562_line595 bus1=596.1.2.3.4 bus2=463.1.2.3.4 phases=4 linecode=LC4 length=7.96498 units=m
! reduced_from=line495,line528,line562,line595
! eliminated_buses=496,529,563

New Line._virtual_line496_line529_line563_line596_line630_line666_line703_line737_line770_line800_line830_line857_line881 bus1=882.1.2.3.4 bus2=463.1.2.3.4 phases=4 linecode=LC6 length=10.20128 units=m
! reduced_from=line496,line529,line563,line596,line630,line666,line703,line737,line770,line800,line830,line857,line881
! eliminated_buses=497,530,564,597,631,667,704,738,771,801,831,858

New Line._virtual_line527_line561 bus1=495.1.2.3.4 bus2=562.1.2.3.4 phases=4 linecode=LC2 length=7.1418 units=m
! reduced_from=line527,line561
! eliminated_buses=528

New Line._virtual_line542_line575_line607_line641_line678_line714_line748_line779_line809_line836_line862_line885_line909_line935_line961 bus1=962.1.2.3.4 bus2=509.1.2.3.4 phases=4 linecode=LC2 length=12.2556 units=m
! reduced_from=line542,line575,line607,line641,line678,line714,line748,line779,line809,line836,line862,line885,line909,line935,line961
! eliminated_buses=543,576,608,642,679,715,749,780,810,837,863,886,910,936

New Line._virtual_line564_line597_line631_line667_line704_line738_line771_line801 bus1=802.1.2.3.4 bus2=531.1.2.3.4 phases=4 linecode=LC2 length=6.20342 units=m
! reduced_from=line564,line597,line631,line667,line704,line738,line771,line801
! eliminated_buses=565,598,632,668,705,739,772

New Line._virtual_line565_line598_line632_line668_line705_line739_line772_line802_line831_line858_line882_line906_line932_line958_line984_line1007_line1029 bus1=1030.1.2.3.4 bus2=531.1.2.3.4 phases=4 linecode=LC1 length=5.601234 units=m
! reduced_from=line565,line598,line632,line668,line705,line739,line772,line802,line831,line858,line882,line906,line932,line958,line984,line1007,line1029
! eliminated_buses=566,599,633,669,706,740,773,803,832,859,883,907,933,959,985,1008

New Line._virtual_line580_line612_line646_line683_line718_line752_line783_line813_line840_line865_line887 bus1=888.1.2.3.4 bus2=548.1.2.3.4 phases=4 linecode=LC2 length=13.15167 units=m
! reduced_from=line580,line612,line646,line683,line718,line752,line783,line813,line840,line865,line887
! eliminated_buses=581,613,647,684,719,753,784,814,841,866

New Line._virtual_line581_line613 bus1=548.1.2.3.4 bus2=614.1.2.3.4 phases=4 linecode=LC5 length=11.9474 units=m
! reduced_from=line581,line613
! eliminated_buses=582

New Line._virtual_line604_line638_line675_line711_line745_line776_line806_line835 bus1=836.1.2.3.4 bus2=574.1.2.3.4 phases=4 linecode=LC2 length=8.51361 units=m
! reduced_from=line604,line638,line675,line711,line745,line776,line806,line835
! eliminated_buses=605,639,676,712,746,777,807

New Line._virtual_line605_line639_line676_line712_line746_line777_line807 bus1=574.1.2.3.4 bus2=808.1.2.3.4 phases=4 linecode=LC2 length=9.40283 units=m
! reduced_from=line605,line639,line676,line712,line746,line777,line807
! eliminated_buses=606,640,677,713,747,778

New Line._virtual_line616_line652_line690_line725_line758_line789_line819_line846_line871_line894_line917_line943 bus1=585.1.2.3.4 bus2=944.1.2.3.4 phases=4 linecode=LC3 length=15.86855 units=m
! reduced_from=line616,line652,line690,line725,line758,line789,line819,line846,line871,line894,line917,line943
! eliminated_buses=617,653,691,726,759,790,820,847,872,895,918

New Line._virtual_line617_line653_line691_line726_line759 bus1=585.1.2.3.4 bus2=760.1.2.3.4 phases=4 linecode=LC8 length=23.21578 units=m
! reduced_from=line617,line653,line691,line726,line759
! eliminated_buses=618,654,692,727

New Line._virtual_line629_line665_line702_line736_line769_line799_line829_line856_line880_line903_line929_line955_line981_line1004_line1026_line1048_line1069_line1089_line1108_line1129_line1149_line1168 bus1=1169.1.2.3.4 bus2=596.1.2.3.4 phases=4 linecode=LC9 length=31.52153 units=m
! reduced_from=line629,line665,line702,line736,line769,line799,line829,line856,line880,line903,line929,line955,line981,line1004,line1026,line1048,line1069,line1089,line1108,line1129,line1149,line1168
! eliminated_buses=630,666,703,737,770,800,830,857,881,904,930,956,982,1005,1027,1049,1070,1090,1109,1130,1150

New Line._virtual_line647_line684_line719_line753_line784_line814_line841_line866_line888_line911_line937_line963_line988_line1011_line1033_line1054_line1074_line1093_line1112_line1131_line1151_line1170 bus1=614.1.2.3.4 bus2=1171.1.2.3.4 phases=4 linecode=LC2 length=16.56836 units=m
! reduced_from=line647,line684,line719,line753,line784,line814,line841,line866,line888,line911,line937,line963,line988,line1011,line1033,line1054,line1074,line1093,line1112,line1131,line1151,line1170
! eliminated_buses=648,685,720,754,785,815,842,867,889,912,938,964,989,1012,1034,1055,1075,1094,1113,1132,1152

New Line._virtual_line648_line685_line720_line754_line785_line815_line842_line867_line889_line912_line938_line964_line989_line1012_line1034_line1055 bus1=1056.1.2.3.4 bus2=614.1.2.3.4 phases=4 linecode=LC2 length=12.20428 units=m
! reduced_from=line648,line685,line720,line754,line785,line815,line842,line867,line889,line912,line938,line964,line989,line1012,line1034,line1055
! eliminated_buses=649,686,721,755,786,816,843,868,890,913,939,965,990,1013,1035

New Line._virtual_line649_line686_line721_line755_line786_line816_line843_line868_line890_line913_line939_line965_line990_line1013_line1035_line1056_line1075_line1094_line1114_line1133_line1153_line1172_line1191_line1208_line1226_line1244_line1265_line1287_line1308 bus1=614.1.2.3.4 bus2=1309.1.2.3.4 phases=4 linecode=LC2 length=31.34884 units=m
! reduced_from=line649,line686,line721,line755,line786,line816,line843,line868,line890,line913,line939,line965,line990,line1013,line1035,line1056,line1075,line1094,line1114,line1133,line1153,line1172,line1191,line1208,line1226,line1244,line1265,line1287,line1308
! eliminated_buses=650,687,722,756,787,817,844,869,891,914,940,966,991,1014,1036,1057,1076,1095,1115,1134,1154,1173,1192,1209,1227,1245,1266,1288

New Line._virtual_line655_line692_line727_line761_line792_line822_line850_line875_line898_line923 bus1=924.1.2.3.4 bus2=619.1.2.3.4 phases=4 linecode=LC2 length=6.2693 units=m
! reduced_from=line655,line692,line727,line761,line792,line822,line850,line875,line898,line923
! eliminated_buses=656,693,728,762,793,823,851,876,899

New Line._virtual_line657_line693_line728_line762_line793_line823_line851_line876_line899 bus1=900.1.2.3.4 bus2=620.1.2.3.4 phases=4 linecode=LC2 length=6.64942 units=m
! reduced_from=line657,line693,line728,line762,line793,line823,line851,line876,line899
! eliminated_buses=658,694,729,763,794,824,852,877

New Line._virtual_line664_line701_line735_line768_line798_line828_line855_line879_line902_line928_line954_line980_line1003 bus1=1004.1.2.3.4 bus2=629.1.2.3.4 phases=4 linecode=LC6 length=25.1212 units=m
! reduced_from=line664,line701,line735,line768,line798,line828,line855,line879,line902,line928,line954,line980,line1003
! eliminated_buses=665,702,736,769,799,829,856,880,903,929,955,981

New Line._virtual_line672_line708_line742_line774_line804_line833_line860_line883_line907_line933_line959_line985_line1008_line1030_line1051_line1072_line1091_line1110 bus1=1111.1.2.3.4 bus2=636.1.2.3.4 phases=4 linecode=LC2 length=24.23368 units=m
! reduced_from=line672,line708,line742,line774,line804,line833,line860,line883,line907,line933,line959,line985,line1008,line1030,line1051,line1072,line1091,line1110
! eliminated_buses=673,709,743,775,805,834,861,884,908,934,960,986,1009,1031,1052,1073,1092

New Line._virtual_line687_line722_line756_line787_line817_line844_line869 bus1=870.1.2.3.4 bus2=651.1.2.3.4 phases=4 linecode=LC2 length=7.89227 units=m
! reduced_from=line687,line722,line756,line787,line817,line844,line869
! eliminated_buses=688,723,757,788,818,845

New Line._virtual_line688_line723_line757_line788_line818_line845_line870_line893_line916_line942_line968_line993_line1016_line1038_line1059_line1078_line1097_line1117_line1136_line1156_line1175_line1194 bus1=651.1.2.3.4 bus2=1195.1.2.3.4 phases=4 linecode=LC5 length=19.77234 units=m
! reduced_from=line688,line723,line757,line788,line818,line845,line870,line893,line916,line942,line968,line993,line1016,line1038,line1059,line1078,line1097,line1117,line1136,line1156,line1175,line1194
! eliminated_buses=689,724,758,789,819,846,871,894,917,943,969,994,1017,1039,1060,1079,1098,1118,1137,1157,1176

New Line._virtual_line696_line730_line764_line795_line826_line853_line878_line901_line927_line953 bus1=954.1.2.3.4 bus2=660.1.2.3.4 phases=4 linecode=LC2 length=9.70621 units=m
! reduced_from=line696,line730,line764,line795,line826,line853,line878,line901,line927,line953
! eliminated_buses=697,731,765,796,827,854,879,902,928

New Line._virtual_line790_line820_line848_line873 bus1=874.1.2.3.4 bus2=760.1.2.3.4 phases=4 linecode=LC3 length=32.4653 units=m
! reduced_from=line790,line820,line848,line873
! eliminated_buses=791,821,849

New Line._virtual_line825_line852_line877_line900_line926_line952_line977_line1001_line1024_line1046_line1067 bus1=1068.1.2.3.4 bus2=795.1.2.3.4 phases=4 linecode=LC2 length=9.90923 units=m
! reduced_from=line825,line852,line877,line900,line926,line952,line977,line1001,line1024,line1046,line1067
! eliminated_buses=826,853,878,901,927,953,978,1002,1025,1047

New Line._virtual_line891_line914_line940_line966_line991_line1014_line1036_line1057_line1076_line1095_line1115_line1134_line1154_line1173_line1192_line1209_line1227 bus1=870.1.2.3.4 bus2=1228.1.2.3.4 phases=4 linecode=LC2 length=15.33918 units=m
! reduced_from=line891,line914,line940,line966,line991,line1014,line1036,line1057,line1076,line1095,line1115,line1134,line1154,line1173,line1192,line1209,line1227
! eliminated_buses=892,915,941,967,992,1015,1037,1058,1077,1096,1116,1135,1155,1174,1193,1210

New Line._virtual_line892_line915_line941_line967_line992_line1015_line1037_line1058_line1077_line1096_line1116_line1135_line1155_line1174_line1193 bus1=1194.1.2.3.4 bus2=870.1.2.3.4 phases=4 linecode=LC2 length=13.21552 units=m
! reduced_from=line892,line915,line941,line967,line992,line1015,line1037,line1058,line1077,line1096,line1116,line1135,line1155,line1174,line1193
! eliminated_buses=893,916,942,968,993,1016,1038,1059,1078,1097,1117,1136,1156,1175

New Line._virtual_line904_line930_line956_line982_line1005_line1027_line1049_line1070 bus1=882.1.2.3.4 bus2=1071.1.2.3.4 phases=4 linecode=LC6 length=7.42358 units=m
! reduced_from=line904,line930,line956,line982,line1005,line1027,line1049,line1070
! eliminated_buses=905,931,957,983,1006,1028,1050

New Line._virtual_line905_line931_line957_line983_line1006_line1028_line1050_line1071_line1090_line1109_line1130_line1150_line1169_line1189 bus1=882.1.2.3.4 bus2=1190.1.2.3.4 phases=4 linecode=LC6 length=6.7369 units=m
! reduced_from=line905,line931,line957,line983,line1006,line1028,line1050,line1071,line1090,line1109,line1130,line1150,line1169,line1189
! eliminated_buses=906,932,958,984,1007,1029,1051,1072,1091,1110,1131,1151,1170

New Line._virtual_line919_line945_line972_line996_line1019_line1041_line1062_line1081_line1101_line1122_line1141_line1162_line1181_line1199_line1216_line1236_line1257_line1279 bus1=1280.1.2.3.4 bus2=897.1.2.3.4 phases=4 linecode=LC2 length=9.666352 units=m
! reduced_from=line919,line945,line972,line996,line1019,line1041,line1062,line1081,line1101,line1122,line1141,line1162,line1181,line1199,line1216,line1236,line1257,line1279
! eliminated_buses=920,946,973,997,1020,1042,1063,1082,1102,1123,1142,1163,1182,1200,1217,1237,1258

New Line._virtual_line920_line946_line973_line997_line1020_line1042_line1063_line1082_line1102_line1123_line1142_line1163 bus1=1164.1.2.3.4 bus2=897.1.2.3.4 phases=4 linecode=LC2 length=7.949842 units=m
! reduced_from=line920,line946,line973,line997,line1020,line1042,line1063,line1082,line1102,line1123,line1142,line1163
! eliminated_buses=921,947,974,998,1021,1043,1064,1083,1103,1124,1143

New Line._virtual_line925_line951_line976_line1000_line1023_line1045_line1066_line1085_line1105_line1126 bus1=1127.1.2.3.4 bus2=900.1.2.3.4 phases=4 linecode=LC2 length=8.85999 units=m
! reduced_from=line925,line951,line976,line1000,line1023,line1045,line1066,line1085,line1105,line1126
! eliminated_buses=926,952,977,1001,1024,1046,1067,1086,1106

New Line._virtual_line950_line975_line999_line1022_line1044_line1065_line1084_line1104_line1125 bus1=1126.1.2.3.4 bus2=924.1.2.3.4 phases=4 linecode=LC2 length=8.97456 units=m
! reduced_from=line950,line975,line999,line1022,line1044,line1065,line1084,line1104,line1125
! eliminated_buses=951,976,1000,1023,1045,1066,1085,1105

New Line._virtual_line969_line994_line1017_line1039_line1060_line1079_line1098_line1118_line1137_line1157_line1176 bus1=1177.1.2.3.4 bus2=944.1.2.3.4 phases=4 linecode=LC2 length=8.6595 units=m
! reduced_from=line969,line994,line1017,line1039,line1060,line1079,line1098,line1118,line1137,line1157,line1176
! eliminated_buses=970,995,1018,1040,1061,1080,1099,1119,1138,1158

New Line._virtual_line970_line995_line1018_line1040_line1061_line1080 bus1=1081.1.2.3.4 bus2=944.1.2.3.4 phases=4 linecode=LC3 length=26.72478 units=m
! reduced_from=line970,line995,line1018,line1040,line1061,line1080
! eliminated_buses=971,996,1019,1041,1062

New Line._virtual_line979_line1002_line1025_line1047_line1068_line1088_line1107_line1128_line1148_line1167 bus1=1168.1.2.3.4 bus2=954.1.2.3.4 phases=4 linecode=LC2 length=17.71973 units=m
! reduced_from=line979,line1002,line1025,line1047,line1068,line1088,line1107,line1128,line1148,line1167
! eliminated_buses=980,1003,1026,1048,1069,1089,1108,1129,1149

New Line._virtual_line1087_line1106_line1127_line1147_line1166_line1186_line1203_line1221_line1240_line1261_line1283 bus1=1068.1.2.3.4 bus2=1284.1.2.3.4 phases=4 linecode=LC2 length=19.14182 units=m
! reduced_from=line1087,line1106,line1127,line1147,line1166,line1186,line1203,line1221,line1240,line1261,line1283
! eliminated_buses=1088,1107,1128,1148,1167,1187,1204,1222,1241,1262

New Line._virtual_line1119_line1138_line1159_line1178_line1196_line1213 bus1=1214.1.2.3.4 bus2=1100.1.2.3.4 phases=4 linecode=LC8 length=49.977 units=m
! reduced_from=line1119,line1138,line1159,line1178,line1196,line1213
! eliminated_buses=1120,1139,1160,1179,1197

New Line._virtual_line1120_line1139_line1160_line1179_line1197_line1214_line1234 bus1=1235.1.2.3.4 bus2=1101.1.2.3.4 phases=4 linecode=LC2 length=9.41385 units=m
! reduced_from=line1120,line1139,line1160,line1179,line1197,line1214,line1234
! eliminated_buses=1121,1140,1161,1180,1198,1215

New Line._virtual_line1121_line1140_line1161_line1180_line1198_line1215_line1235 bus1=1236.1.2.3.4 bus2=1101.1.2.3.4 phases=4 linecode=LC2 length=8.54567 units=m
! reduced_from=line1121,line1140,line1161,line1180,line1198,line1215,line1235
! eliminated_buses=1122,1141,1162,1181,1199,1216

New Line._virtual_line1144_line1164_line1184_line1201_line1219_line1238_line1259_line1281_line1303_line1325_line1348_line1372_line1396 bus1=1397.1.2.3.4 bus2=1126.1.2.3.4 phases=4 linecode=LC2 length=18.90997 units=m
! reduced_from=line1144,line1164,line1184,line1201,line1219,line1238,line1259,line1281,line1303,line1325,line1348,line1372,line1396
! eliminated_buses=1145,1165,1185,1202,1220,1239,1260,1282,1304,1326,1349,1373

New Line._virtual_line1146_line1165_line1185_line1202_line1220_line1239_line1260_line1282_line1304_line1326_line1349_line1373_line1397_line1424 bus1=1425.1.2.3.4 bus2=1127.1.2.3.4 phases=4 linecode=LC2 length=26.82684 units=m
! reduced_from=line1146,line1165,line1185,line1202,line1220,line1239,line1260,line1282,line1304,line1326,line1349,line1373,line1397,line1424
! eliminated_buses=1147,1166,1186,1203,1221,1240,1261,1283,1305,1327,1350,1374,1398

New Line._virtual_line1183_line1200 bus1=1164.1.2.3.4 bus2=1201.1.2.3.4 phases=4 linecode=LC2 length=7.3081 units=m
! reduced_from=line1183,line1200
! eliminated_buses=1184

New Line._virtual_line1187_line1204_line1222_line1241_line1262_line1284_line1305_line1327_line1350_line1374_line1398_line1425_line1452_line1477_line1500 bus1=1501.1.2.3.4 bus2=1169.1.2.3.4 phases=4 linecode=LC9 length=23.8471 units=m
! reduced_from=line1187,line1204,line1222,line1241,line1262,line1284,line1305,line1327,line1350,line1374,line1398,line1425,line1452,line1477,line1500
! eliminated_buses=1188,1205,1223,1242,1263,1285,1306,1328,1351,1375,1399,1426,1453,1478

New Line._virtual_line1188_line1206_line1224_line1243_line1264_line1286_line1307_line1329_line1352 bus1=1353.1.2.3.4 bus2=1169.1.2.3.4 phases=4 linecode=LC9 length=15.02942 units=m
! reduced_from=line1188,line1206,line1224,line1243,line1264,line1286,line1307,line1329,line1352
! eliminated_buses=1189,1207,1225,1244,1265,1287,1308,1330

New Line._virtual_line1211_line1230_line1248 bus1=1249.1.2.3.4 bus2=1195.1.2.3.4 phases=4 linecode=LC5 length=1.23211 units=m
! reduced_from=line1211,line1230,line1248
! eliminated_buses=1212,1231

New Line._virtual_line1218_line1237_line1258_line1280_line1302_line1324_line1347_line1371_line1395_line1423_line1451_line1476_line1499_line1522_line1544_line1565_line1587_line1612_line1640_line1663_line1686_line1705_line1726_line1747_line1767_line1788_line1808_line1829_line1850_line1870_line1889 bus1=1201.1.2.3.4 bus2=1890.1.2.3.4 phases=4 linecode=LC2 length=23.1639 units=m
! reduced_from=line1218,line1237,line1258,line1280,line1302,line1324,line1347,line1371,line1395,line1423,line1451,line1476,line1499,line1522,line1544,line1565,line1587,line1612,line1640,line1663,line1686,line1705,line1726,line1747,line1767,line1788,line1808,line1829,line1850,line1870,line1889
! eliminated_buses=1219,1238,1259,1281,1303,1325,1348,1372,1396,1424,1452,1477,1500,1523,1545,1566,1588,1613,1641,1664,1687,1706,1727,1748,1768,1789,1809,1830,1851,1871

New Line._virtual_line1228_line1245_line1266_line1288_line1309_line1330_line1353_line1378_line1403_line1431_line1457_line1482 bus1=1211.1.2.3.4 bus2=1483.1.2.3.4 phases=4 linecode=LC2 length=10.39238 units=m
! reduced_from=line1228,line1245,line1266,line1288,line1309,line1330,line1353,line1378,line1403,line1431,line1457,line1482
! eliminated_buses=1229,1246,1267,1289,1310,1331,1354,1379,1404,1432,1458

New Line._virtual_line1246_line1267_line1289_line1310_line1331_line1354_line1379_line1404 bus1=1230.1.2.3.4 bus2=1405.1.2.3.4 phases=4 linecode=LC2 length=9.45693 units=m
! reduced_from=line1246,line1267,line1289,line1310,line1331,line1354,line1379,line1404
! eliminated_buses=1247,1268,1290,1311,1332,1355,1380

New Line._virtual_line1250_line1273 bus1=1274.1.2.3.4 bus2=1233.1.2.3.4 phases=4 linecode=LC2 length=0.6053 units=m
! reduced_from=line1250,line1273
! eliminated_buses=1251

New Line._virtual_line1251_line1274_line1297_line1320_line1343 bus1=1344.1.2.3.4 bus2=1233.1.2.3.4 phases=4 linecode=LC2 length=2.94719 units=m
! reduced_from=line1251,line1274,line1297,line1320,line1343
! eliminated_buses=1252,1275,1298,1321

New Line._virtual_line1268_line1290_line1311_line1332_line1355_line1380_line1405_line1432_line1458 bus1=1459.1.2.3.4 bus2=1248.1.2.3.4 phases=4 linecode=LC2 length=10.70443 units=m
! reduced_from=line1268,line1290,line1311,line1332,line1355,line1380,line1405,line1432,line1458
! eliminated_buses=1269,1291,1312,1333,1356,1381,1406,1433

New Line._virtual_line1269_line1291_line1313 bus1=1314.1.2.3.4 bus2=1248.1.2.3.4 phases=4 linecode=LC9 length=4.10541 units=m
! reduced_from=line1269,line1291,line1313
! eliminated_buses=1270,1292

New Line._virtual_line1270_line1292_line1314_line1336_line1359_line1384_line1410_line1437_line1463_line1487_line1508_line1531 bus1=1249.1.2.3.4 bus2=1532.1.2.3.4 phases=4 linecode=LC2 length=9.71215 units=m
! reduced_from=line1270,line1292,line1314,line1336,line1359,line1384,line1410,line1437,line1463,line1487,line1508,line1531
! eliminated_buses=1271,1293,1315,1337,1360,1385,1411,1438,1464,1488,1509

New Line._virtual_line1271_line1293 bus1=1294.1.2.3.4 bus2=1249.1.2.3.4 phases=4 linecode=LC5 length=2.74957 units=m
! reduced_from=line1271,line1293
! eliminated_buses=1272

New Line._virtual_line1276_line1298_line1321_line1344_line1368_line1392_line1420_line1447_line1473_line1496_line1519 bus1=1520.1.2.3.4 bus2=1255.1.2.3.4 phases=4 linecode=LC2 length=20.40358 units=m
! reduced_from=line1276,line1298,line1321,line1344,line1368,line1392,line1420,line1447,line1473,line1496,line1519
! eliminated_buses=1277,1299,1322,1345,1369,1393,1421,1448,1474,1497

New Line._virtual_line1278_line1299_line1322_line1345_line1369_line1393_line1421_line1448_line1474_line1497_line1520_line1542_line1563_line1585_line1610_line1638_line1661_line1684 bus1=1685.1.2.3.4 bus2=1257.1.2.3.4 phases=4 linecode=LC2 length=19.421523 units=m
! reduced_from=line1278,line1299,line1322,line1345,line1369,line1393,line1421,line1448,line1474,line1497,line1520,line1542,line1563,line1585,line1610,line1638,line1661,line1684
! eliminated_buses=1279,1300,1323,1346,1370,1394,1422,1449,1475,1498,1521,1543,1564,1586,1611,1639,1662

New Line._virtual_line1295_line1318_line1341_line1364_line1389_line1417_line1444_line1470 bus1=1471.1.2.3.4 bus2=1274.1.2.3.4 phases=4 linecode=LC2 length=6.71992 units=m
! reduced_from=line1295,line1318,line1341,line1364,line1389,line1417,line1444,line1470
! eliminated_buses=1296,1319,1342,1365,1390,1418,1445

New Line._virtual_line1296_line1319_line1342_line1365_line1390_line1418_line1445_line1471_line1494 bus1=1495.1.2.3.4 bus2=1274.1.2.3.4 phases=4 linecode=LC2 length=11.06618 units=m
! reduced_from=line1296,line1319,line1342,line1365,line1390,line1418,line1445,line1471,line1494
! eliminated_buses=1297,1320,1343,1366,1391,1419,1446,1472

New Line._virtual_line1301_line1323_line1346_line1370_line1394_line1422 bus1=1423.1.2.3.4 bus2=1280.1.2.3.4 phases=4 linecode=LC2 length=8.15287 units=m
! reduced_from=line1301,line1323,line1346,line1370,line1394,line1422
! eliminated_buses=1302,1324,1347,1371,1395

New Line._virtual_line1315_line1337_line1360_line1385_line1411_line1438_line1464_line1488_line1509_line1532_line1553_line1574 bus1=1294.1.2.3.4 bus2=1575.1.2.3.4 phases=4 linecode=LC2 length=12.72465 units=m
! reduced_from=line1315,line1337,line1360,line1385,line1411,line1438,line1464,line1488,line1509,line1532,line1553,line1574
! eliminated_buses=1316,1338,1361,1386,1412,1439,1465,1489,1510,1533,1554

New Line._virtual_line1316_line1339_line1362_line1387 bus1=1388.1.2.3.4 bus2=1294.1.2.3.4 phases=4 linecode=LC5 length=10.083655 units=m
! reduced_from=line1316,line1339,line1362,line1387
! eliminated_buses=1317,1340,1363

New Line._virtual_line1334_line1357_line1382_line1407_line1434_line1460_line1483_line1504 bus1=1505.1.2.3.4 bus2=1314.1.2.3.4 phases=4 linecode=LC2 length=9.98761 units=m
! reduced_from=line1334,line1357,line1382,line1407,line1434,line1460,line1483,line1504
! eliminated_buses=1335,1358,1383,1408,1435,1461,1484

New Line._virtual_line1335_line1358_line1383 bus1=1384.1.2.3.4 bus2=1314.1.2.3.4 phases=4 linecode=LC9 length=2.52829 units=m
! reduced_from=line1335,line1358,line1383
! eliminated_buses=1336,1359

New Line._virtual_line1367_line1391_line1419_line1446_line1472_line1495_line1518_line1541_line1562_line1584_line1609 bus1=1344.1.2.3.4 bus2=1610.1.2.3.4 phases=4 linecode=LC2 length=13.78841 units=m
! reduced_from=line1367,line1391,line1419,line1446,line1472,line1495,line1518,line1541,line1562,line1584,line1609
! eliminated_buses=1368,1392,1420,1447,1473,1496,1519,1542,1563,1585

New Line._virtual_line1377_line1402_line1430_line1456_line1481_line1503_line1527_line1549_line1570_line1593 bus1=1594.1.2.3.4 bus2=1353.1.2.3.4 phases=4 linecode=LC2 length=11.19802 units=m
! reduced_from=line1377,line1402,line1430,line1456,line1481,line1503,line1527,line1549,line1570,line1593
! eliminated_buses=1378,1403,1431,1457,1482,1504,1528,1550,1571

New Line._virtual_line1401_line1429_line1455_line1480_line1502_line1526_line1548_line1569_line1592_line1618_line1646_line1669_line1691_line1709_line1730_line1752_line1772 bus1=1377.1.2.3.4 bus2=1773.1.2.3.4 phases=4 linecode=LC2 length=18.91715 units=m
! reduced_from=line1401,line1429,line1455,line1480,line1502,line1526,line1548,line1569,line1592,line1618,line1646,line1669,line1691,line1709,line1730,line1752,line1772
! eliminated_buses=1402,1430,1456,1481,1503,1527,1549,1570,1593,1619,1647,1670,1692,1710,1731,1753

New Line._virtual_line1408_line1435_line1461_line1484_line1505_line1528_line1550_line1571_line1594_line1621_line1647_line1670_line1692 bus1=1384.1.2.3.4 bus2=1693.1.2.3.4 phases=4 linecode=LC9 length=10.21165 units=m
! reduced_from=line1408,line1435,line1461,line1484,line1505,line1528,line1550,line1571,line1594,line1621,line1647,line1670,line1692
! eliminated_buses=1409,1436,1462,1485,1506,1529,1551,1572,1595,1622,1648,1671

New Line._virtual_line1409_line1436_line1462 bus1=1384.1.2.3.4 bus2=1463.1.2.3.4 phases=4 linecode=LC9 length=2.2931 units=m
! reduced_from=line1409,line1436,line1462
! eliminated_buses=1410,1437

New Line._virtual_line1413_line1440_line1466_line1490_line1511_line1534_line1554_line1575_line1599_line1626_line1652_line1675 bus1=1388.1.2.3.4 bus2=1676.1.2.3.4 phases=4 linecode=LC2 length=10.59747 units=m
! reduced_from=line1413,line1440,line1466,line1490,line1511,line1534,line1554,line1575,line1599,line1626,line1652,line1675
! eliminated_buses=1414,1441,1467,1491,1512,1535,1555,1576,1600,1627,1653

New Line._virtual_line1414_line1441_line1467_line1491_line1512_line1535_line1555_line1576_line1600_line1627 bus1=1388.1.2.3.4 bus2=1628.1.2.3.4 phases=4 linecode=LC2 length=13.68898 units=m
! reduced_from=line1414,line1441,line1467,line1491,line1512,line1535,line1555,line1576,line1600,line1627
! eliminated_buses=1415,1442,1468,1492,1513,1536,1556,1577,1601

New Line._virtual_line1415_line1442_line1468 bus1=1388.1.2.3.4 bus2=1469.1.2.3.4 phases=4 linecode=LC5 length=7.20893 units=m
! reduced_from=line1415,line1442,line1468
! eliminated_buses=1416,1443

New Line._virtual_line1428_line1454_line1479_line1501_line1525_line1547_line1568_line1591_line1617_line1645_line1668 bus1=1401.1.2.3.4 bus2=1669.1.2.3.4 phases=4 linecode=LC2 length=16.98421 units=m
! reduced_from=line1428,line1454,line1479,line1501,line1525,line1547,line1568,line1591,line1617,line1645,line1668
! eliminated_buses=1429,1455,1480,1502,1526,1548,1569,1592,1618,1646

New Line._virtual_line1450_line1475_line1498_line1521_line1543_line1564_line1586_line1611_line1639_line1662_line1685_line1704_line1725_line1746_line1766_line1787_line1807_line1828_line1849_line1869_line1888_line1907_line1928_line1949_line1970_line1990_line2010_line2032_line2055_line2077_line2100_line2123 bus1=1423.1.2.3.4 bus2=2124.1.2.3.4 phases=4 linecode=LC2 length=23.91264 units=m
! reduced_from=line1450,line1475,line1498,line1521,line1543,line1564,line1586,line1611,line1639,line1662,line1685,line1704,line1725,line1746,line1766,line1787,line1807,line1828,line1849,line1869,line1888,line1907,line1928,line1949,line1970,line1990,line2010,line2032,line2055,line2077,line2100,line2123
! eliminated_buses=1451,1476,1499,1522,1544,1565,1587,1612,1640,1663,1686,1705,1726,1747,1767,1788,1808,1829,1850,1870,1889,1908,1929,1950,1971,1991,2011,2033,2056,2078,2101

New Line._virtual_line1485_line1506_line1529_line1551_line1572_line1595_line1622_line1648_line1671_line1693_line1712_line1733_line1754_line1774_line1794_line1814_line1835_line1856 bus1=1463.1.2.3.4 bus2=1857.1.2.3.4 phases=4 linecode=LC2 length=28.27173 units=m
! reduced_from=line1485,line1506,line1529,line1551,line1572,line1595,line1622,line1648,line1671,line1693,line1712,line1733,line1754,line1774,line1794,line1814,line1835,line1856
! eliminated_buses=1486,1507,1530,1552,1573,1596,1623,1649,1672,1694,1713,1734,1755,1775,1795,1815,1836

New Line._virtual_line1486_line1507_line1530_line1552_line1573 bus1=1463.1.2.3.4 bus2=1574.1.2.3.4 phases=4 linecode=LC9 length=4.67414 units=m
! reduced_from=line1486,line1507,line1530,line1552,line1573
! eliminated_buses=1487,1508,1531,1553

New Line._virtual_line1492_line1513_line1536_line1556_line1577_line1601_line1628_line1653_line1676 bus1=1677.1.2.3.4 bus2=1469.1.2.3.4 phases=4 linecode=LC2 length=10.97117 units=m
! reduced_from=line1492,line1513,line1536,line1556,line1577,line1601,line1628,line1653,line1676
! eliminated_buses=1493,1514,1537,1557,1578,1602,1629,1654

New Line._virtual_line1514_line1537_line1557_line1578_line1602_line1629_line1654_line1677_line1698 bus1=1494.1.2.3.4 bus2=1699.1.2.3.4 phases=4 linecode=LC2 length=10.06611 units=m
! reduced_from=line1514,line1537,line1557,line1578,line1602,line1629,line1654,line1677,line1698
! eliminated_buses=1515,1538,1558,1579,1603,1630,1655,1678

New Line._virtual_line1517_line1540_line1561_line1583_line1608_line1635_line1659_line1682_line1702_line1723_line1744_line1764 bus1=1495.1.2.3.4 bus2=1765.1.2.3.4 phases=4 linecode=LC2 length=21.7799 units=m
! reduced_from=line1517,line1540,line1561,line1583,line1608,line1635,line1659,line1682,line1702,line1723,line1744,line1764
! eliminated_buses=1518,1541,1562,1584,1609,1636,1660,1683,1703,1724,1745

New Line._virtual_line1523_line1545_line1566_line1588_line1613_line1641_line1664_line1687_line1706_line1727_line1748_line1768_line1789_line1809_line1830 bus1=1831.1.2.3.4 bus2=1501.1.2.3.4 phases=4 linecode=LC2 length=16.52754 units=m
! reduced_from=line1523,line1545,line1566,line1588,line1613,line1641,line1664,line1687,line1706,line1727,line1748,line1768,line1789,line1809,line1830
! eliminated_buses=1524,1546,1567,1589,1614,1642,1665,1688,1707,1728,1749,1769,1790,1810

New Line._virtual_line1524_line1546_line1567 bus1=1568.1.2.3.4 bus2=1501.1.2.3.4 phases=4 linecode=LC9 length=4.4088 units=m
! reduced_from=line1524,line1546,line1567
! eliminated_buses=1525,1547

New Line._virtual_line1538_line1558_line1579_line1603_line1630_line1655_line1678_line1699_line1719 bus1=1516.1.2.3.4 bus2=1720.1.2.3.4 phases=4 linecode=LC2 length=10.77636 units=m
! reduced_from=line1538,line1558,line1579,line1603,line1630,line1655,line1678,line1699,line1719
! eliminated_buses=1539,1559,1580,1604,1631,1656,1679,1700

New Line._virtual_line1539_line1560 bus1=1561.1.2.3.4 bus2=1516.1.2.3.4 phases=4 linecode=LC5 length=3.46604 units=m
! reduced_from=line1539,line1560
! eliminated_buses=1540

New Line._virtual_line1581_line1605_line1632_line1657_line1680_line1700_line1720_line1741 bus1=1742.1.2.3.4 bus2=1561.1.2.3.4 phases=4 linecode=LC2 length=10.18527 units=m
! reduced_from=line1581,line1605,line1632,line1657,line1680,line1700,line1720,line1741
! eliminated_buses=1582,1606,1633,1658,1681,1701,1721

New Line._virtual_line1589_line1614_line1642_line1665_line1688_line1707_line1728_line1749_line1769_line1790_line1810 bus1=1811.1.2.3.4 bus2=1568.1.2.3.4 phases=4 linecode=LC2 length=9.69247 units=m
! reduced_from=line1589,line1614,line1642,line1665,line1688,line1707,line1728,line1749,line1769,line1790,line1810
! eliminated_buses=1590,1615,1643,1666,1689,1708,1729,1750,1770,1791

New Line._virtual_line1590_line1616_line1644_line1667_line1690_line1708_line1729 bus1=1730.1.2.3.4 bus2=1568.1.2.3.4 phases=4 linecode=LC9 length=11.9803 units=m
! reduced_from=line1590,line1616,line1644,line1667,line1690,line1708,line1729
! eliminated_buses=1591,1617,1645,1668,1691,1709

New Line._virtual_line1596_line1623_line1649_line1672_line1694_line1713_line1734_line1755_line1775_line1795_line1815_line1836_line1857_line1876_line1896_line1916_line1937_line1958_line1979_line2000_line2022_line2045_line2067_line2090_line2114_line2138_line2161_line2184_line2208_line2235_line2263_line2291 bus1=2292.1.2.3.4 bus2=1574.1.2.3.4 phases=4 linecode=LC2 length=33.898363 units=m
! reduced_from=line1596,line1623,line1649,line1672,line1694,line1713,line1734,line1755,line1775,line1795,line1815,line1836,line1857,line1876,line1896,line1916,line1937,line1958,line1979,line2000,line2022,line2045,line2067,line2090,line2114,line2138,line2161,line2184,line2208,line2235,line2263,line2291
! eliminated_buses=1597,1624,1650,1673,1695,1714,1735,1756,1776,1796,1816,1837,1858,1877,1897,1917,1938,1959,1980,2001,2023,2046,2068,2091,2115,2139,2162,2185,2209,2236,2264

New Line._virtual_line1597_line1624_line1650_line1673_line1695_line1714_line1735_line1756_line1776_line1796_line1816_line1837_line1858_line1877_line1897 bus1=1898.1.2.3.4 bus2=1574.1.2.3.4 phases=4 linecode=LC2 length=19.82341 units=m
! reduced_from=line1597,line1624,line1650,line1673,line1695,line1714,line1735,line1756,line1776,line1796,line1816,line1837,line1858,line1877,line1897
! eliminated_buses=1598,1625,1651,1674,1696,1715,1736,1757,1777,1797,1817,1838,1859,1878

New Line._virtual_line1598_line1625_line1651_line1674 bus1=1675.1.2.3.4 bus2=1574.1.2.3.4 phases=4 linecode=LC9 length=14.6354 units=m
! reduced_from=line1598,line1625,line1651,line1674
! eliminated_buses=1599,1626,1652

New Line._virtual_line1606_line1633 bus1=1583.1.2.3.4 bus2=1634.1.2.3.4 phases=4 linecode=LC1 length=10.1348 units=m
! reduced_from=line1606,line1633
! eliminated_buses=1607

New Line._virtual_line1607_line1634_line1658_line1681_line1701 bus1=1583.1.2.3.4 bus2=1702.1.2.3.4 phases=4 linecode=LC5 length=7.53048 units=m
! reduced_from=line1607,line1634,line1658,line1681,line1701
! eliminated_buses=1608,1635,1659,1682

New Line._virtual_line1637_line1660_line1683_line1703_line1724_line1745_line1765_line1786_line1806_line1827_line1848_line1868_line1887_line1906_line1927 bus1=1610.1.2.3.4 bus2=1928.1.2.3.4 phases=4 linecode=LC2 length=12.046166 units=m
! reduced_from=line1637,line1660,line1683,line1703,line1724,line1745,line1765,line1786,line1806,line1827,line1848,line1868,line1887,line1906,line1927
! eliminated_buses=1638,1661,1684,1704,1725,1746,1766,1787,1807,1828,1849,1869,1888,1907

New Line._virtual_line1696_line1715_line1736_line1757_line1777_line1797_line1817_line1838_line1859_line1878 bus1=1675.1.2.3.4 bus2=1879.1.2.3.4 phases=4 linecode=LC2 length=12.41131 units=m
! reduced_from=line1696,line1715,line1736,line1757,line1777,line1797,line1817,line1838,line1859,line1878
! eliminated_buses=1697,1716,1737,1758,1778,1798,1818,1839,1860

New Line._virtual_line1710_line1731_line1753_line1773_line1793_line1813 bus1=1814.1.2.3.4 bus2=1693.1.2.3.4 phases=4 linecode=LC1 length=6.2654 units=m
! reduced_from=line1710,line1731,line1753,line1773,line1793,line1813
! eliminated_buses=1711,1732,1754,1774,1794

New Line._virtual_line1716_line1737_line1758_line1778_line1798_line1818_line1839_line1860_line1879_line1898_line1917_line1938_line1959_line1980_line2001_line2023_line2046_line2068_line2091_line2115_line2139_line2162_line2185_line2209_line2236_line2264_line2292_line2319_line2346_line2371_line2396 bus1=1698.1.2.3.4 bus2=2397.1.2.3.4 phases=4 linecode=LC2 length=25.082054 units=m
! reduced_from=line1716,line1737,line1758,line1778,line1798,line1818,line1839,line1860,line1879,line1898,line1917,line1938,line1959,line1980,line2001,line2023,line2046,line2068,line2091,line2115,line2139,line2162,line2185,line2209,line2236,line2264,line2292,line2319,line2346,line2371,line2396
! eliminated_buses=1717,1738,1759,1779,1799,1819,1840,1861,1880,1899,1918,1939,1960,1981,2002,2024,2047,2069,2092,2116,2140,2163,2186,2210,2237,2265,2293,2320,2347,2372

New Line._virtual_line1717_line1738_line1759_line1779_line1799_line1819_line1840_line1861_line1880_line1899_line1918_line1939_line1960_line1981_line2002_line2024_line2047_line2069_line2092_line2116_line2140_line2163_line2186_line2210_line2237_line2265_line2293 bus1=1698.1.2.3.4 bus2=2294.1.2.3.4 phases=4 linecode=LC2 length=26.813091 units=m
! reduced_from=line1717,line1738,line1759,line1779,line1799,line1819,line1840,line1861,line1880,line1899,line1918,line1939,line1960,line1981,line2002,line2024,line2047,line2069,line2092,line2116,line2140,line2163,line2186,line2210,line2237,line2265,line2293
! eliminated_buses=1718,1739,1760,1780,1800,1820,1841,1862,1881,1900,1919,1940,1961,1982,2003,2025,2048,2070,2093,2117,2141,2164,2187,2211,2238,2266

New Line._virtual_line1718_line1740 bus1=1698.1.2.3.4 bus2=1741.1.2.3.4 phases=4 linecode=LC9 length=8.9857 units=m
! reduced_from=line1718,line1740
! eliminated_buses=1719

New Line._virtual_line1721_line1742 bus1=1702.1.2.3.4 bus2=1743.1.2.3.4 phases=4 linecode=LC1 length=8.6466 units=m
! reduced_from=line1721,line1742
! eliminated_buses=1722

New Line._virtual_line1722_line1743_line1763_line1785_line1805_line1826_line1847_line1867_line1886_line1905_line1926 bus1=1702.1.2.3.4 bus2=1927.1.2.3.4 phases=4 linecode=LC5 length=12.79881 units=m
! reduced_from=line1722,line1743,line1763,line1785,line1805,line1826,line1847,line1867,line1886,line1905,line1926
! eliminated_buses=1723,1744,1764,1786,1806,1827,1848,1868,1887,1906

New Line._virtual_line1750_line1770_line1791_line1811_line1831_line1851_line1871_line1890_line1908_line1929_line1950_line1971_line1991_line2011_line2033 bus1=1730.1.2.3.4 bus2=2034.1.2.3.4 phases=4 linecode=LC2 length=14.5122 units=m
! reduced_from=line1750,line1770,line1791,line1811,line1831,line1851,line1871,line1890,line1908,line1929,line1950,line1971,line1991,line2011,line2033
! eliminated_buses=1751,1771,1792,1812,1832,1852,1872,1891,1909,1930,1951,1972,1992,2012

New Line._virtual_line1751_line1771_line1792_line1812_line1832_line1852 bus1=1853.1.2.3.4 bus2=1730.1.2.3.4 phases=4 linecode=LC9 length=13.2001 units=m
! reduced_from=line1751,line1771,line1792,line1812,line1832,line1852
! eliminated_buses=1752,1772,1793,1813,1833

New Line._virtual_line1761_line1781_line1801_line1821_line1842_line1863_line1882_line1901_line1920_line1941_line1962 bus1=1741.1.2.3.4 bus2=1963.1.2.3.4 phases=4 linecode=LC2 length=12.86728 units=m
! reduced_from=line1761,line1781,line1801,line1821,line1842,line1863,line1882,line1901,line1920,line1941,line1962
! eliminated_buses=1762,1782,1802,1822,1843,1864,1883,1902,1921,1942

New Line._virtual_line1782_line1802_line1822_line1843_line1864_line1883_line1902_line1921_line1942_line1963_line1983_line2003_line2025_line2048_line2070_line2093_line2117_line2141_line2164_line2187_line2211_line2238_line2266_line2294 bus1=2295.1.2.3.4 bus2=1763.1.2.3.4 phases=4 linecode=LC2 length=23.659438 units=m
! reduced_from=line1782,line1802,line1822,line1843,line1864,line1883,line1902,line1921,line1942,line1963,line1983,line2003,line2025,line2048,line2070,line2093,line2117,line2141,line2164,line2187,line2211,line2238,line2266,line2294
! eliminated_buses=1783,1803,1823,1844,1865,1884,1903,1922,1943,1964,1984,2004,2026,2049,2071,2094,2118,2142,2165,2188,2212,2239,2267

New Line._virtual_line1783_line1803_line1823_line1844_line1865_line1884_line1903_line1922_line1943_line1964_line1984_line2004_line2026_line2049_line2071_line2094_line2118_line2142_line2165_line2188_line2212_line2239_line2267_line2295_line2320_line2347_line2372_line2397_line2421_line2447_line2472_line2497_line2523_line2550 bus1=1763.1.2.3.4 bus2=2551.1.2.3.4 phases=4 linecode=LC2 length=33.530847 units=m
! reduced_from=line1783,line1803,line1823,line1844,line1865,line1884,line1903,line1922,line1943,line1964,line1984,line2004,line2026,line2049,line2071,line2094,line2118,line2142,line2165,line2188,line2212,line2239,line2267,line2295,line2320,line2347,line2372,line2397,line2421,line2447,line2472,line2497,line2523,line2550
! eliminated_buses=1784,1804,1824,1845,1866,1885,1904,1923,1944,1965,1985,2005,2027,2050,2072,2095,2119,2143,2166,2189,2213,2240,2268,2296,2321,2348,2373,2398,2422,2448,2473,2498,2524

New Line._virtual_line1784_line1804 bus1=1763.1.2.3.4 bus2=1805.1.2.3.4 phases=4 linecode=LC9 length=2.35218 units=m
! reduced_from=line1784,line1804
! eliminated_buses=1785

New Line._virtual_line1824_line1845 bus1=1805.1.2.3.4 bus2=1846.1.2.3.4 phases=4 linecode=LC1 length=11.497 units=m
! reduced_from=line1824,line1845
! eliminated_buses=1825

New Line._virtual_line1825_line1846_line1866_line1885_line1904 bus1=1905.1.2.3.4 bus2=1805.1.2.3.4 phases=4 linecode=LC9 length=3.0097 units=m
! reduced_from=line1825,line1846,line1866,line1885,line1904
! eliminated_buses=1826,1847,1867,1886

New Line._virtual_line1833_line1853 bus1=1854.1.2.3.4 bus2=1814.1.2.3.4 phases=4 linecode=LC1 length=7.83485 units=m
! reduced_from=line1833,line1853
! eliminated_buses=1834

New Line._virtual_line1854_line1874 bus1=1875.1.2.3.4 bus2=1835.1.2.3.4 phases=4 linecode=LC1 length=7.65328 units=m
! reduced_from=line1854,line1874
! eliminated_buses=1855

New Line._virtual_line1855_line1875 bus1=1876.1.2.3.4 bus2=1835.1.2.3.4 phases=4 linecode=LC1 length=7.08852 units=m
! reduced_from=line1855,line1875
! eliminated_buses=1856

New Line._virtual_line1873_line1893_line1912_line1934_line1956_line1978_line1999_line2021_line2044_line2066 bus1=1853.1.2.3.4 bus2=2067.1.2.3.4 phases=4 linecode=LC9 length=10.5242 units=m
! reduced_from=line1873,line1893,line1912,line1934,line1956,line1978,line1999,line2021,line2044,line2066
! eliminated_buses=1874,1894,1913,1935,1957,1979,2000,2022,2045

New Line._virtual_line1891_line1909 bus1=1873.1.2.3.4 bus2=1910.1.2.3.4 phases=4 linecode=LC9 length=9.8573 units=m
! reduced_from=line1891,line1909
! eliminated_buses=1892

New Line._virtual_line1892_line1911_line1933_line1955_line1977_line1998_line2020_line2043_line2065_line2087_line2111_line2135_line2158_line2181_line2205_line2232_line2259 bus1=1873.1.2.3.4 bus2=2260.1.2.3.4 phases=4 linecode=LC2 length=13.06798 units=m
! reduced_from=line1892,line1911,line1933,line1955,line1977,line1998,line2020,line2043,line2065,line2087,line2111,line2135,line2158,line2181,line2205,line2232,line2259
! eliminated_buses=1893,1912,1934,1956,1978,1999,2021,2044,2066,2088,2112,2136,2159,2182,2206,2233

New Line._virtual_line1894_line1913 bus1=1876.1.2.3.4 bus2=1914.1.2.3.4 phases=4 linecode=LC1 length=8.49238 units=m
! reduced_from=line1894,line1913
! eliminated_buses=1895

New Line._virtual_line1914_line1935 bus1=1896.1.2.3.4 bus2=1936.1.2.3.4 phases=4 linecode=LC1 length=7.16675 units=m
! reduced_from=line1914,line1935
! eliminated_buses=1915

New Line._virtual_line1915_line1936_line1957 bus1=1896.1.2.3.4 bus2=1958.1.2.3.4 phases=4 linecode=LC1 length=13.0997 units=m
! reduced_from=line1915,line1936,line1957
! eliminated_buses=1916,1937

New Line._virtual_line1923_line1944_line1965_line1985_line2005_line2027_line2050_line2072_line2095_line2119_line2143_line2166_line2189_line2213_line2240_line2268_line2296_line2321_line2348 bus1=2349.1.2.3.4 bus2=1905.1.2.3.4 phases=4 linecode=LC2 length=29.624 units=m
! reduced_from=line1923,line1944,line1965,line1985,line2005,line2027,line2050,line2072,line2095,line2119,line2143,line2166,line2189,line2213,line2240,line2268,line2296,line2321,line2348
! eliminated_buses=1924,1945,1966,1986,2006,2028,2051,2073,2096,2120,2144,2167,2190,2214,2241,2269,2297,2322

New Line._virtual_line1924_line1945_line1966_line1986_line2006_line2028_line2051_line2073_line2096_line2120_line2144_line2167_line2190_line2214_line2241_line2269_line2297_line2322_line2349_line2373_line2398_line2422_line2448_line2473_line2499_line2525_line2552 bus1=2553.1.2.3.4 bus2=1905.1.2.3.4 phases=4 linecode=LC2 length=31.72572 units=m
! reduced_from=line1924,line1945,line1966,line1986,line2006,line2028,line2051,line2073,line2096,line2120,line2144,line2167,line2190,line2214,line2241,line2269,line2297,line2322,line2349,line2373,line2398,line2422,line2448,line2473,line2499,line2525,line2552
! eliminated_buses=1925,1946,1967,1987,2007,2029,2052,2074,2097,2121,2145,2168,2191,2215,2242,2270,2298,2323,2350,2374,2399,2423,2449,2474,2500,2526

New Line._virtual_line1925_line1946_line1967_line1987_line2007_line2029_line2052_line2074_line2097_line2121_line2145_line2168 bus1=2169.1.2.3.4 bus2=1905.1.2.3.4 phases=4 linecode=LC2 length=12.58919 units=m
! reduced_from=line1925,line1946,line1967,line1987,line2007,line2029,line2052,line2074,line2097,line2121,line2145,line2168
! eliminated_buses=1926,1947,1968,1988,2008,2030,2053,2075,2098,2122,2146

New Line._virtual_line1931_line1953_line1975_line1996_line2019_line2042_line2064_line2086_line2110_line2134_line2157_line2180_line2204_line2231 bus1=1910.1.2.3.4 bus2=2232.1.2.3.4 phases=4 linecode=LC2 length=12.92958 units=m
! reduced_from=line1931,line1953,line1975,line1996,line2019,line2042,line2064,line2086,line2110,line2134,line2157,line2180,line2204,line2231
! eliminated_buses=1932,1954,1976,1997,2020,2043,2065,2087,2111,2135,2158,2181,2205

New Line._virtual_line1947_line1968_line1988_line2008_line2030_line2053_line2075_line2098_line2122_line2146_line2169 bus1=1927.1.2.3.4 bus2=2170.1.2.3.4 phases=4 linecode=LC9 length=10.18254 units=m
! reduced_from=line1947,line1968,line1988,line2008,line2030,line2053,line2075,line2098,line2122,line2146,line2169
! eliminated_buses=1948,1969,1989,2009,2031,2054,2076,2099,2123,2147

New Line._virtual_line1951_line1972 bus1=1931.1.2.3.4 bus2=1973.1.2.3.4 phases=4 linecode=LC9 length=9.2391 units=m
! reduced_from=line1951,line1972
! eliminated_buses=1952

New Line._virtual_line1952_line1974_line1995_line2018_line2041_line2063_line2085_line2109_line2133_line2156_line2179 bus1=2180.1.2.3.4 bus2=1931.1.2.3.4 phases=4 linecode=LC2 length=10.49734 units=m
! reduced_from=line1952,line1974,line1995,line2018,line2041,line2063,line2085,line2109,line2133,line2156,line2179
! eliminated_buses=1953,1975,1996,2019,2042,2064,2086,2110,2134,2157

New Line._virtual_line1993_line2016_line2039_line2061_line2083_line2106_line2130_line2154_line2177_line2202_line2229_line2257 bus1=1973.1.2.3.4 bus2=2258.1.2.3.4 phases=4 linecode=LC2 length=9.96559 units=m
! reduced_from=line1993,line2016,line2039,line2061,line2083,line2106,line2130,line2154,line2177,line2202,line2229,line2257
! eliminated_buses=1994,2017,2040,2062,2084,2107,2131,2155,2178,2203,2230

New Line._virtual_line2013_line2036_line2058_line2080_line2103_line2127_line2151_line2174_line2199_line2226_line2254_line2283_line2311_line2337_line2362_line2386_line2410_line2437_line2462_line2487_line2514_line2540 bus1=1993.1.2.3.4 bus2=2541.1.2.3.4 phases=4 linecode=LC2 length=23.285604 units=m
! reduced_from=line2013,line2036,line2058,line2080,line2103,line2127,line2151,line2174,line2199,line2226,line2254,line2283,line2311,line2337,line2362,line2386,line2410,line2437,line2462,line2487,line2514,line2540
! eliminated_buses=2014,2037,2059,2081,2104,2128,2152,2175,2200,2227,2255,2284,2312,2338,2363,2387,2411,2438,2463,2488,2515

New Line._virtual_line2015_line2038_line2060_line2082_line2105_line2129_line2153_line2176_line2201_line2228_line2256_line2285_line2313_line2339_line2364_line2388 bus1=2389.1.2.3.4 bus2=1993.1.2.3.4 phases=4 linecode=LC2 length=24.55547 units=m
! reduced_from=line2015,line2038,line2060,line2082,line2105,line2129,line2153,line2176,line2201,line2228,line2256,line2285,line2313,line2339,line2364,line2388
! eliminated_buses=2016,2039,2061,2083,2106,2130,2154,2177,2202,2229,2257,2286,2314,2340,2365

New Line._virtual_line2034_line2056_line2078_line2101 bus1=2013.1.2.3.4 bus2=2102.1.2.3.4 phases=4 linecode=LC9 length=10.4101 units=m
! reduced_from=line2034,line2056,line2078,line2101
! eliminated_buses=2035,2057,2079

New Line._virtual_line2035_line2057_line2079_line2102_line2126_line2150_line2173_line2198_line2225_line2253_line2282_line2310_line2336 bus1=2337.1.2.3.4 bus2=2013.1.2.3.4 phases=4 linecode=LC2 length=14.06501 units=m
! reduced_from=line2035,line2057,line2079,line2102,line2126,line2150,line2173,line2198,line2225,line2253,line2282,line2310,line2336
! eliminated_buses=2036,2058,2080,2103,2127,2151,2174,2199,2226,2254,2283,2311

New Line._virtual_line2088_line2112_line2136_line2159_line2182_line2206_line2233_line2260_line2287_line2315_line2341_line2366_line2390 bus1=2067.1.2.3.4 bus2=2391.1.2.3.4 phases=4 linecode=LC2 length=14.42078 units=m
! reduced_from=line2088,line2112,line2136,line2159,line2182,line2206,line2233,line2260,line2287,line2315,line2341,line2366,line2390
! eliminated_buses=2089,2113,2137,2160,2183,2207,2234,2261,2288,2316,2342,2367

New Line._virtual_line2089_line2113_line2137_line2160_line2183_line2207_line2234 bus1=2067.1.2.3.4 bus2=2235.1.2.3.4 phases=4 linecode=LC9 length=5.69162 units=m
! reduced_from=line2089,line2113,line2137,line2160,line2183,line2207,line2234
! eliminated_buses=2090,2114,2138,2161,2184,2208

New Line._virtual_line2125_line2149_line2172_line2197_line2224_line2252_line2281_line2309_line2335_line2361_line2385_line2409_line2436_line2461_line2486_line2513 bus1=2514.1.2.3.4 bus2=2102.1.2.3.4 phases=4 linecode=LC2 length=13.091863 units=m
! reduced_from=line2125,line2149,line2172,line2197,line2224,line2252,line2281,line2309,line2335,line2361,line2385,line2409,line2436,line2461,line2486,line2513
! eliminated_buses=2126,2150,2173,2198,2225,2253,2282,2310,2336,2362,2386,2410,2437,2462,2487

New Line._virtual_line2147_line2170_line2195 bus1=2196.1.2.3.4 bus2=2125.1.2.3.4 phases=4 linecode=LC9 length=7.23689 units=m
! reduced_from=line2147,line2170,line2195
! eliminated_buses=2148,2171

New Line._virtual_line2148_line2171_line2196_line2223_line2251_line2280_line2308_line2334_line2360_line2384_line2408_line2435 bus1=2436.1.2.3.4 bus2=2125.1.2.3.4 phases=4 linecode=LC2 length=12.55506 units=m
! reduced_from=line2148,line2171,line2196,line2223,line2251,line2280,line2308,line2334,line2360,line2384,line2408,line2435
! eliminated_buses=2149,2172,2197,2224,2252,2281,2309,2335,2361,2385,2409

New Line._virtual_line2191_line2215_line2242_line2270_line2298_line2323_line2350_line2374_line2399_line2423_line2449_line2474_line2500_line2526_line2553 bus1=2170.1.2.3.4 bus2=2554.1.2.3.4 phases=4 linecode=LC2 length=18.96319 units=m
! reduced_from=line2191,line2215,line2242,line2270,line2298,line2323,line2350,line2374,line2399,line2423,line2449,line2474,line2500,line2526,line2553
! eliminated_buses=2192,2216,2243,2271,2299,2324,2351,2375,2400,2424,2450,2475,2501,2527

New Line._virtual_line2192_line2216_line2243_line2271_line2299_line2324_line2351_line2375_line2400 bus1=2401.1.2.3.4 bus2=2170.1.2.3.4 phases=4 linecode=LC2 length=11.62978 units=m
! reduced_from=line2192,line2216,line2243,line2271,line2299,line2324,line2351,line2375,line2400
! eliminated_buses=2193,2217,2244,2272,2300,2325,2352,2376

New Line._virtual_line2193_line2217_line2244_line2272_line2300_line2325_line2352_line2376_line2401 bus1=2402.1.2.3.4 bus2=2170.1.2.3.4 phases=4 linecode=LC9 length=12.1654 units=m
! reduced_from=line2193,line2217,line2244,line2272,line2300,line2325,line2352,line2376,line2401
! eliminated_buses=2194,2218,2245,2273,2301,2326,2353,2377

New Line._virtual_line2219_line2246_line2274_line2302_line2327_line2354_line2378_line2402_line2429_line2455_line2480_line2507_line2534_line2561_line2581_line2601_line2617_line2631_line2645_line2658_line2670_line2682_line2693_line2702_line2710_line2718_line2724_line2730_line2735_line2739_line2743 bus1=2196.1.2.3.4 bus2=2744.1.2.3.4 phases=4 linecode=LC2 length=27.227921 units=m
! reduced_from=line2219,line2246,line2274,line2302,line2327,line2354,line2378,line2402,line2429,line2455,line2480,line2507,line2534,line2561,line2581,line2601,line2617,line2631,line2645,line2658,line2670,line2682,line2693,line2702,line2710,line2718,line2724,line2730,line2735,line2739,line2743
! eliminated_buses=2220,2247,2275,2303,2328,2355,2379,2403,2430,2456,2481,2508,2535,2562,2582,2602,2618,2632,2646,2659,2671,2683,2694,2703,2711,2719,2725,2731,2736,2740

New Line._virtual_line2220_line2247_line2275_line2303_line2328_line2355_line2379_line2403_line2430_line2456_line2481_line2508_line2535_line2562_line2582_line2602_line2618_line2632_line2646_line2659_line2671_line2683_line2694_line2703_line2711_line2719_line2725 bus1=2726.1.2.3.4 bus2=2196.1.2.3.4 phases=4 linecode=LC2 length=22.266617 units=m
! reduced_from=line2220,line2247,line2275,line2303,line2328,line2355,line2379,line2403,line2430,line2456,line2481,line2508,line2535,line2562,line2582,line2602,line2618,line2632,line2646,line2659,line2671,line2683,line2694,line2703,line2711,line2719,line2725
! eliminated_buses=2221,2248,2276,2304,2329,2356,2380,2404,2431,2457,2482,2509,2536,2563,2583,2603,2619,2633,2647,2660,2672,2684,2695,2704,2712,2720

New Line._virtual_line2221_line2248_line2276_line2304_line2329_line2356_line2380_line2404_line2431_line2457_line2482_line2509_line2536_line2563_line2583_line2603_line2619_line2633_line2647_line2660_line2672_line2684_line2695 bus1=2196.1.2.3.4 bus2=2696.1.2.3.4 phases=4 linecode=LC2 length=20.291994 units=m
! reduced_from=line2221,line2248,line2276,line2304,line2329,line2356,line2380,line2404,line2431,line2457,line2482,line2509,line2536,line2563,line2583,line2603,line2619,line2633,line2647,line2660,line2672,line2684,line2695
! eliminated_buses=2222,2249,2277,2305,2330,2357,2381,2405,2432,2458,2483,2510,2537,2564,2584,2604,2620,2634,2648,2661,2673,2685

New Line._virtual_line2249_line2277_line2305_line2330_line2357_line2381_line2405_line2432_line2458_line2483_line2510_line2537_line2564_line2584_line2604 bus1=2605.1.2.3.4 bus2=2223.1.2.3.4 phases=4 linecode=LC2 length=11.63297 units=m
! reduced_from=line2249,line2277,line2305,line2330,line2357,line2381,line2405,line2432,line2458,line2483,line2510,line2537,line2564,line2584,line2604
! eliminated_buses=2250,2278,2306,2331,2358,2382,2406,2433,2459,2484,2511,2538,2565,2585

New Line._virtual_line2261_line2288 bus1=2235.1.2.3.4 bus2=2289.1.2.3.4 phases=4 linecode=LC1 length=18.1733 units=m
! reduced_from=line2261,line2288
! eliminated_buses=2262

New Line._virtual_line2278_line2306_line2331_line2358_line2382_line2406_line2433_line2459_line2484_line2511_line2538_line2565_line2585 bus1=2251.1.2.3.4 bus2=2586.1.2.3.4 phases=4 linecode=LC2 length=11.27018 units=m
! reduced_from=line2278,line2306,line2331,line2358,line2382,line2406,line2433,line2459,line2484,line2511,line2538,line2565,line2585
! eliminated_buses=2279,2307,2332,2359,2383,2407,2434,2460,2485,2512,2539,2566

New Line._virtual_line2279_line2307 bus1=2308.1.2.3.4 bus2=2251.1.2.3.4 phases=4 linecode=LC9 length=9.6567 units=m
! reduced_from=line2279,line2307
! eliminated_buses=2280

New Line._virtual_line2289_line2316_line2342_line2367_line2391_line2413_line2439_line2464_line2489_line2516_line2542 bus1=2543.1.2.3.4 bus2=2263.1.2.3.4 phases=4 linecode=LC2 length=11.758 units=m
! reduced_from=line2289,line2316,line2342,line2367,line2391,line2413,line2439,line2464,line2489,line2516,line2542
! eliminated_buses=2290,2317,2343,2368,2392,2414,2440,2465,2490,2517

New Line._virtual_line2317_line2343 bus1=2344.1.2.3.4 bus2=2291.1.2.3.4 phases=4 linecode=LC1 length=18.6748 units=m
! reduced_from=line2317,line2343
! eliminated_buses=2318

New Line._virtual_line2318_line2345 bus1=2291.1.2.3.4 bus2=2346.1.2.3.4 phases=4 linecode=LC9 length=5.952 units=m
! reduced_from=line2318,line2345
! eliminated_buses=2319

New Line._virtual_line2332_line2359_line2383_line2407_line2434_line2460_line2485_line2512_line2539_line2566_line2586 bus1=2587.1.2.3.4 bus2=2308.1.2.3.4 phases=4 linecode=LC2 length=13.08386 units=m
! reduced_from=line2332,line2359,line2383,line2407,line2434,line2460,line2485,line2512,line2539,line2566,line2586
! eliminated_buses=2333,2360,2384,2408,2435,2461,2486,2513,2540,2567

New Line._virtual_line2369_line2393 bus1=2394.1.2.3.4 bus2=2346.1.2.3.4 phases=4 linecode=LC1 length=18.5563 units=m
! reduced_from=line2369,line2393
! eliminated_buses=2370

New Line._virtual_line2394_line2415_line2441_line2466_line2491 bus1=2492.1.2.3.4 bus2=2371.1.2.3.4 phases=4 linecode=LC2 length=9.46769 units=m
! reduced_from=line2394,line2415,line2441,line2466,line2491
! eliminated_buses=2395,2416,2442,2467

New Line._virtual_line2416_line2442_line2467_line2492_line2517_line2543_line2567_line2587_line2605_line2620_line2634_line2648_line2661_line2673_line2685_line2696_line2704_line2712_line2720_line2726_line2731_line2736_line2740_line2744_line2746_line2748 bus1=2396.1.2.3.4 bus2=2749.1.2.3.4 phases=4 linecode=LC2 length=20.0191 units=m
! reduced_from=line2416,line2442,line2467,line2492,line2517,line2543,line2567,line2587,line2605,line2620,line2634,line2648,line2661,line2673,line2685,line2696,line2704,line2712,line2720,line2726,line2731,line2736,line2740,line2744,line2746,line2748
! eliminated_buses=2417,2443,2468,2493,2518,2544,2568,2588,2606,2621,2635,2649,2662,2674,2686,2697,2705,2713,2721,2727,2732,2737,2741,2745,2747

New Line._virtual_line2417_line2443_line2468_line2493_line2518_line2544_line2568_line2588_line2606_line2621_line2635_line2649_line2662_line2674_line2686_line2697_line2705_line2713_line2721_line2727_line2732_line2737_line2741_line2745_line2747_line2749_line2750 bus1=2751.1.2.3.4 bus2=2396.1.2.3.4 phases=4 linecode=LC2 length=25.11679 units=m
! reduced_from=line2417,line2443,line2468,line2493,line2518,line2544,line2568,line2588,line2606,line2621,line2635,line2649,line2662,line2674,line2686,line2697,line2705,line2713,line2721,line2727,line2732,line2737,line2741,line2745,line2747,line2749,line2750
! eliminated_buses=2418,2444,2469,2494,2519,2545,2569,2589,2607,2622,2636,2650,2663,2675,2687,2698,2706,2714,2722,2728,2733,2738,2742,2746,2748,2750

New Line._virtual_line2418_line2444_line2469_line2494_line2519_line2545_line2569 bus1=2396.1.2.3.4 bus2=2570.1.2.3.4 phases=4 linecode=LC2 length=9.77712 units=m
! reduced_from=line2418,line2444,line2469,line2494,line2519,line2545,line2569
! eliminated_buses=2419,2445,2470,2495,2520,2546

New Line._virtual_line2419_line2445_line2470_line2495_line2520_line2546_line2570_line2589_line2607_line2622_line2636_line2650_line2663_line2675 bus1=2676.1.2.3.4 bus2=2396.1.2.3.4 phases=4 linecode=LC2 length=15.88466 units=m
! reduced_from=line2419,line2445,line2470,line2495,line2520,line2546,line2570,line2589,line2607,line2622,line2636,line2650,line2663,line2675
! eliminated_buses=2420,2446,2471,2496,2521,2547,2571,2590,2608,2623,2637,2651,2664

New Line._virtual_line2420_line2446_line2471_line2496 bus1=2497.1.2.3.4 bus2=2396.1.2.3.4 phases=4 linecode=LC9 length=15.07741 units=m
! reduced_from=line2420,line2446,line2471,line2496
! eliminated_buses=2421,2447,2472

New Line._virtual_line2424_line2450_line2475_line2501_line2527_line2554_line2573_line2592_line2609_line2624_line2638_line2651_line2664_line2676_line2687_line2698_line2706_line2714 bus1=2715.1.2.3.4 bus2=2402.1.2.3.4 phases=4 linecode=LC2 length=19.60103 units=m
! reduced_from=line2424,line2450,line2475,line2501,line2527,line2554,line2573,line2592,line2609,line2624,line2638,line2651,line2664,line2676,line2687,line2698,line2706,line2714
! eliminated_buses=2425,2451,2476,2502,2528,2555,2574,2593,2610,2625,2639,2652,2665,2677,2688,2699,2707

New Line._virtual_line2425_line2451_line2476_line2502_line2528_line2555_line2574_line2593_line2610_line2625_line2639_line2652_line2665_line2677_line2688_line2699_line2707_line2715 bus1=2716.1.2.3.4 bus2=2402.1.2.3.4 phases=4 linecode=LC2 length=22.069137 units=m
! reduced_from=line2425,line2451,line2476,line2502,line2528,line2555,line2574,line2593,line2610,line2625,line2639,line2652,line2665,line2677,line2688,line2699,line2707,line2715
! eliminated_buses=2426,2452,2477,2503,2529,2556,2575,2594,2611,2626,2640,2653,2666,2678,2689,2700,2708

New Line._virtual_line2426_line2452_line2477_line2503_line2529_line2556_line2575_line2594_line2611_line2626_line2640_line2653_line2666_line2678_line2689_line2700_line2708_line2716_line2722_line2728_line2733_line2738_line2742 bus1=2743.1.2.3.4 bus2=2402.1.2.3.4 phases=4 linecode=LC2 length=40.229619 units=m
! reduced_from=line2426,line2452,line2477,line2503,line2529,line2556,line2575,line2594,line2611,line2626,line2640,line2653,line2666,line2678,line2689,line2700,line2708,line2716,line2722,line2728,line2733,line2738,line2742
! eliminated_buses=2427,2453,2478,2504,2530,2557,2576,2595,2612,2627,2641,2654,2667,2679,2690,2701,2709,2717,2723,2729,2734,2739

New Line._virtual_line2427_line2453_line2478_line2504_line2530_line2557_line2576_line2595_line2612_line2627_line2641_line2654_line2667_line2679_line2690 bus1=2691.1.2.3.4 bus2=2402.1.2.3.4 phases=4 linecode=LC2 length=27.512041 units=m
! reduced_from=line2427,line2453,line2478,line2504,line2530,line2557,line2576,line2595,line2612,line2627,line2641,line2654,line2667,line2679,line2690
! eliminated_buses=2428,2454,2479,2505,2531,2558,2577,2596,2613,2628,2642,2655,2668,2680

New Line._virtual_line2428_line2454_line2479_line2506 bus1=2507.1.2.3.4 bus2=2402.1.2.3.4 phases=4 linecode=LC9 length=7.4674 units=m
! reduced_from=line2428,line2454,line2479,line2506
! eliminated_buses=2429,2455,2480

New Line._virtual_line2521_line2547 bus1=2497.1.2.3.4 bus2=2548.1.2.3.4 phases=4 linecode=LC1 length=18.3001 units=m
! reduced_from=line2521,line2547
! eliminated_buses=2522

New Line._virtual_line2532_line2559_line2578_line2597_line2614_line2629_line2643_line2656_line2668_line2680_line2691 bus1=2507.1.2.3.4 bus2=2692.1.2.3.4 phases=4 linecode=LC2 length=13.409998 units=m
! reduced_from=line2532,line2559,line2578,line2597,line2614,line2629,line2643,line2656,line2668,line2680,line2691
! eliminated_buses=2533,2560,2579,2598,2615,2630,2644,2657,2669,2681

New Line._virtual_line2533_line2560 bus1=2507.1.2.3.4 bus2=2561.1.2.3.4 phases=4 linecode=LC9 length=3.6796 units=m
! reduced_from=line2533,line2560
! eliminated_buses=2534

New Line._virtual_line2579_line2598_line2615_line2630_line2644_line2657_line2669_line2681_line2692_line2701_line2709_line2717_line2723_line2729_line2734 bus1=2735.1.2.3.4 bus2=2561.1.2.3.4 phases=4 linecode=LC2 length=13.926302 units=m
! reduced_from=line2579,line2598,line2615,line2630,line2644,line2657,line2669,line2681,line2692,line2701,line2709,line2717,line2723,line2729,line2734
! eliminated_buses=2580,2599,2616,2631,2645,2658,2670,2682,2693,2702,2710,2718,2724,2730

New Line.LINE40 bus1=39.1.2.3.4 bus2=41.1.2.3.4 phases=4 linecode=LC8 length=10.8805 units=m

New Line.LINE50 bus1=47.1.2.3.4 bus2=51.1.2.3.4 phases=4 linecode=LC2 length=12.2012 units=m

New Line.LINE77 bus1=72.1.2.3.4 bus2=78.1.2.3.4 phases=4 linecode=LC2 length=4.538 units=m

New Line.LINE95 bus1=89.1.2.3.4 bus2=96.1.2.3.4 phases=4 linecode=LC2 length=6.8722 units=m

New Line.LINE111 bus1=104.1.2.3.4 bus2=112.1.2.3.4 phases=4 linecode=LC2 length=5.5946 units=m

New Line.LINE117 bus1=108.1.2.3.4 bus2=118.1.2.3.4 phases=4 linecode=LC8 length=4.9378 units=m

New Line.LINE126 bus1=118.1.2.3.4 bus2=127.1.2.3.4 phases=4 linecode=LC2 length=7.5904 units=m

New Line.LINE127 bus1=118.1.2.3.4 bus2=128.1.2.3.4 phases=4 linecode=LC8 length=1.772 units=m

New Line.LINE138 bus1=128.1.2.3.4 bus2=139.1.2.3.4 phases=4 linecode=LC1 length=4.6884 units=m

New Line.LINE158 bus1=147.1.2.3.4 bus2=159.1.2.3.4 phases=4 linecode=LC2 length=4.8641 units=m

New Line.LINE195 bus1=181.1.2.3.4 bus2=196.1.2.3.4 phases=4 linecode=LC2 length=5.1097 units=m

New Line.LINE198 bus1=182.1.2.3.4 bus2=199.1.2.3.4 phases=4 linecode=LC2 length=4.3768 units=m

New Line.LINE207 bus1=191.1.2.3.4 bus2=208.1.2.3.4 phases=4 linecode=LC2 length=5.5803 units=m

New Line.LINE229 bus1=210.1.2.3.4 bus2=230.1.2.3.4 phases=4 linecode=LC2 length=5.9129 units=m

New Line.LINE270 bus1=250.1.2.3.4 bus2=271.1.2.3.4 phases=4 linecode=LC4 length=15.6927 units=m

New Line.LINE275 bus1=254.1.2.3.4 bus2=276.1.2.3.4 phases=4 linecode=LC2 length=7.3711 units=m

New Line.LINE287 bus1=266.1.2.3.4 bus2=288.1.2.3.4 phases=4 linecode=LC2 length=6.9097 units=m

New Line.LINE294 bus1=271.1.2.3.4 bus2=295.1.2.3.4 phases=4 linecode=LC4 length=16.5942 units=m

New Line.LINE360 bus1=336.1.2.3.4 bus2=361.1.2.3.4 phases=4 linecode=LC2 length=4.844 units=m

New Line.LINE381 bus1=354.1.2.3.4 bus2=382.1.2.3.4 phases=4 linecode=LC2 length=4.8891 units=m

New Line.LINE383 bus1=355.1.2.3.4 bus2=384.1.2.3.4 phases=4 linecode=LC2 length=5.8829 units=m

New Line.LINE390 bus1=360.1.2.3.4 bus2=391.1.2.3.4 phases=4 linecode=LC2 length=4.6643 units=m

New Line.LINE395 bus1=365.1.2.3.4 bus2=396.1.2.3.4 phases=4 linecode=LC2 length=6.0097 units=m

New Line.LINE400 bus1=369.1.2.3.4 bus2=401.1.2.3.4 phases=4 linecode=LC2 length=3.0779 units=m

New Line.LINE410 bus1=378.1.2.3.4 bus2=411.1.2.3.4 phases=4 linecode=LC8 length=21.8352 units=m

New Line.LINE420 bus1=388.1.2.3.4 bus2=421.1.2.3.4 phases=4 linecode=LC2 length=4.2977 units=m

New Line.LINE430 bus1=403.1.2.3.4 bus2=431.1.2.3.4 phases=4 linecode=LC2 length=1.8331 units=m

New Line.LINE439 bus1=411.1.2.3.4 bus2=440.1.2.3.4 phases=4 linecode=LC2 length=8.3802 units=m

New Line.LINE464 bus1=436.1.2.3.4 bus2=465.1.2.3.4 phases=4 linecode=LC2 length=5.3738 units=m

New Line.LINE474 bus1=443.1.2.3.4 bus2=475.1.2.3.4 phases=4 linecode=LC2 length=5.2554 units=m

New Line.LINE526 bus1=495.1.2.3.4 bus2=527.1.2.3.4 phases=4 linecode=LC2 length=3.7675 units=m

New Line.LINE541 bus1=509.1.2.3.4 bus2=542.1.2.3.4 phases=4 linecode=LC2 length=6.0055 units=m

New Line.LINE628 bus1=596.1.2.3.4 bus2=629.1.2.3.4 phases=4 linecode=LC4 length=5.4361 units=m

New Line.LINE650 bus1=614.1.2.3.4 bus2=651.1.2.3.4 phases=4 linecode=LC5 length=2.358 units=m

New Line.LINE654 bus1=619.1.2.3.4 bus2=655.1.2.3.4 phases=4 linecode=LC2 length=3.8275 units=m

New Line.LINE656 bus1=620.1.2.3.4 bus2=657.1.2.3.4 phases=4 linecode=LC2 length=3.4596 units=m

New Line.LINE671 bus1=636.1.2.3.4 bus2=672.1.2.3.4 phases=4 linecode=LC2 length=4.7343 units=m

New Line.LINE695 bus1=660.1.2.3.4 bus2=696.1.2.3.4 phases=4 linecode=LC2 length=4.1868 units=m

New Line.LINE824 bus1=795.1.2.3.4 bus2=825.1.2.3.4 phases=4 linecode=LC2 length=4.4924 units=m

New Line.LINE896 bus1=874.1.2.3.4 bus2=897.1.2.3.4 phases=4 linecode=LC2 length=4.884 units=m

New Line.LINE924 bus1=900.1.2.3.4 bus2=925.1.2.3.4 phases=4 linecode=LC2 length=4.5433 units=m

New Line.LINE949 bus1=924.1.2.3.4 bus2=950.1.2.3.4 phases=4 linecode=LC2 length=3.9736 units=m

New Line.LINE978 bus1=954.1.2.3.4 bus2=979.1.2.3.4 phases=4 linecode=LC2 length=5.6149 units=m

New Line.LINE1086 bus1=1068.1.2.3.4 bus2=1087.1.2.3.4 phases=4 linecode=LC2 length=6.3374 units=m

New Line.LINE1099 bus1=1081.1.2.3.4 bus2=1100.1.2.3.4 phases=4 linecode=LC3 length=0.69623 units=m

New Line.LINE1100 bus1=1081.1.2.3.4 bus2=1101.1.2.3.4 phases=4 linecode=LC2 length=4.0857 units=m

New Line.LINE1143 bus1=1126.1.2.3.4 bus2=1144.1.2.3.4 phases=4 linecode=LC2 length=4.5201 units=m

New Line.LINE1145 bus1=1127.1.2.3.4 bus2=1146.1.2.3.4 phases=4 linecode=LC2 length=4.1388 units=m

New Line.LINE1182 bus1=1164.1.2.3.4 bus2=1183.1.2.3.4 phases=4 linecode=LC2 length=3.6508 units=m

New Line.LINE1210 bus1=1195.1.2.3.4 bus2=1211.1.2.3.4 phases=4 linecode=LC9 length=5.6944 units=m

New Line.LINE1217 bus1=1201.1.2.3.4 bus2=1218.1.2.3.4 phases=4 linecode=LC2 length=5.6446 units=m

New Line.LINE1229 bus1=1211.1.2.3.4 bus2=1230.1.2.3.4 phases=4 linecode=LC9 length=4.0158 units=m

New Line.LINE1232 bus1=1214.1.2.3.4 bus2=1233.1.2.3.4 phases=4 linecode=LC2 length=5.5568 units=m

New Line.LINE1247 bus1=1230.1.2.3.4 bus2=1248.1.2.3.4 phases=4 linecode=LC9 length=3.903 units=m

New Line.LINE1253 bus1=1235.1.2.3.4 bus2=1254.1.2.3.4 phases=4 linecode=LC2 length=4.7978 units=m

New Line.LINE1254 bus1=1235.1.2.3.4 bus2=1255.1.2.3.4 phases=4 linecode=LC2 length=5.3641 units=m

New Line.LINE1255 bus1=1236.1.2.3.4 bus2=1256.1.2.3.4 phases=4 linecode=LC2 length=4.0648 units=m

New Line.LINE1256 bus1=1236.1.2.3.4 bus2=1257.1.2.3.4 phases=4 linecode=LC2 length=5.8221 units=m

New Line.LINE1275 bus1=1255.1.2.3.4 bus2=1276.1.2.3.4 phases=4 linecode=LC2 length=5.031 units=m

New Line.LINE1277 bus1=1257.1.2.3.4 bus2=1278.1.2.3.4 phases=4 linecode=LC2 length=4.9748 units=m

New Line.LINE1300 bus1=1280.1.2.3.4 bus2=1301.1.2.3.4 phases=4 linecode=LC2 length=4.5175 units=m

New Line.LINE1366 bus1=1344.1.2.3.4 bus2=1367.1.2.3.4 phases=4 linecode=LC2 length=5.763 units=m

New Line.LINE1376 bus1=1353.1.2.3.4 bus2=1377.1.2.3.4 phases=4 linecode=LC9 length=6.7261 units=m

New Line.LINE1400 bus1=1377.1.2.3.4 bus2=1401.1.2.3.4 phases=4 linecode=LC9 length=2.0068 units=m

New Line.LINE1449 bus1=1423.1.2.3.4 bus2=1450.1.2.3.4 phases=4 linecode=LC2 length=3.4203 units=m

New Line.LINE1493 bus1=1469.1.2.3.4 bus2=1494.1.2.3.4 phases=4 linecode=LC5 length=4.3065 units=m

New Line.LINE1515 bus1=1494.1.2.3.4 bus2=1516.1.2.3.4 phases=4 linecode=LC5 length=4.2019 units=m

New Line.LINE1516 bus1=1495.1.2.3.4 bus2=1517.1.2.3.4 phases=4 linecode=LC2 length=3.8532 units=m

New Line.LINE1582 bus1=1561.1.2.3.4 bus2=1583.1.2.3.4 phases=4 linecode=LC5 length=8.5369 units=m

New Line.LINE1619 bus1=1594.1.2.3.4 bus2=1620.1.2.3.4 phases=4 linecode=LC2 length=5.1875 units=m

New Line.LINE1620 bus1=1594.1.2.3.4 bus2=1621.1.2.3.4 phases=4 linecode=LC2 length=3.2891 units=m

New Line.LINE1636 bus1=1610.1.2.3.4 bus2=1637.1.2.3.4 phases=4 linecode=LC2 length=5.0182 units=m

New Line.LINE1697 bus1=1675.1.2.3.4 bus2=1698.1.2.3.4 phases=4 linecode=LC9 length=2.5004 units=m

New Line.LINE1762 bus1=1741.1.2.3.4 bus2=1763.1.2.3.4 phases=4 linecode=LC9 length=6.2107 units=m

New Line.LINE1834 bus1=1814.1.2.3.4 bus2=1835.1.2.3.4 phases=4 linecode=LC1 length=5.8966 units=m

New Line.LINE1872 bus1=1853.1.2.3.4 bus2=1873.1.2.3.4 phases=4 linecode=LC9 length=1.7996 units=m

New Line.LINE1895 bus1=1876.1.2.3.4 bus2=1896.1.2.3.4 phases=4 linecode=LC1 length=7.8469 units=m

New Line.LINE1930 bus1=1910.1.2.3.4 bus2=1931.1.2.3.4 phases=4 linecode=LC9 length=3.4303 units=m

New Line.LINE1992 bus1=1973.1.2.3.4 bus2=1993.1.2.3.4 phases=4 linecode=LC9 length=2.9214 units=m

New Line.LINE2012 bus1=1993.1.2.3.4 bus2=2013.1.2.3.4 phases=4 linecode=LC9 length=1.8222 units=m

New Line.LINE2124 bus1=2102.1.2.3.4 bus2=2125.1.2.3.4 phases=4 linecode=LC9 length=4.3646 units=m

New Line.LINE2222 bus1=2196.1.2.3.4 bus2=2223.1.2.3.4 phases=4 linecode=LC9 length=4.2274 units=m

New Line.LINE2250 bus1=2223.1.2.3.4 bus2=2251.1.2.3.4 phases=4 linecode=LC9 length=2.7155 units=m

New Line.LINE2262 bus1=2235.1.2.3.4 bus2=2263.1.2.3.4 phases=4 linecode=LC9 length=1.4598 units=m

New Line.LINE2290 bus1=2263.1.2.3.4 bus2=2291.1.2.3.4 phases=4 linecode=LC9 length=3.3282 units=m

New Line.LINE2370 bus1=2346.1.2.3.4 bus2=2371.1.2.3.4 phases=4 linecode=LC9 length=2.3836 units=m

New Line.LINE2395 bus1=2371.1.2.3.4 bus2=2396.1.2.3.4 phases=4 linecode=LC9 length=3.4374 units=m

New Line.LINE2580 bus1=2561.1.2.3.4 bus2=2581.1.2.3.4 phases=4 linecode=LC9 length=8.4954 units=m

New Line.LINE2599 bus1=2581.1.2.3.4 bus2=2600.1.2.3.4 phases=4 linecode=LC1 length=4.5651 units=m
