! Reduced enabled lines.

New Line._virtual_line0_line1_line2_line3_line4_line5_line6_line7_line8_line9_line10_line11_line12_line13_line14_line15_line16_line17_line18_line19_line20_line21_line22_line23_line24_line25_line26_line27_line28_line29_line31_line32_line33_line34_line35_line36_line37_line38_line39_line40_line41_line42_line43_line44_line45_line46_line47_line48_line49_line50_line51_line52_line53_line54_line55_line56_line57_line58 bus1=59.1.2.3.4 bus2=sourcebus.1.2.3.4 phases=4 linecode=LC8 length=51.103292 units=m
! reduced_from=line0,line1,line2,line3,line4,line5,line6,line7,line8,line9,line10,line11,line12,line13,line14,line15,line16,line17,line18,line19,line20,line21,line22,line23,line24,line25,line26,line27,line28,line29,line31,line32,line33,line34,line35,line36,line37,line38,line39,line40,line41,line42,line43,line44,line45,line46,line47,line48,line49,line50,line51,line52,line53,line54,line55,line56,line57,line58
! eliminated_buses=1,2,3,4,5,6,7,8,9,10,11,12,13,14,15,16,17,18,19,20,21,22,23,24,25,26,27,28,29,30,32,33,34,35,36,37,38,39,40,41,42,43,44,45,46,47,48,49,50,51,52,53,54,55,56,57,58

New Line._virtual_line59_line62_line65_line68_line71_line74_line77_line80_line83_line86_line89_line92_line95_line98_line101 bus1=59.1.2.3.4 bus2=102.1.2.3.4 phases=4 linecode=LC5 length=7.452343 units=m
! reduced_from=line59,line62,line65,line68,line71,line74,line77,line80,line83,line86,line89,line92,line95,line98,line101
! eliminated_buses=60,63,66,69,72,75,78,81,84,87,90,93,96,99

New Line._virtual_line60_line63_line66_line69_line72_line75_line78_line81_line84_line87_line90_line93_line96_line99_line102_line107_line113_line120_line128_line136_line145_line153_line161_line169_line177_line187_line197_line209_line224_line238_line253_line268_line284 bus1=59.1.2.3.4 bus2=285.1.2.3.4 phases=4 linecode=LC8 length=92.50361 units=m
! reduced_from=line60,line63,line66,line69,line72,line75,line78,line81,line84,line87,line90,line93,line96,line99,line102,line107,line113,line120,line128,line136,line145,line153,line161,line169,line177,line187,line197,line209,line224,line238,line253,line268,line284
! eliminated_buses=61,64,67,70,73,76,79,82,85,88,91,94,97,100,103,108,114,121,129,137,146,154,162,170,178,188,198,210,225,239,254,269

New Line._virtual_line105_line111_line118_line126 bus1=102.1.2.3.4 bus2=127.1.2.3.4 phases=4 linecode=LC4 length=4.91555 units=m
! reduced_from=line105,line111,line118,line126
! eliminated_buses=106,112,119

New Line._virtual_line109_line115_line122_line130_line138_line147_line155_line163_line171_line180_line190_line200_line212_line227_line241_line255_line270_line286_line305_line327_line348_line369_line388 bus1=105.1.2.3.4 bus2=389.1.2.3.4 phases=4 linecode=LC2 length=52.10427 units=m
! reduced_from=line109,line115,line122,line130,line138,line147,line155,line163,line171,line180,line190,line200,line212,line227,line241,line255,line270,line286,line305,line327,line348,line369,line388
! eliminated_buses=110,116,123,131,139,148,156,164,172,181,191,201,213,228,242,256,271,287,306,328,349,370

New Line._virtual_line117_line125_line132_line140_line149_line157_line165_line173_line183_line193 bus1=111.1.2.3.4 bus2=194.1.2.3.4 phases=4 linecode=LC4 length=30.61811 units=m
! reduced_from=line117,line125,line132,line140,line149,line157,line165,line173,line183,line193
! eliminated_buses=118,126,133,141,150,158,166,174,184

New Line._virtual_line124_line131_line139_line148_line156_line164_line172_line181_line191_line201_line213_line228_line242_line256_line271_line287 bus1=288.1.2.3.4 bus2=117.1.2.3.4 phases=4 linecode=LC2 length=6.215581 units=m
! reduced_from=line124,line131,line139,line148,line156,line164,line172,line181,line191,line201,line213,line228,line242,line256,line271,line287
! eliminated_buses=125,132,140,149,157,165,173,182,192,202,214,229,243,257,272

New Line._virtual_line134_line143_line151_line159_line167_line175_line185_line195 bus1=196.1.2.3.4 bus2=127.1.2.3.4 phases=4 linecode=LC4 length=9.155362 units=m
! reduced_from=line134,line143,line151,line159,line167,line175,line185,line195
! eliminated_buses=135,144,152,160,168,176,186

New Line._virtual_line142_line150_line158_line166_line174_line184_line194_line205_line218_line233_line248_line263_line278_line296_line317 bus1=134.1.2.3.4 bus2=318.1.2.3.4 phases=4 linecode=LC2 length=10.15317 units=m
! reduced_from=line142,line150,line158,line166,line174,line184,line194,line205,line218,line233,line248,line263,line278,line296,line317
! eliminated_buses=143,151,159,167,175,185,195,206,219,234,249,264,279,297

New Line._virtual_line204_line217 bus1=194.1.2.3.4 bus2=218.1.2.3.4 phases=4 linecode=LC4 length=6.34275 units=m
! reduced_from=line204,line217
! eliminated_buses=205

New Line._virtual_line207_line222_line236_line251_line266 bus1=267.1.2.3.4 bus2=196.1.2.3.4 phases=4 linecode=LC4 length=20.45211 units=m
! reduced_from=line207,line222,line236,line251,line266
! eliminated_buses=208,223,237,252

New Line._virtual_line216_line230_line244_line258_line273_line289_line309_line330_line351_line372_line391_line413_line438_line464_line491_line518_line544_line572_line606_line637_line666_line697_line727 bus1=728.1.2.3.4 bus2=204.1.2.3.4 phases=4 linecode=LC2 length=17.320753 units=m
! reduced_from=line216,line230,line244,line258,line273,line289,line309,line330,line351,line372,line391,line413,line438,line464,line491,line518,line544,line572,line606,line637,line666,line697,line727
! eliminated_buses=217,231,245,259,274,290,310,331,352,373,392,414,439,465,492,519,545,573,607,638,667,698

New Line._virtual_line220_line234_line249_line264_line279_line297_line318_line338_line359_line378_line397_line420_line447_line471_line498_line525_line551_line582_line612_line643_line672_line703_line733_line763_line794_line824_line851_line876_line902 bus1=207.1.2.3.4 bus2=903.1.2.3.4 phases=4 linecode=LC2 length=20.810107 units=m
! reduced_from=line220,line234,line249,line264,line279,line297,line318,line338,line359,line378,line397,line420,line447,line471,line498,line525,line551,line582,line612,line643,line672,line703,line733,line763,line794,line824,line851,line876,line902
! eliminated_buses=221,235,250,265,280,298,319,339,360,379,398,421,448,472,499,526,552,583,613,644,673,704,734,764,795,825,852,877

New Line._virtual_line231_line245_line259_line274_line290 bus1=218.1.2.3.4 bus2=291.1.2.3.4 phases=4 linecode=LC2 length=15.3579 units=m
! reduced_from=line231,line245,line259,line274,line290
! eliminated_buses=232,246,260,275

New Line._virtual_line246_line260_line275 bus1=276.1.2.3.4 bus2=233.1.2.3.4 phases=4 linecode=LC2 length=13.9732 units=m
! reduced_from=line246,line260,line275
! eliminated_buses=247,261

New Line._virtual_line247_line262_line277_line295_line316_line337_line358_line377_line396_line419_line446_line470_line497_line524_line550_line581_line611_line642_line671_line702_line732_line762_line793_line823_line850_line875_line901_line928 bus1=929.1.2.3.4 bus2=233.1.2.3.4 phases=4 linecode=LC4 length=41.70269 units=m
! reduced_from=line247,line262,line277,line295,line316,line337,line358,line377,line396,line419,line446,line470,line497,line524,line550,line581,line611,line642,line671,line702,line732,line762,line793,line823,line850,line875,line901,line928
! eliminated_buses=248,263,278,296,317,338,359,378,397,420,447,471,498,525,551,582,612,643,672,703,733,763,794,824,851,876,902

New Line._virtual_line281_line299_line320_line340_line362_line381 bus1=382.1.2.3.4 bus2=267.1.2.3.4 phases=4 linecode=LC2 length=15.97617 units=m
! reduced_from=line281,line299,line320,line340,line362,line381
! eliminated_buses=282,300,321,341,363

New Line._virtual_line282_line300 bus1=301.1.2.3.4 bus2=267.1.2.3.4 phases=4 linecode=LC4 length=7.0833 units=m
! reduced_from=line282,line300
! eliminated_buses=283

New Line._virtual_line291_line312_line333_line354_line375_line394_line416_line443_line467_line494_line521_line547 bus1=276.1.2.3.4 bus2=548.1.2.3.4 phases=4 linecode=LC2 length=6.293185 units=m
! reduced_from=line291,line312,line333,line354,line375,line394,line416,line443,line467,line494,line521,line547
! eliminated_buses=292,313,334,355,376,395,417,444,468,495,522

New Line._virtual_line292_line313_line334_line355_line376_line395_line417_line444_line468_line495_line522_line548 bus1=276.1.2.3.4 bus2=549.1.2.3.4 phases=4 linecode=LC2 length=3.048136 units=m
! reduced_from=line292,line313,line334,line355,line376,line395,line417,line444,line468,line495,line522,line548
! eliminated_buses=293,314,335,356,377,396,418,445,469,496,523

New Line._virtual_line302_line324_line345_line366_line385_line406_line429_line455_line479_line506_line533_line559_line592_line622_line652_line681_line711_line739_line769_line800_line829_line856_line881_line907_line934_line962_line990_line1014_line1038_line1065_line1090_line1116_line1137_line1158_line1178_line1198_line1223_line1246_line1269_line1294_line1320_line1348_line1374_line1402_line1427_line1451_line1475_line1498_line1523 bus1=1524.1.2.3.4 bus2=285.1.2.3.4 phases=4 linecode=LC8 length=140.35126 units=m
! reduced_from=line302,line324,line345,line366,line385,line406,line429,line455,line479,line506,line533,line559,line592,line622,line652,line681,line711,line739,line769,line800,line829,line856,line881,line907,line934,line962,line990,line1014,line1038,line1065,line1090,line1116,line1137,line1158,line1178,line1198,line1223,line1246,line1269,line1294,line1320,line1348,line1374,line1402,line1427,line1451,line1475,line1498,line1523
! eliminated_buses=303,325,346,367,386,407,430,456,480,507,534,560,593,623,653,682,712,740,770,801,830,857,882,908,935,963,991,1015,1039,1066,1091,1117,1138,1159,1179,1199,1224,1247,1270,1295,1321,1349,1375,1403,1428,1452,1476,1499

New Line._virtual_line303_line325_line346_line367_line386_line407 bus1=408.1.2.3.4 bus2=285.1.2.3.4 phases=4 linecode=LC8 length=2.53603 units=m
! reduced_from=line303,line325,line346,line367,line386,line407
! eliminated_buses=304,326,347,368,387

New Line._virtual_line307_line328_line349_line370_line389_line411_line436_line462_line490_line517_line543_line571_line605_line636_line665_line696_line726_line757_line788_line818_line845_line870 bus1=871.1.2.3.4 bus2=288.1.2.3.4 phases=4 linecode=LC2 length=18.462757 units=m
! reduced_from=line307,line328,line349,line370,line389,line411,line436,line462,line490,line517,line543,line571,line605,line636,line665,line696,line726,line757,line788,line818,line845,line870
! eliminated_buses=308,329,350,371,390,412,437,463,491,518,544,572,606,637,666,697,727,758,789,819,846

New Line._virtual_line310_line331_line352_line373_line392_line414 bus1=291.1.2.3.4 bus2=415.1.2.3.4 phases=4 linecode=LC2 length=8.24232 units=m
! reduced_from=line310,line331,line352,line373,line392,line414
! eliminated_buses=311,332,353,374,393

New Line._virtual_line311_line332_line353_line374_line393_line415_line442_line466_line493_line520_line546 bus1=547.1.2.3.4 bus2=291.1.2.3.4 phases=4 linecode=LC2 length=8.089466 units=m
! reduced_from=line311,line332,line353,line374,line393,line415,line442,line466,line493,line520,line546
! eliminated_buses=312,333,354,375,394,416,443,467,494,521

New Line._virtual_line321_line341_line363_line382_line404 bus1=405.1.2.3.4 bus2=301.1.2.3.4 phases=4 linecode=LC4 length=18.5363 units=m
! reduced_from=line321,line341,line363,line382,line404
! eliminated_buses=322,342,364,383

New Line._virtual_line343_line365_line384_line405_line428_line454_line478_line505_line532_line558_line589_line619 bus1=323.1.2.3.4 bus2=620.1.2.3.4 phases=4 linecode=LC2 length=19.53321 units=m
! reduced_from=line343,line365,line384,line405,line428,line454,line478,line505,line532,line558,line589,line619
! eliminated_buses=344,366,385,406,429,455,479,506,533,559,590

New Line._virtual_line401_line423_line450_line474_line501_line528_line554_line585_line615_line646_line675_line706_line736_line766_line796_line826_line853_line878_line904_line931_line959_line987_line1011_line1035 bus1=1036.1.2.3.4 bus2=382.1.2.3.4 phases=4 linecode=LC2 length=8.334419 units=m
! reduced_from=line401,line423,line450,line474,line501,line528,line554,line585,line615,line646,line675,line706,line736,line766,line796,line826,line853,line878,line904,line931,line959,line987,line1011,line1035
! eliminated_buses=402,424,451,475,502,529,555,586,616,647,676,707,737,767,797,827,854,879,905,932,960,988,1012

New Line._virtual_line410_line435_line461_line489_line516_line542_line570_line604_line635_line664_line695_line725_line756_line787_line817_line844_line869_line896_line923_line952 bus1=389.1.2.3.4 bus2=953.1.2.3.4 phases=4 linecode=LC2 length=9.811572 units=m
! reduced_from=line410,line435,line461,line489,line516,line542,line570,line604,line635,line664,line695,line725,line756,line787,line817,line844,line869,line896,line923,line952
! eliminated_buses=411,436,462,490,517,543,571,605,636,665,696,726,757,788,818,845,870,897,924

New Line._virtual_line427_line453_line477_line504_line531_line557_line588_line618_line649_line678_line709_line737_line767 bus1=405.1.2.3.4 bus2=768.1.2.3.4 phases=4 linecode=LC2 length=7.014327 units=m
! reduced_from=line427,line453,line477,line504,line531,line557,line588,line618,line649,line678,line709,line737,line767
! eliminated_buses=428,454,478,505,532,558,589,619,650,679,710,738

New Line._virtual_line430_line456 bus1=457.1.2.3.4 bus2=408.1.2.3.4 phases=4 linecode=LC4 length=14.9337 units=m
! reduced_from=line430,line456
! eliminated_buses=431

New Line._virtual_line431_line459_line487 bus1=408.1.2.3.4 bus2=488.1.2.3.4 phases=4 linecode=LC4 length=8.1126 units=m
! reduced_from=line431,line459,line487
! eliminated_buses=432,460

New Line._virtual_line441_line465_line492_line519_line545_line573_line607_line638_line667_line698_line728_line758_line789_line819_line846_line871_line897_line924_line953_line981_line1005_line1029_line1055_line1081_line1107_line1128_line1149_line1170_line1189_line1212_line1234_line1257_line1282_line1307_line1336_line1362_line1390 bus1=1391.1.2.3.4 bus2=415.1.2.3.4 phases=4 linecode=LC2 length=31.021268 units=m
! reduced_from=line441,line465,line492,line519,line545,line573,line607,line638,line667,line698,line728,line758,line789,line819,line846,line871,line897,line924,line953,line981,line1005,line1029,line1055,line1081,line1107,line1128,line1149,line1170,line1189,line1212,line1234,line1257,line1282,line1307,line1336,line1362,line1390
! eliminated_buses=442,466,493,520,546,574,608,639,668,699,729,759,790,820,847,872,898,925,954,982,1006,1030,1056,1082,1108,1129,1150,1171,1190,1213,1235,1258,1283,1308,1337,1363

New Line._virtual_line480_line507_line534 bus1=535.1.2.3.4 bus2=457.1.2.3.4 phases=4 linecode=LC4 length=15.04515 units=m
! reduced_from=line480,line507,line534
! eliminated_buses=481,508

New Line._virtual_line510_line537_line565_line598_line628_line658_line688_line718_line746_line778_line810_line837 bus1=483.1.2.3.4 bus2=838.1.2.3.4 phases=4 linecode=LC2 length=14.69922 units=m
! reduced_from=line510,line537,line565,line598,line628,line658,line688,line718,line746,line778,line810,line837
! eliminated_buses=511,538,566,599,629,659,689,719,747,779,811

New Line._virtual_line513_line539_line567 bus1=568.1.2.3.4 bus2=488.1.2.3.4 phases=4 linecode=LC4 length=18.3398 units=m
! reduced_from=line513,line539,line567
! eliminated_buses=514,540

New Line._virtual_line514_line540_line568_line602_line633_line662_line693_line723 bus1=724.1.2.3.4 bus2=488.1.2.3.4 phases=4 linecode=LC2 length=11.63368 units=m
! reduced_from=line514,line540,line568,line602,line633,line662,line693,line723
! eliminated_buses=515,541,569,603,634,663,694

New Line._virtual_line560_line593_line623_line653 bus1=654.1.2.3.4 bus2=535.1.2.3.4 phases=4 linecode=LC4 length=22.709 units=m
! reduced_from=line560,line593,line623,line653
! eliminated_buses=561,594,624

New Line._virtual_line561_line596_line626_line656_line686_line716_line744 bus1=745.1.2.3.4 bus2=535.1.2.3.4 phases=4 linecode=LC2 length=10.94168 units=m
! reduced_from=line561,line596,line626,line656,line686,line716,line744
! eliminated_buses=562,597,627,657,687,717

New Line._virtual_line577_line608_line639_line668_line699_line729_line759_line790_line820_line847_line872_line898_line925_line954_line982_line1006_line1030_line1056_line1082_line1108_line1129_line1150_line1171_line1190_line1213_line1235_line1258_line1283_line1308_line1337_line1363_line1391_line1416_line1440_line1464_line1488_line1513_line1536_line1560_line1584_line1614_line1643 bus1=1644.1.2.3.4 bus2=548.1.2.3.4 phases=4 linecode=LC2 length=21.435591 units=m
! reduced_from=line577,line608,line639,line668,line699,line729,line759,line790,line820,line847,line872,line898,line925,line954,line982,line1006,line1030,line1056,line1082,line1108,line1129,line1150,line1171,line1190,line1213,line1235,line1258,line1283,line1308,line1337,line1363,line1391,line1416,line1440,line1464,line1488,line1513,line1536,line1560,line1584,line1614,line1643
! eliminated_buses=578,609,640,669,700,730,760,791,821,848,873,899,926,955,983,1007,1031,1057,1083,1109,1130,1151,1172,1191,1214,1236,1259,1284,1309,1338,1364,1392,1417,1441,1465,1489,1514,1537,1561,1585,1615

New Line._virtual_line579_line609_line640_line669_line700_line730_line760_line791_line821_line848_line873_line899_line926_line955_line983_line1007_line1031_line1057_line1083_line1109_line1130_line1151_line1172_line1191_line1214_line1236_line1259_line1284_line1309_line1338_line1364_line1392_line1417_line1441_line1465_line1489_line1514_line1537_line1561_line1585 bus1=549.1.2.3.4 bus2=1586.1.2.3.4 phases=4 linecode=LC2 length=21.188617 units=m
! reduced_from=line579,line609,line640,line669,line700,line730,line760,line791,line821,line848,line873,line899,line926,line955,line983,line1007,line1031,line1057,line1083,line1109,line1130,line1151,line1172,line1191,line1214,line1236,line1259,line1284,line1309,line1338,line1364,line1392,line1417,line1441,line1465,line1489,line1514,line1537,line1561,line1585
! eliminated_buses=580,610,641,670,701,731,761,792,822,849,874,900,927,956,984,1008,1032,1058,1084,1110,1131,1152,1173,1192,1215,1237,1260,1285,1310,1339,1365,1393,1418,1442,1466,1490,1515,1538,1562

New Line._virtual_line600_line630_line659_line690 bus1=691.1.2.3.4 bus2=568.1.2.3.4 phases=4 linecode=LC4 length=20.5653 units=m
! reduced_from=line600,line630,line659,line690
! eliminated_buses=601,631,660

New Line._virtual_line631_line660_line691_line721_line750_line782_line814_line841 bus1=842.1.2.3.4 bus2=602.1.2.3.4 phases=4 linecode=LC2 length=11.43388 units=m
! reduced_from=line631,line660,line691,line721,line750,line782,line814,line841
! eliminated_buses=632,661,692,722,751,783,815

New Line._virtual_line632_line661_line692_line722_line751_line783_line815_line842 bus1=843.1.2.3.4 bus2=602.1.2.3.4 phases=4 linecode=LC2 length=6.22299 units=m
! reduced_from=line632,line661,line692,line722,line751,line783,line815,line842
! eliminated_buses=633,662,693,723,752,784,816

New Line._virtual_line682_line712_line741 bus1=742.1.2.3.4 bus2=654.1.2.3.4 phases=4 linecode=LC4 length=15.5403 units=m
! reduced_from=line682,line712,line741
! eliminated_buses=683,713

New Line._virtual_line714_line742_line773_line806_line835_line863_line889_line915_line943_line971_line996_line1020_line1045_line1070_line1096_line1120 bus1=1121.1.2.3.4 bus2=684.1.2.3.4 phases=4 linecode=LC2 length=17.235 units=m
! reduced_from=line714,line742,line773,line806,line835,line863,line889,line915,line943,line971,line996,line1020,line1045,line1070,line1096,line1120
! eliminated_buses=715,743,774,807,836,864,890,916,944,972,997,1021,1046,1071,1097

New Line._virtual_line719_line747_line779_line811_line838_line865_line892 bus1=691.1.2.3.4 bus2=893.1.2.3.4 phases=4 linecode=LC4 length=35.7483 units=m
! reduced_from=line719,line747,line779,line811,line838,line865,line892
! eliminated_buses=720,748,780,812,839,866

New Line._virtual_line748_line780_line812_line839_line866_line893_line920_line949_line977_line1002_line1026 bus1=721.1.2.3.4 bus2=1027.1.2.3.4 phases=4 linecode=LC2 length=12.64497 units=m
! reduced_from=line748,line780,line812,line839,line866,line893,line920,line949,line977,line1002,line1026
! eliminated_buses=749,781,813,840,867,894,921,950,978,1003

New Line._virtual_line749_line781_line813_line840_line867_line894_line921_line950_line978_line1003_line1027_line1053_line1079 bus1=721.1.2.3.4 bus2=1080.1.2.3.4 phases=4 linecode=LC2 length=3.30579 units=m
! reduced_from=line749,line781,line813,line840,line867,line894,line921,line950,line978,line1003,line1027,line1053,line1079
! eliminated_buses=750,782,814,841,868,895,922,951,979,1004,1028,1054

New Line._virtual_line772_line805_line834 bus1=742.1.2.3.4 bus2=835.1.2.3.4 phases=4 linecode=LC4 length=21.9983 units=m
! reduced_from=line772,line805,line834
! eliminated_buses=773,806

New Line._virtual_line797_line827_line854_line879_line905_line932_line960_line988_line1012_line1036_line1063_line1088_line1114_line1135_line1156_line1177_line1196_line1220_line1243_line1266_line1291 bus1=768.1.2.3.4 bus2=1292.1.2.3.4 phases=4 linecode=LC2 length=21.96469 units=m
! reduced_from=line797,line827,line854,line879,line905,line932,line960,line988,line1012,line1036,line1063,line1088,line1114,line1135,line1156,line1177,line1196,line1220,line1243,line1266,line1291
! eliminated_buses=798,828,855,880,906,933,961,989,1013,1037,1064,1089,1115,1136,1157,1178,1197,1221,1244,1267

New Line._virtual_line802_line831_line858_line883_line909_line936_line964_line991_line1015 bus1=772.1.2.3.4 bus2=1016.1.2.3.4 phases=4 linecode=LC2 length=2.45722 units=m
! reduced_from=line802,line831,line858,line883,line909,line936,line964,line991,line1015
! eliminated_buses=803,832,859,884,910,937,965,992

New Line._virtual_line803_line832_line859_line884_line910_line937_line965_line992_line1016_line1041_line1066_line1091_line1117_line1138_line1159_line1179 bus1=772.1.2.3.4 bus2=1180.1.2.3.4 phases=4 linecode=LC2 length=5.198073 units=m
! reduced_from=line803,line832,line859,line884,line910,line937,line965,line992,line1016,line1041,line1066,line1091,line1117,line1138,line1159,line1179
! eliminated_buses=804,833,860,885,911,938,966,993,1017,1042,1067,1092,1118,1139,1160

New Line._virtual_line862_line888 bus1=835.1.2.3.4 bus2=889.1.2.3.4 phases=4 linecode=LC4 length=14.8756 units=m
! reduced_from=line862,line888
! eliminated_buses=863

New Line._virtual_line887_line912_line939_line966_line993_line1017_line1042_line1067_line1092_line1118_line1139_line1160_line1180_line1203_line1225_line1248_line1271_line1296_line1322_line1350_line1376_line1404 bus1=1405.1.2.3.4 bus2=862.1.2.3.4 phases=4 linecode=LC2 length=13.826438 units=m
! reduced_from=line887,line912,line939,line966,line993,line1017,line1042,line1067,line1092,line1118,line1139,line1160,line1180,line1203,line1225,line1248,line1271,line1296,line1322,line1350,line1376,line1404
! eliminated_buses=888,913,940,967,994,1018,1043,1068,1093,1119,1140,1161,1181,1204,1226,1249,1272,1297,1323,1351,1377

New Line._virtual_line914_line942 bus1=889.1.2.3.4 bus2=943.1.2.3.4 phases=4 linecode=LC4 length=9.7743 units=m
! reduced_from=line914,line942
! eliminated_buses=915

New Line._virtual_line919_line948_line976_line1001 bus1=1002.1.2.3.4 bus2=893.1.2.3.4 phases=4 linecode=LC4 length=46.2886 units=m
! reduced_from=line919,line948,line976,line1001
! eliminated_buses=920,949,977

New Line._virtual_line940_line967 bus1=968.1.2.3.4 bus2=914.1.2.3.4 phases=4 linecode=LC2 length=7.8528 units=m
! reduced_from=line940,line967
! eliminated_buses=941

New Line._virtual_line941_line968_line994_line1018_line1043_line1068 bus1=914.1.2.3.4 bus2=1069.1.2.3.4 phases=4 linecode=LC2 length=4.17675 units=m
! reduced_from=line941,line968,line994,line1018,line1043,line1068
! eliminated_buses=942,969,995,1019,1044

New Line._virtual_line946_line974_line999_line1022 bus1=1023.1.2.3.4 bus2=919.1.2.3.4 phases=4 linecode=LC2 length=6.017464 units=m
! reduced_from=line946,line974,line999,line1022
! eliminated_buses=947,975,1000

New Line._virtual_line947_line975_line1000_line1023_line1049 bus1=919.1.2.3.4 bus2=1050.1.2.3.4 phases=4 linecode=LC2 length=3.24315 units=m
! reduced_from=line947,line975,line1000,line1023,line1049
! eliminated_buses=948,976,1001,1024

New Line._virtual_line957_line985_line1009_line1033_line1059_line1085_line1111_line1132_line1153_line1174_line1193_line1216_line1239_line1262_line1287_line1312 bus1=1313.1.2.3.4 bus2=929.1.2.3.4 phases=4 linecode=LC2 length=22.930974 units=m
! reduced_from=line957,line985,line1009,line1033,line1059,line1085,line1111,line1132,line1153,line1174,line1193,line1216,line1239,line1262,line1287,line1312
! eliminated_buses=958,986,1010,1034,1060,1086,1112,1133,1154,1175,1194,1217,1240,1263,1288

New Line._virtual_line958_line986_line1010_line1034_line1060_line1086_line1112_line1133_line1154_line1175_line1194 bus1=929.1.2.3.4 bus2=1195.1.2.3.4 phases=4 linecode=LC4 length=15.00962 units=m
! reduced_from=line958,line986,line1010,line1034,line1060,line1086,line1112,line1133,line1154,line1175,line1194
! eliminated_buses=959,987,1011,1035,1061,1087,1113,1134,1155,1176

New Line._virtual_line969_line995_line1019_line1044_line1069_line1095_line1119_line1140_line1161_line1181_line1204_line1226_line1249_line1272_line1297_line1323_line1351_line1377_line1405_line1429_line1453_line1477_line1500_line1525_line1548_line1572_line1601_line1630 bus1=943.1.2.3.4 bus2=1631.1.2.3.4 phases=4 linecode=LC2 length=17.395622 units=m
! reduced_from=line969,line995,line1019,line1044,line1069,line1095,line1119,line1140,line1161,line1181,line1204,line1226,line1249,line1272,line1297,line1323,line1351,line1377,line1405,line1429,line1453,line1477,line1500,line1525,line1548,line1572,line1601,line1630
! eliminated_buses=970,996,1020,1045,1070,1096,1120,1141,1162,1182,1205,1227,1250,1273,1298,1324,1352,1378,1406,1430,1454,1478,1501,1526,1549,1573,1602

New Line._virtual_line980_line1004_line1028_line1054_line1080_line1106_line1127_line1148_line1169_line1188_line1211_line1233_line1256_line1281_line1306_line1335_line1361_line1389_line1415 bus1=1416.1.2.3.4 bus2=953.1.2.3.4 phases=4 linecode=LC2 length=17.00565 units=m
! reduced_from=line980,line1004,line1028,line1054,line1080,line1106,line1127,line1148,line1169,line1188,line1211,line1233,line1256,line1281,line1306,line1335,line1361,line1389,line1415
! eliminated_buses=981,1005,1029,1055,1081,1107,1128,1149,1170,1189,1212,1234,1257,1282,1307,1336,1362,1390

New Line._virtual_line1025_line1052_line1078_line1103_line1126_line1147_line1168_line1187_line1210_line1232_line1255 bus1=1256.1.2.3.4 bus2=1002.1.2.3.4 phases=4 linecode=LC4 length=42.61714 units=m
! reduced_from=line1025,line1052,line1078,line1103,line1126,line1147,line1168,line1187,line1210,line1232,line1255
! eliminated_buses=1026,1053,1079,1104,1127,1148,1169,1188,1211,1233

New Line._virtual_line1047_line1072_line1098_line1121_line1141_line1162_line1182_line1205_line1227_line1250 bus1=1023.1.2.3.4 bus2=1251.1.2.3.4 phases=4 linecode=LC2 length=8.12873 units=m
! reduced_from=line1047,line1072,line1098,line1121,line1141,line1162,line1182,line1205,line1227,line1250
! eliminated_buses=1048,1073,1099,1122,1142,1163,1183,1206,1228

New Line._virtual_line1050_line1075_line1100_line1123_line1143 bus1=1144.1.2.3.4 bus2=1025.1.2.3.4 phases=4 linecode=LC2 length=4.768033 units=m
! reduced_from=line1050,line1075,line1100,line1123,line1143
! eliminated_buses=1051,1076,1101,1124

New Line._virtual_line1051_line1076_line1101_line1124 bus1=1025.1.2.3.4 bus2=1125.1.2.3.4 phases=4 linecode=LC2 length=3.05239 units=m
! reduced_from=line1051,line1076,line1101,line1124
! eliminated_buses=1052,1077,1102

New Line._virtual_line1062_line1087_line1113_line1134_line1155_line1176_line1195_line1219_line1242_line1265_line1290_line1315_line1345_line1371_line1399_line1424_line1448_line1472_line1495_line1520_line1542_line1566_line1591_line1622_line1649_line1678_line1707_line1736_line1765_line1795_line1825_line1853_line1880_line1906_line1930_line1956_line1982_line2009_line2038_line2066_line2093 bus1=1036.1.2.3.4 bus2=2094.1.2.3.4 phases=4 linecode=LC2 length=22.357234 units=m
! reduced_from=line1062,line1087,line1113,line1134,line1155,line1176,line1195,line1219,line1242,line1265,line1290,line1315,line1345,line1371,line1399,line1424,line1448,line1472,line1495,line1520,line1542,line1566,line1591,line1622,line1649,line1678,line1707,line1736,line1765,line1795,line1825,line1853,line1880,line1906,line1930,line1956,line1982,line2009,line2038,line2066,line2093
! eliminated_buses=1063,1088,1114,1135,1156,1177,1196,1220,1243,1266,1291,1316,1346,1372,1400,1425,1449,1473,1496,1521,1543,1567,1592,1623,1650,1679,1708,1737,1766,1796,1826,1854,1881,1907,1931,1957,1983,2010,2039,2067

New Line._virtual_line1073_line1099_line1122_line1142_line1163_line1183_line1206_line1228_line1251_line1275_line1299 bus1=1050.1.2.3.4 bus2=1300.1.2.3.4 phases=4 linecode=LC2 length=7.84256 units=m
! reduced_from=line1073,line1099,line1122,line1142,line1163,line1183,line1206,line1228,line1251,line1275,line1299
! eliminated_buses=1074,1100,1123,1143,1164,1184,1207,1229,1252,1276

New Line._virtual_line1144_line1166_line1185_line1208_line1230_line1253_line1277_line1301 bus1=1125.1.2.3.4 bus2=1302.1.2.3.4 phases=4 linecode=LC2 length=8.15502 units=m
! reduced_from=line1144,line1166,line1185,line1208,line1230,line1253,line1277,line1301
! eliminated_buses=1145,1167,1186,1209,1231,1254,1278

New Line._virtual_line1164_line1184_line1207_line1229_line1252_line1276_line1300_line1327_line1354 bus1=1144.1.2.3.4 bus2=1355.1.2.3.4 phases=4 linecode=LC2 length=8.45394 units=m
! reduced_from=line1164,line1184,line1207,line1229,line1252,line1276,line1300,line1327,line1354
! eliminated_buses=1165,1185,1208,1230,1253,1277,1301,1328

New Line._virtual_line1217_line1240_line1263_line1288_line1313_line1343_line1369_line1397_line1422_line1446_line1470_line1494_line1519_line1541_line1565_line1590_line1621_line1648_line1677_line1706_line1735_line1764_line1794_line1824_line1852_line1879_line1905_line1929_line1955_line1981_line2008_line2037_line2065_line2092_line2124 bus1=2125.1.2.3.4 bus2=1195.1.2.3.4 phases=4 linecode=LC4 length=13.543386 units=m
! reduced_from=line1217,line1240,line1263,line1288,line1313,line1343,line1369,line1397,line1422,line1446,line1470,line1494,line1519,line1541,line1565,line1590,line1621,line1648,line1677,line1706,line1735,line1764,line1794,line1824,line1852,line1879,line1905,line1929,line1955,line1981,line2008,line2037,line2065,line2092,line2124
! eliminated_buses=1218,1241,1264,1289,1314,1344,1370,1398,1423,1447,1471,1495,1520,1542,1566,1591,1622,1649,1678,1707,1736,1765,1795,1825,1853,1880,1906,1930,1956,1982,2009,2038,2066,2093

New Line._virtual_line1273_line1298_line1324_line1352_line1378_line1406_line1430_line1454_line1478_line1501_line1526_line1549 bus1=1550.1.2.3.4 bus2=1251.1.2.3.4 phases=4 linecode=LC2 length=15.028077 units=m
! reduced_from=line1273,line1298,line1324,line1352,line1378,line1406,line1430,line1454,line1478,line1501,line1526,line1549
! eliminated_buses=1274,1299,1325,1353,1379,1407,1431,1455,1479,1502,1527

New Line._virtual_line1279_line1303_line1331_line1357_line1384_line1410 bus1=1256.1.2.3.4 bus2=1411.1.2.3.4 phases=4 linecode=LC2 length=30.21722 units=m
! reduced_from=line1279,line1303,line1331,line1357,line1384,line1410
! eliminated_buses=1280,1304,1332,1358,1385

New Line._virtual_line1305_line1334_line1360_line1388_line1414_line1439_line1463_line1487_line1512_line1535 bus1=1536.1.2.3.4 bus2=1281.1.2.3.4 phases=4 linecode=LC4 length=20.19136 units=m
! reduced_from=line1305,line1334,line1360,line1388,line1414,line1439,line1463,line1487,line1512,line1535
! eliminated_buses=1306,1335,1361,1389,1415,1440,1464,1488,1513

New Line._virtual_line1325_line1353_line1379_line1407_line1431_line1455_line1479_line1502_line1527 bus1=1300.1.2.3.4 bus2=1528.1.2.3.4 phases=4 linecode=LC2 length=14.08071 units=m
! reduced_from=line1325,line1353,line1379,line1407,line1431,line1455,line1479,line1502,line1527
! eliminated_buses=1326,1354,1380,1408,1432,1456,1480,1503

New Line._virtual_line1328_line1355_line1382_line1409_line1433_line1457_line1481_line1504_line1529_line1551_line1574_line1603_line1632_line1658_line1688_line1717 bus1=1718.1.2.3.4 bus2=1302.1.2.3.4 phases=4 linecode=LC2 length=16.57729 units=m
! reduced_from=line1328,line1355,line1382,line1409,line1433,line1457,line1481,line1504,line1529,line1551,line1574,line1603,line1632,line1658,line1688,line1717
! eliminated_buses=1329,1356,1383,1410,1434,1458,1482,1505,1530,1552,1575,1604,1633,1659,1689

New Line._virtual_line1332_line1358_line1385_line1411_line1436_line1460_line1484 bus1=1305.1.2.3.4 bus2=1485.1.2.3.4 phases=4 linecode=LC2 length=7.79026 units=m
! reduced_from=line1332,line1358,line1385,line1411,line1436,line1460,line1484
! eliminated_buses=1333,1359,1386,1412,1437,1461

New Line._virtual_line1333_line1359_line1386_line1412_line1437_line1461_line1485 bus1=1305.1.2.3.4 bus2=1486.1.2.3.4 phases=4 linecode=LC2 length=4.97113 units=m
! reduced_from=line1333,line1359,line1386,line1412,line1437,line1461,line1485
! eliminated_buses=1334,1360,1387,1413,1438,1462

New Line._virtual_line1341_line1367_line1395_line1420_line1444_line1468_line1492_line1516_line1539_line1563 bus1=1564.1.2.3.4 bus2=1313.1.2.3.4 phases=4 linecode=LC2 length=8.466208 units=m
! reduced_from=line1341,line1367,line1395,line1420,line1444,line1468,line1492,line1516,line1539,line1563
! eliminated_buses=1342,1368,1396,1421,1445,1469,1493,1517,1540

New Line._virtual_line1342_line1368_line1396_line1421_line1445_line1469_line1493 bus1=1313.1.2.3.4 bus2=1494.1.2.3.4 phases=4 linecode=LC2 length=6.314586 units=m
! reduced_from=line1342,line1368,line1396,line1421,line1445,line1469,line1493
! eliminated_buses=1343,1369,1397,1422,1446,1470

New Line._virtual_line1380_line1408_line1432_line1456_line1480_line1503_line1528_line1550_line1573_line1602_line1631_line1657_line1687_line1716_line1746_line1776_line1807 bus1=1355.1.2.3.4 bus2=1808.1.2.3.4 phases=4 linecode=LC2 length=17.6682 units=m
! reduced_from=line1380,line1408,line1432,line1456,line1480,line1503,line1528,line1550,line1573,line1602,line1631,line1657,line1687,line1716,line1746,line1776,line1807
! eliminated_buses=1381,1409,1433,1457,1481,1504,1529,1551,1574,1603,1632,1658,1688,1717,1747,1777

New Line._virtual_line1434_line1458_line1482_line1505_line1530_line1552_line1575 bus1=1411.1.2.3.4 bus2=1576.1.2.3.4 phases=4 linecode=LC2 length=3.394177 units=m
! reduced_from=line1434,line1458,line1482,line1505,line1530,line1552,line1575
! eliminated_buses=1435,1459,1483,1506,1531,1553

New Line._virtual_line1435_line1459_line1483_line1506_line1531 bus1=1532.1.2.3.4 bus2=1411.1.2.3.4 phases=4 linecode=LC2 length=5.85919 units=m
! reduced_from=line1435,line1459,line1483,line1506,line1531
! eliminated_buses=1436,1460,1484,1507

New Line._virtual_line1507_line1532_line1555_line1577_line1607_line1635_line1661_line1691_line1720_line1749_line1779_line1810_line1839_line1867_line1894_line1919_line1944 bus1=1945.1.2.3.4 bus2=1485.1.2.3.4 phases=4 linecode=LC2 length=11.596327 units=m
! reduced_from=line1507,line1532,line1555,line1577,line1607,line1635,line1661,line1691,line1720,line1749,line1779,line1810,line1839,line1867,line1894,line1919,line1944
! eliminated_buses=1508,1533,1556,1578,1608,1636,1662,1692,1721,1750,1780,1811,1840,1868,1895,1920

New Line._virtual_line1509_line1533_line1556_line1578_line1608_line1636_line1662_line1692_line1721_line1750_line1780_line1811_line1840 bus1=1841.1.2.3.4 bus2=1486.1.2.3.4 phases=4 linecode=LC2 length=14.5769 units=m
! reduced_from=line1509,line1533,line1556,line1578,line1608,line1636,line1662,line1692,line1721,line1750,line1780,line1811,line1840
! eliminated_buses=1510,1534,1557,1579,1609,1637,1663,1693,1722,1751,1781,1812

New Line._virtual_line1518_line1540_line1564_line1589_line1619_line1646_line1675_line1704_line1733_line1762_line1792_line1822_line1850_line1877_line1903_line1928 bus1=1929.1.2.3.4 bus2=1494.1.2.3.4 phases=4 linecode=LC2 length=8.84973 units=m
! reduced_from=line1518,line1540,line1564,line1589,line1619,line1646,line1675,line1704,line1733,line1762,line1792,line1822,line1850,line1877,line1903,line1928
! eliminated_buses=1519,1541,1565,1590,1620,1647,1676,1705,1734,1763,1793,1823,1851,1878,1904

New Line._virtual_line1545_line1569_line1596_line1625_line1652_line1681 bus1=1524.1.2.3.4 bus2=1682.1.2.3.4 phases=4 linecode=LC3 length=22.737392 units=m
! reduced_from=line1545,line1569,line1596,line1625,line1652,line1681
! eliminated_buses=1546,1570,1597,1626,1653

New Line._virtual_line1546_line1571 bus1=1572.1.2.3.4 bus2=1524.1.2.3.4 phases=4 linecode=LC3 length=10.1699 units=m
! reduced_from=line1546,line1571
! eliminated_buses=1547

New Line._virtual_line1553_line1576_line1606_line1634_line1660_line1690_line1719_line1748_line1778_line1809_line1838 bus1=1839.1.2.3.4 bus2=1532.1.2.3.4 phases=4 linecode=LC2 length=13.48614 units=m
! reduced_from=line1553,line1576,line1606,line1634,line1660,line1690,line1719,line1748,line1778,line1809,line1838
! eliminated_buses=1554,1577,1607,1635,1661,1691,1720,1749,1779,1810

New Line._virtual_line1558_line1581_line1612 bus1=1536.1.2.3.4 bus2=1613.1.2.3.4 phases=4 linecode=LC4 length=24.4585 units=m
! reduced_from=line1558,line1581,line1612
! eliminated_buses=1559,1582

New Line._virtual_line1582_line1613_line1642_line1669_line1700_line1729_line1758_line1788_line1818_line1846_line1873_line1899_line1924_line1949_line1976_line2002_line2033_line2060_line2088_line2120 bus1=2121.1.2.3.4 bus2=1560.1.2.3.4 phases=4 linecode=LC2 length=17.431485 units=m
! reduced_from=line1582,line1613,line1642,line1669,line1700,line1729,line1758,line1788,line1818,line1846,line1873,line1899,line1924,line1949,line1976,line2002,line2033,line2060,line2088,line2120
! eliminated_buses=1583,1614,1643,1670,1701,1730,1759,1789,1819,1847,1874,1900,1925,1950,1977,2003,2034,2061,2089

New Line._virtual_line1588_line1618_line1645_line1674_line1703_line1732_line1761_line1791_line1821_line1849_line1876_line1902_line1927_line1952_line1979_line2006_line2035 bus1=2036.1.2.3.4 bus2=1564.1.2.3.4 phases=4 linecode=LC2 length=8.941218 units=m
! reduced_from=line1588,line1618,line1645,line1674,line1703,line1732,line1761,line1791,line1821,line1849,line1876,line1902,line1927,line1952,line1979,line2006,line2035
! eliminated_buses=1589,1619,1646,1675,1704,1733,1762,1792,1822,1850,1877,1903,1928,1953,1980,2007

New Line._virtual_line1600_line1629_line1656_line1686_line1715_line1745_line1775_line1806_line1836_line1865 bus1=1572.1.2.3.4 bus2=1866.1.2.3.4 phases=4 linecode=LC2 length=13.96901 units=m
! reduced_from=line1600,line1629,line1656,line1686,line1715,line1745,line1775,line1806,line1836,line1865
! eliminated_buses=1601,1630,1657,1687,1716,1746,1776,1807,1837

New Line._virtual_line1604_line1633_line1659_line1689_line1718_line1747_line1777_line1808_line1837_line1866_line1893_line1918_line1943_line1969_line1996_line2025_line2054_line2082 bus1=2083.1.2.3.4 bus2=1576.1.2.3.4 phases=4 linecode=LC2 length=7.439551 units=m
! reduced_from=line1604,line1633,line1659,line1689,line1718,line1747,line1777,line1808,line1837,line1866,line1893,line1918,line1943,line1969,line1996,line2025,line2054,line2082
! eliminated_buses=1605,1634,1660,1690,1719,1748,1778,1809,1838,1867,1894,1919,1944,1970,1997,2026,2055

New Line._virtual_line1617_line1644_line1673_line1702_line1731_line1760_line1790_line1820_line1848_line1875_line1901_line1926_line1951_line1978 bus1=1979.1.2.3.4 bus2=1586.1.2.3.4 phases=4 linecode=LC2 length=14.69199 units=m
! reduced_from=line1617,line1644,line1673,line1702,line1731,line1760,line1790,line1820,line1848,line1875,line1901,line1926,line1951,line1978
! eliminated_buses=1618,1645,1674,1703,1732,1761,1791,1821,1849,1876,1902,1927,1952

New Line._virtual_line1628_line1655_line1685_line1714_line1744_line1774 bus1=1775.1.2.3.4 bus2=1600.1.2.3.4 phases=4 linecode=LC2 length=9.71019 units=m
! reduced_from=line1628,line1655,line1685,line1714,line1744,line1774
! eliminated_buses=1629,1656,1686,1715,1745

New Line._virtual_line1640_line1666_line1696_line1725 bus1=1613.1.2.3.4 bus2=1726.1.2.3.4 phases=4 linecode=LC4 length=34.2893 units=m
! reduced_from=line1640,line1666,line1696,line1725
! eliminated_buses=1641,1667,1697

New Line._virtual_line1667_line1698_line1727_line1756_line1786_line1816 bus1=1817.1.2.3.4 bus2=1642.1.2.3.4 phases=4 linecode=LC2 length=6.31247 units=m
! reduced_from=line1667,line1698,line1727,line1756,line1786,line1816
! eliminated_buses=1668,1699,1728,1757,1787

New Line._virtual_line1668_line1699_line1728_line1757_line1787_line1817_line1845 bus1=1642.1.2.3.4 bus2=1846.1.2.3.4 phases=4 linecode=LC2 length=6.614247 units=m
! reduced_from=line1668,line1699,line1728,line1757,line1787,line1817,line1845
! eliminated_buses=1669,1700,1729,1758,1788,1818

New Line._virtual_line1672_line1701_line1730_line1759_line1789_line1819_line1847_line1874_line1900_line1925_line1950_line1977_line2003_line2034_line2061_line2089_line2121_line2148_line2172_line2199_line2228_line2257_line2283_line2312_line2341 bus1=1644.1.2.3.4 bus2=2342.1.2.3.4 phases=4 linecode=LC2 length=19.53877 units=m
! reduced_from=line1672,line1701,line1730,line1759,line1789,line1819,line1847,line1874,line1900,line1925,line1950,line1977,line2003,line2034,line2061,line2089,line2121,line2148,line2172,line2199,line2228,line2257,line2283,line2312,line2341
! eliminated_buses=1673,1702,1731,1760,1790,1820,1848,1875,1901,1926,1951,1978,2004,2035,2062,2090,2122,2149,2173,2200,2229,2258,2284,2313

New Line._virtual_line1711_line1741_line1771 bus1=1772.1.2.3.4 bus2=1682.1.2.3.4 phases=4 linecode=LC3 length=25.9035 units=m
! reduced_from=line1711,line1741,line1771
! eliminated_buses=1712,1742

New Line._virtual_line1739_line1768_line1797_line1827 bus1=1828.1.2.3.4 bus2=1711.1.2.3.4 phases=4 linecode=LC2 length=2.12038 units=m
! reduced_from=line1739,line1768,line1797,line1827
! eliminated_buses=1740,1769,1798

New Line._virtual_line1740_line1769_line1798_line1828_line1857 bus1=1858.1.2.3.4 bus2=1711.1.2.3.4 phases=4 linecode=LC2 length=2.18423 units=m
! reduced_from=line1740,line1769,line1798,line1828,line1857
! eliminated_buses=1741,1770,1799,1829

New Line._virtual_line1754_line1784_line1814_line1842 bus1=1843.1.2.3.4 bus2=1726.1.2.3.4 phases=4 linecode=LC2 length=14.25484 units=m
! reduced_from=line1754,line1784,line1814,line1842
! eliminated_buses=1755,1785,1815

New Line._virtual_line1801_line1832 bus1=1833.1.2.3.4 bus2=1772.1.2.3.4 phases=4 linecode=LC3 length=6.0868 units=m
! reduced_from=line1801,line1832
! eliminated_buses=1802

New Line._virtual_line1805_line1835 bus1=1775.1.2.3.4 bus2=1836.1.2.3.4 phases=4 linecode=LC2 length=5.3531 units=m
! reduced_from=line1805,line1835
! eliminated_buses=1806

New Line._virtual_line1830_line1859_line1886_line1911_line1935_line1961_line1987_line2014_line2043_line2071 bus1=1801.1.2.3.4 bus2=2072.1.2.3.4 phases=4 linecode=LC2 length=9.429134 units=m
! reduced_from=line1830,line1859,line1886,line1911,line1935,line1961,line1987,line2014,line2043,line2071
! eliminated_buses=1831,1860,1887,1912,1936,1962,1988,2015,2044

New Line._virtual_line1831_line1860_line1887_line1912_line1936_line1962_line1988_line2015 bus1=2016.1.2.3.4 bus2=1801.1.2.3.4 phases=4 linecode=LC2 length=5.73198 units=m
! reduced_from=line1831,line1860,line1887,line1912,line1936,line1962,line1988,line2015
! eliminated_buses=1832,1861,1888,1913,1937,1963,1989

New Line._virtual_line1843_line1870_line1897_line1922_line1947_line1974_line2000_line2031_line2058_line2086_line2118 bus1=2119.1.2.3.4 bus2=1817.1.2.3.4 phases=4 linecode=LC2 length=14.2182 units=m
! reduced_from=line1843,line1870,line1897,line1922,line1947,line1974,line2000,line2031,line2058,line2086,line2118
! eliminated_buses=1844,1871,1898,1923,1948,1975,2001,2032,2059,2087

New Line._virtual_line1855_line1882_line1908_line1932_line1958_line1984_line2011_line2040_line2068_line2095_line2128_line2155 bus1=2156.1.2.3.4 bus2=1828.1.2.3.4 phases=4 linecode=LC2 length=8.59438 units=m
! reduced_from=line1855,line1882,line1908,line1932,line1958,line1984,line2011,line2040,line2068,line2095,line2128,line2155
! eliminated_buses=1856,1883,1909,1933,1959,1985,2012,2041,2069,2096,2129

New Line._virtual_line1862_line1888_line1913_line1938 bus1=1939.1.2.3.4 bus2=1833.1.2.3.4 phases=4 linecode=LC3 length=24.7913 units=m
! reduced_from=line1862,line1888,line1913,line1938
! eliminated_buses=1863,1889,1914

New Line._virtual_line1868_line1895_line1920_line1945_line1972_line1998 bus1=1999.1.2.3.4 bus2=1843.1.2.3.4 phases=4 linecode=LC2 length=2.52539 units=m
! reduced_from=line1868,line1895,line1920,line1945,line1972,line1998
! eliminated_buses=1869,1896,1921,1946,1973

New Line._virtual_line1869_line1896_line1921_line1946_line1973_line1999 bus1=1843.1.2.3.4 bus2=2000.1.2.3.4 phases=4 linecode=LC2 length=2.619412 units=m
! reduced_from=line1869,line1896,line1921,line1946,line1973,line1999
! eliminated_buses=1870,1897,1922,1947,1974

New Line._virtual_line1871_line1898_line1923_line1948_line1975_line2001_line2032_line2059_line2087_line2119_line2147_line2171 bus1=2172.1.2.3.4 bus2=1846.1.2.3.4 phases=4 linecode=LC2 length=13.22632 units=m
! reduced_from=line1871,line1898,line1923,line1948,line1975,line2001,line2032,line2059,line2087,line2119,line2147,line2171
! eliminated_buses=1872,1899,1924,1949,1976,2002,2033,2060,2088,2120,2148

New Line._virtual_line1883_line1909_line1933_line1959_line1985_line2012_line2041_line2069_line2096 bus1=1858.1.2.3.4 bus2=2097.1.2.3.4 phases=4 linecode=LC2 length=7.92592 units=m
! reduced_from=line1883,line1909,line1933,line1959,line1985,line2012,line2041,line2069,line2096
! eliminated_buses=1884,1910,1934,1960,1986,2013,2042,2070

New Line._virtual_line1891_line1916_line1941_line1967_line1994 bus1=1866.1.2.3.4 bus2=1995.1.2.3.4 phases=4 linecode=LC2 length=7.75545 units=m
! reduced_from=line1891,line1916,line1941,line1967,line1994
! eliminated_buses=1892,1917,1942,1968

New Line._virtual_line1892_line1917_line1942_line1968_line1995_line2024_line2053 bus1=2054.1.2.3.4 bus2=1866.1.2.3.4 phases=4 linecode=LC2 length=5.5672 units=m
! reduced_from=line1892,line1917,line1942,line1968,line1995,line2024,line2053
! eliminated_buses=1893,1918,1943,1969,1996,2025

New Line._virtual_line1954_line1980_line2007_line2036_line2064_line2091_line2123_line2150_line2174_line2201_line2230 bus1=1929.1.2.3.4 bus2=2231.1.2.3.4 phases=4 linecode=LC2 length=12.50805 units=m
! reduced_from=line1954,line1980,line2007,line2036,line2064,line2091,line2123,line2150,line2174,line2201,line2230
! eliminated_buses=1955,1981,2008,2037,2065,2092,2124,2151,2175,2202

New Line._virtual_line1965_line1992 bus1=1939.1.2.3.4 bus2=1993.1.2.3.4 phases=4 linecode=LC3 length=5.3335 units=m
! reduced_from=line1965,line1992
! eliminated_buses=1966

New Line._virtual_line1970_line1997_line2026_line2055_line2083_line2115_line2144_line2168_line2196_line2225 bus1=2226.1.2.3.4 bus2=1945.1.2.3.4 phases=4 linecode=LC2 length=5.56364 units=m
! reduced_from=line1970,line1997,line2026,line2055,line2083,line2115,line2144,line2168,line2196,line2225
! eliminated_buses=1971,1998,2027,2056,2084,2116,2145,2169,2197

New Line._virtual_line1990_line2017_line2047_line2074 bus1=2075.1.2.3.4 bus2=1965.1.2.3.4 phases=4 linecode=LC2 length=1.48862 units=m
! reduced_from=line1990,line2017,line2047,line2074
! eliminated_buses=1991,2018,2048

New Line._virtual_line1991_line2018_line2048_line2075 bus1=2076.1.2.3.4 bus2=1965.1.2.3.4 phases=4 linecode=LC2 length=1.65198 units=m
! reduced_from=line1991,line2018,line2048,line2075
! eliminated_buses=1992,2019,2049

New Line._virtual_line2019_line2049_line2076_line2108_line2138_line2162_line2188 bus1=1993.1.2.3.4 bus2=2189.1.2.3.4 phases=4 linecode=LC3 length=20.8107 units=m
! reduced_from=line2019,line2049,line2076,line2108,line2138,line2162,line2188
! eliminated_buses=2020,2050,2077,2109,2139,2163

New Line._virtual_line2020_line2050_line2077_line2109_line2139_line2163 bus1=2164.1.2.3.4 bus2=1993.1.2.3.4 phases=4 linecode=LC3 length=16.24416 units=m
! reduced_from=line2020,line2050,line2077,line2109,line2139,line2163
! eliminated_buses=2021,2051,2078,2110,2140

New Line._virtual_line2022_line2051_line2078_line2110_line2140_line2164_line2192_line2221_line2249 bus1=1995.1.2.3.4 bus2=2250.1.2.3.4 phases=4 linecode=LC2 length=7.33647 units=m
! reduced_from=line2022,line2051,line2078,line2110,line2140,line2164,line2192,line2221,line2249
! eliminated_buses=2023,2052,2079,2111,2141,2165,2193,2222

New Line._virtual_line2023_line2052_line2079_line2111_line2141_line2165_line2193_line2222_line2250_line2278_line2307_line2336_line2366_line2398 bus1=2399.1.2.3.4 bus2=1995.1.2.3.4 phases=4 linecode=LC2 length=17.85825 units=m
! reduced_from=line2023,line2052,line2079,line2111,line2141,line2165,line2193,line2222,line2250,line2278,line2307,line2336,line2366,line2398
! eliminated_buses=2024,2053,2080,2112,2142,2166,2194,2223,2251,2279,2308,2337,2367

New Line._virtual_line2027_line2056_line2084_line2116_line2145_line2169_line2197_line2226_line2255_line2281_line2310_line2339 bus1=1999.1.2.3.4 bus2=2340.1.2.3.4 phases=4 linecode=LC2 length=7.50492 units=m
! reduced_from=line2027,line2056,line2084,line2116,line2145,line2169,line2197,line2226,line2255,line2281,line2310,line2339
! eliminated_buses=2028,2057,2085,2117,2146,2170,2198,2227,2256,2282,2311

New Line._virtual_line2029_line2057_line2085_line2117_line2146_line2170_line2198_line2227_line2256_line2282_line2311_line2340_line2371 bus1=2000.1.2.3.4 bus2=2372.1.2.3.4 phases=4 linecode=LC2 length=7.923318 units=m
! reduced_from=line2029,line2057,line2085,line2117,line2146,line2170,line2198,line2227,line2256,line2282,line2311,line2340,line2371
! eliminated_buses=2030,2058,2086,2118,2147,2171,2199,2228,2257,2283,2312,2341

New Line._virtual_line2044_line2072 bus1=2016.1.2.3.4 bus2=2073.1.2.3.4 phases=4 linecode=LC2 length=6.7699 units=m
! reduced_from=line2044,line2072
! eliminated_buses=2045

New Line._virtual_line2063_line2090_line2122_line2149_line2173_line2200_line2229_line2258_line2284_line2313_line2342_line2372_line2403 bus1=2404.1.2.3.4 bus2=2036.1.2.3.4 phases=4 linecode=LC2 length=7.684466 units=m
! reduced_from=line2063,line2090,line2122,line2149,line2173,line2200,line2229,line2258,line2284,line2313,line2342,line2372,line2403
! eliminated_buses=2064,2091,2123,2150,2174,2201,2230,2259,2285,2314,2343,2373

New Line._virtual_line2081_line2112_line2142_line2166_line2194_line2223_line2251_line2279_line2308_line2337_line2367_line2399_line2432_line2462_line2491_line2518_line2545 bus1=2054.1.2.3.4 bus2=2546.1.2.3.4 phases=4 linecode=LC2 length=18.74469 units=m
! reduced_from=line2081,line2112,line2142,line2166,line2194,line2223,line2251,line2279,line2308,line2337,line2367,line2399,line2432,line2462,line2491,line2518,line2545
! eliminated_buses=2082,2113,2143,2167,2195,2224,2252,2280,2309,2338,2368,2400,2433,2463,2492,2519

New Line._virtual_line2098_line2134_line2158_line2184_line2212_line2240_line2269_line2297_line2327_line2357_line2387_line2420_line2451_line2479_line2509_line2536_line2566_line2600_line2632_line2665_line2698 bus1=2072.1.2.3.4 bus2=2699.1.2.3.4 phases=4 linecode=LC2 length=18.13215 units=m
! reduced_from=line2098,line2134,line2158,line2184,line2212,line2240,line2269,line2297,line2327,line2357,line2387,line2420,line2451,line2479,line2509,line2536,line2566,line2600,line2632,line2665,line2698
! eliminated_buses=2099,2135,2159,2185,2213,2241,2270,2298,2328,2358,2388,2421,2452,2480,2510,2537,2567,2601,2633,2666

New Line._virtual_line2103_line2136_line2160_line2186_line2214_line2242_line2271_line2299_line2329_line2359_line2389_line2422_line2453 bus1=2454.1.2.3.4 bus2=2075.1.2.3.4 phases=4 linecode=LC2 length=8.0836 units=m
! reduced_from=line2103,line2136,line2160,line2186,line2214,line2242,line2271,line2299,line2329,line2359,line2389,line2422,line2453
! eliminated_buses=2104,2137,2161,2187,2215,2243,2272,2300,2330,2360,2390,2423

New Line._virtual_line2106_line2137_line2161_line2187_line2215_line2243_line2272_line2300_line2330_line2360 bus1=2361.1.2.3.4 bus2=2076.1.2.3.4 phases=4 linecode=LC2 length=8.269811 units=m
! reduced_from=line2106,line2137,line2161,line2187,line2215,line2243,line2272,line2300,line2330,line2360
! eliminated_buses=2107,2138,2162,2188,2216,2244,2273,2301,2331

New Line._virtual_line2113_line2143_line2167_line2195_line2224_line2252_line2280_line2309_line2338_line2368_line2400_line2433_line2463_line2492_line2519_line2546_line2577_line2610_line2643_line2676_line2708 bus1=2083.1.2.3.4 bus2=2709.1.2.3.4 phases=4 linecode=LC2 length=16.452491 units=m
! reduced_from=line2113,line2143,line2167,line2195,line2224,line2252,line2280,line2309,line2338,line2368,line2400,line2433,line2463,line2492,line2519,line2546,line2577,line2610,line2643,line2676,line2708
! eliminated_buses=2114,2144,2168,2196,2225,2253,2281,2310,2339,2369,2401,2434,2464,2493,2520,2547,2578,2611,2644,2677

New Line._virtual_line2129_line2156_line2182_line2210_line2239_line2268_line2296_line2326_line2356_line2386_line2419_line2450_line2478_line2508_line2535_line2565 bus1=2097.1.2.3.4 bus2=2566.1.2.3.4 phases=4 linecode=LC2 length=18.667724 units=m
! reduced_from=line2129,line2156,line2182,line2210,line2239,line2268,line2296,line2326,line2356,line2386,line2419,line2450,line2478,line2508,line2535,line2565
! eliminated_buses=2130,2157,2183,2211,2240,2269,2297,2327,2357,2387,2420,2451,2479,2509,2536

New Line._virtual_line2151_line2175 bus1=2176.1.2.3.4 bus2=2125.1.2.3.4 phases=4 linecode=LC4 length=21.8304 units=m
! reduced_from=line2151,line2175
! eliminated_buses=2152

New Line._virtual_line2152_line2177_line2207_line2236_line2265_line2293_line2323_line2353_line2382_line2415_line2446_line2474_line2504_line2531_line2561_line2594_line2628_line2661_line2695_line2728_line2763_line2797_line2831_line2866_line2903_line2936_line2965_line2992_line3018_line3047_line3071_line3097 bus1=3098.1.2.3.4 bus2=2125.1.2.3.4 phases=4 linecode=LC4 length=20.00844 units=m
! reduced_from=line2152,line2177,line2207,line2236,line2265,line2293,line2323,line2353,line2382,line2415,line2446,line2474,line2504,line2531,line2561,line2594,line2628,line2661,line2695,line2728,line2763,line2797,line2831,line2866,line2903,line2936,line2965,line2992,line3018,line3047,line3071,line3097
! eliminated_buses=2153,2178,2208,2237,2266,2294,2324,2354,2383,2416,2447,2475,2505,2532,2562,2595,2629,2662,2696,2729,2764,2798,2832,2867,2904,2937,2966,2993,3019,3048,3072

New Line._virtual_line2179_line2209_line2238_line2267_line2295_line2325_line2355_line2385_line2418_line2449_line2477_line2507_line2534_line2564_line2597_line2631_line2664 bus1=2665.1.2.3.4 bus2=2156.1.2.3.4 phases=4 linecode=LC2 length=20.42982 units=m
! reduced_from=line2179,line2209,line2238,line2267,line2295,line2325,line2355,line2385,line2418,line2449,line2477,line2507,line2534,line2564,line2597,line2631,line2664
! eliminated_buses=2180,2210,2239,2268,2296,2326,2356,2386,2419,2450,2478,2508,2535,2565,2598,2632

New Line._virtual_line2190_line2219_line2247_line2276_line2305_line2334_line2364_line2396_line2427_line2458_line2489_line2516_line2543_line2572_line2607_line2642 bus1=2164.1.2.3.4 bus2=2643.1.2.3.4 phases=4 linecode=LC2 length=12.72876 units=m
! reduced_from=line2190,line2219,line2247,line2276,line2305,line2334,line2364,line2396,line2427,line2458,line2489,line2516,line2543,line2572,line2607,line2642
! eliminated_buses=2191,2220,2248,2277,2306,2335,2365,2397,2428,2459,2490,2517,2544,2573,2608

New Line._virtual_line2191_line2220_line2248_line2277_line2306_line2335_line2365_line2397_line2428 bus1=2429.1.2.3.4 bus2=2164.1.2.3.4 phases=4 linecode=LC2 length=10.834607 units=m
! reduced_from=line2191,line2220,line2248,line2277,line2306,line2335,line2365,line2397,line2428
! eliminated_buses=2192,2221,2249,2278,2307,2336,2366,2398

New Line._virtual_line2202_line2232 bus1=2233.1.2.3.4 bus2=2176.1.2.3.4 phases=4 linecode=LC4 length=3.09412 units=m
! reduced_from=line2202,line2232
! eliminated_buses=2203

New Line._virtual_line2216_line2244_line2273 bus1=2189.1.2.3.4 bus2=2274.1.2.3.4 phases=4 linecode=LC4 length=4.2531 units=m
! reduced_from=line2216,line2244,line2273
! eliminated_buses=2217,2245

New Line._virtual_line2234_line2263 bus1=2205.1.2.3.4 bus2=2264.1.2.3.4 phases=4 linecode=LC2 length=16.0547 units=m
! reduced_from=line2234,line2263
! eliminated_buses=2235

New Line._virtual_line2261_line2288_line2317_line2346 bus1=2347.1.2.3.4 bus2=2233.1.2.3.4 phases=4 linecode=LC4 length=29.6347 units=m
! reduced_from=line2261,line2288,line2317,line2346
! eliminated_buses=2262,2289,2318

New Line._virtual_line2286_line2315_line2344_line2374_line2405_line2437_line2466 bus1=2467.1.2.3.4 bus2=2261.1.2.3.4 phases=4 linecode=LC2 length=3.15039 units=m
! reduced_from=line2286,line2315,line2344,line2374,line2405,line2437,line2466
! eliminated_buses=2287,2316,2345,2375,2406,2438

New Line._virtual_line2287_line2316_line2345_line2375_line2406_line2438_line2467_line2497_line2523 bus1=2261.1.2.3.4 bus2=2524.1.2.3.4 phases=4 linecode=LC2 length=7.52336 units=m
! reduced_from=line2287,line2316,line2345,line2375,line2406,line2438,line2467,line2497,line2523
! eliminated_buses=2288,2317,2346,2376,2407,2439,2468,2498

New Line._virtual_line2291_line2321_line2351_line2381_line2414_line2445_line2473_line2503_line2530_line2560 bus1=2264.1.2.3.4 bus2=2561.1.2.3.4 phases=4 linecode=LC2 length=6.35526 units=m
! reduced_from=line2291,line2321,line2351,line2381,line2414,line2445,line2473,line2503,line2530,line2560
! eliminated_buses=2292,2322,2352,2382,2415,2446,2474,2504,2531

New Line._virtual_line2301_line2331_line2361_line2393_line2424_line2455_line2486_line2513_line2540_line2569 bus1=2274.1.2.3.4 bus2=2570.1.2.3.4 phases=4 linecode=LC4 length=25.7363 units=m
! reduced_from=line2301,line2331,line2361,line2393,line2424,line2455,line2486,line2513,line2540,line2569
! eliminated_buses=2302,2332,2362,2394,2425,2456,2487,2514,2541

New Line._virtual_line2302_line2333_line2363_line2395_line2426_line2457_line2488_line2515_line2542_line2571_line2606 bus1=2607.1.2.3.4 bus2=2274.1.2.3.4 phases=4 linecode=LC2 length=16.57561 units=m
! reduced_from=line2302,line2333,line2363,line2395,line2426,line2457,line2488,line2515,line2542,line2571,line2606
! eliminated_buses=2303,2334,2364,2396,2427,2458,2489,2516,2543,2572

New Line._virtual_line2377_line2408_line2440_line2469 bus1=2470.1.2.3.4 bus2=2347.1.2.3.4 phases=4 linecode=LC4 length=17.934187 units=m
! reduced_from=line2377,line2408,line2440,line2469
! eliminated_buses=2378,2409,2441

New Line._virtual_line2390_line2423_line2454_line2485_line2512_line2539_line2568_line2602_line2634_line2667_line2700_line2735_line2769_line2803_line2837_line2873_line2908_line2941_line2970_line2996 bus1=2997.1.2.3.4 bus2=2361.1.2.3.4 phases=4 linecode=LC2 length=18.213 units=m
! reduced_from=line2390,line2423,line2454,line2485,line2512,line2539,line2568,line2602,line2634,line2667,line2700,line2735,line2769,line2803,line2837,line2873,line2908,line2941,line2970,line2996
! eliminated_buses=2391,2424,2455,2486,2513,2540,2569,2603,2635,2668,2701,2736,2770,2804,2838,2874,2909,2942,2971

New Line._virtual_line2411_line2442_line2471_line2502_line2529_line2559_line2591_line2624_line2657_line2691_line2724_line2759_line2793_line2827_line2862_line2898_line2930_line2962_line2989_line3015_line3044_line3068_line3094_line3120_line3143 bus1=3144.1.2.3.4 bus2=2379.1.2.3.4 phases=4 linecode=LC2 length=45.74358 units=m
! reduced_from=line2411,line2442,line2471,line2502,line2529,line2559,line2591,line2624,line2657,line2691,line2724,line2759,line2793,line2827,line2862,line2898,line2930,line2962,line2989,line3015,line3044,line3068,line3094,line3120,line3143
! eliminated_buses=2412,2443,2472,2503,2530,2560,2592,2625,2658,2692,2725,2760,2794,2828,2863,2899,2931,2963,2990,3016,3045,3069,3095,3121

New Line._virtual_line2431_line2461 bus1=2462.1.2.3.4 bus2=2399.1.2.3.4 phases=4 linecode=LC2 length=7.9601 units=m
! reduced_from=line2431,line2461
! eliminated_buses=2432

New Line._virtual_line2435_line2464_line2493_line2520_line2547_line2578_line2611_line2644_line2677_line2709_line2742_line2777_line2811_line2846_line2883_line2914 bus1=2404.1.2.3.4 bus2=2915.1.2.3.4 phases=4 linecode=LC2 length=10.370154 units=m
! reduced_from=line2435,line2464,line2493,line2520,line2547,line2578,line2611,line2644,line2677,line2709,line2742,line2777,line2811,line2846,line2883,line2914
! eliminated_buses=2436,2465,2494,2521,2548,2579,2612,2645,2678,2710,2743,2778,2812,2847,2884

New Line._virtual_line2459_line2490_line2517_line2544_line2573 bus1=2574.1.2.3.4 bus2=2429.1.2.3.4 phases=4 linecode=LC2 length=7.433502 units=m
! reduced_from=line2459,line2490,line2517,line2544,line2573
! eliminated_buses=2460,2491,2518,2545

New Line._virtual_line2482_line2511_line2538_line2567_line2601_line2633_line2666_line2699_line2734_line2768_line2802_line2836 bus1=2454.1.2.3.4 bus2=2837.1.2.3.4 phases=4 linecode=LC2 length=17.76221 units=m
! reduced_from=line2482,line2511,line2538,line2567,line2601,line2633,line2666,line2699,line2734,line2768,line2802,line2836
! eliminated_buses=2483,2512,2539,2568,2602,2634,2667,2700,2735,2769,2803

New Line._virtual_line2496_line2522_line2548_line2579_line2612_line2645_line2678_line2710_line2743_line2778_line2812_line2847_line2884_line2915_line2947_line2976_line3002_line3030_line3056_line3081_line3108_line3132_line3154_line3177_line3201_line3223 bus1=3224.1.2.3.4 bus2=2467.1.2.3.4 phases=4 linecode=LC2 length=21.215645 units=m
! reduced_from=line2496,line2522,line2548,line2579,line2612,line2645,line2678,line2710,line2743,line2778,line2812,line2847,line2884,line2915,line2947,line2976,line3002,line3030,line3056,line3081,line3108,line3132,line3154,line3177,line3201,line3223
! eliminated_buses=2497,2523,2549,2580,2613,2646,2679,2711,2744,2779,2813,2848,2885,2916,2948,2977,3003,3031,3057,3082,3109,3133,3155,3178,3202

New Line._virtual_line2501_line2528_line2558_line2590 bus1=2591.1.2.3.4 bus2=2470.1.2.3.4 phases=4 linecode=LC4 length=11.779299 units=m
! reduced_from=line2501,line2528,line2558,line2590
! eliminated_buses=2502,2529,2559

New Line._virtual_line2526_line2554_line2584_line2617_line2650_line2683_line2715_line2748_line2783_line2817_line2851_line2888 bus1=2889.1.2.3.4 bus2=2500.1.2.3.4 phases=4 linecode=LC4 length=31.98334 units=m
! reduced_from=line2526,line2554,line2584,line2617,line2650,line2683,line2715,line2748,line2783,line2817,line2851,line2888
! eliminated_buses=2527,2555,2585,2618,2651,2684,2716,2749,2784,2818,2852
New Line._virtual_line2550_line2580_line2613_line2646_line2679_line2711_line2744_line2779_line2813_line2848_line2885_line2916_line2948_line2977_line3003_line3031_line3057_line3082_line3109_line3133_line3155_line3178_line3202 bus1=3203.1.2.3.4 bus2=2524.1.2.3.4 phases=4 linecode=LC2 length=21.05247 units=m
! reduced_from=line2550,line2580,line2613,line2646,line2679,line2711,line2744,line2779,line2813,line2848,line2885,line2916,line2948,line2977,line3003,line3031,line3057,line3082,line3109,line3133,line3155,line3178,line3202
! eliminated_buses=2551,2581,2614,2647,2680,2712,2745,2780,2814,2849,2886,2917,2949,2978,3004,3032,3058,3083,3110,3134,3156,3179

New Line._virtual_line2587_line2619_line2652_line2685_line2717_line2750_line2785_line2819_line2853_line2890_line2920_line2954_line2981_line3007_line3035_line3061_line3086_line3113_line3137 bus1=3138.1.2.3.4 bus2=2558.1.2.3.4 phases=4 linecode=LC2 length=13.032452 units=m
! reduced_from=line2587,line2619,line2652,line2685,line2717,line2750,line2785,line2819,line2853,line2890,line2920,line2954,line2981,line3007,line3035,line3061,line3086,line3113,line3137
! eliminated_buses=2588,2620,2653,2686,2718,2751,2786,2820,2854,2891,2921,2955,2982,3008,3036,3062,3087,3114

New Line._virtual_line2592_line2625_line2658_line2692_line2725_line2760_line2794_line2828_line2863_line2899_line2933 bus1=2561.1.2.3.4 bus2=2934.1.2.3.4 phases=4 linecode=LC2 length=9.77437 units=m
! reduced_from=line2592,line2625,line2658,line2692,line2725,line2760,line2794,line2828,line2863,line2899,line2933
! eliminated_buses=2593,2626,2659,2693,2726,2761,2795,2829,2864,2900

New Line._virtual_line2603_line2636_line2669_line2702_line2737_line2772_line2806 bus1=2807.1.2.3.4 bus2=2570.1.2.3.4 phases=4 linecode=LC4 length=35.63345 units=m
! reduced_from=line2603,line2636,line2669,line2702,line2737,line2772,line2806
! eliminated_buses=2604,2637,2670,2703,2738,2773

New Line._virtual_line2604_line2638 bus1=2639.1.2.3.4 bus2=2570.1.2.3.4 phases=4 linecode=LC2 length=15.9546 units=m
! reduced_from=line2604,line2638
! eliminated_buses=2605

New Line._virtual_line2622_line2655_line2688_line2720_line2753_line2788_line2822_line2856_line2893 bus1=2894.1.2.3.4 bus2=2591.1.2.3.4 phases=4 linecode=LC2 length=12.94817 units=m
! reduced_from=line2622,line2655,line2688,line2720,line2753,line2788,line2822,line2856,line2893
! eliminated_buses=2623,2656,2689,2721,2754,2789,2823,2857

New Line._virtual_line2623_line2656 bus1=2591.1.2.3.4 bus2=2657.1.2.3.4 phases=4 linecode=LC4 length=14.4645 units=m
! reduced_from=line2623,line2656
! eliminated_buses=2624

New Line._virtual_line2626_line2659_line2693_line2726_line2761_line2795_line2829_line2864 bus1=2865.1.2.3.4 bus2=2594.1.2.3.4 phases=4 linecode=LC2 length=8.248096 units=m
! reduced_from=line2626,line2659,line2693,line2726,line2761,line2795,line2829,line2864
! eliminated_buses=2627,2660,2694,2727,2762,2796,2830

New Line._virtual_line2627_line2660_line2694_line2727_line2762_line2796_line2830_line2865_line2902 bus1=2594.1.2.3.4 bus2=2903.1.2.3.4 phases=4 linecode=LC2 length=7.69963 units=m
! reduced_from=line2627,line2660,line2694,line2727,line2762,line2796,line2830,line2865,line2902
! eliminated_buses=2628,2661,2695,2728,2763,2797,2831,2866

New Line._virtual_line2640_line2673_line2706_line2741_line2776_line2810_line2845 bus1=2846.1.2.3.4 bus2=2607.1.2.3.4 phases=4 linecode=LC2 length=12.90022 units=m
! reduced_from=line2640,line2673,line2706,line2741,line2776,line2810,line2845
! eliminated_buses=2641,2674,2707,2742,2777,2811

New Line._virtual_line2671_line2704_line2739_line2774_line2808_line2843 bus1=2844.1.2.3.4 bus2=2639.1.2.3.4 phases=4 linecode=LC2 length=2.645429 units=m
! reduced_from=line2671,line2704,line2739,line2774,line2808,line2843
! eliminated_buses=2672,2705,2740,2775,2809

New Line._virtual_line2672_line2705_line2740_line2775_line2809_line2844 bus1=2639.1.2.3.4 bus2=2845.1.2.3.4 phases=4 linecode=LC2 length=2.67526 units=m
! reduced_from=line2672,line2705,line2740,line2775,line2809,line2844
! eliminated_buses=2673,2706,2741,2776,2810

New Line._virtual_line2674_line2707 bus1=2643.1.2.3.4 bus2=2708.1.2.3.4 phases=4 linecode=LC2 length=6.2989 units=m
! reduced_from=line2674,line2707
! eliminated_buses=2675

New Line._virtual_line2689_line2721_line2754_line2789_line2823 bus1=2824.1.2.3.4 bus2=2657.1.2.3.4 phases=4 linecode=LC2 length=16.05368 units=m
! reduced_from=line2689,line2721,line2754,line2789,line2823
! eliminated_buses=2690,2722,2755,2790

New Line._virtual_line2723_line2758_line2792_line2826_line2861_line2897_line2929_line2961_line2988_line3014_line3043_line3067_line3093_line3119_line3142_line3164_line3187_line3212_line3235 bus1=2691.1.2.3.4 bus2=3236.1.2.3.4 phases=4 linecode=LC4 length=52.84543 units=m
! reduced_from=line2723,line2758,line2792,line2826,line2861,line2897,line2929,line2961,line2988,line3014,line3043,line3067,line3093,line3119,line3142,line3164,line3187,line3212,line3235
! eliminated_buses=2724,2759,2793,2827,2862,2898,2930,2962,2989,3015,3044,3068,3094,3120,3143,3165,3188,3213

New Line._virtual_line2732_line2766_line2800_line2834_line2869_line2906_line2939_line2968_line2994_line3020_line3049_line3073_line3099_line3125_line3148_line3171_line3193_line3219 bus1=3220.1.2.3.4 bus2=2699.1.2.3.4 phases=4 linecode=LC2 length=20.142119 units=m
! reduced_from=line2732,line2766,line2800,line2834,line2869,line2906,line2939,line2968,line2994,line3020,line3049,line3073,line3099,line3125,line3148,line3171,line3193,line3219
! eliminated_buses=2733,2767,2801,2835,2870,2907,2940,2969,2995,3021,3050,3074,3100,3126,3149,3172,3194

New Line._virtual_line2756_line2790_line2824_line2859_line2895_line2927_line2959_line2986_line3012_line3041_line3065 bus1=3066.1.2.3.4 bus2=2723.1.2.3.4 phases=4 linecode=LC2 length=8.45459 units=m
! reduced_from=line2756,line2790,line2824,line2859,line2895,line2927,line2959,line2986,line3012,line3041,line3065
! eliminated_buses=2757,2791,2825,2860,2896,2928,2960,2987,3013,3042

New Line._virtual_line2840_line2876_line2909_line2942_line2971_line2997 bus1=2807.1.2.3.4 bus2=2998.1.2.3.4 phases=4 linecode=LC4 length=8.63333 units=m
! reduced_from=line2840,line2876,line2909,line2942,line2971,line2997
! eliminated_buses=2841,2877,2910,2943,2972

New Line._virtual_line2841_line2878_line2911_line2944_line2973_line2999_line3027_line3053_line3078 bus1=3079.1.2.3.4 bus2=2807.1.2.3.4 phases=4 linecode=LC2 length=9.87364 units=m
! reduced_from=line2841,line2878,line2911,line2944,line2973,line2999,line3027,line3053,line3078
! eliminated_buses=2842,2879,2912,2945,2974,3000,3028,3054

New Line._virtual_line2858_line2894_line2926_line2958_line2985_line3011_line3040_line3064_line3089_line3116_line3139 bus1=2824.1.2.3.4 bus2=3140.1.2.3.4 phases=4 linecode=LC2 length=6.94496 units=m
! reduced_from=line2858,line2894,line2926,line2958,line2985,line3011,line3040,line3064,line3089,line3116,line3139
! eliminated_buses=2859,2895,2927,2959,2986,3012,3041,3065,3090,3117

New Line._virtual_line2879_line2912_line2945_line2974_line3000_line3028_line3054_line3079_line3106_line3130_line3152_line3175 bus1=3176.1.2.3.4 bus2=2844.1.2.3.4 phases=4 linecode=LC2 length=23.79003 units=m
! reduced_from=line2879,line2912,line2945,line2974,line3000,line3028,line3054,line3079,line3106,line3130,line3152,line3175
! eliminated_buses=2880,2913,2946,2975,3001,3029,3055,3080,3107,3131,3153

New Line._virtual_line2881_line2913_line2946_line2975_line3001_line3029_line3055_line3080_line3107_line3131_line3153_line3176_line3200_line3222 bus1=3223.1.2.3.4 bus2=2845.1.2.3.4 phases=4 linecode=LC2 length=7.765708 units=m
! reduced_from=line2881,line2913,line2946,line2975,line3001,line3029,line3055,line3080,line3107,line3131,line3153,line3176,line3200,line3222
! eliminated_buses=2882,2914,2947,2976,3002,3030,3056,3081,3108,3132,3154,3177,3201

New Line._virtual_line2925_line2957_line2984_line3010 bus1=2894.1.2.3.4 bus2=3011.1.2.3.4 phases=4 linecode=LC2 length=5.6886 units=m
! reduced_from=line2925,line2957,line2984,line3010
! eliminated_buses=2926,2958,2985

New Line._virtual_line2951_line2979_line3005_line3033_line3059_line3084_line3111_line3135_line3157_line3180_line3204_line3227_line3251_line3271_line3290_line3312 bus1=3313.1.2.3.4 bus2=2919.1.2.3.4 phases=4 linecode=LC2 length=8.115651 units=m
! reduced_from=line2951,line2979,line3005,line3033,line3059,line3084,line3111,line3135,line3157,line3180,line3204,line3227,line3251,line3271,line3290,line3312
! eliminated_buses=2952,2980,3006,3034,3060,3085,3112,3136,3158,3181,3205,3228,3252,3272,3291

New Line._virtual_line2953_line2980_line3006_line3034_line3060_line3085_line3112_line3136_line3158_line3181_line3205_line3228_line3252_line3272_line3291 bus1=3292.1.2.3.4 bus2=2920.1.2.3.4 phases=4 linecode=LC2 length=13.53506 units=m
! reduced_from=line2953,line2980,line3006,line3034,line3060,line3085,line3112,line3136,line3158,line3181,line3205,line3228,line3252,line3272,line3291
! eliminated_buses=2954,2981,3007,3035,3061,3086,3113,3137,3159,3182,3206,3229,3253,3273

New Line._virtual_line3026_line3052_line3077_line3103_line3128_line3151_line3174_line3196_line3221_line3243_line3268_line3287_line3309_line3331_line3356_line3377_line3396 bus1=3397.1.2.3.4 bus2=2998.1.2.3.4 phases=4 linecode=LC2 length=12.32129 units=m
! reduced_from=line3026,line3052,line3077,line3103,line3128,line3151,line3174,line3196,line3221,line3243,line3268,line3287,line3309,line3331,line3356,line3377,line3396
! eliminated_buses=3027,3053,3078,3104,3129,3152,3175,3197,3222,3244,3269,3288,3310,3332,3357,3378

New Line._virtual_line3091_line3117_line3140_line3162_line3185_line3210_line3233_line3257_line3276_line3295_line3318_line3341_line3362_line3381_line3400_line3421_line3439_line3455_line3470_line3486_line3500_line3516_line3532_line3548 bus1=3066.1.2.3.4 bus2=3549.1.2.3.4 phases=4 linecode=LC2 length=21.08864 units=m
! reduced_from=line3091,line3117,line3140,line3162,line3185,line3210,line3233,line3257,line3276,line3295,line3318,line3341,line3362,line3381,line3400,line3421,line3439,line3455,line3470,line3486,line3500,line3516,line3532,line3548
! eliminated_buses=3092,3118,3141,3163,3186,3211,3234,3258,3277,3296,3319,3342,3363,3382,3401,3422,3440,3456,3471,3487,3501,3517,3533

New Line._virtual_line3104_line3129 bus1=3079.1.2.3.4 bus2=3130.1.2.3.4 phases=4 linecode=LC2 length=7.2838 units=m
! reduced_from=line3104,line3129
! eliminated_buses=3105

New Line._virtual_line3123_line3146_line3169_line3191 bus1=3098.1.2.3.4 bus2=3192.1.2.3.4 phases=4 linecode=LC2 length=29.1949 units=m
! reduced_from=line3123,line3146,line3169,line3191
! eliminated_buses=3124,3147,3170

New Line._virtual_line3160_line3183 bus1=3184.1.2.3.4 bus2=3140.1.2.3.4 phases=4 linecode=LC2 length=9.0344 units=m
! reduced_from=line3160,line3183
! eliminated_buses=3161

New Line._virtual_line3161_line3184_line3209_line3232_line3256_line3275_line3294_line3317_line3340 bus1=3341.1.2.3.4 bus2=3140.1.2.3.4 phases=4 linecode=LC2 length=11.73368 units=m
! reduced_from=line3161,line3184,line3209,line3232,line3256,line3275,line3294,line3317,line3340
! eliminated_buses=3162,3185,3210,3233,3257,3276,3295,3318

New Line._virtual_line3166_line3188_line3213_line3236_line3261_line3280_line3301_line3324_line3349_line3369_line3388_line3408_line3427 bus1=3144.1.2.3.4 bus2=3428.1.2.3.4 phases=4 linecode=LC2 length=9.36718 units=m
! reduced_from=line3166,line3188,line3213,line3236,line3261,line3280,line3301,line3324,line3349,line3369,line3388,line3408,line3427
! eliminated_buses=3167,3189,3214,3237,3262,3281,3302,3325,3350,3370,3389,3409

New Line._virtual_line3207_line3230_line3254_line3273_line3292_line3315_line3337 bus1=3338.1.2.3.4 bus2=3184.1.2.3.4 phases=4 linecode=LC2 length=9.35886 units=m
! reduced_from=line3207,line3230,line3254,line3273,line3292,line3315,line3337
! eliminated_buses=3208,3231,3255,3274,3293,3316

New Line._virtual_line3208_line3231_line3255_line3274_line3293_line3316 bus1=3317.1.2.3.4 bus2=3184.1.2.3.4 phases=4 linecode=LC2 length=8.49483 units=m
! reduced_from=line3208,line3231,line3255,line3274,line3293,line3316
! eliminated_buses=3209,3232,3256,3275,3294

New Line._virtual_line3216_line3239_line3263_line3282_line3304_line3327_line3352_line3372_line3391_line3411_line3430_line3447_line3462_line3477_line3492 bus1=3192.1.2.3.4 bus2=3493.1.2.3.4 phases=4 linecode=LC2 length=3.149795 units=m
! reduced_from=line3216,line3239,line3263,line3282,line3304,line3327,line3352,line3372,line3391,line3411,line3430,line3447,line3462,line3477,line3492
! eliminated_buses=3217,3240,3264,3283,3305,3328,3353,3373,3392,3412,3431,3448,3463,3478

New Line._virtual_line3217_line3240_line3264_line3283_line3305_line3328_line3353_line3373_line3392_line3412_line3431_line3448_line3463 bus1=3464.1.2.3.4 bus2=3192.1.2.3.4 phases=4 linecode=LC2 length=6.331335 units=m
! reduced_from=line3217,line3240,line3264,line3283,line3305,line3328,line3353,line3373,line3392,line3412,line3431,line3448,line3463
! eliminated_buses=3218,3241,3265,3284,3306,3329,3354,3374,3393,3413,3432,3449

New Line._virtual_line3244_line3269_line3288_line3310_line3332_line3357_line3378_line3397_line3418_line3436_line3452_line3467_line3483_line3497_line3513_line3528_line3545_line3560 bus1=3223.1.2.3.4 bus2=3561.1.2.3.4 phases=4 linecode=LC2 length=17.157049 units=m
! reduced_from=line3244,line3269,line3288,line3310,line3332,line3357,line3378,line3397,line3418,line3436,line3452,line3467,line3483,line3497,line3513,line3528,line3545,line3560
! eliminated_buses=3245,3270,3289,3311,3333,3358,3379,3398,3419,3437,3453,3468,3484,3498,3514,3529,3546

New Line._virtual_line3259_line3278 bus1=3236.1.2.3.4 bus2=3279.1.2.3.4 phases=4 linecode=LC4 length=10.8469 units=m
! reduced_from=line3259,line3278
! eliminated_buses=3260

New Line._virtual_line3260_line3279_line3300_line3323 bus1=3236.1.2.3.4 bus2=3324.1.2.3.4 phases=4 linecode=LC4 length=23.866 units=m
! reduced_from=line3260,line3279,line3300,line3323
! eliminated_buses=3261,3280,3301

New Line._virtual_line3297_line3320_line3343_line3364_line3383_line3402_line3423_line3441_line3457_line3472_line3488_line3502_line3518 bus1=3519.1.2.3.4 bus2=3279.1.2.3.4 phases=4 linecode=LC2 length=13.89783 units=m
! reduced_from=line3297,line3320,line3343,line3364,line3383,line3402,line3423,line3441,line3457,line3472,line3488,line3502,line3518
! eliminated_buses=3298,3321,3344,3365,3384,3403,3424,3442,3458,3473,3489,3503

New Line._virtual_line3314_line3336_line3359_line3380_line3399_line3420_line3438_line3454_line3469_line3485_line3499_line3515 bus1=3516.1.2.3.4 bus2=3292.1.2.3.4 phases=4 linecode=LC2 length=7.92672 units=m
! reduced_from=line3314,line3336,line3359,line3380,line3399,line3420,line3438,line3454,line3469,line3485,line3499,line3515
! eliminated_buses=3315,3337,3360,3381,3400,3421,3439,3455,3470,3486,3500

New Line._virtual_line3335_line3358_line3379_line3398_line3419_line3437_line3453_line3468_line3484_line3498_line3514_line3529_line3546_line3561 bus1=3313.1.2.3.4 bus2=3562.1.2.3.4 phases=4 linecode=LC2 length=11.588104 units=m
! reduced_from=line3335,line3358,line3379,line3398,line3419,line3437,line3453,line3468,line3484,line3498,line3514,line3529,line3546,line3561
! eliminated_buses=3336,3359,3380,3399,3420,3438,3454,3469,3485,3499,3515,3530,3547

New Line._virtual_line3347_line3368_line3387 bus1=3324.1.2.3.4 bus2=3388.1.2.3.4 phases=4 linecode=LC2 length=13.22743 units=m
! reduced_from=line3347,line3368,line3387
! eliminated_buses=3348,3369

New Line._virtual_line3407_line3426_line3443_line3459_line3474_line3489_line3503_line3519 bus1=3388.1.2.3.4 bus2=3520.1.2.3.4 phases=4 linecode=LC2 length=4.909649 units=m
! reduced_from=line3407,line3426,line3443,line3459,line3474,line3489,line3503,line3519
! eliminated_buses=3408,3427,3444,3460,3475,3490,3504

New Line._virtual_line3417_line3435_line3451_line3466_line3482_line3496_line3512_line3527_line3544_line3559_line3574_line3589_line3600_line3610_line3620 bus1=3397.1.2.3.4 bus2=3621.1.2.3.4 phases=4 linecode=LC2 length=20.44576 units=m
! reduced_from=line3417,line3435,line3451,line3466,line3482,line3496,line3512,line3527,line3544,line3559,line3574,line3589,line3600,line3610,line3620
! eliminated_buses=3418,3436,3452,3467,3483,3497,3513,3528,3545,3560,3575,3590,3601,3611

New Line._virtual_line3445_line3460_line3475_line3490_line3504_line3520_line3538_line3553_line3569_line3584_line3595_line3605_line3615 bus1=3428.1.2.3.4 bus2=3616.1.2.3.4 phases=4 linecode=LC2 length=13.91214 units=m
! reduced_from=line3445,line3460,line3475,line3490,line3504,line3520,line3538,line3553,line3569,line3584,line3595,line3605,line3615
! eliminated_buses=3446,3461,3476,3491,3505,3521,3539,3554,3570,3585,3596,3606

New Line._virtual_line3479_line3493_line3509_line3524_line3542_line3557_line3572_line3587_line3598_line3608_line3618_line3627_line3634_line3641_line3648_line3655_line3663_line3670_line3676_line3681_line3686_line3691_line3696_line3701_line3705_line3709_line3713_line3717_line3721_line3725_line3729_line3733_line3736_line3739_line3742_line3745_line3748 bus1=3464.1.2.3.4 bus2=3749.1.2.3.4 phases=4 linecode=LC2 length=21.332225 units=m
! reduced_from=line3479,line3493,line3509,line3524,line3542,line3557,line3572,line3587,line3598,line3608,line3618,line3627,line3634,line3641,line3648,line3655,line3663,line3670,line3676,line3681,line3686,line3691,line3696,line3701,line3705,line3709,line3713,line3717,line3721,line3725,line3729,line3733,line3736,line3739,line3742,line3745,line3748
! eliminated_buses=3480,3494,3510,3525,3543,3558,3573,3588,3599,3609,3619,3628,3635,3642,3649,3656,3664,3671,3677,3682,3687,3692,3697,3702,3706,3710,3714,3718,3722,3726,3730,3734,3737,3740,3743,3746

New Line._virtual_line3507_line3522_line3540_line3555_line3570_line3585_line3596_line3606_line3616_line3625_line3632_line3639_line3646_line3653_line3661_line3668_line3674_line3679_line3684_line3689_line3694_line3699_line3703_line3707_line3711_line3715_line3719_line3723_line3727_line3731_line3734_line3737_line3740_line3743_line3746 bus1=3493.1.2.3.4 bus2=3747.1.2.3.4 phases=4 linecode=LC2 length=22.174633 units=m
! reduced_from=line3507,line3522,line3540,line3555,line3570,line3585,line3596,line3606,line3616,line3625,line3632,line3639,line3646,line3653,line3661,line3668,line3674,line3679,line3684,line3689,line3694,line3699,line3703,line3707,line3711,line3715,line3719,line3723,line3727,line3731,line3734,line3737,line3740,line3743,line3746
! eliminated_buses=3508,3523,3541,3556,3571,3586,3597,3607,3617,3626,3633,3640,3647,3654,3662,3669,3675,3680,3685,3690,3695,3700,3704,3708,3712,3716,3720,3724,3728,3732,3735,3738,3741,3744

New Line._virtual_line3531_line3547_line3562_line3579_line3590_line3601_line3611_line3621_line3628_line3635_line3642_line3649_line3656_line3664_line3671_line3677_line3682_line3687_line3692_line3697 bus1=3516.1.2.3.4 bus2=3698.1.2.3.4 phases=4 linecode=LC2 length=15.999713 units=m
! reduced_from=line3531,line3547,line3562,line3579,line3590,line3601,line3611,line3621,line3628,line3635,line3642,line3649,line3656,line3664,line3671,line3677,line3682,line3687,line3692,line3697
! eliminated_buses=3532,3548,3563,3580,3591,3602,3612,3622,3629,3636,3643,3650,3657,3665,3672,3678,3683,3688,3693

New Line._virtual_line3535_line3550_line3566_line3581_line3592_line3602_line3612_line3622_line3629_line3636_line3643_line3650_line3657 bus1=3658.1.2.3.4 bus2=3519.1.2.3.4 phases=4 linecode=LC2 length=6.07425 units=m
! reduced_from=line3535,line3550,line3566,line3581,line3592,line3602,line3612,line3622,line3629,line3636,line3643,line3650,line3657
! eliminated_buses=3536,3551,3567,3582,3593,3603,3613,3623,3630,3637,3644,3651

New Line._virtual_line3536_line3551_line3567_line3582_line3593_line3603_line3613_line3623_line3630_line3637_line3644_line3651 bus1=3520.1.2.3.4 bus2=3652.1.2.3.4 phases=4 linecode=LC2 length=18.26417 units=m
! reduced_from=line3536,line3551,line3567,line3582,line3593,line3603,line3613,line3623,line3630,line3637,line3644,line3651
! eliminated_buses=3537,3552,3568,3583,3594,3604,3614,3624,3631,3638,3645

New Line._virtual_line3537_line3552_line3568_line3583_line3594_line3604_line3614_line3624_line3631_line3638_line3645_line3652_line3660_line3667_line3673 bus1=3674.1.2.3.4 bus2=3520.1.2.3.4 phases=4 linecode=LC2 length=22.643841 units=m
! reduced_from=line3537,line3552,line3568,line3583,line3594,line3604,line3614,line3624,line3631,line3638,line3645,line3652,line3660,line3667,line3673
! eliminated_buses=3538,3553,3569,3584,3595,3605,3615,3625,3632,3639,3646,3653,3661,3668

New Line._virtual_line3666_line3672_line3678_line3683_line3688_line3693_line3698_line3702_line3706_line3710_line3714_line3718_line3722_line3726_line3730 bus1=3731.1.2.3.4 bus2=3658.1.2.3.4 phases=4 linecode=LC2 length=15.84944 units=m
! reduced_from=line3666,line3672,line3678,line3683,line3688,line3693,line3698,line3702,line3706,line3710,line3714,line3718,line3722,line3726,line3730
! eliminated_buses=3667,3673,3679,3684,3689,3694,3699,3703,3707,3711,3715,3719,3723,3727

New Line._virtual_line3751_line3756_line3759_line3762_line3765_line3768_line3771_line3774_line3777_line3780_line3783_line3786_line3789_line3792_line3795_line3798_line3801_line3804_line3807_line3810_line3813_line3816_line3819_line3822_line3825_line3828 bus1=3747.1.2.3.4 bus2=3829.1.2.3.4 phases=4 linecode=LC2 length=15.374633 units=m
! reduced_from=line3751,line3756,line3759,line3762,line3765,line3768,line3771,line3774,line3777,line3780,line3783,line3786,line3789,line3792,line3795,line3798,line3801,line3804,line3807,line3810,line3813,line3816,line3819,line3822,line3825,line3828
! eliminated_buses=3752,3757,3760,3763,3766,3769,3772,3775,3778,3781,3784,3787,3790,3793,3796,3799,3802,3805,3808,3811,3814,3817,3820,3823,3826

New Line._virtual_line3755_line3758_line3761_line3764_line3767_line3770_line3773_line3776_line3779_line3782_line3785_line3788_line3791_line3794_line3797_line3800_line3803_line3806_line3809_line3812_line3815_line3818_line3821_line3824_line3827_line3830_line3833_line3835 bus1=3836.1.2.3.4 bus2=3749.1.2.3.4 phases=4 linecode=LC2 length=17.854535 units=m
! reduced_from=line3755,line3758,line3761,line3764,line3767,line3770,line3773,line3776,line3779,line3782,line3785,line3788,line3791,line3794,line3797,line3800,line3803,line3806,line3809,line3812,line3815,line3818,line3821,line3824,line3827,line3830,line3833,line3835
! eliminated_buses=3756,3759,3762,3765,3768,3771,3774,3777,3780,3783,3786,3789,3792,3795,3798,3801,3804,3807,3810,3813,3816,3819,3822,3825,3828,3831,3834

New Line._virtual_line3832_line3834_line3836_line3837_line3838_line3839_line3840_line3841_line3842_line3843_line3844_line3845_line3846_line3847_line3848_line3849_line3850_line3851_line3852_line3853_line3854 bus1=3855.1.2.3.4 bus2=3829.1.2.3.4 phases=4 linecode=LC2 length=12.01567 units=m
! reduced_from=line3832,line3834,line3836,line3837,line3838,line3839,line3840,line3841,line3842,line3843,line3844,line3845,line3846,line3847,line3848,line3849,line3850,line3851,line3852,line3853,line3854
! eliminated_buses=3833,3835,3837,3838,3839,3840,3841,3842,3843,3844,3845,3846,3847,3848,3849,3850,3851,3852,3853,3854

New Line.LINE104 bus1=102.1.2.3.4 bus2=105.1.2.3.4 phases=4 linecode=LC4 length=1.939 units=m

New Line.LINE110 bus1=105.1.2.3.4 bus2=111.1.2.3.4 phases=4 linecode=LC4 length=1.6398 units=m

New Line.LINE116 bus1=111.1.2.3.4 bus2=117.1.2.3.4 phases=4 linecode=LC2 length=6.8256 units=m

New Line.LINE123 bus1=117.1.2.3.4 bus2=124.1.2.3.4 phases=4 linecode=LC2 length=4.4985 units=m

New Line.LINE133 bus1=127.1.2.3.4 bus2=134.1.2.3.4 phases=4 linecode=LC2 length=8.8692 units=m

New Line.LINE141 bus1=134.1.2.3.4 bus2=142.1.2.3.4 phases=4 linecode=LC2 length=5.0849 units=m

New Line.LINE203 bus1=194.1.2.3.4 bus2=204.1.2.3.4 phases=4 linecode=LC2 length=8.3069 units=m

New Line.LINE206 bus1=196.1.2.3.4 bus2=207.1.2.3.4 phases=4 linecode=LC2 length=7.333 units=m

New Line.LINE215 bus1=204.1.2.3.4 bus2=216.1.2.3.4 phases=4 linecode=LC2 length=3.7623 units=m

New Line.LINE219 bus1=207.1.2.3.4 bus2=220.1.2.3.4 phases=4 linecode=LC2 length=4.0687 units=m

New Line.LINE232 bus1=218.1.2.3.4 bus2=233.1.2.3.4 phases=4 linecode=LC4 length=4.1005 units=m

New Line.LINE306 bus1=288.1.2.3.4 bus2=307.1.2.3.4 phases=4 linecode=LC2 length=5.4459 units=m

New Line.LINE322 bus1=301.1.2.3.4 bus2=323.1.2.3.4 phases=4 linecode=LC2 length=7.9363 units=m

New Line.LINE344 bus1=323.1.2.3.4 bus2=345.1.2.3.4 phases=4 linecode=LC2 length=4.8547 units=m

New Line.LINE400 bus1=382.1.2.3.4 bus2=401.1.2.3.4 phases=4 linecode=LC2 length=4.3632 units=m

New Line.LINE409 bus1=389.1.2.3.4 bus2=410.1.2.3.4 phases=4 linecode=LC2 length=6.0619 units=m

New Line.LINE439 bus1=415.1.2.3.4 bus2=440.1.2.3.4 phases=4 linecode=LC2 length=4.9893 units=m

New Line.LINE440 bus1=415.1.2.3.4 bus2=441.1.2.3.4 phases=4 linecode=LC2 length=4.9893 units=m

New Line.LINE482 bus1=457.1.2.3.4 bus2=483.1.2.3.4 phases=4 linecode=LC2 length=6.1533 units=m

New Line.LINE511 bus1=483.1.2.3.4 bus2=512.1.2.3.4 phases=4 linecode=LC2 length=5.0943 units=m

New Line.LINE574 bus1=547.1.2.3.4 bus2=575.1.2.3.4 phases=4 linecode=LC2 length=2.344 units=m

New Line.LINE575 bus1=547.1.2.3.4 bus2=576.1.2.3.4 phases=4 linecode=LC2 length=2.344 units=m

New Line.LINE576 bus1=548.1.2.3.4 bus2=577.1.2.3.4 phases=4 linecode=LC2 length=6.3346 units=m

New Line.LINE578 bus1=549.1.2.3.4 bus2=579.1.2.3.4 phases=4 linecode=LC2 length=5.3837 units=m

New Line.LINE601 bus1=568.1.2.3.4 bus2=602.1.2.3.4 phases=4 linecode=LC2 length=5.3316 units=m

New Line.LINE683 bus1=654.1.2.3.4 bus2=684.1.2.3.4 phases=4 linecode=LC2 length=6.5306 units=m

New Line.LINE713 bus1=684.1.2.3.4 bus2=714.1.2.3.4 phases=4 linecode=LC2 length=3.832 units=m

New Line.LINE720 bus1=691.1.2.3.4 bus2=721.1.2.3.4 phases=4 linecode=LC2 length=8.4976 units=m

New Line.LINE752 bus1=724.1.2.3.4 bus2=753.1.2.3.4 phases=4 linecode=LC2 length=5.8887 units=m

New Line.LINE753 bus1=724.1.2.3.4 bus2=754.1.2.3.4 phases=4 linecode=LC2 length=6.776 units=m

New Line.LINE754 bus1=724.1.2.3.4 bus2=755.1.2.3.4 phases=4 linecode=LC2 length=6.776 units=m

New Line.LINE771 bus1=742.1.2.3.4 bus2=772.1.2.3.4 phases=4 linecode=LC2 length=9.14 units=m

New Line.LINE775 bus1=745.1.2.3.4 bus2=776.1.2.3.4 phases=4 linecode=LC2 length=5.8392 units=m

New Line.LINE776 bus1=745.1.2.3.4 bus2=777.1.2.3.4 phases=4 linecode=LC2 length=5.8392 units=m

New Line.LINE777 bus1=745.1.2.3.4 bus2=778.1.2.3.4 phases=4 linecode=LC2 length=5.9753 units=m

New Line.LINE784 bus1=753.1.2.3.4 bus2=785.1.2.3.4 phases=4 linecode=LC2 length=4.3663 units=m

New Line.LINE785 bus1=753.1.2.3.4 bus2=786.1.2.3.4 phases=4 linecode=LC2 length=4.3663 units=m

New Line.LINE798 bus1=768.1.2.3.4 bus2=799.1.2.3.4 phases=4 linecode=LC2 length=5.1489 units=m

New Line.LINE808 bus1=778.1.2.3.4 bus2=809.1.2.3.4 phases=4 linecode=LC2 length=6.8782 units=m

New Line.LINE809 bus1=778.1.2.3.4 bus2=810.1.2.3.4 phases=4 linecode=LC2 length=6.8782 units=m

New Line.LINE861 bus1=835.1.2.3.4 bus2=862.1.2.3.4 phases=4 linecode=LC2 length=6.6184 units=m

New Line.LINE886 bus1=862.1.2.3.4 bus2=887.1.2.3.4 phases=4 linecode=LC2 length=5.3031 units=m

New Line.LINE913 bus1=889.1.2.3.4 bus2=914.1.2.3.4 phases=4 linecode=LC2 length=7.383 units=m

New Line.LINE918 bus1=893.1.2.3.4 bus2=919.1.2.3.4 phases=4 linecode=LC2 length=5.2271 units=m

New Line.LINE929 bus1=903.1.2.3.4 bus2=930.1.2.3.4 phases=4 linecode=LC2 length=1.7277 units=m

New Line.LINE930 bus1=903.1.2.3.4 bus2=931.1.2.3.4 phases=4 linecode=LC2 length=1.7277 units=m

New Line.LINE979 bus1=953.1.2.3.4 bus2=980.1.2.3.4 phases=4 linecode=LC2 length=6.0623 units=m

New Line.LINE1024 bus1=1002.1.2.3.4 bus2=1025.1.2.3.4 phases=4 linecode=LC2 length=4.2433 units=m

New Line.LINE1039 bus1=1016.1.2.3.4 bus2=1040.1.2.3.4 phases=4 linecode=LC2 length=2.8833 units=m

New Line.LINE1040 bus1=1016.1.2.3.4 bus2=1041.1.2.3.4 phases=4 linecode=LC2 length=2.8833 units=m

New Line.LINE1048 bus1=1023.1.2.3.4 bus2=1049.1.2.3.4 phases=4 linecode=LC2 length=5.7298 units=m

New Line.LINE1061 bus1=1036.1.2.3.4 bus2=1062.1.2.3.4 phases=4 linecode=LC2 length=3.2822 units=m

New Line.LINE1074 bus1=1050.1.2.3.4 bus2=1075.1.2.3.4 phases=4 linecode=LC2 length=5.3231 units=m

New Line.LINE1093 bus1=1069.1.2.3.4 bus2=1094.1.2.3.4 phases=4 linecode=LC2 length=4.6484 units=m

New Line.LINE1094 bus1=1069.1.2.3.4 bus2=1095.1.2.3.4 phases=4 linecode=LC2 length=4.6484 units=m

New Line.LINE1104 bus1=1080.1.2.3.4 bus2=1105.1.2.3.4 phases=4 linecode=LC2 length=7.2047 units=m

New Line.LINE1105 bus1=1080.1.2.3.4 bus2=1106.1.2.3.4 phases=4 linecode=LC2 length=7.2047 units=m

New Line.LINE1145 bus1=1125.1.2.3.4 bus2=1146.1.2.3.4 phases=4 linecode=LC2 length=5.5235 units=m

New Line.LINE1165 bus1=1144.1.2.3.4 bus2=1166.1.2.3.4 phases=4 linecode=LC2 length=5.406 units=m

New Line.LINE1201 bus1=1180.1.2.3.4 bus2=1202.1.2.3.4 phases=4 linecode=LC2 length=5.1711 units=m

New Line.LINE1202 bus1=1180.1.2.3.4 bus2=1203.1.2.3.4 phases=4 linecode=LC2 length=5.1711 units=m

New Line.LINE1218 bus1=1195.1.2.3.4 bus2=1219.1.2.3.4 phases=4 linecode=LC1 length=0.2619 units=m

New Line.LINE1274 bus1=1251.1.2.3.4 bus2=1275.1.2.3.4 phases=4 linecode=LC2 length=5.5889 units=m

New Line.LINE1280 bus1=1256.1.2.3.4 bus2=1281.1.2.3.4 phases=4 linecode=LC4 length=1.4779 units=m

New Line.LINE1304 bus1=1281.1.2.3.4 bus2=1305.1.2.3.4 phases=4 linecode=LC2 length=27.336 units=m

New Line.LINE1316 bus1=1292.1.2.3.4 bus2=1317.1.2.3.4 phases=4 linecode=LC2 length=5.9486 units=m

New Line.LINE1317 bus1=1292.1.2.3.4 bus2=1318.1.2.3.4 phases=4 linecode=LC2 length=5.9486 units=m

New Line.LINE1326 bus1=1300.1.2.3.4 bus2=1327.1.2.3.4 phases=4 linecode=LC2 length=5.4889 units=m

New Line.LINE1329 bus1=1302.1.2.3.4 bus2=1330.1.2.3.4 phases=4 linecode=LC2 length=5.426 units=m

New Line.LINE1381 bus1=1355.1.2.3.4 bus2=1382.1.2.3.4 phases=4 linecode=LC2 length=5.0273 units=m

New Line.LINE1508 bus1=1485.1.2.3.4 bus2=1509.1.2.3.4 phases=4 linecode=LC2 length=5.2311 units=m

New Line.LINE1510 bus1=1486.1.2.3.4 bus2=1511.1.2.3.4 phases=4 linecode=LC2 length=5.0582 units=m

New Line.LINE1517 bus1=1494.1.2.3.4 bus2=1518.1.2.3.4 phases=4 linecode=LC2 length=4.6471 units=m

New Line.LINE1554 bus1=1532.1.2.3.4 bus2=1555.1.2.3.4 phases=4 linecode=LC2 length=5.4685 units=m

New Line.LINE1559 bus1=1536.1.2.3.4 bus2=1560.1.2.3.4 phases=4 linecode=LC2 length=13.6097 units=m

New Line.LINE1583 bus1=1560.1.2.3.4 bus2=1584.1.2.3.4 phases=4 linecode=LC2 length=3.7549 units=m

New Line.LINE1587 bus1=1564.1.2.3.4 bus2=1588.1.2.3.4 phases=4 linecode=LC2 length=5.1975 units=m

New Line.LINE1599 bus1=1572.1.2.3.4 bus2=1600.1.2.3.4 phases=4 linecode=LC3 length=4.4745 units=m

New Line.LINE1605 bus1=1576.1.2.3.4 bus2=1606.1.2.3.4 phases=4 linecode=LC2 length=5.4983 units=m

New Line.LINE1615 bus1=1586.1.2.3.4 bus2=1616.1.2.3.4 phases=4 linecode=LC2 length=3.4404 units=m

New Line.LINE1616 bus1=1586.1.2.3.4 bus2=1617.1.2.3.4 phases=4 linecode=LC2 length=3.4404 units=m

New Line.LINE1641 bus1=1613.1.2.3.4 bus2=1642.1.2.3.4 phases=4 linecode=LC2 length=4.818 units=m

New Line.LINE1670 bus1=1644.1.2.3.4 bus2=1671.1.2.3.4 phases=4 linecode=LC2 length=6.7571 units=m

New Line.LINE1671 bus1=1644.1.2.3.4 bus2=1672.1.2.3.4 phases=4 linecode=LC2 length=6.7571 units=m

New Line.LINE1710 bus1=1682.1.2.3.4 bus2=1711.1.2.3.4 phases=4 linecode=LC2 length=15.9207 units=m

New Line.LINE1800 bus1=1772.1.2.3.4 bus2=1801.1.2.3.4 phases=4 linecode=LC2 length=13.287 units=m

New Line.LINE1804 bus1=1775.1.2.3.4 bus2=1805.1.2.3.4 phases=4 linecode=LC2 length=4.2411 units=m

New Line.LINE1844 bus1=1817.1.2.3.4 bus2=1845.1.2.3.4 phases=4 linecode=LC2 length=6.0535 units=m

New Line.LINE1856 bus1=1828.1.2.3.4 bus2=1857.1.2.3.4 phases=4 linecode=LC2 length=3.3864 units=m

New Line.LINE1861 bus1=1833.1.2.3.4 bus2=1862.1.2.3.4 phases=4 linecode=LC1 length=2.9817 units=m

New Line.LINE1872 bus1=1846.1.2.3.4 bus2=1873.1.2.3.4 phases=4 linecode=LC2 length=4.5823 units=m

New Line.LINE1884 bus1=1858.1.2.3.4 bus2=1885.1.2.3.4 phases=4 linecode=LC2 length=3.3143 units=m

New Line.LINE1953 bus1=1929.1.2.3.4 bus2=1954.1.2.3.4 phases=4 linecode=LC2 length=4.8815 units=m

New Line.LINE1964 bus1=1939.1.2.3.4 bus2=1965.1.2.3.4 phases=4 linecode=LC2 length=15.7986 units=m

New Line.LINE1971 bus1=1945.1.2.3.4 bus2=1972.1.2.3.4 phases=4 linecode=LC2 length=5.2528 units=m

New Line.LINE2004 bus1=1979.1.2.3.4 bus2=2005.1.2.3.4 phases=4 linecode=LC2 length=6.9645 units=m

New Line.LINE2005 bus1=1979.1.2.3.4 bus2=2006.1.2.3.4 phases=4 linecode=LC2 length=6.9645 units=m

New Line.LINE2028 bus1=1999.1.2.3.4 bus2=2029.1.2.3.4 phases=4 linecode=LC2 length=1.5231 units=m

New Line.LINE2030 bus1=2000.1.2.3.4 bus2=2031.1.2.3.4 phases=4 linecode=LC2 length=4.2797 units=m

New Line.LINE2045 bus1=2016.1.2.3.4 bus2=2046.1.2.3.4 phases=4 linecode=LC2 length=4.9185 units=m

New Line.LINE2062 bus1=2036.1.2.3.4 bus2=2063.1.2.3.4 phases=4 linecode=LC2 length=5.5599 units=m

New Line.LINE2080 bus1=2054.1.2.3.4 bus2=2081.1.2.3.4 phases=4 linecode=LC2 length=5.9958 units=m

New Line.LINE2099 bus1=2072.1.2.3.4 bus2=2100.1.2.3.4 phases=4 linecode=LC2 length=2.8356 units=m

New Line.LINE2100 bus1=2072.1.2.3.4 bus2=2101.1.2.3.4 phases=4 linecode=LC2 length=2.8356 units=m

New Line.LINE2102 bus1=2075.1.2.3.4 bus2=2103.1.2.3.4 phases=4 linecode=LC2 length=4.1821 units=m

New Line.LINE2104 bus1=2075.1.2.3.4 bus2=2105.1.2.3.4 phases=4 linecode=LC2 length=3.4154 units=m

New Line.LINE2105 bus1=2076.1.2.3.4 bus2=2106.1.2.3.4 phases=4 linecode=LC2 length=5.6823 units=m

New Line.LINE2107 bus1=2076.1.2.3.4 bus2=2108.1.2.3.4 phases=4 linecode=LC2 length=3.2803 units=m

New Line.LINE2114 bus1=2083.1.2.3.4 bus2=2115.1.2.3.4 phases=4 linecode=LC2 length=5.3586 units=m

New Line.LINE2125 bus1=2094.1.2.3.4 bus2=2126.1.2.3.4 phases=4 linecode=LC2 length=2.127 units=m

New Line.LINE2126 bus1=2094.1.2.3.4 bus2=2127.1.2.3.4 phases=4 linecode=LC2 length=2.127 units=m

New Line.LINE2130 bus1=2097.1.2.3.4 bus2=2131.1.2.3.4 phases=4 linecode=LC2 length=5.9404 units=m

New Line.LINE2131 bus1=2097.1.2.3.4 bus2=2132.1.2.3.4 phases=4 linecode=LC2 length=5.9404 units=m

New Line.LINE2132 bus1=2097.1.2.3.4 bus2=2133.1.2.3.4 phases=4 linecode=LC2 length=5.1705 units=m

New Line.LINE2180 bus1=2156.1.2.3.4 bus2=2181.1.2.3.4 phases=4 linecode=LC2 length=1.8232 units=m

New Line.LINE2181 bus1=2156.1.2.3.4 bus2=2182.1.2.3.4 phases=4 linecode=LC2 length=1.8232 units=m

New Line.LINE2204 bus1=2176.1.2.3.4 bus2=2205.1.2.3.4 phases=4 linecode=LC4 length=0.49041 units=m

New Line.LINE2253 bus1=2226.1.2.3.4 bus2=2254.1.2.3.4 phases=4 linecode=LC2 length=6.359 units=m

New Line.LINE2254 bus1=2226.1.2.3.4 bus2=2255.1.2.3.4 phases=4 linecode=LC2 length=10.9871 units=m

New Line.LINE2260 bus1=2233.1.2.3.4 bus2=2261.1.2.3.4 phases=4 linecode=LC2 length=6.2 units=m

New Line.LINE2290 bus1=2264.1.2.3.4 bus2=2291.1.2.3.4 phases=4 linecode=LC2 length=4.6365 units=m

New Line.LINE2369 bus1=2340.1.2.3.4 bus2=2370.1.2.3.4 phases=4 linecode=LC2 length=4.3942 units=m

New Line.LINE2370 bus1=2340.1.2.3.4 bus2=2371.1.2.3.4 phases=4 linecode=LC2 length=4.3942 units=m

New Line.LINE2378 bus1=2347.1.2.3.4 bus2=2379.1.2.3.4 phases=4 linecode=LC4 length=1.4823 units=m

New Line.LINE2391 bus1=2361.1.2.3.4 bus2=2392.1.2.3.4 phases=4 linecode=LC2 length=5.2733 units=m

New Line.LINE2392 bus1=2361.1.2.3.4 bus2=2393.1.2.3.4 phases=4 linecode=LC2 length=5.2733 units=m

New Line.LINE2401 bus1=2372.1.2.3.4 bus2=2402.1.2.3.4 phases=4 linecode=LC2 length=4.9174 units=m

New Line.LINE2402 bus1=2372.1.2.3.4 bus2=2403.1.2.3.4 phases=4 linecode=LC2 length=4.9174 units=m

New Line.LINE2429 bus1=2399.1.2.3.4 bus2=2430.1.2.3.4 phases=4 linecode=LC2 length=7.7507 units=m

New Line.LINE2430 bus1=2399.1.2.3.4 bus2=2431.1.2.3.4 phases=4 linecode=LC2 length=7.7507 units=m

New Line.LINE2434 bus1=2404.1.2.3.4 bus2=2435.1.2.3.4 phases=4 linecode=LC2 length=3.291 units=m

New Line.LINE2460 bus1=2429.1.2.3.4 bus2=2461.1.2.3.4 phases=4 linecode=LC2 length=4.3531 units=m

New Line.LINE2481 bus1=2454.1.2.3.4 bus2=2482.1.2.3.4 phases=4 linecode=LC2 length=5.3488 units=m

New Line.LINE2483 bus1=2454.1.2.3.4 bus2=2484.1.2.3.4 phases=4 linecode=LC2 length=2.23 units=m

New Line.LINE2484 bus1=2454.1.2.3.4 bus2=2485.1.2.3.4 phases=4 linecode=LC2 length=2.23 units=m

New Line.LINE2495 bus1=2467.1.2.3.4 bus2=2496.1.2.3.4 phases=4 linecode=LC2 length=5.6374 units=m

New Line.LINE2499 bus1=2470.1.2.3.4 bus2=2500.1.2.3.4 phases=4 linecode=LC4 length=3.7383 units=m

New Line.LINE2527 bus1=2500.1.2.3.4 bus2=2528.1.2.3.4 phases=4 linecode=LC4 length=5.8805 units=m

New Line.LINE2549 bus1=2524.1.2.3.4 bus2=2550.1.2.3.4 phases=4 linecode=LC2 length=4.7616 units=m

New Line.LINE2557 bus1=2528.1.2.3.4 bus2=2558.1.2.3.4 phases=4 linecode=LC2 length=8.0228 units=m

New Line.LINE2574 bus1=2546.1.2.3.4 bus2=2575.1.2.3.4 phases=4 linecode=LC2 length=7.6576 units=m

New Line.LINE2575 bus1=2546.1.2.3.4 bus2=2576.1.2.3.4 phases=4 linecode=LC2 length=7.6576 units=m

New Line.LINE2576 bus1=2546.1.2.3.4 bus2=2577.1.2.3.4 phases=4 linecode=LC2 length=5.4913 units=m

New Line.LINE2586 bus1=2558.1.2.3.4 bus2=2587.1.2.3.4 phases=4 linecode=LC2 length=4.6801 units=m

New Line.LINE2593 bus1=2561.1.2.3.4 bus2=2594.1.2.3.4 phases=4 linecode=LC2 length=7.7967 units=m

New Line.LINE2598 bus1=2566.1.2.3.4 bus2=2599.1.2.3.4 phases=4 linecode=LC2 length=5.34 units=m

New Line.LINE2599 bus1=2566.1.2.3.4 bus2=2600.1.2.3.4 phases=4 linecode=LC2 length=5.8513 units=m

New Line.LINE2608 bus1=2577.1.2.3.4 bus2=2609.1.2.3.4 phases=4 linecode=LC2 length=2.6735 units=m

New Line.LINE2609 bus1=2577.1.2.3.4 bus2=2610.1.2.3.4 phases=4 linecode=LC2 length=2.6735 units=m

New Line.LINE2639 bus1=2607.1.2.3.4 bus2=2640.1.2.3.4 phases=4 linecode=LC2 length=5.6815 units=m

New Line.LINE2641 bus1=2607.1.2.3.4 bus2=2642.1.2.3.4 phases=4 linecode=LC2 length=4.9025 units=m

New Line.LINE2675 bus1=2643.1.2.3.4 bus2=2676.1.2.3.4 phases=4 linecode=LC2 length=5.5992 units=m

New Line.LINE2690 bus1=2657.1.2.3.4 bus2=2691.1.2.3.4 phases=4 linecode=LC4 length=2.3789 units=m

New Line.LINE2722 bus1=2691.1.2.3.4 bus2=2723.1.2.3.4 phases=4 linecode=LC2 length=8.0942 units=m

New Line.LINE2731 bus1=2699.1.2.3.4 bus2=2732.1.2.3.4 phases=4 linecode=LC2 length=6.117 units=m

New Line.LINE2755 bus1=2723.1.2.3.4 bus2=2756.1.2.3.4 phases=4 linecode=LC2 length=4.6922 units=m

New Line.LINE2857 bus1=2824.1.2.3.4 bus2=2858.1.2.3.4 phases=4 linecode=LC2 length=5.4847 units=m

New Line.LINE2871 bus1=2837.1.2.3.4 bus2=2872.1.2.3.4 phases=4 linecode=LC2 length=3.7931 units=m

New Line.LINE2872 bus1=2837.1.2.3.4 bus2=2873.1.2.3.4 phases=4 linecode=LC2 length=4.7682 units=m

New Line.LINE2880 bus1=2844.1.2.3.4 bus2=2881.1.2.3.4 phases=4 linecode=LC2 length=4.2463 units=m

New Line.LINE2882 bus1=2845.1.2.3.4 bus2=2883.1.2.3.4 phases=4 linecode=LC2 length=0.82818 units=m

New Line.LINE2900 bus1=2865.1.2.3.4 bus2=2901.1.2.3.4 phases=4 linecode=LC2 length=5.6944 units=m

New Line.LINE2901 bus1=2865.1.2.3.4 bus2=2902.1.2.3.4 phases=4 linecode=LC2 length=5.6944 units=m

New Line.LINE2918 bus1=2889.1.2.3.4 bus2=2919.1.2.3.4 phases=4 linecode=LC2 length=5.5507 units=m

New Line.LINE2919 bus1=2889.1.2.3.4 bus2=2920.1.2.3.4 phases=4 linecode=LC2 length=7.4047 units=m

New Line.LINE2923 bus1=2894.1.2.3.4 bus2=2924.1.2.3.4 phases=4 linecode=LC2 length=5.426 units=m

New Line.LINE2924 bus1=2894.1.2.3.4 bus2=2925.1.2.3.4 phases=4 linecode=LC2 length=5.426 units=m

New Line.LINE2934 bus1=2903.1.2.3.4 bus2=2935.1.2.3.4 phases=4 linecode=LC2 length=2.5029 units=m

New Line.LINE2935 bus1=2903.1.2.3.4 bus2=2936.1.2.3.4 phases=4 linecode=LC2 length=2.5029 units=m

New Line.LINE2950 bus1=2919.1.2.3.4 bus2=2951.1.2.3.4 phases=4 linecode=LC2 length=3.2359 units=m

New Line.LINE2952 bus1=2920.1.2.3.4 bus2=2953.1.2.3.4 phases=4 linecode=LC2 length=2.4114 units=m

New Line.LINE3022 bus1=2997.1.2.3.4 bus2=3023.1.2.3.4 phases=4 linecode=LC2 length=5.1073 units=m

New Line.LINE3023 bus1=2997.1.2.3.4 bus2=3024.1.2.3.4 phases=4 linecode=LC2 length=3.913 units=m

New Line.LINE3038 bus1=3011.1.2.3.4 bus2=3039.1.2.3.4 phases=4 linecode=LC2 length=6.503 units=m

New Line.LINE3039 bus1=3011.1.2.3.4 bus2=3040.1.2.3.4 phases=4 linecode=LC2 length=6.503 units=m

New Line.LINE3090 bus1=3066.1.2.3.4 bus2=3091.1.2.3.4 phases=4 linecode=LC2 length=4.9887 units=m

New Line.LINE3105 bus1=3079.1.2.3.4 bus2=3106.1.2.3.4 phases=4 linecode=LC2 length=4.8399 units=m

New Line.LINE3165 bus1=3144.1.2.3.4 bus2=3166.1.2.3.4 phases=4 linecode=LC2 length=3.5481 units=m

New Line.LINE3197 bus1=3176.1.2.3.4 bus2=3198.1.2.3.4 phases=4 linecode=LC2 length=5.3879 units=m

New Line.LINE3198 bus1=3176.1.2.3.4 bus2=3199.1.2.3.4 phases=4 linecode=LC2 length=9.4216 units=m

New Line.LINE3199 bus1=3176.1.2.3.4 bus2=3200.1.2.3.4 phases=4 linecode=LC2 length=9.4216 units=m

New Line.LINE3224 bus1=3203.1.2.3.4 bus2=3225.1.2.3.4 phases=4 linecode=LC2 length=3.2224 units=m

New Line.LINE3225 bus1=3203.1.2.3.4 bus2=3226.1.2.3.4 phases=4 linecode=LC2 length=3.2224 units=m

New Line.LINE3245 bus1=3223.1.2.3.4 bus2=3246.1.2.3.4 phases=4 linecode=LC2 length=2.0777 units=m

New Line.LINE3246 bus1=3223.1.2.3.4 bus2=3247.1.2.3.4 phases=4 linecode=LC2 length=2.0777 units=m

New Line.LINE3247 bus1=3223.1.2.3.4 bus2=3248.1.2.3.4 phases=4 linecode=LC2 length=2.9182 units=m

New Line.LINE3248 bus1=3224.1.2.3.4 bus2=3249.1.2.3.4 phases=4 linecode=LC2 length=7.6826 units=m

New Line.LINE3249 bus1=3224.1.2.3.4 bus2=3250.1.2.3.4 phases=4 linecode=LC2 length=7.6826 units=m

New Line.LINE3313 bus1=3292.1.2.3.4 bus2=3314.1.2.3.4 phases=4 linecode=LC2 length=4.0645 units=m

New Line.LINE3334 bus1=3313.1.2.3.4 bus2=3335.1.2.3.4 phases=4 linecode=LC2 length=3.1924 units=m

New Line.LINE3338 bus1=3317.1.2.3.4 bus2=3339.1.2.3.4 phases=4 linecode=LC2 length=3.2603 units=m

New Line.LINE3339 bus1=3317.1.2.3.4 bus2=3340.1.2.3.4 phases=4 linecode=LC2 length=3.2603 units=m

New Line.LINE3360 bus1=3338.1.2.3.4 bus2=3361.1.2.3.4 phases=4 linecode=LC2 length=6.0606 units=m

New Line.LINE3361 bus1=3338.1.2.3.4 bus2=3362.1.2.3.4 phases=4 linecode=LC2 length=6.0606 units=m

New Line.LINE3406 bus1=3388.1.2.3.4 bus2=3407.1.2.3.4 phases=4 linecode=LC2 length=3.7217 units=m

New Line.LINE3416 bus1=3397.1.2.3.4 bus2=3417.1.2.3.4 phases=4 linecode=LC2 length=3.7138 units=m

New Line.LINE3444 bus1=3428.1.2.3.4 bus2=3445.1.2.3.4 phases=4 linecode=LC2 length=3.9934 units=m

New Line.LINE3478 bus1=3464.1.2.3.4 bus2=3479.1.2.3.4 phases=4 linecode=LC2 length=5.744 units=m

New Line.LINE3506 bus1=3493.1.2.3.4 bus2=3507.1.2.3.4 phases=4 linecode=LC2 length=5.2781 units=m

New Line.LINE3530 bus1=3516.1.2.3.4 bus2=3531.1.2.3.4 phases=4 linecode=LC2 length=5.2443 units=m

New Line.LINE3534 bus1=3519.1.2.3.4 bus2=3535.1.2.3.4 phases=4 linecode=LC2 length=2.6662 units=m

New Line.LINE3563 bus1=3549.1.2.3.4 bus2=3564.1.2.3.4 phases=4 linecode=LC2 length=3.7717 units=m

New Line.LINE3564 bus1=3549.1.2.3.4 bus2=3565.1.2.3.4 phases=4 linecode=LC2 length=3.7717 units=m

New Line.LINE3575 bus1=3561.1.2.3.4 bus2=3576.1.2.3.4 phases=4 linecode=LC2 length=2.1006 units=m

New Line.LINE3576 bus1=3561.1.2.3.4 bus2=3577.1.2.3.4 phases=4 linecode=LC2 length=1.9674 units=m

New Line.LINE3577 bus1=3562.1.2.3.4 bus2=3578.1.2.3.4 phases=4 linecode=LC2 length=7.1845 units=m

New Line.LINE3578 bus1=3562.1.2.3.4 bus2=3579.1.2.3.4 phases=4 linecode=LC2 length=7.1845 units=m

New Line.LINE3658 bus1=3652.1.2.3.4 bus2=3659.1.2.3.4 phases=4 linecode=LC2 length=3.8093 units=m

New Line.LINE3659 bus1=3652.1.2.3.4 bus2=3660.1.2.3.4 phases=4 linecode=LC2 length=3.8093 units=m

New Line.LINE3665 bus1=3658.1.2.3.4 bus2=3666.1.2.3.4 phases=4 linecode=LC2 length=3.3176 units=m

New Line.LINE3749 bus1=3747.1.2.3.4 bus2=3750.1.2.3.4 phases=4 linecode=LC2 length=7.0351 units=m

New Line.LINE3750 bus1=3747.1.2.3.4 bus2=3751.1.2.3.4 phases=4 linecode=LC2 length=7.0351 units=m

New Line.LINE3753 bus1=3749.1.2.3.4 bus2=3754.1.2.3.4 phases=4 linecode=LC2 length=3.9431 units=m

New Line.LINE3754 bus1=3749.1.2.3.4 bus2=3755.1.2.3.4 phases=4 linecode=LC2 length=3.9431 units=m

New Line.LINE3831 bus1=3829.1.2.3.4 bus2=3832.1.2.3.4 phases=4 linecode=LC2 length=3.3188 units=m
