! Reduced enabled lines.

New Line._virtual_line0_line1_line2_line3_line4_line5_line6_line7_line8_line9_line10_line11_line12_line13_line14_line15_line16_line17_line18_line19_line20_line21_line22_line23_line24_line25_line26_line27_line28_line29_line30_line35_line37_line39_line41_line43_line45_line47_line49_line51_line53_line55_line57_line59_line61_line63_line65_line67_line69_line71_line73_line75_line77_line79_line81_line83_line85_line87_line89_line91_line93_line95_line98_line101_line104_line106_line108_line110_line112_line114_line116_line120_line123_line126_line129_line132_line135_line138_line141_line144_line147_line150_line153_line155_line157_line159 bus1=160.1.2.3.4 bus2=sourcebus.1.2.3.4 phases=4 linecode=LC8 length=133.582605 units=m
! reduced_from=line0,line1,line2,line3,line4,line5,line6,line7,line8,line9,line10,line11,line12,line13,line14,line15,line16,line17,line18,line19,line20,line21,line22,line23,line24,line25,line26,line27,line28,line29,line30,line35,line37,line39,line41,line43,line45,line47,line49,line51,line53,line55,line57,line59,line61,line63,line65,line67,line69,line71,line73,line75,line77,line79,line81,line83,line85,line87,line89,line91,line93,line95,line98,line101,line104,line106,line108,line110,line112,line114,line116,line120,line123,line126,line129,line132,line135,line138,line141,line144,line147,line150,line153,line155,line157,line159
! eliminated_buses=1,2,3,4,5,6,7,8,9,10,11,12,13,14,15,16,17,18,19,20,21,22,23,24,25,26,27,28,29,30,31,36,38,40,42,44,46,48,50,52,54,56,58,60,62,64,66,68,70,72,74,76,78,80,82,84,86,88,90,92,94,96,99,102,105,107,109,111,113,115,117,121,124,127,130,133,136,139,142,145,148,151,154,156,158

New Line._virtual_line164_line167_line172_line176 bus1=160.1.2.3.4 bus2=177.1.2.3.4 phases=4 linecode=LC8 length=29.4185 units=m
! reduced_from=line164,line167,line172,line176
! eliminated_buses=165,168,173

New Line._virtual_line179_line185_line190_line196_line202_line208_line214 bus1=177.1.2.3.4 bus2=215.1.2.3.4 phases=4 linecode=LC8 length=33.9097 units=m
! reduced_from=line179,line185,line190,line196,line202,line208,line214
! eliminated_buses=180,186,191,197,203,209

New Line._virtual_line182_line188_line194_line200_line206_line212_line216 bus1=217.1.2.3.4 bus2=177.1.2.3.4 phases=4 linecode=LC2 length=10.074 units=m
! reduced_from=line182,line188,line194,line200,line206,line212,line216
! eliminated_buses=183,189,195,201,207,213

New Line._virtual_line217_line223_line228_line234_line241_line246_line252_line258_line265 bus1=266.1.2.3.4 bus2=215.1.2.3.4 phases=4 linecode=LC2 length=13.734519 units=m
! reduced_from=line217,line223,line228,line234,line241,line246,line252,line258,line265
! eliminated_buses=218,224,229,235,242,247,253,259

New Line._virtual_line219_line225 bus1=226.1.2.3.4 bus2=215.1.2.3.4 phases=4 linecode=LC8 length=13.5992 units=m
! reduced_from=line219,line225
! eliminated_buses=220

New Line._virtual_line222_line227_line233_line240_line245_line251_line257_line264_line271_line279_line289_line297_line306_line315_line324_line335_line346_line356_line366_line376_line385_line395_line406 bus1=407.1.2.3.4 bus2=217.1.2.3.4 phases=4 linecode=LC2 length=16.206106 units=m
! reduced_from=line222,line227,line233,line240,line245,line251,line257,line264,line271,line279,line289,line297,line306,line315,line324,line335,line346,line356,line366,line376,line385,line395,line406
! eliminated_buses=223,228,234,241,246,252,258,265,272,280,290,298,307,316,325,336,347,357,367,377,386,396

New Line._virtual_line231_line238_line243 bus1=226.1.2.3.4 bus2=244.1.2.3.4 phases=4 linecode=LC8 length=22.785 units=m
! reduced_from=line231,line238,line243
! eliminated_buses=232,239

New Line._virtual_line248_line254_line260_line267_line274_line282_line292 bus1=293.1.2.3.4 bus2=244.1.2.3.4 phases=4 linecode=LC2 length=14.129096 units=m
! reduced_from=line248,line254,line260,line267,line274,line282,line292
! eliminated_buses=249,255,261,268,275,283

New Line._virtual_line249_line255_line262_line269 bus1=270.1.2.3.4 bus2=244.1.2.3.4 phases=4 linecode=LC8 length=32.7199 units=m
! reduced_from=line249,line255,line262,line269
! eliminated_buses=250,256,263

New Line._virtual_line272_line280_line290_line298_line307_line316_line325_line336_line347_line357_line367_line377_line386_line396_line407_line419_line431_line444_line459_line475_line491_line507_line525_line543_line560_line578_line595_line612_line628_line644_line660_line679 bus1=680.1.2.3.4 bus2=266.1.2.3.4 phases=4 linecode=LC2 length=16.216823 units=m
! reduced_from=line272,line280,line290,line298,line307,line316,line325,line336,line347,line357,line367,line377,line386,line396,line407,line419,line431,line444,line459,line475,line491,line507,line525,line543,line560,line578,line595,line612,line628,line644,line660,line679
! eliminated_buses=273,281,291,299,308,317,326,337,348,358,368,378,387,397,408,420,432,445,460,476,492,508,526,544,561,579,596,613,629,645,661

New Line._virtual_line273_line281_line291_line299_line308_line317_line326_line337_line348 bus1=349.1.2.3.4 bus2=266.1.2.3.4 phases=4 linecode=LC2 length=2.317077 units=m
! reduced_from=line273,line281,line291,line299,line308,line317,line326,line337,line348
! eliminated_buses=274,282,292,300,309,318,327,338

New Line._virtual_line277_line287_line296_line305_line314_line323_line334_line345_line355_line365_line375_line384 bus1=385.1.2.3.4 bus2=270.1.2.3.4 phases=4 linecode=LC8 length=25.613005 units=m
! reduced_from=line277,line287,line296,line305,line314,line323,line334,line345,line355,line365,line375,line384
! eliminated_buses=278,288,297,306,315,324,335,346,356,366,376

New Line._virtual_line285_line294_line303_line312_line321_line330_line341_line352_line363_line373_line382_line391_line402_line412_line424_line436_line449_line464 bus1=277.1.2.3.4 bus2=465.1.2.3.4 phases=4 linecode=LC2 length=18.561827 units=m
! reduced_from=line285,line294,line303,line312,line321,line330,line341,line352,line363,line373,line382,line391,line402,line412,line424,line436,line449,line464
! eliminated_buses=286,295,304,313,322,331,342,353,364,374,383,392,403,413,425,437,450

New Line._virtual_line300_line309_line318_line327_line338_line349_line360 bus1=361.1.2.3.4 bus2=293.1.2.3.4 phases=4 linecode=LC2 length=2.351682 units=m
! reduced_from=line300,line309,line318,line327,line338,line349,line360
! eliminated_buses=301,310,319,328,339,350

New Line._virtual_line301_line310_line319_line328_line339_line350_line361_line371_line380_line389 bus1=293.1.2.3.4 bus2=390.1.2.3.4 phases=4 linecode=LC2 length=2.235158 units=m
! reduced_from=line301,line310,line319,line328,line339,line350,line361,line371,line380,line389
! eliminated_buses=302,311,320,329,340,351,362,372,381

New Line._virtual_line359_line368_line378_line387_line397_line408_line420_line432_line445_line460_line476_line492_line508_line526_line544_line561_line579_line596_line613_line629_line645 bus1=349.1.2.3.4 bus2=646.1.2.3.4 phases=4 linecode=LC2 length=7.572651 units=m
! reduced_from=line359,line368,line378,line387,line397,line408,line420,line432,line445,line460,line476,line492,line508,line526,line544,line561,line579,line596,line613,line629,line645
! eliminated_buses=360,369,379,388,398,409,421,433,446,461,477,493,509,527,545,562,580,597,614,630

New Line._virtual_line370_line379_line388_line398_line409_line421_line433_line446_line461_line477_line493_line509_line527_line545 bus1=546.1.2.3.4 bus2=361.1.2.3.4 phases=4 linecode=LC2 length=9.402064 units=m
! reduced_from=line370,line379,line388,line398,line409,line421,line433,line446,line461,line477,line493,line509,line527,line545
! eliminated_buses=371,380,389,399,410,422,434,447,462,478,494,510,528

New Line._virtual_line394_line405_line415_line428_line441_line456_line472_line488_line504_line522_line540_line557_line575 bus1=576.1.2.3.4 bus2=385.1.2.3.4 phases=4 linecode=LC4 length=11.73658 units=m
! reduced_from=line394,line405,line415,line428,line441,line456,line472,line488,line504,line522,line540,line557,line575
! eliminated_buses=395,406,416,429,442,457,473,489,505,523,541,558

New Line._virtual_line400_line410_line422_line434_line447_line462_line478_line494_line510_line528_line546_line564_line580_line597_line614_line630_line646_line664_line681_line698 bus1=699.1.2.3.4 bus2=390.1.2.3.4 phases=4 linecode=LC2 length=9.589128 units=m
! reduced_from=line400,line410,line422,line434,line447,line462,line478,line494,line510,line528,line546,line564,line580,line597,line614,line630,line646,line664,line681,line698
! eliminated_buses=401,411,423,435,448,463,479,495,511,529,547,565,581,598,615,631,647,665,682

New Line._virtual_line404_line414_line427 bus1=394.1.2.3.4 bus2=428.1.2.3.4 phases=4 linecode=LC1 length=14.8027 units=m
! reduced_from=line404,line414,line427
! eliminated_buses=405,415

New Line._virtual_line417_line429_line442_line457_line473_line489_line505_line523_line541_line558_line576_line593_line610_line626_line642_line658_line678 bus1=679.1.2.3.4 bus2=407.1.2.3.4 phases=4 linecode=LC2 length=13.898576 units=m
! reduced_from=line417,line429,line442,line457,line473,line489,line505,line523,line541,line558,line576,line593,line610,line626,line642,line658,line678
! eliminated_buses=418,430,443,458,474,490,506,524,542,559,577,594,611,627,643,659

New Line._virtual_line452_line467_line482_line498_line514_line532_line549_line566_line582_line599 bus1=440.1.2.3.4 bus2=600.1.2.3.4 phases=4 linecode=LC2 length=8.008614 units=m
! reduced_from=line452,line467,line482,line498,line514,line532,line549,line566,line582,line599
! eliminated_buses=453,468,483,499,515,533,550,567,583

New Line._virtual_line453_line468_line483_line499_line515_line533_line550_line567_line583_line600 bus1=440.1.2.3.4 bus2=601.1.2.3.4 phases=4 linecode=LC2 length=11.987708 units=m
! reduced_from=line453,line468,line483,line499,line515,line533,line550,line567,line583,line600
! eliminated_buses=454,469,484,500,516,534,551,568,584

New Line._virtual_line454_line469_line484 bus1=441.1.2.3.4 bus2=485.1.2.3.4 phases=4 linecode=LC2 length=15.1648 units=m
! reduced_from=line454,line469,line484
! eliminated_buses=455,470

New Line._virtual_line471_line487_line503 bus1=504.1.2.3.4 bus2=456.1.2.3.4 phases=4 linecode=LC1 length=26.048 units=m
! reduced_from=line471,line487,line503
! eliminated_buses=472,488

New Line._virtual_line486_line502_line518_line536_line553_line570_line586_line603_line618_line634_line650_line668_line685_line700_line716_line731 bus1=732.1.2.3.4 bus2=471.1.2.3.4 phases=4 linecode=LC2 length=13.272528 units=m
! reduced_from=line486,line502,line518,line536,line553,line570,line586,line603,line618,line634,line650,line668,line685,line700,line716,line731
! eliminated_buses=487,503,519,537,554,571,587,604,619,635,651,669,686,701,717

New Line._virtual_line500_line516_line534_line551_line568_line584_line601_line616_line632_line648_line666_line683 bus1=485.1.2.3.4 bus2=684.1.2.3.4 phases=4 linecode=LC2 length=9.680182 units=m
! reduced_from=line500,line516,line534,line551,line568,line584,line601,line616,line632,line648,line666,line683
! eliminated_buses=501,517,535,552,569,585,602,617,633,649,667

New Line._virtual_line501_line517_line535_line552_line569_line585_line602_line617_line633_line649_line667_line684 bus1=485.1.2.3.4 bus2=685.1.2.3.4 phases=4 linecode=LC2 length=13.244386 units=m
! reduced_from=line501,line517,line535,line552,line569,line585,line602,line617,line633,line649,line667,line684
! eliminated_buses=502,518,536,553,570,586,603,618,634,650,668

New Line._virtual_line519_line537_line554_line571_line587_line604_line619_line635_line651_line669_line686_line702 bus1=703.1.2.3.4 bus2=504.1.2.3.4 phases=4 linecode=LC8 length=30.4077 units=m
! reduced_from=line519,line537,line554,line571,line587,line604,line619,line635,line651,line669,line686,line702
! eliminated_buses=520,538,555,572,588,605,620,636,652,670,687

New Line._virtual_line520_line539_line556_line573_line589_line606_line621_line637_line653_line671_line689_line705_line722_line738_line754_line772 bus1=773.1.2.3.4 bus2=504.1.2.3.4 phases=4 linecode=LC2 length=36.333523 units=m
! reduced_from=line520,line539,line556,line573,line589,line606,line621,line637,line653,line671,line689,line705,line722,line738,line754,line772
! eliminated_buses=521,540,557,574,590,607,622,638,654,672,690,706,723,739,755

New Line._virtual_line591_line608_line623_line639_line654_line672_line690_line706_line723 bus1=724.1.2.3.4 bus2=576.1.2.3.4 phases=4 linecode=LC2 length=14.580207 units=m
! reduced_from=line591,line608,line623,line639,line654,line672,line690,line706,line723
! eliminated_buses=592,609,624,640,655,673,691,707

New Line._virtual_line592_line609 bus1=610.1.2.3.4 bus2=576.1.2.3.4 phases=4 linecode=LC4 length=16.8942 units=m
! reduced_from=line592,line609
! eliminated_buses=593

New Line._virtual_line624_line640_line655 bus1=656.1.2.3.4 bus2=610.1.2.3.4 phases=4 linecode=LC2 length=6.7607 units=m
! reduced_from=line624,line640,line655
! eliminated_buses=625,641

New Line._virtual_line625_line641_line657 bus1=658.1.2.3.4 bus2=610.1.2.3.4 phases=4 linecode=LC4 length=14.9362 units=m
! reduced_from=line625,line641,line657
! eliminated_buses=626,642

New Line._virtual_line663_line680_line697_line711_line729_line744_line760_line778_line799_line823_line850_line876_line903_line931_line961_line991_line1022_line1056_line1090_line1127_line1163_line1198_line1231_line1262_line1292_line1318_line1349_line1375_line1402 bus1=1403.1.2.3.4 bus2=646.1.2.3.4 phases=4 linecode=LC2 length=19.576104 units=m
! reduced_from=line663,line680,line697,line711,line729,line744,line760,line778,line799,line823,line850,line876,line903,line931,line961,line991,line1022,line1056,line1090,line1127,line1163,line1198,line1231,line1262,line1292,line1318,line1349,line1375,line1402
! eliminated_buses=664,681,698,712,730,745,761,779,800,824,851,877,904,932,962,992,1023,1057,1091,1128,1164,1199,1232,1263,1293,1319,1350,1376

New Line._virtual_line673_line691_line707 bus1=656.1.2.3.4 bus2=708.1.2.3.4 phases=4 linecode=LC2 length=8.24592 units=m
! reduced_from=line673,line691,line707
! eliminated_buses=674,692

New Line._virtual_line674_line692 bus1=693.1.2.3.4 bus2=656.1.2.3.4 phases=4 linecode=LC2 length=7.1453 units=m
! reduced_from=line674,line692
! eliminated_buses=675

New Line._virtual_line676_line694_line709_line725 bus1=658.1.2.3.4 bus2=726.1.2.3.4 phases=4 linecode=LC2 length=16.56008 units=m
! reduced_from=line676,line694,line709,line725
! eliminated_buses=677,695,710

New Line._virtual_line677_line696_line710 bus1=658.1.2.3.4 bus2=711.1.2.3.4 phases=4 linecode=LC4 length=14.4334 units=m
! reduced_from=line677,line696,line710
! eliminated_buses=678,697

New Line._virtual_line714_line730_line745_line761_line779_line800_line824_line851_line877_line904_line932_line962_line992_line1023_line1057_line1091_line1128_line1164_line1199_line1232_line1263_line1293 bus1=699.1.2.3.4 bus2=1294.1.2.3.4 phases=4 linecode=LC2 length=24.949057 units=m
! reduced_from=line714,line730,line745,line761,line779,line800,line824,line851,line877,line904,line932,line962,line992,line1023,line1057,line1091,line1128,line1164,line1199,line1232,line1263,line1293
! eliminated_buses=715,731,746,762,780,801,825,852,878,905,933,963,993,1024,1058,1092,1129,1165,1200,1233,1264

New Line._virtual_line718_line733_line747_line763_line781_line802_line826_line853 bus1=854.1.2.3.4 bus2=703.1.2.3.4 phases=4 linecode=LC2 length=11.72903 units=m
! reduced_from=line718,line733,line747,line763,line781,line802,line826,line853
! eliminated_buses=719,734,748,764,782,803,827

New Line._virtual_line719_line734 bus1=735.1.2.3.4 bus2=703.1.2.3.4 phases=4 linecode=LC8 length=21.5146 units=m
! reduced_from=line719,line734
! eliminated_buses=720

New Line._virtual_line726_line740_line756_line774_line794_line816_line843_line869_line897_line924_line954_line984_line1015_line1050_line1084 bus1=1085.1.2.3.4 bus2=711.1.2.3.4 phases=4 linecode=LC2 length=25.60652 units=m
! reduced_from=line726,line740,line756,line774,line794,line816,line843,line869,line897,line924,line954,line984,line1015,line1050,line1084
! eliminated_buses=727,741,757,775,795,817,844,870,898,925,955,985,1016,1051

New Line._virtual_line727_line741_line757_line775_line795_line817_line844_line870_line898_line925_line955_line985_line1016_line1051_line1085_line1123_line1160_line1196 bus1=711.1.2.3.4 bus2=1197.1.2.3.4 phases=4 linecode=LC2 length=14.993958 units=m
! reduced_from=line727,line741,line757,line775,line795,line817,line844,line870,line898,line925,line955,line985,line1016,line1051,line1085,line1123,line1160,line1196
! eliminated_buses=728,742,758,776,796,818,845,871,899,926,956,986,1017,1052,1086,1124,1161

New Line._virtual_line742_line758_line776_line796_line818_line845_line871_line899_line926_line956_line986_line1017_line1052_line1086_line1124 bus1=729.1.2.3.4 bus2=1125.1.2.3.4 phases=4 linecode=LC2 length=17.34189 units=m
! reduced_from=line742,line758,line776,line796,line818,line845,line871,line899,line926,line956,line986,line1017,line1052,line1086,line1124
! eliminated_buses=743,759,777,797,819,846,872,900,927,957,987,1018,1053,1087

New Line._virtual_line743_line759_line777 bus1=729.1.2.3.4 bus2=778.1.2.3.4 phases=4 linecode=LC4 length=18.3432 units=m
! reduced_from=line743,line759,line777
! eliminated_buses=744,760

New Line._virtual_line764_line782_line803_line827_line854_line881_line907_line935_line965_line995_line1026_line1060_line1094_line1131_line1167 bus1=1168.1.2.3.4 bus2=749.1.2.3.4 phases=4 linecode=LC2 length=10.79116 units=m
! reduced_from=line764,line782,line803,line827,line854,line881,line907,line935,line965,line995,line1026,line1060,line1094,line1131,line1167
! eliminated_buses=765,783,804,828,855,882,908,936,966,996,1027,1061,1095,1132

New Line._virtual_line765_line783_line804_line828_line855_line882_line908_line936_line966_line996_line1027_line1061_line1095_line1132_line1168_line1205 bus1=1206.1.2.3.4 bus2=749.1.2.3.4 phases=4 linecode=LC2 length=10.820667 units=m
! reduced_from=line765,line783,line804,line828,line855,line882,line908,line936,line966,line996,line1027,line1061,line1095,line1132,line1168,line1205
! eliminated_buses=766,784,805,829,856,883,909,937,967,997,1028,1062,1096,1133,1169

New Line._virtual_line767_line785 bus1=750.1.2.3.4 bus2=786.1.2.3.4 phases=4 linecode=LC8 length=22.6451 units=m
! reduced_from=line767,line785
! eliminated_buses=768

New Line._virtual_line791_line813 bus1=773.1.2.3.4 bus2=814.1.2.3.4 phases=4 linecode=LC2 length=9.4236 units=m
! reduced_from=line791,line813
! eliminated_buses=792

New Line._virtual_line792_line814_line841_line867_line895_line922_line952_line982_line1013_line1048 bus1=1049.1.2.3.4 bus2=773.1.2.3.4 phases=4 linecode=LC2 length=23.768618 units=m
! reduced_from=line792,line814,line841,line867,line895,line922,line952,line982,line1013,line1048
! eliminated_buses=793,815,842,868,896,923,953,983,1014

New Line._virtual_line797_line820_line846_line872_line900 bus1=901.1.2.3.4 bus2=778.1.2.3.4 phases=4 linecode=LC2 length=8.40309 units=m
! reduced_from=line797,line820,line846,line872,line900
! eliminated_buses=798,821,847,873

New Line._virtual_line807_line833_line860 bus1=861.1.2.3.4 bus2=786.1.2.3.4 phases=4 linecode=LC2 length=7.92825 units=m
! reduced_from=line807,line833,line860
! eliminated_buses=808,834

New Line._virtual_line809_line834_line861_line889_line916_line946_line976_line1007_line1041_line1075 bus1=1076.1.2.3.4 bus2=789.1.2.3.4 phases=4 linecode=LC2 length=9.60607 units=m
! reduced_from=line809,line834,line861,line889,line916,line946,line976,line1007,line1041,line1075
! eliminated_buses=810,835,862,890,917,947,977,1008,1042

New Line._virtual_line810_line836_line862_line890_line917_line947_line977_line1008 bus1=1009.1.2.3.4 bus2=789.1.2.3.4 phases=4 linecode=LC2 length=9.78493 units=m
! reduced_from=line810,line836,line862,line890,line917,line947,line977,line1008
! eliminated_buses=811,837,863,891,918,948,978

New Line._virtual_line831_line859_line886_line913_line943_line973_line1004_line1036_line1072_line1107 bus1=807.1.2.3.4 bus2=1108.1.2.3.4 phases=4 linecode=LC2 length=17.24963 units=m
! reduced_from=line831,line859,line886,line913,line943,line973,line1004,line1036,line1072,line1107
! eliminated_buses=832,860,887,914,944,974,1005,1037,1073

New Line._virtual_line839_line865_line893_line920_line950_line980_line1011_line1046_line1079 bus1=1080.1.2.3.4 bus2=814.1.2.3.4 phases=4 linecode=LC2 length=2.59796 units=m
! reduced_from=line839,line865,line893,line920,line950,line980,line1011,line1046,line1079
! eliminated_buses=840,866,894,921,951,981,1012,1047

New Line._virtual_line840_line866_line894_line921_line951_line981_line1012_line1047_line1080_line1119 bus1=814.1.2.3.4 bus2=1120.1.2.3.4 phases=4 linecode=LC2 length=12.598754 units=m
! reduced_from=line840,line866,line894,line921,line951,line981,line1012,line1047,line1080,line1119
! eliminated_buses=841,867,895,922,952,982,1013,1048,1081

New Line._virtual_line858_line885_line912_line941_line971_line1002_line1034_line1070_line1105_line1143_line1180_line1216_line1248_line1277_line1306 bus1=831.1.2.3.4 bus2=1307.1.2.3.4 phases=4 linecode=LC8 length=16.55985 units=m
! reduced_from=line858,line885,line912,line941,line971,line1002,line1034,line1070,line1105,line1143,line1180,line1216,line1248,line1277,line1306
! eliminated_buses=859,886,913,942,972,1003,1035,1071,1106,1144,1181,1217,1249,1278

New Line._virtual_line880_line906_line934_line964_line994_line1025_line1059_line1093_line1130_line1166 bus1=854.1.2.3.4 bus2=1167.1.2.3.4 phases=4 linecode=LC2 length=15.11673 units=m
! reduced_from=line880,line906,line934,line964,line994,line1025,line1059,line1093,line1130,line1166
! eliminated_buses=881,907,935,965,995,1026,1060,1094,1131

New Line._virtual_line884_line910 bus1=911.1.2.3.4 bus2=858.1.2.3.4 phases=4 linecode=LC3 length=18.0308 units=m
! reduced_from=line884,line910
! eliminated_buses=885

New Line._virtual_line887_line914_line944_line974_line1005 bus1=1006.1.2.3.4 bus2=861.1.2.3.4 phases=4 linecode=LC2 length=1.64222 units=m
! reduced_from=line887,line914,line944,line974,line1005
! eliminated_buses=888,915,945,975

New Line._virtual_line888_line915_line945_line975_line1006 bus1=1007.1.2.3.4 bus2=861.1.2.3.4 phases=4 linecode=LC2 length=11.48632 units=m
! reduced_from=line888,line915,line945,line975,line1006
! eliminated_buses=889,916,946,976

New Line._virtual_line927_line957_line987_line1018_line1053_line1087 bus1=901.1.2.3.4 bus2=1088.1.2.3.4 phases=4 linecode=LC2 length=8.242282 units=m
! reduced_from=line927,line957,line987,line1018,line1053,line1087
! eliminated_buses=928,958,988,1019,1054

New Line._virtual_line928_line958_line988_line1019_line1054_line1088_line1125_line1161 bus1=1162.1.2.3.4 bus2=901.1.2.3.4 phases=4 linecode=LC2 length=11.47503 units=m
! reduced_from=line928,line958,line988,line1019,line1054,line1088,line1125,line1161
! eliminated_buses=929,959,989,1020,1055,1089,1126

New Line._virtual_line938_line968_line999_line1030_line1064 bus1=1065.1.2.3.4 bus2=911.1.2.3.4 phases=4 linecode=LC3 length=35.2508 units=m
! reduced_from=line938,line968,line999,line1030,line1064
! eliminated_buses=939,969,1000,1031

New Line._virtual_line939_line969_line1000_line1032 bus1=1033.1.2.3.4 bus2=911.1.2.3.4 phases=4 linecode=LC2 length=25.6434 units=m
! reduced_from=line939,line969,line1000,line1032
! eliminated_buses=940,970,1001

New Line._virtual_line1038_line1073_line1108_line1147_line1184_line1218_line1250_line1279 bus1=1006.1.2.3.4 bus2=1280.1.2.3.4 phases=4 linecode=LC2 length=13.52229 units=m
! reduced_from=line1038,line1073,line1108,line1147,line1184,line1218,line1250,line1279
! eliminated_buses=1039,1074,1109,1148,1185,1219,1251

New Line._virtual_line1040_line1074_line1109_line1148_line1185_line1219_line1251_line1280_line1308_line1339_line1366_line1393_line1419_line1444 bus1=1007.1.2.3.4 bus2=1445.1.2.3.4 phases=4 linecode=LC2 length=10.37273 units=m
! reduced_from=line1040,line1074,line1109,line1148,line1185,line1219,line1251,line1280,line1308,line1339,line1366,line1393,line1419,line1444
! eliminated_buses=1041,1075,1110,1149,1186,1220,1252,1281,1309,1340,1367,1394,1420

New Line._virtual_line1043_line1076_line1114_line1151_line1188_line1222_line1254_line1283_line1311_line1342_line1369_line1396_line1422_line1447_line1470_line1492_line1513_line1534_line1558_line1575_line1593_line1614_line1632_line1651_line1668 bus1=1669.1.2.3.4 bus2=1009.1.2.3.4 phases=4 linecode=LC2 length=12.13176 units=m
! reduced_from=line1043,line1076,line1114,line1151,line1188,line1222,line1254,line1283,line1311,line1342,line1369,line1396,line1422,line1447,line1470,line1492,line1513,line1534,line1558,line1575,line1593,line1614,line1632,line1651,line1668
! eliminated_buses=1044,1077,1115,1152,1189,1223,1255,1284,1312,1343,1370,1397,1423,1448,1471,1493,1514,1535,1559,1576,1594,1615,1633,1652

New Line._virtual_line1067_line1102_line1140_line1177_line1213_line1245 bus1=1033.1.2.3.4 bus2=1246.1.2.3.4 phases=4 linecode=LC2 length=2.19812 units=m
! reduced_from=line1067,line1102,line1140,line1177,line1213,line1245
! eliminated_buses=1068,1103,1141,1178,1214

New Line._virtual_line1068_line1103_line1141_line1178_line1214_line1246_line1275 bus1=1033.1.2.3.4 bus2=1276.1.2.3.4 phases=4 linecode=LC2 length=2.07147 units=m
! reduced_from=line1068,line1103,line1141,line1178,line1214,line1246,line1275
! eliminated_buses=1069,1104,1142,1179,1215,1247

New Line._virtual_line1081_line1120_line1157_line1193_line1227_line1259 bus1=1260.1.2.3.4 bus2=1049.1.2.3.4 phases=4 linecode=LC2 length=2.832003 units=m
! reduced_from=line1081,line1120,line1157,line1193,line1227,line1259
! eliminated_buses=1082,1121,1158,1194,1228

New Line._virtual_line1082_line1121_line1158_line1194_line1228_line1260 bus1=1261.1.2.3.4 bus2=1049.1.2.3.4 phases=4 linecode=LC2 length=3.147886 units=m
! reduced_from=line1082,line1121,line1158,line1194,line1228,line1260
! eliminated_buses=1083,1122,1159,1195,1229

New Line._virtual_line1099_line1137_line1174_line1210_line1242_line1270_line1299_line1327_line1355_line1382_line1408 bus1=1065.1.2.3.4 bus2=1409.1.2.3.4 phases=4 linecode=LC2 length=16.54123 units=m
! reduced_from=line1099,line1137,line1174,line1210,line1242,line1270,line1299,line1327,line1355,line1382,line1408
! eliminated_buses=1100,1138,1175,1211,1243,1271,1300,1328,1356,1383

New Line._virtual_line1112_line1149_line1186_line1220_line1252_line1281_line1309_line1340_line1367_line1394_line1420_line1445_line1468_line1490_line1511_line1532_line1556_line1573_line1591_line1612_line1630_line1649_line1666_line1681_line1694_line1706_line1717_line1729_line1739 bus1=1076.1.2.3.4 bus2=1740.1.2.3.4 phases=4 linecode=LC2 length=20.647359 units=m
! reduced_from=line1112,line1149,line1186,line1220,line1252,line1281,line1309,line1340,line1367,line1394,line1420,line1445,line1468,line1490,line1511,line1532,line1556,line1573,line1591,line1612,line1630,line1649,line1666,line1681,line1694,line1706,line1717,line1729,line1739
! eliminated_buses=1113,1150,1187,1221,1253,1282,1310,1341,1368,1395,1421,1446,1469,1491,1512,1533,1557,1574,1592,1613,1631,1650,1667,1682,1695,1707,1718,1730

New Line._virtual_line1118_line1154_line1191_line1225_line1257_line1285_line1313_line1344_line1371_line1398_line1424_line1449_line1472_line1494_line1515_line1536_line1560_line1577_line1595_line1616_line1634_line1653 bus1=1080.1.2.3.4 bus2=1654.1.2.3.4 phases=4 linecode=LC2 length=19.379128 units=m
! reduced_from=line1118,line1154,line1191,line1225,line1257,line1285,line1313,line1344,line1371,line1398,line1424,line1449,line1472,line1494,line1515,line1536,line1560,line1577,line1595,line1616,line1634,line1653
! eliminated_buses=1119,1155,1192,1226,1258,1286,1314,1345,1372,1399,1425,1450,1473,1495,1516,1537,1561,1578,1596,1617,1635

New Line._virtual_line1156_line1192_line1226_line1258_line1286_line1314_line1345_line1372_line1399_line1425_line1450_line1473_line1495_line1516_line1537_line1561_line1578_line1596_line1617_line1635_line1654_line1672_line1686_line1698_line1709 bus1=1120.1.2.3.4 bus2=1710.1.2.3.4 phases=4 linecode=LC2 length=17.749585 units=m
! reduced_from=line1156,line1192,line1226,line1258,line1286,line1314,line1345,line1372,line1399,line1425,line1450,line1473,line1495,line1516,line1537,line1561,line1578,line1596,line1617,line1635,line1654,line1672,line1686,line1698,line1709
! eliminated_buses=1157,1193,1227,1259,1287,1315,1346,1373,1400,1426,1451,1474,1496,1517,1538,1562,1579,1597,1618,1636,1655,1673,1687,1699

New Line._virtual_line1172_line1208_line1240_line1268_line1297 bus1=1298.1.2.3.4 bus2=1137.1.2.3.4 phases=4 linecode=LC2 length=11.45158 units=m
! reduced_from=line1172,line1208,line1240,line1268,line1297
! eliminated_buses=1173,1209,1241,1269

New Line._virtual_line1173_line1209_line1241_line1269_line1298_line1326_line1354 bus1=1355.1.2.3.4 bus2=1137.1.2.3.4 phases=4 linecode=LC2 length=2.13545 units=m
! reduced_from=line1173,line1209,line1241,line1269,line1298,line1326,line1354
! eliminated_buses=1174,1210,1242,1270,1299,1327

New Line._virtual_line1183_line1217_line1249_line1278_line1307_line1338_line1365_line1392_line1418_line1443_line1467_line1489_line1510_line1531_line1555_line1572_line1590_line1611_line1629_line1648_line1665 bus1=1666.1.2.3.4 bus2=1147.1.2.3.4 phases=4 linecode=LC2 length=27.03932 units=m
! reduced_from=line1183,line1217,line1249,line1278,line1307,line1338,line1365,line1392,line1418,line1443,line1467,line1489,line1510,line1531,line1555,line1572,line1590,line1611,line1629,line1648,line1665
! eliminated_buses=1184,1218,1250,1279,1308,1339,1366,1393,1419,1444,1468,1490,1511,1532,1556,1573,1591,1612,1630,1649

New Line._virtual_line1202_line1234_line1265_line1295_line1322_line1351_line1377_line1404_line1429_line1454_line1477_line1499_line1520_line1541_line1564_line1581_line1601_line1620_line1639_line1656_line1674_line1688_line1700_line1711_line1724 bus1=1167.1.2.3.4 bus2=1725.1.2.3.4 phases=4 linecode=LC2 length=20.004322 units=m
! reduced_from=line1202,line1234,line1265,line1295,line1322,line1351,line1377,line1404,line1429,line1454,line1477,line1499,line1520,line1541,line1564,line1581,line1601,line1620,line1639,line1656,line1674,line1688,line1700,line1711,line1724
! eliminated_buses=1203,1235,1266,1296,1323,1352,1378,1405,1430,1455,1478,1500,1521,1542,1565,1582,1602,1621,1640,1657,1675,1689,1701,1712

New Line._virtual_line1204_line1235 bus1=1236.1.2.3.4 bus2=1168.1.2.3.4 phases=4 linecode=LC2 length=5.8172 units=m
! reduced_from=line1204,line1235
! eliminated_buses=1205

New Line._virtual_line1237_line1266 bus1=1267.1.2.3.4 bus2=1206.1.2.3.4 phases=4 linecode=LC2 length=7.0057 units=m
! reduced_from=line1237,line1266
! eliminated_buses=1238

New Line._virtual_line1274_line1302_line1330_line1358_line1385_line1411_line1436_line1460_line1482_line1503_line1524 bus1=1246.1.2.3.4 bus2=1525.1.2.3.4 phases=4 linecode=LC2 length=7.73502 units=m
! reduced_from=line1274,line1302,line1330,line1358,line1385,line1411,line1436,line1460,line1482,line1503,line1524
! eliminated_buses=1275,1303,1331,1359,1386,1412,1437,1461,1483,1504

New Line._virtual_line1288_line1315_line1346_line1373_line1400_line1426_line1451_line1474_line1496_line1517_line1538_line1562_line1579_line1597_line1618 bus1=1619.1.2.3.4 bus2=1260.1.2.3.4 phases=4 linecode=LC2 length=9.423369 units=m
! reduced_from=line1288,line1315,line1346,line1373,line1400,line1426,line1451,line1474,line1496,line1517,line1538,line1562,line1579,line1597,line1618
! eliminated_buses=1289,1316,1347,1374,1401,1427,1452,1475,1497,1518,1539,1563,1580,1598

New Line._virtual_line1290_line1316_line1347_line1374_line1401_line1427_line1452_line1475_line1497_line1518_line1539_line1563_line1580 bus1=1261.1.2.3.4 bus2=1581.1.2.3.4 phases=4 linecode=LC2 length=9.363263 units=m
! reduced_from=line1290,line1316,line1347,line1374,line1401,line1427,line1452,line1475,line1497,line1518,line1539,line1563,line1580
! eliminated_buses=1291,1317,1348,1375,1402,1428,1453,1476,1498,1519,1540,1564

New Line._virtual_line1304_line1331_line1359_line1386_line1412_line1437_line1461_line1483_line1504_line1525 bus1=1526.1.2.3.4 bus2=1276.1.2.3.4 phases=4 linecode=LC2 length=8.8541 units=m
! reduced_from=line1304,line1331,line1359,line1386,line1412,line1437,line1461,line1483,line1504,line1525
! eliminated_buses=1305,1332,1360,1387,1413,1438,1462,1484,1505

New Line._virtual_line1325_line1353_line1379_line1406_line1431_line1455_line1478_line1500_line1521 bus1=1522.1.2.3.4 bus2=1298.1.2.3.4 phases=4 linecode=LC2 length=10.019005 units=m
! reduced_from=line1325,line1353,line1379,line1406,line1431,line1455,line1478,line1500,line1521
! eliminated_buses=1326,1354,1380,1407,1432,1456,1479,1501

New Line._virtual_line1333_line1360_line1387_line1413_line1438_line1462_line1484_line1505_line1526_line1550_line1569_line1587_line1607_line1625_line1644_line1661_line1678_line1692_line1704_line1715_line1728_line1737_line1745_line1752_line1757_line1761_line1764_line1767_line1770_line1773_line1776_line1779_line1782_line1785_line1788 bus1=1307.1.2.3.4 bus2=1789.1.2.3.4 phases=4 linecode=LC8 length=58.544649 units=m
! reduced_from=line1333,line1360,line1387,line1413,line1438,line1462,line1484,line1505,line1526,line1550,line1569,line1587,line1607,line1625,line1644,line1661,line1678,line1692,line1704,line1715,line1728,line1737,line1745,line1752,line1757,line1761,line1764,line1767,line1770,line1773,line1776,line1779,line1782,line1785,line1788
! eliminated_buses=1334,1361,1388,1414,1439,1463,1485,1506,1527,1551,1570,1588,1608,1626,1645,1662,1679,1693,1705,1716,1729,1738,1746,1753,1758,1762,1765,1768,1771,1774,1777,1780,1783,1786

New Line._virtual_line1334_line1361_line1388_line1414_line1439_line1463_line1485_line1506_line1527_line1551_line1570_line1588_line1609_line1627_line1646_line1663 bus1=1307.1.2.3.4 bus2=1664.1.2.3.4 phases=4 linecode=LC2 length=16.65351 units=m
! reduced_from=line1334,line1361,line1388,line1414,line1439,line1463,line1485,line1506,line1527,line1551,line1570,line1588,line1609,line1627,line1646,line1663
! eliminated_buses=1335,1362,1389,1415,1440,1464,1486,1507,1528,1552,1571,1589,1610,1628,1647

New Line._virtual_line1335_line1362_line1389_line1415_line1440_line1464_line1486_line1507_line1528_line1552 bus1=1553.1.2.3.4 bus2=1307.1.2.3.4 phases=4 linecode=LC2 length=12.96614 units=m
! reduced_from=line1335,line1362,line1389,line1415,line1440,line1464,line1486,line1507,line1528,line1552
! eliminated_buses=1336,1363,1390,1416,1441,1465,1487,1508,1529

New Line._virtual_line1336_line1363_line1390_line1416_line1441_line1465_line1487_line1508_line1529_line1553 bus1=1307.1.2.3.4 bus2=1554.1.2.3.4 phases=4 linecode=LC2 length=14.06443 units=m
! reduced_from=line1336,line1363,line1390,line1416,line1441,line1465,line1487,line1508,line1529,line1553
! eliminated_buses=1337,1364,1391,1417,1442,1466,1488,1509,1530

New Line._virtual_line1337_line1364_line1391_line1417_line1442_line1466_line1488_line1509_line1530_line1554_line1571_line1589_line1610_line1628_line1647_line1664_line1680_line1693_line1705_line1716 bus1=1717.1.2.3.4 bus2=1307.1.2.3.4 phases=4 linecode=LC2 length=18.22176 units=m
! reduced_from=line1337,line1364,line1391,line1417,line1442,line1466,line1488,line1509,line1530,line1554,line1571,line1589,line1610,line1628,line1647,line1664,line1680,line1693,line1705,line1716
! eliminated_buses=1338,1365,1392,1418,1443,1467,1489,1510,1531,1555,1572,1590,1611,1629,1648,1665,1681,1694,1706

New Line._virtual_line1381_line1407_line1432_line1456_line1479_line1501_line1522_line1542_line1565_line1582_line1602 bus1=1603.1.2.3.4 bus2=1355.1.2.3.4 phases=4 linecode=LC2 length=14.57775 units=m
! reduced_from=line1381,line1407,line1432,line1456,line1479,line1501,line1522,line1542,line1565,line1582,line1602
! eliminated_buses=1382,1408,1433,1457,1480,1502,1523,1543,1566,1583

New Line._virtual_line1458_line1480_line1502_line1523_line1543_line1566_line1583_line1603_line1621_line1640_line1657_line1675_line1689_line1701_line1712_line1725_line1734_line1743_line1750 bus1=1751.1.2.3.4 bus2=1435.1.2.3.4 phases=4 linecode=LC2 length=21.63875 units=m
! reduced_from=line1458,line1480,line1502,line1523,line1543,line1566,line1583,line1603,line1621,line1640,line1657,line1675,line1689,line1701,line1712,line1725,line1734,line1743,line1750
! eliminated_buses=1459,1481,1503,1524,1544,1567,1584,1604,1622,1641,1658,1676,1690,1702,1713,1726,1735,1744

New Line._virtual_line1546_line1567_line1584_line1604_line1622_line1641_line1658_line1676_line1690_line1702_line1713_line1726_line1735 bus1=1736.1.2.3.4 bus2=1525.1.2.3.4 phases=4 linecode=LC2 length=21.41602 units=m
! reduced_from=line1546,line1567,line1584,line1604,line1622,line1641,line1658,line1676,line1690,line1702,line1713,line1726,line1735
! eliminated_buses=1547,1568,1585,1605,1623,1642,1659,1677,1691,1703,1714,1727

New Line._virtual_line1549_line1568_line1585_line1605_line1623_line1642_line1659_line1677_line1691_line1703_line1714_line1727_line1736_line1744_line1751_line1756_line1760 bus1=1526.1.2.3.4 bus2=1761.1.2.3.4 phases=4 linecode=LC2 length=22.39228 units=m
! reduced_from=line1549,line1568,line1585,line1605,line1623,line1642,line1659,line1677,line1691,line1703,line1714,line1727,line1736,line1744,line1751,line1756,line1760
! eliminated_buses=1550,1569,1586,1606,1624,1643,1660,1678,1692,1704,1715,1728,1737,1745,1752,1757

New Line._virtual_line1600_line1619_line1638_line1655_line1673_line1687_line1699_line1710_line1723_line1733_line1742_line1749_line1755_line1759_line1763_line1766_line1769_line1772_line1775_line1778_line1781_line1784_line1787_line1790_line1794_line1798_line1802 bus1=1581.1.2.3.4 bus2=1803.1.2.3.4 phases=4 linecode=LC2 length=30.872438 units=m
! reduced_from=line1600,line1619,line1638,line1655,line1673,line1687,line1699,line1710,line1723,line1733,line1742,line1749,line1755,line1759,line1763,line1766,line1769,line1772,line1775,line1778,line1781,line1784,line1787,line1790,line1794,line1798,line1802
! eliminated_buses=1601,1620,1639,1656,1674,1688,1700,1711,1724,1734,1743,1750,1756,1760,1764,1767,1770,1773,1776,1779,1782,1785,1788,1791,1795,1799

New Line._virtual_line1684_line1696 bus1=1669.1.2.3.4 bus2=1697.1.2.3.4 phases=4 linecode=LC2 length=8.3527 units=m
! reduced_from=line1684,line1696
! eliminated_buses=1685

New Line._virtual_line1722_line1732_line1741_line1748_line1754_line1758_line1762_line1765_line1768_line1771_line1774_line1777_line1780_line1783 bus1=1710.1.2.3.4 bus2=1784.1.2.3.4 phases=4 linecode=LC2 length=15.84442 units=m
! reduced_from=line1722,line1732,line1741,line1748,line1754,line1758,line1762,line1765,line1768,line1771,line1774,line1777,line1780,line1783
! eliminated_buses=1723,1733,1742,1749,1755,1759,1763,1766,1769,1772,1775,1778,1781

New Line._virtual_line1747_line1753 bus1=1740.1.2.3.4 bus2=1754.1.2.3.4 phases=4 linecode=LC2 length=4.01146 units=m
! reduced_from=line1747,line1753
! eliminated_buses=1748

New Line._virtual_line1791_line1795_line1799_line1803_line1806 bus1=1807.1.2.3.4 bus2=1789.1.2.3.4 phases=4 linecode=LC8 length=18.13877 units=m
! reduced_from=line1791,line1795,line1799,line1803,line1806
! eliminated_buses=1792,1796,1800,1804

New Line._virtual_line1792_line1796_line1800_line1804_line1807_line1811_line1815_line1819_line1823_line1828_line1834_line1840_line1846_line1852_line1858 bus1=1789.1.2.3.4 bus2=1859.1.2.3.4 phases=4 linecode=LC9 length=12.74489 units=m
! reduced_from=line1792,line1796,line1800,line1804,line1807,line1811,line1815,line1819,line1823,line1828,line1834,line1840,line1846,line1852,line1858
! eliminated_buses=1793,1797,1801,1805,1808,1812,1816,1820,1824,1829,1835,1841,1847,1853

New Line._virtual_line1809_line1813_line1817_line1821_line1826 bus1=1807.1.2.3.4 bus2=1827.1.2.3.4 phases=4 linecode=LC9 length=2.693853 units=m
! reduced_from=line1809,line1813,line1817,line1821,line1826
! eliminated_buses=1810,1814,1818,1822

New Line._virtual_line1810_line1814_line1818_line1822_line1827_line1833_line1839_line1845_line1851_line1857_line1863_line1872_line1881_line1890_line1900_line1911_line1922 bus1=1923.1.2.3.4 bus2=1807.1.2.3.4 phases=4 linecode=LC9 length=44.505932 units=m
! reduced_from=line1810,line1814,line1818,line1822,line1827,line1833,line1839,line1845,line1851,line1857,line1863,line1872,line1881,line1890,line1900,line1911,line1922
! eliminated_buses=1811,1815,1819,1823,1828,1834,1840,1846,1852,1858,1864,1873,1882,1891,1901,1912

New Line._virtual_line1832_line1838_line1844_line1850_line1856_line1862_line1871_line1880_line1889_line1899_line1910_line1921_line1932_line1946_line1962_line1978 bus1=1827.1.2.3.4 bus2=1979.1.2.3.4 phases=4 linecode=LC2 length=11.472533 units=m
! reduced_from=line1832,line1838,line1844,line1850,line1856,line1862,line1871,line1880,line1889,line1899,line1910,line1921,line1932,line1946,line1962,line1978
! eliminated_buses=1833,1839,1845,1851,1857,1863,1872,1881,1890,1900,1911,1922,1933,1947,1963

New Line._virtual_line1865_line1874_line1883 bus1=1859.1.2.3.4 bus2=1884.1.2.3.4 phases=4 linecode=LC9 length=3.33605 units=m
! reduced_from=line1865,line1874,line1883
! eliminated_buses=1866,1875

New Line._virtual_line1867_line1876_line1885_line1895_line1905_line1916_line1927_line1941_line1958_line1976 bus1=1859.1.2.3.4 bus2=1977.1.2.3.4 phases=4 linecode=LC2 length=11.696283 units=m
! reduced_from=line1867,line1876,line1885,line1895,line1905,line1916,line1927,line1941,line1958,line1976
! eliminated_buses=1868,1877,1886,1896,1906,1917,1928,1942,1959

New Line._virtual_line1893_line1903_line1914_line1925_line1939_line1956_line1974_line1990_line2009_line2028 bus1=2029.1.2.3.4 bus2=1884.1.2.3.4 phases=4 linecode=LC2 length=15.318772 units=m
! reduced_from=line1893,line1903,line1914,line1925,line1939,line1956,line1974,line1990,line2009,line2028
! eliminated_buses=1894,1904,1915,1926,1940,1957,1975,1991,2010

New Line._virtual_line1933_line1947_line1963_line1979_line1998_line2017_line2039_line2060_line2079_line2096_line2111_line2125_line2138_line2151_line2164_line2176_line2187_line2196_line2206_line2215_line2224_line2233_line2242_line2250_line2275_line2299_line2323_line2351_line2375_line2396_line2411_line2421_line2429 bus1=2430.1.2.3.4 bus2=1923.1.2.3.4 phases=4 linecode=LC2 length=18.332372 units=m
! reduced_from=line1933,line1947,line1963,line1979,line1998,line2017,line2039,line2060,line2079,line2096,line2111,line2125,line2138,line2151,line2164,line2176,line2187,line2196,line2206,line2215,line2224,line2233,line2242,line2250,line2275,line2299,line2323,line2351,line2375,line2396,line2411,line2421,line2429
! eliminated_buses=1934,1948,1964,1980,1999,2018,2040,2061,2080,2097,2112,2126,2139,2152,2165,2177,2188,2197,2207,2216,2225,2234,2243,2251,2276,2300,2324,2352,2376,2397,2412,2422

New Line._virtual_line1934_line1948_line1964_line1980_line1999_line2018_line2040_line2061_line2080_line2097_line2112_line2126_line2139_line2152_line2165_line2177_line2188_line2197_line2207_line2216_line2225_line2234_line2243_line2251_line2276_line2300 bus1=2301.1.2.3.4 bus2=1923.1.2.3.4 phases=4 linecode=LC2 length=15.000475 units=m
! reduced_from=line1934,line1948,line1964,line1980,line1999,line2018,line2040,line2061,line2080,line2097,line2112,line2126,line2139,line2152,line2165,line2177,line2188,line2197,line2207,line2216,line2225,line2234,line2243,line2251,line2276,line2300
! eliminated_buses=1935,1949,1965,1981,2000,2019,2041,2062,2081,2098,2113,2127,2140,2153,2166,2178,2189,2198,2208,2217,2226,2235,2244,2252,2277

New Line._virtual_line1935_line1949_line1965_line1981_line2000_line2019_line2041_line2062_line2081_line2098_line2113_line2127_line2140_line2153_line2166_line2178_line2189 bus1=1923.1.2.3.4 bus2=2190.1.2.3.4 phases=4 linecode=LC9 length=15.355713 units=m
! reduced_from=line1935,line1949,line1965,line1981,line2000,line2019,line2041,line2062,line2081,line2098,line2113,line2127,line2140,line2153,line2166,line2178,line2189
! eliminated_buses=1936,1950,1966,1982,2001,2020,2042,2063,2082,2099,2114,2128,2141,2154,2167,2179

New Line._virtual_line2032_line2054_line2073_line2092_line2107_line2122_line2136_line2149_line2162 bus1=2013.1.2.3.4 bus2=2163.1.2.3.4 phases=4 linecode=LC2 length=13.625238 units=m
! reduced_from=line2032,line2054,line2073,line2092,line2107,line2122,line2136,line2149,line2162
! eliminated_buses=2033,2055,2074,2093,2108,2123,2137,2150

New Line._virtual_line2198_line2208_line2217_line2226_line2235_line2244_line2252 bus1=2253.1.2.3.4 bus2=2190.1.2.3.4 phases=4 linecode=LC2 length=25.9419 units=m
! reduced_from=line2198,line2208,line2217,line2226,line2235,line2244,line2252
! eliminated_buses=2199,2209,2218,2227,2236,2245

New Line._virtual_line2199_line2209_line2218_line2227_line2236_line2245 bus1=2190.1.2.3.4 bus2=2246.1.2.3.4 phases=4 linecode=LC2 length=25.97547 units=m
! reduced_from=line2199,line2209,line2218,line2227,line2236,line2245
! eliminated_buses=2200,2210,2219,2228,2237

New Line.LINE163 bus1=160.1.2.3.4 bus2=164.1.2.3.4 phases=4 linecode=LC8 length=3.6944 units=m

New Line.LINE166 bus1=164.1.2.3.4 bus2=167.1.2.3.4 phases=4 linecode=LC1 length=0.49962 units=m

New Line.LINE221 bus1=217.1.2.3.4 bus2=222.1.2.3.4 phases=4 linecode=LC2 length=4.7434 units=m

New Line.LINE230 bus1=226.1.2.3.4 bus2=231.1.2.3.4 phases=4 linecode=LC1 length=4.8122 units=m

New Line.LINE236 bus1=231.1.2.3.4 bus2=237.1.2.3.4 phases=4 linecode=LC1 length=4.5113 units=m

New Line.LINE237 bus1=231.1.2.3.4 bus2=238.1.2.3.4 phases=4 linecode=LC1 length=4.5113 units=m

New Line.LINE276 bus1=270.1.2.3.4 bus2=277.1.2.3.4 phases=4 linecode=LC2 length=5.6374 units=m

New Line.LINE284 bus1=277.1.2.3.4 bus2=285.1.2.3.4 phases=4 linecode=LC2 length=4.0078 units=m

New Line.LINE358 bus1=349.1.2.3.4 bus2=359.1.2.3.4 phases=4 linecode=LC2 length=3.7519 units=m

New Line.LINE369 bus1=361.1.2.3.4 bus2=370.1.2.3.4 phases=4 linecode=LC2 length=4.2429 units=m

New Line.LINE393 bus1=385.1.2.3.4 bus2=394.1.2.3.4 phases=4 linecode=LC8 length=2.7498 units=m

New Line.LINE399 bus1=390.1.2.3.4 bus2=400.1.2.3.4 phases=4 linecode=LC2 length=3.7977 units=m

New Line.LINE416 bus1=407.1.2.3.4 bus2=417.1.2.3.4 phases=4 linecode=LC2 length=5.0462 units=m

New Line.LINE439 bus1=428.1.2.3.4 bus2=440.1.2.3.4 phases=4 linecode=LC2 length=3.6921 units=m

New Line.LINE440 bus1=428.1.2.3.4 bus2=441.1.2.3.4 phases=4 linecode=LC1 length=3.7985 units=m

New Line.LINE455 bus1=441.1.2.3.4 bus2=456.1.2.3.4 phases=4 linecode=LC1 length=11.9206 units=m

New Line.LINE470 bus1=456.1.2.3.4 bus2=471.1.2.3.4 phases=4 linecode=LC2 length=5.1083 units=m

New Line.LINE485 bus1=471.1.2.3.4 bus2=486.1.2.3.4 phases=4 linecode=LC2 length=4.9069 units=m

New Line.LINE562 bus1=546.1.2.3.4 bus2=563.1.2.3.4 phases=4 linecode=LC2 length=5.7062 units=m

New Line.LINE563 bus1=546.1.2.3.4 bus2=564.1.2.3.4 phases=4 linecode=LC2 length=5.7062 units=m

New Line.LINE661 bus1=646.1.2.3.4 bus2=662.1.2.3.4 phases=4 linecode=LC2 length=3.3098 units=m

New Line.LINE662 bus1=646.1.2.3.4 bus2=663.1.2.3.4 phases=4 linecode=LC2 length=3.3098 units=m

New Line.LINE712 bus1=699.1.2.3.4 bus2=713.1.2.3.4 phases=4 linecode=LC2 length=3.0635 units=m

New Line.LINE713 bus1=699.1.2.3.4 bus2=714.1.2.3.4 phases=4 linecode=LC2 length=3.0635 units=m

New Line.LINE728 bus1=711.1.2.3.4 bus2=729.1.2.3.4 phases=4 linecode=LC4 length=1.5126 units=m

New Line.LINE748 bus1=735.1.2.3.4 bus2=749.1.2.3.4 phases=4 linecode=LC2 length=6.2096 units=m

New Line.LINE749 bus1=735.1.2.3.4 bus2=750.1.2.3.4 phases=4 linecode=LC8 length=9.6528 units=m

New Line.LINE768 bus1=750.1.2.3.4 bus2=769.1.2.3.4 phases=4 linecode=LC8 length=1.5967 units=m

New Line.LINE788 bus1=769.1.2.3.4 bus2=789.1.2.3.4 phases=4 linecode=LC2 length=10.7131 units=m

New Line.LINE806 bus1=786.1.2.3.4 bus2=807.1.2.3.4 phases=4 linecode=LC8 length=11.3485 units=m

New Line.LINE830 bus1=807.1.2.3.4 bus2=831.1.2.3.4 phases=4 linecode=LC8 length=19.2085 units=m

New Line.LINE857 bus1=831.1.2.3.4 bus2=858.1.2.3.4 phases=4 linecode=LC1 length=0.50064 units=m

New Line.LINE879 bus1=854.1.2.3.4 bus2=880.1.2.3.4 phases=4 linecode=LC2 length=3.8384 units=m

New Line.LINE1037 bus1=1006.1.2.3.4 bus2=1038.1.2.3.4 phases=4 linecode=LC2 length=4.8005 units=m

New Line.LINE1039 bus1=1007.1.2.3.4 bus2=1040.1.2.3.4 phases=4 linecode=LC2 length=4.6758 units=m

New Line.LINE1042 bus1=1009.1.2.3.4 bus2=1043.1.2.3.4 phases=4 linecode=LC2 length=5.8102 units=m

New Line.LINE1098 bus1=1065.1.2.3.4 bus2=1099.1.2.3.4 phases=4 linecode=LC3 length=6.6308 units=m

New Line.LINE1110 bus1=1076.1.2.3.4 bus2=1111.1.2.3.4 phases=4 linecode=LC2 length=5.7671 units=m

New Line.LINE1111 bus1=1076.1.2.3.4 bus2=1112.1.2.3.4 phases=4 linecode=LC2 length=6.6783 units=m

New Line.LINE1117 bus1=1080.1.2.3.4 bus2=1118.1.2.3.4 phases=4 linecode=LC2 length=5.2177 units=m

New Line.LINE1136 bus1=1099.1.2.3.4 bus2=1137.1.2.3.4 phases=4 linecode=LC2 length=8.4176 units=m

New Line.LINE1145 bus1=1108.1.2.3.4 bus2=1146.1.2.3.4 phases=4 linecode=LC2 length=6.0387 units=m

New Line.LINE1146 bus1=1108.1.2.3.4 bus2=1147.1.2.3.4 phases=4 linecode=LC2 length=4.0203 units=m

New Line.LINE1155 bus1=1120.1.2.3.4 bus2=1156.1.2.3.4 phases=4 linecode=LC2 length=6.0191 units=m

New Line.LINE1182 bus1=1147.1.2.3.4 bus2=1183.1.2.3.4 phases=4 linecode=LC2 length=6.335 units=m

New Line.LINE1201 bus1=1167.1.2.3.4 bus2=1202.1.2.3.4 phases=4 linecode=LC2 length=4.5689 units=m

New Line.LINE1203 bus1=1168.1.2.3.4 bus2=1204.1.2.3.4 phases=4 linecode=LC2 length=3.0538 units=m

New Line.LINE1236 bus1=1206.1.2.3.4 bus2=1237.1.2.3.4 phases=4 linecode=LC2 length=3.2669 units=m

New Line.LINE1273 bus1=1246.1.2.3.4 bus2=1274.1.2.3.4 phases=4 linecode=LC2 length=2.6936 units=m

New Line.LINE1287 bus1=1260.1.2.3.4 bus2=1288.1.2.3.4 phases=4 linecode=LC2 length=4.2924 units=m

New Line.LINE1289 bus1=1261.1.2.3.4 bus2=1290.1.2.3.4 phases=4 linecode=LC2 length=3.8604 units=m

New Line.LINE1303 bus1=1276.1.2.3.4 bus2=1304.1.2.3.4 phases=4 linecode=LC2 length=2.8265 units=m

New Line.LINE1319 bus1=1294.1.2.3.4 bus2=1320.1.2.3.4 phases=4 linecode=LC2 length=5.8506 units=m

New Line.LINE1320 bus1=1294.1.2.3.4 bus2=1321.1.2.3.4 phases=4 linecode=LC2 length=5.8506 units=m

New Line.LINE1324 bus1=1298.1.2.3.4 bus2=1325.1.2.3.4 phases=4 linecode=LC2 length=5.224 units=m

New Line.LINE1380 bus1=1355.1.2.3.4 bus2=1381.1.2.3.4 phases=4 linecode=LC2 length=4.5288 units=m

New Line.LINE1433 bus1=1409.1.2.3.4 bus2=1434.1.2.3.4 phases=4 linecode=LC2 length=5.0638 units=m

New Line.LINE1434 bus1=1409.1.2.3.4 bus2=1435.1.2.3.4 phases=4 linecode=LC2 length=4.0698 units=m

New Line.LINE1457 bus1=1435.1.2.3.4 bus2=1458.1.2.3.4 phases=4 linecode=LC2 length=6.3638 units=m

New Line.LINE1544 bus1=1525.1.2.3.4 bus2=1545.1.2.3.4 phases=4 linecode=LC2 length=3.7916 units=m

New Line.LINE1545 bus1=1525.1.2.3.4 bus2=1546.1.2.3.4 phases=4 linecode=LC2 length=3.7916 units=m

New Line.LINE1547 bus1=1526.1.2.3.4 bus2=1548.1.2.3.4 phases=4 linecode=LC2 length=7.6123 units=m

New Line.LINE1548 bus1=1526.1.2.3.4 bus2=1549.1.2.3.4 phases=4 linecode=LC2 length=7.6123 units=m

New Line.LINE1598 bus1=1581.1.2.3.4 bus2=1599.1.2.3.4 phases=4 linecode=LC2 length=4.2036 units=m

New Line.LINE1599 bus1=1581.1.2.3.4 bus2=1600.1.2.3.4 phases=4 linecode=LC2 length=4.2036 units=m

New Line.LINE1636 bus1=1619.1.2.3.4 bus2=1637.1.2.3.4 phases=4 linecode=LC2 length=3.5267 units=m

New Line.LINE1637 bus1=1619.1.2.3.4 bus2=1638.1.2.3.4 phases=4 linecode=LC2 length=3.5267 units=m

New Line.LINE1670 bus1=1654.1.2.3.4 bus2=1671.1.2.3.4 phases=4 linecode=LC2 length=4.48 units=m

New Line.LINE1671 bus1=1654.1.2.3.4 bus2=1672.1.2.3.4 phases=4 linecode=LC2 length=4.48 units=m

New Line.LINE1683 bus1=1669.1.2.3.4 bus2=1684.1.2.3.4 phases=4 linecode=LC2 length=5.3588 units=m

New Line.LINE1720 bus1=1710.1.2.3.4 bus2=1721.1.2.3.4 phases=4 linecode=LC2 length=4.8997 units=m

New Line.LINE1721 bus1=1710.1.2.3.4 bus2=1722.1.2.3.4 phases=4 linecode=LC2 length=4.8997 units=m

New Line.LINE1746 bus1=1740.1.2.3.4 bus2=1747.1.2.3.4 phases=4 linecode=LC2 length=5.3444 units=m

New Line.LINE1992 bus1=1977.1.2.3.4 bus2=1993.1.2.3.4 phases=4 linecode=LC2 length=6.6907 units=m

New Line.LINE1993 bus1=1977.1.2.3.4 bus2=1994.1.2.3.4 phases=4 linecode=LC2 length=17.9923 units=m

New Line.LINE1996 bus1=1979.1.2.3.4 bus2=1997.1.2.3.4 phases=4 linecode=LC2 length=7.0136 units=m

New Line.LINE1997 bus1=1979.1.2.3.4 bus2=1998.1.2.3.4 phases=4 linecode=LC2 length=5.8575 units=m

New Line.LINE2011 bus1=1993.1.2.3.4 bus2=2012.1.2.3.4 phases=4 linecode=LC2 length=7.2737 units=m

New Line.LINE2012 bus1=1993.1.2.3.4 bus2=2013.1.2.3.4 phases=4 linecode=LC2 length=21.2435 units=m

New Line.LINE2013 bus1=1993.1.2.3.4 bus2=2014.1.2.3.4 phases=4 linecode=LC2 length=4.352 units=m

New Line.LINE2014 bus1=1993.1.2.3.4 bus2=2015.1.2.3.4 phases=4 linecode=LC2 length=4.6763 units=m

New Line.LINE2033 bus1=2014.1.2.3.4 bus2=2034.1.2.3.4 phases=4 linecode=LC2 length=4.0137 units=m

New Line.LINE2253 bus1=2246.1.2.3.4 bus2=2254.1.2.3.4 phases=4 linecode=LC2 length=31.0764 units=m

New Line.LINE2254 bus1=2246.1.2.3.4 bus2=2255.1.2.3.4 phases=4 linecode=LC2 length=24.2773 units=m

New Line.LINE2255 bus1=2246.1.2.3.4 bus2=2256.1.2.3.4 phases=4 linecode=LC2 length=31.1183 units=m

New Line.LINE2256 bus1=2246.1.2.3.4 bus2=2257.1.2.3.4 phases=4 linecode=LC2 length=31.4189 units=m

New Line.LINE2257 bus1=2246.1.2.3.4 bus2=2258.1.2.3.4 phases=4 linecode=LC2 length=4.9646 units=m

New Line.LINE2258 bus1=2246.1.2.3.4 bus2=2259.1.2.3.4 phases=4 linecode=LC2 length=20.4021 units=m

New Line.LINE2259 bus1=2246.1.2.3.4 bus2=2260.1.2.3.4 phases=4 linecode=LC2 length=24.4949 units=m

New Line.LINE2260 bus1=2246.1.2.3.4 bus2=2261.1.2.3.4 phases=4 linecode=LC2 length=30.9248 units=m

New Line.LINE2261 bus1=2246.1.2.3.4 bus2=2262.1.2.3.4 phases=4 linecode=LC2 length=19.9457 units=m

New Line.LINE2262 bus1=2246.1.2.3.4 bus2=2263.1.2.3.4 phases=4 linecode=LC2 length=24.1998 units=m

New Line.LINE2263 bus1=2246.1.2.3.4 bus2=2264.1.2.3.4 phases=4 linecode=LC2 length=31.3747 units=m

New Line.LINE2264 bus1=2246.1.2.3.4 bus2=2265.1.2.3.4 phases=4 linecode=LC2 length=7.212 units=m

New Line.LINE2265 bus1=2246.1.2.3.4 bus2=2266.1.2.3.4 phases=4 linecode=LC2 length=31.2339 units=m

New Line.LINE2266 bus1=2246.1.2.3.4 bus2=2267.1.2.3.4 phases=4 linecode=LC2 length=7.0396 units=m

New Line.LINE2267 bus1=2246.1.2.3.4 bus2=2268.1.2.3.4 phases=4 linecode=LC2 length=5.2095 units=m

New Line.LINE2268 bus1=2246.1.2.3.4 bus2=2269.1.2.3.4 phases=4 linecode=LC2 length=24.4363 units=m
