! Reduced enabled lines.

New Line._virtual_line0_line1_line2_line3_line4_line5_line6_line7_line8_line9_line10_line11_line12_line13_line14_line15_line16_line17_line18_line19_line20_line21_line22_line23_line24_line25_line26 bus1=sourcebus.1.2.3.4 bus2=27.1.2.3.4 phases=4 linecode=LC5 length=48.061625 units=m
! reduced_from=line0,line1,line2,line3,line4,line5,line6,line7,line8,line9,line10,line11,line12,line13,line14,line15,line16,line17,line18,line19,line20,line21,line22,line23,line24,line25,line26
! eliminated_buses=1,2,3,4,5,6,7,8,9,10,11,12,13,14,15,16,17,18,19,20,21,22,23,24,25,26

New Line._virtual_line27_line29_line31_line33_line35_line37_line39_line41_line43_line45_line47_line49_line51_line53_line55_line57_line59_line61_line63_line65_line67_line70 bus1=27.1.2.3.4 bus2=71.1.2.3.4 phases=4 linecode=LC6 length=17.953091 units=m
! reduced_from=line27,line29,line31,line33,line35,line37,line39,line41,line43,line45,line47,line49,line51,line53,line55,line57,line59,line61,line63,line65,line67,line70
! eliminated_buses=28,30,32,34,36,38,40,42,44,46,48,50,52,54,56,58,60,62,64,66,68

New Line._virtual_line28_line30_line32_line34_line36_line38_line40_line42_line44_line46_line48_line50_line52_line54_line56_line58_line60_line62_line64_line66_line68_line71_line73_line75_line77_line79_line81_line83_line85_line87_line89_line91 bus1=27.1.2.3.4 bus2=92.1.2.3.4 phases=4 linecode=LC5 length=40.560877 units=m
! reduced_from=line28,line30,line32,line34,line36,line38,line40,line42,line44,line46,line48,line50,line52,line54,line56,line58,line60,line62,line64,line66,line68,line71,line73,line75,line77,line79,line81,line83,line85,line87,line89,line91
! eliminated_buses=29,31,33,35,37,39,41,43,45,47,49,51,53,55,57,59,61,63,65,67,69,72,74,76,78,80,82,84,86,88,90

New Line._virtual_line92_line94_line97_line100_line103_line106_line109_line112_line115_line118_line121_line124_line127_line130_line133_line136_line139_line142_line145_line148_line151_line155_line159_line163_line167_line171_line175_line179_line183_line188 bus1=189.1.2.3.4 bus2=92.1.2.3.4 phases=4 linecode=LC6 length=33.696208 units=m
! reduced_from=line92,line94,line97,line100,line103,line106,line109,line112,line115,line118,line121,line124,line127,line130,line133,line136,line139,line142,line145,line148,line151,line155,line159,line163,line167,line171,line175,line179,line183,line188
! eliminated_buses=93,95,98,101,104,107,110,113,116,119,122,125,128,131,134,137,140,143,146,149,152,156,160,164,168,172,176,180,184

New Line._virtual_line95_line98_line101_line104_line107_line110_line113_line116_line119_line122_line125_line128_line131_line134_line137_line140_line143_line146_line149_line152_line156_line160_line164_line168_line172_line176_line180_line184_line189_line196_line202_line208_line214_line222_line230_line238 bus1=94.1.2.3.4 bus2=239.1.2.3.4 phases=4 linecode=LC6 length=36.646265 units=m
! reduced_from=line95,line98,line101,line104,line107,line110,line113,line116,line119,line122,line125,line128,line131,line134,line137,line140,line143,line146,line149,line152,line156,line160,line164,line168,line172,line176,line180,line184,line189,line196,line202,line208,line214,line222,line230,line238
! eliminated_buses=96,99,102,105,108,111,114,117,120,123,126,129,132,135,138,141,144,147,150,153,157,161,165,169,173,177,181,185,190,197,203,209,215,223,231

New Line._virtual_line96_line99_line102_line105_line108_line111_line114_line117_line120_line123_line126_line129_line132_line135_line138_line141_line144_line147_line150 bus1=151.1.2.3.4 bus2=94.1.2.3.4 phases=4 linecode=LC5 length=17.08806 units=m
! reduced_from=line96,line99,line102,line105,line108,line111,line114,line117,line120,line123,line126,line129,line132,line135,line138,line141,line144,line147,line150
! eliminated_buses=97,100,103,106,109,112,115,118,121,124,127,130,133,136,139,142,145,148

New Line._virtual_line153_line157_line161_line165_line169_line173_line177_line181 bus1=151.1.2.3.4 bus2=182.1.2.3.4 phases=4 linecode=LC4 length=19.6919 units=m
! reduced_from=line153,line157,line161,line165,line169,line173,line177,line181
! eliminated_buses=154,158,162,166,170,174,178

New Line._virtual_line154_line158_line162_line166_line170_line174_line178_line182_line187_line193_line200_line206_line212 bus1=151.1.2.3.4 bus2=213.1.2.3.4 phases=4 linecode=LC4 length=8.41525 units=m
! reduced_from=line154,line158,line162,line166,line170,line174,line178,line182,line187,line193,line200,line206,line212
! eliminated_buses=155,159,163,167,171,175,179,183,188,194,201,207

New Line._virtual_line186_line192_line199_line205_line211_line218_line226_line234_line242_line250_line258_line266_line274_line282_line291_line300_line310_line320_line330_line338_line347 bus1=182.1.2.3.4 bus2=348.1.2.3.4 phases=4 linecode=LC6 length=2.176841 units=m
! reduced_from=line186,line192,line199,line205,line211,line218,line226,line234,line242,line250,line258,line266,line274,line282,line291,line300,line310,line320,line330,line338,line347
! eliminated_buses=187,193,200,206,212,219,227,235,243,251,259,267,275,283,292,301,311,321,331,339

New Line._virtual_line190_line197_line203_line209_line215_line223_line231_line239 bus1=240.1.2.3.4 bus2=186.1.2.3.4 phases=4 linecode=LC4 length=28.0847 units=m
! reduced_from=line190,line197,line203,line209,line215,line223,line231,line239
! eliminated_buses=191,198,204,210,216,224,232

New Line._virtual_line191_line198_line204_line210_line217_line225_line233_line241_line249_line257_line265_line273_line281_line290_line299_line309_line319_line329_line337_line346_line355_line365_line375_line386_line397 bus1=186.1.2.3.4 bus2=398.1.2.3.4 phases=4 linecode=LC4 length=24.31577 units=m
! reduced_from=line191,line198,line204,line210,line217,line225,line233,line241,line249,line257,line265,line273,line281,line290,line299,line309,line319,line329,line337,line346,line355,line365,line375,line386,line397
! eliminated_buses=192,199,205,211,218,226,234,242,250,258,266,274,282,291,300,310,320,330,338,347,356,366,376,387

New Line._virtual_line194_line201_line207_line213_line221_line229_line237_line245_line253_line261_line269_line277_line285_line294_line303_line313 bus1=189.1.2.3.4 bus2=314.1.2.3.4 phases=4 linecode=LC6 length=13.386541 units=m
! reduced_from=line194,line201,line207,line213,line221,line229,line237,line245,line253,line261,line269,line277,line285,line294,line303,line313
! eliminated_buses=195,202,208,214,222,230,238,246,254,262,270,278,286,295,304

New Line._virtual_line219_line227_line235_line243_line251_line259_line267_line275_line283_line292_line301_line311_line321_line331 bus1=213.1.2.3.4 bus2=332.1.2.3.4 phases=4 linecode=LC4 length=18.08961 units=m
! reduced_from=line219,line227,line235,line243,line251,line259,line267,line275,line283,line292,line301,line311,line321,line331
! eliminated_buses=220,228,236,244,252,260,268,276,284,293,302,312,322

New Line._virtual_line220_line228_line236_line244_line252_line260_line268_line276_line284_line293_line302_line312_line322_line332_line341_line350_line360_line370_line381_line392_line403_line414_line425_line435_line445_line456_line467_line478_line489_line500_line512_line525_line537_line549 bus1=213.1.2.3.4 bus2=550.1.2.3.4 phases=4 linecode=LC4 length=18.968626 units=m
! reduced_from=line220,line228,line236,line244,line252,line260,line268,line276,line284,line293,line302,line312,line322,line332,line341,line350,line360,line370,line381,line392,line403,line414,line425,line435,line445,line456,line467,line478,line489,line500,line512,line525,line537,line549
! eliminated_buses=221,229,237,245,253,261,269,277,285,294,303,313,323,333,342,351,361,371,382,393,404,415,426,436,446,457,468,479,490,501,513,526,538

New Line._virtual_line246_line254_line262_line270_line278_line286_line295_line304_line314_line323_line333_line342_line351_line361_line371_line382_line393_line404 bus1=240.1.2.3.4 bus2=405.1.2.3.4 phases=4 linecode=LC2 length=21.13875 units=m
! reduced_from=line246,line254,line262,line270,line278,line286,line295,line304,line314,line323,line333,line342,line351,line361,line371,line382,line393,line404
! eliminated_buses=247,255,263,271,279,287,296,305,315,324,334,343,352,362,372,383,394

New Line._virtual_line247_line255_line263_line271_line279 bus1=280.1.2.3.4 bus2=240.1.2.3.4 phases=4 linecode=LC4 length=15.806124 units=m
! reduced_from=line247,line255,line263,line271,line279
! eliminated_buses=248,256,264,272

New Line._virtual_line287_line296_line305_line315_line324_line334_line343_line352_line362_line372_line383_line394_line405_line415_line426_line436_line446_line457_line468_line479_line490_line501_line513 bus1=514.1.2.3.4 bus2=280.1.2.3.4 phases=4 linecode=LC2 length=24.166251 units=m
! reduced_from=line287,line296,line305,line315,line324,line334,line343,line352,line362,line372,line383,line394,line405,line415,line426,line436,line446,line457,line468,line479,line490,line501,line513
! eliminated_buses=288,297,306,316,325,335,344,353,363,373,384,395,406,416,427,437,447,458,469,480,491,502

New Line._virtual_line288_line297 bus1=298.1.2.3.4 bus2=280.1.2.3.4 phases=4 linecode=LC4 length=8.8659 units=m
! reduced_from=line288,line297
! eliminated_buses=289

New Line._virtual_line307_line317_line327_line336_line345_line354_line364_line374_line385_line396_line406_line416_line427_line437_line447_line458_line469_line480_line491_line502_line514_line526_line538_line550_line563_line578_line592_line608_line623_line636_line649_line662_line675_line688_line701_line715_line728_line741_line753_line764_line773_line782_line790 bus1=791.1.2.3.4 bus2=298.1.2.3.4 phases=4 linecode=LC2 length=26.958232 units=m
! reduced_from=line307,line317,line327,line336,line345,line354,line364,line374,line385,line396,line406,line416,line427,line437,line447,line458,line469,line480,line491,line502,line514,line526,line538,line550,line563,line578,line592,line608,line623,line636,line649,line662,line675,line688,line701,line715,line728,line741,line753,line764,line773,line782,line790
! eliminated_buses=308,318,328,337,346,355,365,375,386,397,407,417,428,438,448,459,470,481,492,503,515,527,539,551,564,579,593,609,624,637,650,663,676,689,702,716,729,742,754,765,774,783

New Line._virtual_line340_line349_line359_line369_line380_line391_line402_line413_line424_line434_line444_line455_line466_line477_line488_line499_line511_line524_line536_line548_line560_line574_line589 bus1=332.1.2.3.4 bus2=590.1.2.3.4 phases=4 linecode=LC6 length=10.231621 units=m
! reduced_from=line340,line349,line359,line369,line380,line391,line402,line413,line424,line434,line444,line455,line466,line477,line488,line499,line511,line524,line536,line548,line560,line574,line589
! eliminated_buses=341,350,360,370,381,392,403,414,425,435,445,456,467,478,489,500,512,525,537,549,561,575

New Line._virtual_line348_line358_line368_line379_line390_line401_line412_line423_line433_line443 bus1=444.1.2.3.4 bus2=340.1.2.3.4 phases=4 linecode=LC9 length=22.60096 units=m
! reduced_from=line348,line358,line368,line379,line390,line401,line412,line423,line433,line443
! eliminated_buses=349,359,369,380,391,402,413,424,434

New Line._virtual_line356_line366_line377_line388_line399_line410_line421_line431_line441_line451_line462_line473_line484_line495_line506_line518_line530_line542_line554_line568_line583_line597_line613 bus1=614.1.2.3.4 bus2=348.1.2.3.4 phases=4 linecode=LC6 length=17.62519 units=m
! reduced_from=line356,line366,line377,line388,line399,line410,line421,line431,line441,line451,line462,line473,line484,line495,line506,line518,line530,line542,line554,line568,line583,line597,line613
! eliminated_buses=357,367,378,389,400,411,422,432,442,452,463,474,485,496,507,519,531,543,555,569,584,598

New Line._virtual_line357_line367_line378_line389_line400_line411_line422_line432_line442_line452_line463_line474_line485_line496_line507_line519_line531_line543_line555_line569_line584_line598_line614_line628_line641_line654_line667_line680_line693_line706_line720_line733_line746 bus1=747.1.2.3.4 bus2=348.1.2.3.4 phases=4 linecode=LC6 length=25.692133 units=m
! reduced_from=line357,line367,line378,line389,line400,line411,line422,line432,line442,line452,line463,line474,line485,line496,line507,line519,line531,line543,line555,line569,line584,line598,line614,line628,line641,line654,line667,line680,line693,line706,line720,line733,line746
! eliminated_buses=358,368,379,390,401,412,423,433,443,453,464,475,486,497,508,520,532,544,556,570,585,599,615,629,642,655,668,681,694,707,721,734

New Line._virtual_line407_line417_line428_line438_line448_line459_line470_line481_line492_line503_line515_line527_line539_line551_line564_line579_line593_line609_line624_line637_line650_line663_line676_line689_line702_line716_line729_line742_line754_line765_line774_line783_line791_line798_line805_line812_line819_line826_line833_line840_line848 bus1=849.1.2.3.4 bus2=398.1.2.3.4 phases=4 linecode=LC6 length=23.229518 units=m
! reduced_from=line407,line417,line428,line438,line448,line459,line470,line481,line492,line503,line515,line527,line539,line551,line564,line579,line593,line609,line624,line637,line650,line663,line676,line689,line702,line716,line729,line742,line754,line765,line774,line783,line791,line798,line805,line812,line819,line826,line833,line840,line848
! eliminated_buses=408,418,429,439,449,460,471,482,493,504,516,528,540,552,565,580,594,610,625,638,651,664,677,690,703,717,730,743,755,766,775,784,792,799,806,813,820,827,834,841

New Line._virtual_line418_line429_line439_line449_line460_line471_line482_line493_line504_line516_line528_line540_line552_line565_line580_line594_line610_line625_line638_line651_line664_line677_line690_line703_line717_line730_line743_line755_line766_line775_line784_line792_line799_line806_line813_line820_line827_line834 bus1=409.1.2.3.4 bus2=835.1.2.3.4 phases=4 linecode=LC6 length=21.369594 units=m
! reduced_from=line418,line429,line439,line449,line460,line471,line482,line493,line504,line516,line528,line540,line552,line565,line580,line594,line610,line625,line638,line651,line664,line677,line690,line703,line717,line730,line743,line755,line766,line775,line784,line792,line799,line806,line813,line820,line827,line834
! eliminated_buses=419,430,440,450,461,472,483,494,505,517,529,541,553,566,581,595,611,626,639,652,665,678,691,704,718,731,744,756,767,776,785,793,800,807,814,821,828

New Line._virtual_line419_line430_line440_line450_line461_line472_line483_line494_line505_line517_line529_line541_line553 bus1=409.1.2.3.4 bus2=554.1.2.3.4 phases=4 linecode=LC4 length=27.21871 units=m
! reduced_from=line419,line430,line440,line450,line461,line472,line483,line494,line505,line517,line529,line541,line553
! eliminated_buses=420,431,441,451,462,473,484,495,506,518,530,542

New Line._virtual_line453_line464_line475_line486_line497 bus1=444.1.2.3.4 bus2=498.1.2.3.4 phases=4 linecode=LC9 length=19.04771 units=m
! reduced_from=line453,line464,line475,line486,line497
! eliminated_buses=454,465,476,487

New Line._virtual_line454_line465_line476_line487_line498_line510_line523_line535_line547_line559_line573_line588_line603_line619_line632_line645_line658_line671_line684_line697 bus1=698.1.2.3.4 bus2=444.1.2.3.4 phases=4 linecode=LC2 length=8.948486 units=m
! reduced_from=line454,line465,line476,line487,line498,line510,line523,line535,line547,line559,line573,line588,line603,line619,line632,line645,line658,line671,line684,line697
! eliminated_buses=455,466,477,488,499,511,524,536,548,560,574,589,604,620,633,646,659,672,685

New Line._virtual_line508_line520_line532_line544_line556_line570_line585_line600_line615_line629_line642_line655_line668_line681_line694_line707_line721_line734_line747_line758_line769_line778_line787_line795_line802_line809_line816_line823_line830_line837_line845_line852_line858_line864_line870_line876_line882_line888_line894_line901 bus1=902.1.2.3.4 bus2=498.1.2.3.4 phases=4 linecode=LC6 length=22.964397 units=m
! reduced_from=line508,line520,line532,line544,line556,line570,line585,line600,line615,line629,line642,line655,line668,line681,line694,line707,line721,line734,line747,line758,line769,line778,line787,line795,line802,line809,line816,line823,line830,line837,line845,line852,line858,line864,line870,line876,line882,line888,line894,line901
! eliminated_buses=509,521,533,545,557,571,586,601,616,630,643,656,669,682,695,708,722,735,748,759,770,779,788,796,803,810,817,824,831,838,846,853,859,865,871,877,883,889,895

New Line._virtual_line562_line577_line591_line607_line622_line635_line648_line661_line674_line687_line700_line714_line727_line740_line752_line763_line772_line781_line789_line797_line804_line811_line818_line825_line832_line839_line847_line854_line860_line866_line872_line878_line884_line890 bus1=891.1.2.3.4 bus2=550.1.2.3.4 phases=4 linecode=LC2 length=24.024411 units=m
! reduced_from=line562,line577,line591,line607,line622,line635,line648,line661,line674,line687,line700,line714,line727,line740,line752,line763,line772,line781,line789,line797,line804,line811,line818,line825,line832,line839,line847,line854,line860,line866,line872,line878,line884,line890
! eliminated_buses=563,578,592,608,623,636,649,662,675,688,701,715,728,741,753,764,773,782,790,798,805,812,819,826,833,840,848,855,861,867,873,879,885

New Line._virtual_line566_line581_line595_line611_line626_line639_line652_line665_line678_line691_line704_line718_line731_line744_line756_line767_line776_line785_line793_line800_line807_line814_line821_line828_line835_line843_line850_line856_line862_line868_line874_line880_line886_line892_line899_line905_line912_line917_line923_line928_line933_line938_line942_line946_line950_line954_line958_line962_line966_line970_line974 bus1=975.1.2.3.4 bus2=554.1.2.3.4 phases=4 linecode=LC6 length=22.670891 units=m
! reduced_from=line566,line581,line595,line611,line626,line639,line652,line665,line678,line691,line704,line718,line731,line744,line756,line767,line776,line785,line793,line800,line807,line814,line821,line828,line835,line843,line850,line856,line862,line868,line874,line880,line886,line892,line899,line905,line912,line917,line923,line928,line933,line938,line942,line946,line950,line954,line958,line962,line966,line970,line974
! eliminated_buses=567,582,596,612,627,640,653,666,679,692,705,719,732,745,757,768,777,786,794,801,808,815,822,829,836,844,851,857,863,869,875,881,887,893,900,906,913,918,924,929,934,939,943,947,951,955,959,963,967,971

New Line._virtual_line567_line582_line596_line612_line627_line640_line653_line666_line679_line692_line705_line719_line732_line745_line757_line768_line777_line786_line794_line801_line808_line815_line822_line829_line836_line844_line851_line857_line863_line869_line875_line881_line887_line893_line900_line906_line913 bus1=914.1.2.3.4 bus2=554.1.2.3.4 phases=4 linecode=LC6 length=18.84934 units=m
! reduced_from=line567,line582,line596,line612,line627,line640,line653,line666,line679,line692,line705,line719,line732,line745,line757,line768,line777,line786,line794,line801,line808,line815,line822,line829,line836,line844,line851,line857,line863,line869,line875,line881,line887,line893,line900,line906,line913
! eliminated_buses=568,583,597,613,628,641,654,667,680,693,706,720,733,746,758,769,778,787,795,802,809,816,823,830,837,845,852,858,864,870,876,882,888,894,901,907

New Line._virtual_line576_line590_line606_line621_line634_line647_line660_line673_line686_line699_line713_line726_line739_line751_line762_line771_line780_line788_line796_line803_line810_line817_line824_line831_line838_line846_line853_line859_line865_line871_line877_line883_line889_line895_line902_line909_line914_line920_line925_line930_line935_line940_line944_line948_line952_line956_line960_line964_line968_line972_line976_line979_line982_line984_line985_line986_line987_line988_line989 bus1=990.1.2.3.4 bus2=562.1.2.3.4 phases=4 linecode=LC6 length=30.015068 units=m
! reduced_from=line576,line590,line606,line621,line634,line647,line660,line673,line686,line699,line713,line726,line739,line751,line762,line771,line780,line788,line796,line803,line810,line817,line824,line831,line838,line846,line853,line859,line865,line871,line877,line883,line889,line895,line902,line909,line914,line920,line925,line930,line935,line940,line944,line948,line952,line956,line960,line964,line968,line972,line976,line979,line982,line984,line985,line986,line987,line988,line989
! eliminated_buses=577,591,607,622,635,648,661,674,687,700,714,727,740,752,763,772,781,789,797,804,811,818,825,832,839,847,854,860,866,872,878,884,890,896,903,910,915,921,926,931,936,941,945,949,953,957,961,965,969,973,977,980,983,985,986,987,988,989

New Line._virtual_line604_line620_line633_line646_line659_line672_line685_line698_line712_line725_line738_line750_line761 bus1=590.1.2.3.4 bus2=762.1.2.3.4 phases=4 linecode=LC6 length=12.332518 units=m
! reduced_from=line604,line620,line633,line646,line659,line672,line685,line698,line712,line725,line738,line750,line761
! eliminated_buses=605,621,634,647,660,673,686,699,713,726,739,751

New Line._virtual_line710_line724_line737_line749_line760_line770_line779 bus1=780.1.2.3.4 bus2=698.1.2.3.4 phases=4 linecode=LC2 length=9.5709 units=m
! reduced_from=line710,line724,line737,line749,line760,line770,line779
! eliminated_buses=711,725,738,750,761,771

New Line._virtual_line841_line849_line855_line861_line867_line873_line879_line885_line891_line898_line904_line911_line916_line922_line927_line932_line937 bus1=938.1.2.3.4 bus2=835.1.2.3.4 phases=4 linecode=LC6 length=12.235976 units=m
! reduced_from=line841,line849,line855,line861,line867,line873,line879,line885,line891,line898,line904,line911,line916,line922,line927,line932,line937
! eliminated_buses=842,850,856,862,868,874,880,886,892,899,905,912,917,923,928,933

New Line._virtual_line896_line903_line910_line915_line921_line926_line931_line936_line941_line945_line949_line953_line957_line961_line965_line969_line973_line977_line980_line983 bus1=891.1.2.3.4 bus2=984.1.2.3.4 phases=4 linecode=LC2 length=9.889103 units=m
! reduced_from=line896,line903,line910,line915,line921,line926,line931,line936,line941,line945,line949,line953,line957,line961,line965,line969,line973,line977,line980,line983
! eliminated_buses=897,904,911,916,922,927,932,937,942,946,950,954,958,962,966,970,974,978,981

New Line._virtual_line918_line924_line929_line934_line939_line943_line947_line951_line955_line959_line963_line967_line971_line975_line978_line981 bus1=914.1.2.3.4 bus2=982.1.2.3.4 phases=4 linecode=LC6 length=11.31229 units=m
! reduced_from=line918,line924,line929,line934,line939,line943,line947,line951,line955,line959,line963,line967,line971,line975,line978,line981
! eliminated_buses=919,925,930,935,940,944,948,952,956,960,964,968,972,976,979

New Line.LINE93 bus1=92.1.2.3.4 bus2=94.1.2.3.4 phases=4 linecode=LC5 length=1.2181 units=m

New Line.LINE185 bus1=182.1.2.3.4 bus2=186.1.2.3.4 phases=4 linecode=LC4 length=2.6494 units=m

New Line.LINE195 bus1=189.1.2.3.4 bus2=196.1.2.3.4 phases=4 linecode=LC6 length=0.88352 units=m

New Line.LINE339 bus1=332.1.2.3.4 bus2=340.1.2.3.4 phases=4 linecode=LC4 length=0.84246 units=m

New Line.LINE408 bus1=398.1.2.3.4 bus2=409.1.2.3.4 phases=4 linecode=LC4 length=0.96883 units=m

New Line.LINE561 bus1=550.1.2.3.4 bus2=562.1.2.3.4 phases=4 linecode=LC4 length=0.24965 units=m

New Line.LINE605 bus1=590.1.2.3.4 bus2=606.1.2.3.4 phases=4 linecode=LC6 length=4.9432 units=m

New Line.LINE711 bus1=698.1.2.3.4 bus2=712.1.2.3.4 phases=4 linecode=LC2 length=4.553 units=m

New Line.LINE842 bus1=835.1.2.3.4 bus2=843.1.2.3.4 phases=4 linecode=LC6 length=2.3735 units=m

New Line.LINE897 bus1=891.1.2.3.4 bus2=898.1.2.3.4 phases=4 linecode=LC6 length=3.011 units=m

New Line.LINE907 bus1=902.1.2.3.4 bus2=908.1.2.3.4 phases=4 linecode=LC6 length=0.4842 units=m

New Line.LINE908 bus1=902.1.2.3.4 bus2=909.1.2.3.4 phases=4 linecode=LC6 length=0.4842 units=m

New Line.LINE919 bus1=914.1.2.3.4 bus2=920.1.2.3.4 phases=4 linecode=LC6 length=1.5746 units=m
