! Reduced enabled lines.

New Line._virtual_line0_line1_line2_line3_line4_line5_line6_line7_line8_line9_line10_line11_line12_line13_line14_line15_line16_line17_line18_line19_line20_line21_line22_line23_line24_line25_line26_line27_line28_line29_line30_line31_line32_line33 bus1=sourcebus.1.2.3.4 bus2=34.1.2.3.4 phases=4 linecode=LC5 length=27.135663 units=m
! reduced_from=line0,line1,line2,line3,line4,line5,line6,line7,line8,line9,line10,line11,line12,line13,line14,line15,line16,line17,line18,line19,line20,line21,line22,line23,line24,line25,line26,line27,line28,line29,line30,line31,line32,line33
! eliminated_buses=1,2,3,4,5,6,7,8,9,10,11,12,13,14,15,16,17,18,19,20,21,22,23,24,25,26,27,28,29,30,31,32,33

New Line._virtual_line35_line38_line40_line41_line42_line43_line44_line45_line46_line47_line48_line49_line50_line51_line52_line53_line54_line55_line56_line57 bus1=58.1.2.3.4 bus2=34.1.2.3.4 phases=4 linecode=LC5 length=23.53754 units=m
! reduced_from=line35,line38,line40,line41,line42,line43,line44,line45,line46,line47,line48,line49,line50,line51,line52,line53,line54,line55,line56,line57
! eliminated_buses=36,39,41,42,43,44,45,46,47,48,49,50,51,52,53,54,55,56,57

New Line._virtual_line36_line39 bus1=35.1.2.3.4 bus2=40.1.2.3.4 phases=4 linecode=LC6 length=8.2932 units=m
! reduced_from=line36,line39
! eliminated_buses=37

New Line._virtual_line58_line60_line63_line67_line71_line75_line79_line84_line91_line99_line107_line114_line118_line122_line126_line131_line137_line143_line149_line155_line162_line169_line176_line184_line193 bus1=194.1.2.3.4 bus2=58.1.2.3.4 phases=4 linecode=LC5 length=44.528994 units=m
! reduced_from=line58,line60,line63,line67,line71,line75,line79,line84,line91,line99,line107,line114,line118,line122,line126,line131,line137,line143,line149,line155,line162,line169,line176,line184,line193
! eliminated_buses=59,61,64,68,72,76,80,85,92,100,108,115,119,123,127,132,138,144,150,156,163,170,177,185

New Line._virtual_line61_line64_line68_line72_line76 bus1=60.1.2.3.4 bus2=77.1.2.3.4 phases=4 linecode=LC5 length=30.213 units=m
! reduced_from=line61,line64,line68,line72,line76
! eliminated_buses=62,65,69,73

New Line._virtual_line62_line66_line70_line74_line78_line83_line90_line98_line106_line113_line117_line121_line125_line130_line136_line142_line148_line154 bus1=155.1.2.3.4 bus2=60.1.2.3.4 phases=4 linecode=LC6 length=24.92254 units=m
! reduced_from=line62,line66,line70,line74,line78,line83,line90,line98,line106,line113,line117,line121,line125,line130,line136,line142,line148,line154
! eliminated_buses=63,67,71,75,79,84,91,99,107,114,118,122,126,131,137,143,149

New Line._virtual_line80_line85_line92_line100_line108_line115_line119_line123 bus1=124.1.2.3.4 bus2=77.1.2.3.4 phases=4 linecode=LC5 length=32.0478 units=m
! reduced_from=line80,line85,line92,line100,line108,line115,line119,line123
! eliminated_buses=81,86,93,101,109,116,120

New Line._virtual_line87_line94 bus1=82.1.2.3.4 bus2=95.1.2.3.4 phases=4 linecode=LC6 length=2.60132 units=m
! reduced_from=line87,line94
! eliminated_buses=88

New Line._virtual_line95_line104_line111 bus1=112.1.2.3.4 bus2=89.1.2.3.4 phases=4 linecode=LC6 length=10.0458 units=m
! reduced_from=line95,line104,line111
! eliminated_buses=96,105

New Line._virtual_line102_line110 bus1=95.1.2.3.4 bus2=111.1.2.3.4 phases=4 linecode=LC6 length=11.0319 units=m
! reduced_from=line102,line110
! eliminated_buses=103

New Line._virtual_line128_line134_line140_line146_line152_line158_line166_line173_line181_line191_line200_line210_line222_line234_line244_line255_line267_line280_line293_line307_line321_line336 bus1=124.1.2.3.4 bus2=337.1.2.3.4 phases=4 linecode=LC6 length=21.74201 units=m
! reduced_from=line128,line134,line140,line146,line152,line158,line166,line173,line181,line191,line200,line210,line222,line234,line244,line255,line267,line280,line293,line307,line321,line336
! eliminated_buses=129,135,141,147,153,159,167,174,182,192,201,211,223,235,245,256,268,281,294,308,322

New Line._virtual_line132_line138_line144_line150_line156 bus1=128.1.2.3.4 bus2=157.1.2.3.4 phases=4 linecode=LC5 length=26.3385 units=m
! reduced_from=line132,line138,line144,line150,line156
! eliminated_buses=133,139,145,151

New Line._virtual_line133_line139_line145_line151_line157_line165_line172_line180_line190_line199_line209_line221_line233_line243_line254_line266_line279_line292_line306_line320_line335_line350_line366_line381_line396_line412_line430_line447_line465_line483_line503_line523_line543_line564_line586 bus1=587.1.2.3.4 bus2=128.1.2.3.4 phases=4 linecode=LC6 length=19.214157 units=m
! reduced_from=line133,line139,line145,line151,line157,line165,line172,line180,line190,line199,line209,line221,line233,line243,line254,line266,line279,line292,line306,line320,line335,line350,line366,line381,line396,line412,line430,line447,line465,line483,line503,line523,line543,line564,line586
! eliminated_buses=134,140,146,152,158,166,173,181,191,200,210,222,234,244,255,267,280,293,307,321,336,351,367,382,397,413,431,448,466,484,504,524,544,565

New Line._virtual_line160_line168_line175_line183 bus1=155.1.2.3.4 bus2=184.1.2.3.4 phases=4 linecode=LC6 length=8.41616 units=m
! reduced_from=line160,line168,line175,line183
! eliminated_buses=161,169,176

New Line._virtual_line163_line170_line177_line186_line195_line205_line215_line227_line238_line249_line261_line274_line287 bus1=288.1.2.3.4 bus2=157.1.2.3.4 phases=4 linecode=LC5 length=34.33396 units=m
! reduced_from=line163,line170,line177,line186,line195,line205,line215,line227,line238,line249,line261,line274,line287
! eliminated_buses=164,171,178,187,196,206,216,228,239,250,262,275

New Line._virtual_line164_line171_line179 bus1=157.1.2.3.4 bus2=180.1.2.3.4 phases=4 linecode=LC6 length=13.52675 units=m
! reduced_from=line164,line171,line179
! eliminated_buses=165,172

New Line._virtual_line188_line197_line207_line218 bus1=219.1.2.3.4 bus2=180.1.2.3.4 phases=4 linecode=LC6 length=4.12573 units=m
! reduced_from=line188,line197,line207,line218
! eliminated_buses=189,198,208

New Line._virtual_line189_line198_line208 bus1=180.1.2.3.4 bus2=209.1.2.3.4 phases=4 linecode=LC6 length=2.10953 units=m
! reduced_from=line189,line198,line208
! eliminated_buses=190,199

New Line._virtual_line202_line212_line224_line235 bus1=194.1.2.3.4 bus2=236.1.2.3.4 phases=4 linecode=LC5 length=35.6905 units=m
! reduced_from=line202,line212,line224,line235
! eliminated_buses=203,213,225

New Line._virtual_line203_line213_line225_line236_line247_line259_line272_line285_line298_line312_line326_line341_line357_line372_line386_line401_line418_line435_line452 bus1=194.1.2.3.4 bus2=453.1.2.3.4 phases=4 linecode=LC6 length=23.131629 units=m
! reduced_from=line203,line213,line225,line236,line247,line259,line272,line285,line298,line312,line326,line341,line357,line372,line386,line401,line418,line435,line452
! eliminated_buses=204,214,226,237,248,260,273,286,299,313,327,342,358,373,387,402,419,436

New Line._virtual_line219_line232_line242_line253_line265_line278_line291_line305_line319_line334_line349_line365_line380_line395_line411_line429_line446_line464_line482_line502_line522_line542_line563_line585_line607_line629_line650_line670_line689_line707_line725 bus1=726.1.2.3.4 bus2=209.1.2.3.4 phases=4 linecode=LC6 length=17.057699 units=m
! reduced_from=line219,line232,line242,line253,line265,line278,line291,line305,line319,line334,line349,line365,line380,line395,line411,line429,line446,line464,line482,line502,line522,line542,line563,line585,line607,line629,line650,line670,line689,line707,line725
! eliminated_buses=220,233,243,254,266,279,292,306,320,335,350,366,381,396,412,430,447,465,483,503,523,543,564,586,608,630,651,671,690,708

New Line._virtual_line230_line241_line252_line264_line277_line290_line304_line318_line333_line348_line364_line379_line394_line410_line428_line445_line463_line481_line501_line521_line541_line562_line584_line606_line628_line649_line669 bus1=219.1.2.3.4 bus2=670.1.2.3.4 phases=4 linecode=LC6 length=14.405243 units=m
! reduced_from=line230,line241,line252,line264,line277,line290,line304,line318,line333,line348,line364,line379,line394,line410,line428,line445,line463,line481,line501,line521,line541,line562,line584,line606,line628,line649,line669
! eliminated_buses=231,242,253,265,278,291,305,319,334,349,365,380,395,411,429,446,464,482,502,522,542,563,585,607,629,650

New Line._virtual_line245_line256 bus1=257.1.2.3.4 bus2=236.1.2.3.4 phases=4 linecode=LC6 length=13.6042 units=m
! reduced_from=line245,line256
! eliminated_buses=246

New Line._virtual_line246_line258_line271_line284_line297_line311_line325_line340_line356_line371_line385_line400_line417_line434_line451_line468_line486_line506_line526 bus1=527.1.2.3.4 bus2=236.1.2.3.4 phases=4 linecode=LC5 length=39.27665 units=m
! reduced_from=line246,line258,line271,line284,line297,line311,line325,line340,line356,line371,line385,line400,line417,line434,line451,line468,line486,line506,line526
! eliminated_buses=247,259,272,285,298,312,326,341,357,372,386,401,418,435,452,469,487,507

New Line._virtual_line268_line281_line294_line308_line322_line337_line353_line368_line382_line397_line413_line431_line448_line466_line484_line504_line524_line544_line565_line587_line610_line631_line652_line672_line691_line709_line727_line744_line759 bus1=760.1.2.3.4 bus2=257.1.2.3.4 phases=4 linecode=LC6 length=10.040226 units=m
! reduced_from=line268,line281,line294,line308,line322,line337,line353,line368,line382,line397,line413,line431,line448,line466,line484,line504,line524,line544,line565,line587,line610,line631,line652,line672,line691,line709,line727,line744,line759
! eliminated_buses=269,282,295,309,323,338,354,369,383,398,414,432,449,467,485,505,525,545,566,588,611,632,653,673,692,710,728,745

New Line._virtual_line269_line282_line295_line309_line323_line338_line354_line369_line383_line398 bus1=257.1.2.3.4 bus2=399.1.2.3.4 phases=4 linecode=LC6 length=7.66249 units=m
! reduced_from=line269,line282,line295,line309,line323,line338,line354,line369,line383,line398
! eliminated_buses=270,283,296,310,324,339,355,370,384

New Line._virtual_line300_line314_line328_line343_line359_line374_line388_line404_line421_line438_line455_line473_line490_line511_line531_line550_line572_line593_line616_line637_line658_line678_line696_line714_line732_line748_line761_line774_line785_line796_line807 bus1=808.1.2.3.4 bus2=288.1.2.3.4 phases=4 linecode=LC6 length=22.44326 units=m
! reduced_from=line300,line314,line328,line343,line359,line374,line388,line404,line421,line438,line455,line473,line490,line511,line531,line550,line572,line593,line616,line637,line658,line678,line696,line714,line732,line748,line761,line774,line785,line796,line807
! eliminated_buses=301,315,329,344,360,375,389,405,422,439,456,474,491,512,532,551,573,594,617,638,659,679,697,715,733,749,762,775,786,797

New Line._virtual_line315_line329_line344_line360_line375_line389_line405_line422_line439_line456_line474_line491_line512_line532_line551_line573_line594_line617_line638_line659_line679_line697_line715_line733_line749_line762_line775_line786_line797_line808_line819_line828_line838_line850_line860_line869_line877_line885 bus1=886.1.2.3.4 bus2=302.1.2.3.4 phases=4 linecode=LC6 length=20.046599 units=m
! reduced_from=line315,line329,line344,line360,line375,line389,line405,line422,line439,line456,line474,line491,line512,line532,line551,line573,line594,line617,line638,line659,line679,line697,line715,line733,line749,line762,line775,line786,line797,line808,line819,line828,line838,line850,line860,line869,line877,line885
! eliminated_buses=316,330,345,361,376,390,406,423,440,457,475,492,513,533,552,574,595,618,639,660,680,698,716,734,750,763,776,787,798,809,820,829,839,851,861,870,878

New Line._virtual_line316_line331_line346_line362_line377 bus1=302.1.2.3.4 bus2=378.1.2.3.4 phases=4 linecode=LC5 length=27.9809 units=m
! reduced_from=line316,line331,line346,line362,line377
! eliminated_buses=317,332,347,363

New Line._virtual_line351_line367 bus1=368.1.2.3.4 bus2=337.1.2.3.4 phases=4 linecode=LC6 length=6.7167 units=m
! reduced_from=line351,line367
! eliminated_buses=352

New Line._virtual_line391_line407_line424 bus1=378.1.2.3.4 bus2=425.1.2.3.4 phases=4 linecode=LC6 length=12.54926 units=m
! reduced_from=line391,line407,line424
! eliminated_buses=392,408

New Line._virtual_line392_line408_line426_line444_line461_line479 bus1=378.1.2.3.4 bus2=480.1.2.3.4 phases=4 linecode=LC5 length=33.3831 units=m
! reduced_from=line392,line408,line426,line444,line461,line479
! eliminated_buses=393,409,427,445,462

New Line._virtual_line414_line432_line449_line467_line485_line505_line525_line545_line566_line588_line611_line632_line653_line673_line692_line710_line728 bus1=399.1.2.3.4 bus2=729.1.2.3.4 phases=4 linecode=LC6 length=11.224506 units=m
! reduced_from=line414,line432,line449,line467,line485,line505,line525,line545,line566,line588,line611,line632,line653,line673,line692,line710,line728
! eliminated_buses=415,433,450,468,486,506,526,546,567,589,612,633,654,674,693,711

New Line._virtual_line441_line458_line476 bus1=477.1.2.3.4 bus2=425.1.2.3.4 phases=4 linecode=LC6 length=2.01094 units=m
! reduced_from=line441,line458,line476
! eliminated_buses=442,459

New Line._virtual_line442_line459_line477 bus1=425.1.2.3.4 bus2=478.1.2.3.4 phases=4 linecode=LC6 length=2.50247 units=m
! reduced_from=line442,line459,line477
! eliminated_buses=443,460

New Line._virtual_line469_line487_line508_line528_line548_line570_line591_line614_line635_line656_line676 bus1=677.1.2.3.4 bus2=453.1.2.3.4 phases=4 linecode=LC6 length=13.29271 units=m
! reduced_from=line469,line487,line508,line528,line548,line570,line591,line614,line635,line656,line676
! eliminated_buses=470,488,509,529,549,571,592,615,636,657

New Line._virtual_line493_line514_line534_line553_line574_line595_line618_line639_line660_line680_line698_line716_line734_line750_line763_line776_line787_line798 bus1=799.1.2.3.4 bus2=477.1.2.3.4 phases=4 linecode=LC6 length=14.90236 units=m
! reduced_from=line493,line514,line534,line553,line574,line595,line618,line639,line660,line680,line698,line716,line734,line750,line763,line776,line787,line798
! eliminated_buses=494,515,535,554,575,596,619,640,661,681,699,717,735,751,764,777,788

New Line._virtual_line495_line515 bus1=478.1.2.3.4 bus2=516.1.2.3.4 phases=4 linecode=LC6 length=9.6891 units=m
! reduced_from=line495,line515
! eliminated_buses=496

New Line._virtual_line499_line519_line539_line560_line582_line604_line626_line647_line667_line687_line705_line723_line741_line756_line769_line781_line792_line803_line813_line823_line832_line842_line854 bus1=480.1.2.3.4 bus2=855.1.2.3.4 phases=4 linecode=LC6 length=21.64073 units=m
! reduced_from=line499,line519,line539,line560,line582,line604,line626,line647,line667,line687,line705,line723,line741,line756,line769,line781,line792,line803,line813,line823,line832,line842,line854
! eliminated_buses=500,520,540,561,583,605,627,648,668,688,706,724,742,757,770,782,793,804,814,824,833,843

New Line._virtual_line518_line538_line559_line581_line603_line625_line646_line666_line686_line704_line722_line740_line755_line768_line780_line791_line802_line812_line822_line831_line841 bus1=842.1.2.3.4 bus2=499.1.2.3.4 phases=4 linecode=LC6 length=19.38959 units=m
! reduced_from=line518,line538,line559,line581,line603,line625,line646,line666,line686,line704,line722,line740,line755,line768,line780,line791,line802,line812,line822,line831,line841
! eliminated_buses=519,539,560,582,604,626,647,667,687,705,723,741,756,769,781,792,803,813,823,832

New Line._virtual_line557_line578 bus1=538.1.2.3.4 bus2=579.1.2.3.4 phases=4 linecode=LC6 length=1.17876 units=m
! reduced_from=line557,line578
! eliminated_buses=558

New Line._virtual_line567_line589_line612_line633_line654_line674_line693_line711_line729_line745_line760_line773_line784_line795_line806_line816_line826 bus1=547.1.2.3.4 bus2=827.1.2.3.4 phases=4 linecode=LC6 length=15.47829 units=m
! reduced_from=line567,line589,line612,line633,line654,line674,line693,line711,line729,line745,line760,line773,line784,line795,line806,line816,line826
! eliminated_buses=568,590,613,634,655,675,694,712,730,746,761,774,785,796,807,817

New Line._virtual_line579_line602_line624_line645_line665_line685_line703_line721_line739_line754_line767_line779_line790_line801_line811_line821_line830_line840 bus1=559.1.2.3.4 bus2=841.1.2.3.4 phases=4 linecode=LC6 length=13.77394 units=m
! reduced_from=line579,line602,line624,line645,line665,line685,line703,line721,line739,line754,line767,line779,line790,line801,line811,line821,line830,line840
! eliminated_buses=580,603,625,646,666,686,704,722,740,755,768,780,791,802,812,822,831

New Line._virtual_line600_line623_line644_line664_line684_line702_line720_line738_line753_line766_line778_line789_line800_line810_line820_line829_line839_line851 bus1=579.1.2.3.4 bus2=852.1.2.3.4 phases=4 linecode=LC6 length=12.7645 units=m
! reduced_from=line600,line623,line644,line664,line684,line702,line720,line738,line753,line766,line778,line789,line800,line810,line820,line829,line839,line851
! eliminated_buses=601,624,645,665,685,703,721,739,754,767,779,790,801,811,821,830,840

New Line._virtual_line608_line630_line651_line671_line690_line708_line726_line743_line758_line770_line782_line793_line804_line814_line824_line833_line843_line855_line864_line872_line880_line888_line896 bus1=897.1.2.3.4 bus2=587.1.2.3.4 phases=4 linecode=LC6 length=11.252327 units=m
! reduced_from=line608,line630,line651,line671,line690,line708,line726,line743,line758,line770,line782,line793,line804,line814,line824,line833,line843,line855,line864,line872,line880,line888,line896
! eliminated_buses=609,631,652,672,691,709,727,744,759,771,783,794,805,815,825,834,844,856,865,873,881,889

New Line._virtual_line771_line783_line794_line805_line815_line825_line834_line844_line856_line865_line873_line881 bus1=882.1.2.3.4 bus2=760.1.2.3.4 phases=4 linecode=LC6 length=6.47096 units=m
! reduced_from=line771,line783,line794,line805,line815,line825,line834,line844,line856,line865,line873,line881
! eliminated_buses=772,784,795,806,816,826,835,845,857,866,874

New Line._virtual_line817_line827_line837_line849_line859_line868_line876_line884_line891_line899_line905_line911_line917_line923_line929_line935 bus1=936.1.2.3.4 bus2=808.1.2.3.4 phases=4 linecode=LC6 length=9.256347 units=m
! reduced_from=line817,line827,line837,line849,line859,line868,line876,line884,line891,line899,line905,line911,line917,line923,line929,line935
! eliminated_buses=818,828,838,850,860,869,877,885,892,900,906,912,918,924,930

New Line._virtual_line845_line857_line866_line874_line882_line889_line897_line903_line909_line915_line921_line927_line933_line939_line944_line949_line953_line956_line959_line962_line965_line967_line969_line971_line973_line975 bus1=976.1.2.3.4 bus2=836.1.2.3.4 phases=4 linecode=LC6 length=13.922863 units=m
! reduced_from=line845,line857,line866,line874,line882,line889,line897,line903,line909,line915,line921,line927,line933,line939,line944,line949,line953,line956,line959,line962,line965,line967,line969,line971,line973,line975
! eliminated_buses=846,858,867,875,883,890,898,904,910,916,922,928,934,940,945,950,954,957,960,963,966,968,970,972,974

New Line._virtual_line847_line858_line867_line875_line883_line890_line898_line904_line910_line916_line922_line928_line934_line940_line945_line950_line954_line957_line960_line963 bus1=964.1.2.3.4 bus2=837.1.2.3.4 phases=4 linecode=LC6 length=13.7655 units=m
! reduced_from=line847,line858,line867,line875,line883,line890,line898,line904,line910,line916,line922,line928,line934,line940,line945,line950,line954,line957,line960,line963
! eliminated_buses=848,859,868,876,884,891,899,905,911,917,923,929,935,941,946,951,955,958,961

New Line._virtual_line852_line861_line870_line878_line886_line894_line901_line907_line913_line919_line925_line931_line937_line942_line947 bus1=842.1.2.3.4 bus2=948.1.2.3.4 phases=4 linecode=LC6 length=10.321402 units=m
! reduced_from=line852,line861,line870,line878,line886,line894,line901,line907,line913,line919,line925,line931,line937,line942,line947
! eliminated_buses=853,862,871,879,887,895,902,908,914,920,926,932,938,943

New Line._virtual_line862_line871_line879_line887_line895_line902_line908_line914_line920_line926_line932_line938_line943_line948_line952 bus1=953.1.2.3.4 bus2=855.1.2.3.4 phases=4 linecode=LC6 length=7.559722 units=m
! reduced_from=line862,line871,line879,line887,line895,line902,line908,line914,line920,line926,line932,line938,line943,line948,line952
! eliminated_buses=863,872,880,888,896,903,909,915,921,927,933,939,944,949

New Line._virtual_line892_line900_line906_line912_line918_line924_line930_line936_line941_line946_line951_line955_line958_line961_line964_line966_line968_line970_line972_line974_line976_line977_line978_line979_line980_line981_line982 bus1=886.1.2.3.4 bus2=983.1.2.3.4 phases=4 linecode=LC6 length=9.493104 units=m
! reduced_from=line892,line900,line906,line912,line918,line924,line930,line936,line941,line946,line951,line955,line958,line961,line964,line966,line968,line970,line972,line974,line976,line977,line978,line979,line980,line981,line982
! eliminated_buses=893,901,907,913,919,925,931,937,942,947,952,956,959,962,965,967,969,971,973,975,977,978,979,980,981,982

New Line.LINE34 bus1=34.1.2.3.4 bus2=35.1.2.3.4 phases=4 linecode=LC6 length=8.968 units=m

New Line.LINE37 bus1=35.1.2.3.4 bus2=38.1.2.3.4 phases=4 linecode=LC6 length=4.7436 units=m

New Line.LINE59 bus1=58.1.2.3.4 bus2=60.1.2.3.4 phases=4 linecode=LC5 length=22.1629 units=m

New Line.LINE81 bus1=77.1.2.3.4 bus2=82.1.2.3.4 phases=4 linecode=LC6 length=13.253 units=m

New Line.LINE88 bus1=82.1.2.3.4 bus2=89.1.2.3.4 phases=4 linecode=LC6 length=3.2941 units=m

New Line.LINE96 bus1=89.1.2.3.4 bus2=97.1.2.3.4 phases=4 linecode=LC6 length=3.4725 units=m

New Line.LINE103 bus1=95.1.2.3.4 bus2=104.1.2.3.4 phases=4 linecode=LC6 length=3.7166 units=m

New Line.LINE127 bus1=124.1.2.3.4 bus2=128.1.2.3.4 phases=4 linecode=LC5 length=0.78552 units=m

New Line.LINE161 bus1=155.1.2.3.4 bus2=162.1.2.3.4 phases=4 linecode=LC6 length=2.2551 units=m

New Line.LINE220 bus1=209.1.2.3.4 bus2=221.1.2.3.4 phases=4 linecode=LC6 length=3.9482 units=m

New Line.LINE231 bus1=219.1.2.3.4 bus2=232.1.2.3.4 phases=4 linecode=LC6 length=3.0119 units=m

New Line.LINE301 bus1=288.1.2.3.4 bus2=302.1.2.3.4 phases=4 linecode=LC5 length=0.72046 units=m

New Line.LINE352 bus1=337.1.2.3.4 bus2=353.1.2.3.4 phases=4 linecode=LC6 length=2.0294 units=m

New Line.LINE415 bus1=399.1.2.3.4 bus2=416.1.2.3.4 phases=4 linecode=LC6 length=0.62678 units=m

New Line.LINE470 bus1=453.1.2.3.4 bus2=471.1.2.3.4 phases=4 linecode=LC6 length=0.76655 units=m

New Line.LINE494 bus1=477.1.2.3.4 bus2=495.1.2.3.4 phases=4 linecode=LC6 length=2.0474 units=m

New Line.LINE496 bus1=478.1.2.3.4 bus2=497.1.2.3.4 phases=4 linecode=LC6 length=3.6083 units=m

New Line.LINE498 bus1=480.1.2.3.4 bus2=499.1.2.3.4 phases=4 linecode=LC5 length=0.60456 units=m

New Line.LINE517 bus1=499.1.2.3.4 bus2=518.1.2.3.4 phases=4 linecode=LC5 length=29.2193 units=m

New Line.LINE537 bus1=518.1.2.3.4 bus2=538.1.2.3.4 phases=4 linecode=LC6 length=12.8563 units=m

New Line.LINE546 bus1=527.1.2.3.4 bus2=547.1.2.3.4 phases=4 linecode=LC3 length=1.1824 units=m

New Line.LINE558 bus1=538.1.2.3.4 bus2=559.1.2.3.4 phases=4 linecode=LC6 length=1.8019 units=m

New Line.LINE580 bus1=559.1.2.3.4 bus2=581.1.2.3.4 phases=4 linecode=LC6 length=3.9857 units=m

New Line.LINE601 bus1=579.1.2.3.4 bus2=602.1.2.3.4 phases=4 linecode=LC6 length=4.3144 units=m

New Line.LINE609 bus1=587.1.2.3.4 bus2=610.1.2.3.4 phases=4 linecode=LC6 length=1.3096 units=m

New Line.LINE772 bus1=760.1.2.3.4 bus2=773.1.2.3.4 phases=4 linecode=LC6 length=1.2876 units=m

New Line.LINE818 bus1=808.1.2.3.4 bus2=819.1.2.3.4 phases=4 linecode=LC6 length=1.9611 units=m

New Line.LINE835 bus1=827.1.2.3.4 bus2=836.1.2.3.4 phases=4 linecode=LC6 length=3.0942 units=m

New Line.LINE836 bus1=827.1.2.3.4 bus2=837.1.2.3.4 phases=4 linecode=LC6 length=2.535 units=m

New Line.LINE846 bus1=836.1.2.3.4 bus2=847.1.2.3.4 phases=4 linecode=LC6 length=3.3887 units=m

New Line.LINE848 bus1=837.1.2.3.4 bus2=849.1.2.3.4 phases=4 linecode=LC6 length=2.3848 units=m

New Line.LINE853 bus1=842.1.2.3.4 bus2=854.1.2.3.4 phases=4 linecode=LC6 length=1.9225 units=m

New Line.LINE863 bus1=855.1.2.3.4 bus2=864.1.2.3.4 phases=4 linecode=LC6 length=1.7921 units=m

New Line.LINE893 bus1=886.1.2.3.4 bus2=894.1.2.3.4 phases=4 linecode=LC6 length=1.6871 units=m
