! Reduced enabled lines.

New Line._virtual_line0_line1_line2_line3_line4_line5_line6_line7_line8_line9_line10_line11_line12_line13_line14_line15_line16_line17_line18_line19_line20_line21_line22_line23_line24_line25_line26_line27_line28_line29_line30_line31_line32_line33_line34_line36_line38_line40_line42_line43_line44_line45_line46_line47_line48_line49_line50_line51_line52_line53_line54_line55_line56_line57_line58_line59_line60_line61_line62_line64_line66_line68_line70_line72_line73_line74_line75_line76_line77_line78_line79_line80 bus1=sourcebus.1.2.3.4 bus2=81.1.2.3.4 phases=4 linecode=LC5 length=67.130425 units=m
! reduced_from=line0,line1,line2,line3,line4,line5,line6,line7,line8,line9,line10,line11,line12,line13,line14,line15,line16,line17,line18,line19,line20,line21,line22,line23,line24,line25,line26,line27,line28,line29,line30,line31,line32,line33,line34,line36,line38,line40,line42,line43,line44,line45,line46,line47,line48,line49,line50,line51,line52,line53,line54,line55,line56,line57,line58,line59,line60,line61,line62,line64,line66,line68,line70,line72,line73,line74,line75,line76,line77,line78,line79,line80
! eliminated_buses=1,2,3,4,5,6,7,8,9,10,11,12,13,14,15,16,17,18,19,20,21,22,23,24,25,26,27,28,29,30,31,32,33,34,35,37,39,41,43,44,45,46,47,48,49,50,51,52,53,54,55,56,57,58,59,60,61,62,63,65,67,69,71,73,74,75,76,77,78,79,80

New Line._virtual_line81_line83_line85_line88_line90_line92_line94_line96_line98_line100_line102_line104_line106_line109_line113_line118_line125_line130_line136_line143_line151_line160_line170_line180_line190_line201_line213_line224_line235_line246_line256_line267_line279_line289_line299_line309_line319_line329_line339_line349_line359_line369_line378 bus1=379.1.2.3.4 bus2=81.1.2.3.4 phases=4 linecode=LC6 length=23.694401 units=m
! reduced_from=line81,line83,line85,line88,line90,line92,line94,line96,line98,line100,line102,line104,line106,line109,line113,line118,line125,line130,line136,line143,line151,line160,line170,line180,line190,line201,line213,line224,line235,line246,line256,line267,line279,line289,line299,line309,line319,line329,line339,line349,line359,line369,line378
! eliminated_buses=82,84,86,89,91,93,95,97,99,101,103,105,107,110,114,119,126,131,137,144,152,161,171,181,191,202,214,225,236,247,257,268,280,290,300,310,320,330,340,350,360,370

New Line._virtual_line82_line84_line87_line89_line91_line93_line95_line97_line99_line101_line103_line105_line108 bus1=81.1.2.3.4 bus2=109.1.2.3.4 phases=4 linecode=LC5 length=38.8087 units=m
! reduced_from=line82,line84,line87,line89,line91,line93,line95,line97,line99,line101,line103,line105,line108
! eliminated_buses=83,85,88,90,92,94,96,98,100,102,104,106

New Line._virtual_line112_line117_line124_line129 bus1=109.1.2.3.4 bus2=130.1.2.3.4 phases=4 linecode=LC5 length=29.68175 units=m
! reduced_from=line112,line117,line124,line129
! eliminated_buses=113,118,125

New Line._virtual_line120_line127_line132_line138_line145_line153_line162_line172_line182_line192_line203_line214 bus1=116.1.2.3.4 bus2=215.1.2.3.4 phases=4 linecode=LC6 length=11.574354 units=m
! reduced_from=line120,line127,line132,line138,line145,line153,line162,line172,line182,line192,line203,line214
! eliminated_buses=121,128,133,139,146,154,163,173,183,193,204

New Line._virtual_line122_line128_line133_line139_line146_line154_line163_line173_line183_line193_line204_line215_line225_line236 bus1=237.1.2.3.4 bus2=117.1.2.3.4 phases=4 linecode=LC6 length=9.760501 units=m
! reduced_from=line122,line128,line133,line139,line146,line154,line163,line173,line183,line193,line204,line215,line225,line236
! eliminated_buses=123,129,134,140,147,155,164,174,184,194,205,216,226

New Line._virtual_line134_line140_line147_line155_line164_line174_line184_line194_line205_line216_line226_line237_line247_line257_line268_line280_line290_line300_line310_line320_line330_line340_line350_line360_line370_line379_line389 bus1=390.1.2.3.4 bus2=130.1.2.3.4 phases=4 linecode=LC6 length=20.991697 units=m
! reduced_from=line134,line140,line147,line155,line164,line174,line184,line194,line205,line216,line226,line237,line247,line257,line268,line280,line290,line300,line310,line320,line330,line340,line350,line360,line370,line379,line389
! eliminated_buses=135,141,148,156,165,175,185,195,206,217,227,238,248,258,269,281,291,301,311,321,331,341,351,361,371,380

New Line._virtual_line141_line148_line156_line165_line175_line185_line195_line206_line217_line227_line238_line248_line258_line269_line281_line291_line301_line311_line321_line331_line341_line351_line361_line371_line380_line390_line399_line406_line413 bus1=414.1.2.3.4 bus2=136.1.2.3.4 phases=4 linecode=LC6 length=22.583075 units=m
! reduced_from=line141,line148,line156,line165,line175,line185,line195,line206,line217,line227,line238,line248,line258,line269,line281,line291,line301,line311,line321,line331,line341,line351,line361,line371,line380,line390,line399,line406,line413
! eliminated_buses=142,149,157,166,176,186,196,207,218,228,239,249,259,270,282,292,302,312,322,332,342,352,362,372,381,391,400,407

New Line._virtual_line142_line150_line159 bus1=136.1.2.3.4 bus2=160.1.2.3.4 phases=4 linecode=LC5 length=33.3734 units=m
! reduced_from=line142,line150,line159
! eliminated_buses=143,151

New Line._virtual_line168_line178_line187_line197_line208_line219_line229_line240_line250 bus1=160.1.2.3.4 bus2=251.1.2.3.4 phases=4 linecode=LC6 length=13.812 units=m
! reduced_from=line168,line178,line187,line197,line208,line219,line229,line240,line250
! eliminated_buses=169,179,188,198,209,220,230,241

New Line._virtual_line169_line179_line189 bus1=160.1.2.3.4 bus2=190.1.2.3.4 phases=4 linecode=LC5 length=29.8146 units=m
! reduced_from=line169,line179,line189
! eliminated_buses=170,180

New Line._virtual_line199_line210_line221_line231_line242_line252_line262_line275_line284_line294_line304_line314_line324_line334_line344_line354_line364_line374_line383_line392_line400_line407_line414_line422_line429_line437_line445_line452 bus1=190.1.2.3.4 bus2=453.1.2.3.4 phases=4 linecode=LC6 length=20.36946 units=m
! reduced_from=line199,line210,line221,line231,line242,line252,line262,line275,line284,line294,line304,line314,line324,line334,line344,line354,line364,line374,line383,line392,line400,line407,line414,line422,line429,line437,line445,line452
! eliminated_buses=200,211,222,232,243,253,263,276,285,295,305,315,325,335,345,355,365,375,384,393,401,408,415,423,430,438,446

New Line._virtual_line211_line222_line232_line243_line253_line263_line276_line285_line295_line305_line315_line325_line335_line345_line355_line365_line375_line384_line393_line401_line408_line415_line423_line430_line438_line446_line453_line461_line468 bus1=201.1.2.3.4 bus2=469.1.2.3.4 phases=4 linecode=LC6 length=21.488198 units=m
! reduced_from=line211,line222,line232,line243,line253,line263,line276,line285,line295,line305,line315,line325,line335,line345,line355,line365,line375,line384,line393,line401,line408,line415,line423,line430,line438,line446,line453,line461,line468
! eliminated_buses=212,223,233,244,254,264,277,286,296,306,316,326,336,346,356,366,376,385,394,402,409,416,424,431,439,447,454,462

New Line._virtual_line212_line223_line234_line245_line255 bus1=201.1.2.3.4 bus2=256.1.2.3.4 phases=4 linecode=LC5 length=34.7004 units=m
! reduced_from=line212,line223,line234,line245,line255
! eliminated_buses=213,224,235,246

New Line._virtual_line265_line277_line286_line296_line306_line316_line326_line336_line346_line356_line366_line376_line385_line394_line402_line409_line416 bus1=417.1.2.3.4 bus2=256.1.2.3.4 phases=4 linecode=LC6 length=14.984426 units=m
! reduced_from=line265,line277,line286,line296,line306,line316,line326,line336,line346,line356,line366,line376,line385,line394,line402,line409,line416
! eliminated_buses=266,278,287,297,307,317,327,337,347,357,367,377,386,395,403,410

New Line._virtual_line270_line282_line292_line302_line312_line322_line332_line342_line352_line362_line372_line381 bus1=260.1.2.3.4 bus2=382.1.2.3.4 phases=4 linecode=LC6 length=11.979671 units=m
! reduced_from=line270,line282,line292,line302,line312,line322,line332,line342,line352,line362,line372,line381
! eliminated_buses=271,283,293,303,313,323,333,343,353,363,373

New Line._virtual_line272_line283_line293_line303_line313_line323_line333_line343_line353_line363_line373_line382_line391 bus1=392.1.2.3.4 bus2=261.1.2.3.4 phases=4 linecode=LC6 length=10.22464 units=m
! reduced_from=line272,line283,line293,line303,line313,line323,line333,line343,line353,line363,line373,line382,line391
! eliminated_buses=273,284,294,304,314,324,334,344,354,364,374,383

New Line._virtual_line387_line396_line404_line411_line418_line426_line434_line442_line449_line456_line464_line471_line479_line485_line490 bus1=491.1.2.3.4 bus2=379.1.2.3.4 phases=4 linecode=LC6 length=7.255583 units=m
! reduced_from=line387,line396,line404,line411,line418,line426,line434,line442,line449,line456,line464,line471,line479,line485,line490
! eliminated_buses=388,397,405,412,419,427,435,443,450,457,465,472,480,486

New Line._virtual_line397_line405_line412_line419_line427_line435_line443_line450_line457_line465_line472 bus1=390.1.2.3.4 bus2=473.1.2.3.4 phases=4 linecode=LC6 length=6.625385 units=m
! reduced_from=line397,line405,line412,line419,line427,line435,line443,line450,line457,line465,line472
! eliminated_buses=398,406,413,420,428,436,444,451,458,466

New Line._virtual_line420_line428_line436_line444_line451_line458_line466_line473_line480 bus1=414.1.2.3.4 bus2=481.1.2.3.4 phases=4 linecode=LC6 length=7.939007 units=m
! reduced_from=line420,line428,line436,line444,line451,line458,line466,line473,line480
! eliminated_buses=421,429,437,445,452,459,467,474

New Line._virtual_line425_line433 bus1=434.1.2.3.4 bus2=417.1.2.3.4 phases=4 linecode=LC6 length=3.1002 units=m
! reduced_from=line425,line433
! eliminated_buses=426

New Line._virtual_line431_line439_line447_line454_line462_line469_line477_line483_line488_line493_line497_line501_line505_line508 bus1=509.1.2.3.4 bus2=425.1.2.3.4 phases=4 linecode=LC6 length=9.0769 units=m
! reduced_from=line431,line439,line447,line454,line462,line469,line477,line483,line488,line493,line497,line501,line505,line508
! eliminated_buses=432,440,448,455,463,470,478,484,489,494,498,502,506

New Line._virtual_line440_line448_line455_line463_line470_line478_line484_line489_line494_line498_line502 bus1=503.1.2.3.4 bus2=434.1.2.3.4 phases=4 linecode=LC6 length=10.766515 units=m
! reduced_from=line440,line448,line455,line463,line470,line478,line484,line489,line494,line498,line502
! eliminated_buses=441,449,456,464,471,479,485,490,495,499

New Line._virtual_line459_line467_line474_line481_line486_line491_line495_line499_line503_line506_line509_line511_line513_line515_line517_line519_line521_line523_line525_line527 bus1=528.1.2.3.4 bus2=453.1.2.3.4 phases=4 linecode=LC6 length=7.370763 units=m
! reduced_from=line459,line467,line474,line481,line486,line491,line495,line499,line503,line506,line509,line511,line513,line515,line517,line519,line521,line523,line525,line527
! eliminated_buses=460,468,475,482,487,492,496,500,504,507,510,512,514,516,518,520,522,524,526

New Line._virtual_line475_line482_line487_line492_line496_line500_line504_line507_line510_line512_line514_line516_line518_line520_line522_line524_line526_line528_line529_line530 bus1=531.1.2.3.4 bus2=469.1.2.3.4 phases=4 linecode=LC6 length=9.292858 units=m
! reduced_from=line475,line482,line487,line492,line496,line500,line504,line507,line510,line512,line514,line516,line518,line520,line522,line524,line526,line528,line529,line530
! eliminated_buses=476,483,488,493,497,501,505,508,511,513,515,517,519,521,523,525,527,529,530

New Line.LINE111 bus1=109.1.2.3.4 bus2=112.1.2.3.4 phases=4 linecode=LC6 length=13.4287 units=m

New Line.LINE115 bus1=112.1.2.3.4 bus2=116.1.2.3.4 phases=4 linecode=LC6 length=2.9828 units=m

New Line.LINE116 bus1=112.1.2.3.4 bus2=117.1.2.3.4 phases=4 linecode=LC6 length=2.3452 units=m

New Line.LINE121 bus1=116.1.2.3.4 bus2=122.1.2.3.4 phases=4 linecode=LC6 length=3.8434 units=m

New Line.LINE123 bus1=117.1.2.3.4 bus2=124.1.2.3.4 phases=4 linecode=LC6 length=3.5678 units=m

New Line.LINE135 bus1=130.1.2.3.4 bus2=136.1.2.3.4 phases=4 linecode=LC5 length=0.94242 units=m

New Line.LINE200 bus1=190.1.2.3.4 bus2=201.1.2.3.4 phases=4 linecode=LC5 length=0.73053 units=m

New Line.LINE259 bus1=251.1.2.3.4 bus2=260.1.2.3.4 phases=4 linecode=LC6 length=1.9286 units=m

New Line.LINE260 bus1=251.1.2.3.4 bus2=261.1.2.3.4 phases=4 linecode=LC6 length=3.2982 units=m

New Line.LINE271 bus1=260.1.2.3.4 bus2=272.1.2.3.4 phases=4 linecode=LC6 length=3.0516 units=m

New Line.LINE273 bus1=261.1.2.3.4 bus2=274.1.2.3.4 phases=4 linecode=LC6 length=2.6488 units=m

New Line.LINE388 bus1=379.1.2.3.4 bus2=389.1.2.3.4 phases=4 linecode=LC6 length=1.0944 units=m

New Line.LINE398 bus1=390.1.2.3.4 bus2=399.1.2.3.4 phases=4 linecode=LC6 length=0.67617 units=m

New Line.LINE421 bus1=414.1.2.3.4 bus2=422.1.2.3.4 phases=4 linecode=LC6 length=1.0686 units=m

New Line.LINE424 bus1=417.1.2.3.4 bus2=425.1.2.3.4 phases=4 linecode=LC6 length=2.4773 units=m

New Line.LINE432 bus1=425.1.2.3.4 bus2=433.1.2.3.4 phases=4 linecode=LC6 length=2.0264 units=m

New Line.LINE441 bus1=434.1.2.3.4 bus2=442.1.2.3.4 phases=4 linecode=LC6 length=2.2572 units=m

New Line.LINE460 bus1=453.1.2.3.4 bus2=461.1.2.3.4 phases=4 linecode=LC6 length=2.602 units=m

New Line.LINE476 bus1=469.1.2.3.4 bus2=477.1.2.3.4 phases=4 linecode=LC6 length=1.0642 units=m
