! Reduced enabled lines.

New Line._virtual_line0_line1_line2_line3_line4_line5_line6_line7_line8_line9_line10_line11_line12_line13_line14_line15_line16_line17_line18_line19_line20_line21_line22_line23_line24_line25_line26_line27_line28_line29_line30_line31_line32_line33_line34_line35_line36_line37 bus1=sourcebus.1.2.3.4 bus2=38.1.2.3.4 phases=4 linecode=LC5 length=42.289922 units=m
! reduced_from=line0,line1,line2,line3,line4,line5,line6,line7,line8,line9,line10,line11,line12,line13,line14,line15,line16,line17,line18,line19,line20,line21,line22,line23,line24,line25,line26,line27,line28,line29,line30,line31,line32,line33,line34,line35,line36,line37
! eliminated_buses=1,2,3,4,5,6,7,8,9,10,11,12,13,14,15,16,17,18,19,20,21,22,23,24,25,26,27,28,29,30,31,32,33,34,35,36,37

New Line._virtual_line39_line42_line46 bus1=47.1.2.3.4 bus2=38.1.2.3.4 phases=4 linecode=LC5 length=15.53273 units=m
! reduced_from=line39,line42,line46
! eliminated_buses=40,43

New Line._virtual_line41_line45_line48_line51_line55_line60_line66_line73_line81_line89_line98_line108_line118_line130_line145_line159_line173_line186 bus1=39.1.2.3.4 bus2=187.1.2.3.4 phases=4 linecode=LC6 length=20.22894 units=m
! reduced_from=line41,line45,line48,line51,line55,line60,line66,line73,line81,line89,line98,line108,line118,line130,line145,line159,line173,line186
! eliminated_buses=42,46,49,52,56,61,67,74,82,90,99,109,119,131,146,160,174

New Line._virtual_line43_line47_line50_line54_line59_line65_line72_line80_line88_line97_line107_line117_line129_line144_line158_line172_line185_line199_line213_line228_line244_line262_line281_line298_line313_line328_line342_line355_line367_line379_line390 bus1=41.1.2.3.4 bus2=391.1.2.3.4 phases=4 linecode=LC6 length=11.896752 units=m
! reduced_from=line43,line47,line50,line54,line59,line65,line72,line80,line88,line97,line107,line117,line129,line144,line158,line172,line185,line199,line213,line228,line244,line262,line281,line298,line313,line328,line342,line355,line367,line379,line390
! eliminated_buses=44,48,51,55,60,66,73,81,89,98,108,118,130,145,159,173,186,200,214,229,245,263,282,299,314,329,343,356,368,380

New Line._virtual_line49_line52 bus1=47.1.2.3.4 bus2=53.1.2.3.4 phases=4 linecode=LC4 length=10.0016 units=m
! reduced_from=line49,line52
! eliminated_buses=50

New Line._virtual_line56_line61_line67_line74_line82_line90_line99_line109_line119_line131_line146_line160_line174_line187_line200_line214_line229_line245_line263 bus1=264.1.2.3.4 bus2=53.1.2.3.4 phases=4 linecode=LC6 length=17.898644 units=m
! reduced_from=line56,line61,line67,line74,line82,line90,line99,line109,line119,line131,line146,line160,line174,line187,line200,line214,line229,line245,line263
! eliminated_buses=57,62,68,75,83,91,100,110,120,132,147,161,175,188,201,215,230,246

New Line._virtual_line62_line68_line75_line83_line91_line100_line110_line120_line132_line147_line161_line175_line188_line201_line215_line230_line246_line264_line282_line299_line314_line329_line343_line356_line368_line380_line391 bus1=58.1.2.3.4 bus2=392.1.2.3.4 phases=4 linecode=LC6 length=23.828955 units=m
! reduced_from=line62,line68,line75,line83,line91,line100,line110,line120,line132,line147,line161,line175,line188,line201,line215,line230,line246,line264,line282,line299,line314,line329,line343,line356,line368,line380,line391
! eliminated_buses=63,69,76,84,92,101,111,121,133,148,162,176,189,202,216,231,247,265,283,300,315,330,344,357,369,381

New Line._virtual_line69_line76_line84 bus1=85.1.2.3.4 bus2=64.1.2.3.4 phases=4 linecode=LC4 length=29.05785 units=m
! reduced_from=line69,line76,line84
! eliminated_buses=70,77

New Line._virtual_line70_line78_line86_line95_line105_line115 bus1=64.1.2.3.4 bus2=116.1.2.3.4 phases=4 linecode=LC6 length=13.810354 units=m
! reduced_from=line70,line78,line86,line95,line105,line115
! eliminated_buses=71,79,87,96,106

New Line._virtual_line93_line103_line113_line124_line137_line153_line168_line181_line195_line209_line224_line240_line258_line277_line294_line310_line325_line340_line354_line366_line378_line389_line399 bus1=400.1.2.3.4 bus2=85.1.2.3.4 phases=4 linecode=LC6 length=21.02044 units=m
! reduced_from=line93,line103,line113,line124,line137,line153,line168,line181,line195,line209,line224,line240,line258,line277,line294,line310,line325,line340,line354,line366,line378,line389,line399
! eliminated_buses=94,104,114,125,138,154,169,182,196,210,225,241,259,278,295,311,326,341,355,367,379,390

New Line._virtual_line101_line111 bus1=112.1.2.3.4 bus2=93.1.2.3.4 phases=4 linecode=LC4 length=34.9128 units=m
! reduced_from=line101,line111
! eliminated_buses=102

New Line._virtual_line102_line112_line123_line136_line152_line167_line180_line194_line208_line223_line239_line257_line276_line293_line309_line324_line339_line353_line365_line377_line388_line398_line408_line418_line427_line436 bus1=437.1.2.3.4 bus2=93.1.2.3.4 phases=4 linecode=LC6 length=22.76274 units=m
! reduced_from=line102,line112,line123,line136,line152,line167,line180,line194,line208,line223,line239,line257,line276,line293,line309,line324,line339,line353,line365,line377,line388,line398,line408,line418,line427,line436
! eliminated_buses=103,113,124,137,153,168,181,195,209,224,240,258,277,294,310,325,340,354,366,378,389,399,409,419,428

New Line._virtual_line121_line133 bus1=112.1.2.3.4 bus2=134.1.2.3.4 phases=4 linecode=LC6 length=13.3801 units=m
! reduced_from=line121,line133
! eliminated_buses=122

New Line._virtual_line122_line135_line151_line166 bus1=112.1.2.3.4 bus2=167.1.2.3.4 phases=4 linecode=LC4 length=28.67518 units=m
! reduced_from=line122,line135,line151,line166
! eliminated_buses=123,136,152

New Line._virtual_line139_line155_line169_line182_line196_line210_line225_line241_line259_line278_line295_line311_line326_line341 bus1=342.1.2.3.4 bus2=127.1.2.3.4 phases=4 linecode=LC6 length=16.818098 units=m
! reduced_from=line139,line155,line169,line182,line196,line210,line225,line241,line259,line278,line295,line311,line326,line341
! eliminated_buses=140,156,170,183,197,211,226,242,260,279,296,312,327

New Line._virtual_line141_line156_line170_line183_line197_line211_line226_line242_line260_line279_line296_line312_line327 bus1=128.1.2.3.4 bus2=328.1.2.3.4 phases=4 linecode=LC6 length=17.127107 units=m
! reduced_from=line141,line156,line170,line183,line197,line211,line226,line242,line260,line279,line296,line312,line327
! eliminated_buses=142,157,171,184,198,212,227,243,261,280,297,313

New Line._virtual_line162_line176_line189_line202_line216_line231_line247_line265_line283_line300_line315_line330_line344_line357_line369 bus1=370.1.2.3.4 bus2=149.1.2.3.4 phases=4 linecode=LC6 length=17.10978 units=m
! reduced_from=line162,line176,line189,line202,line216,line231,line247,line265,line283,line300,line315,line330,line344,line357,line369
! eliminated_buses=163,177,190,203,217,232,248,266,284,301,316,331,345,358

New Line._virtual_line164_line177_line190_line203_line217_line232_line248_line266_line284_line301_line316_line331_line345_line358_line370_line381 bus1=382.1.2.3.4 bus2=150.1.2.3.4 phases=4 linecode=LC6 length=17.138255 units=m
! reduced_from=line164,line177,line190,line203,line217,line232,line248,line266,line284,line301,line316,line331,line345,line358,line370,line381
! eliminated_buses=165,178,191,204,218,233,249,267,285,302,317,332,346,359,371

New Line._virtual_line178_line191_line204_line218_line233_line249_line267_line285_line302_line317_line332_line346_line359_line371_line382_line392_line402_line412_line421_line430_line439_line449_line458_line467_line476_line485_line494_line503_line512_line520_line528_line534 bus1=535.1.2.3.4 bus2=167.1.2.3.4 phases=4 linecode=LC6 length=21.166841 units=m
! reduced_from=line178,line191,line204,line218,line233,line249,line267,line285,line302,line317,line332,line346,line359,line371,line382,line392,line402,line412,line421,line430,line439,line449,line458,line467,line476,line485,line494,line503,line512,line520,line528,line534
! eliminated_buses=179,192,205,219,234,250,268,286,303,318,333,347,360,372,383,393,403,413,422,431,440,450,459,468,477,486,495,504,513,521,529

New Line._virtual_line192_line205_line219_line234_line250_line268_line286_line303_line318_line333_line347_line360_line372_line383_line393_line403_line413_line422_line431_line440_line450_line459_line468_line477_line486_line495 bus1=496.1.2.3.4 bus2=180.1.2.3.4 phases=4 linecode=LC6 length=20.842429 units=m
! reduced_from=line192,line205,line219,line234,line250,line268,line286,line303,line318,line333,line347,line360,line372,line383,line393,line403,line413,line422,line431,line440,line450,line459,line468,line477,line486,line495
! eliminated_buses=193,206,220,235,251,269,287,304,319,334,348,361,373,384,394,404,414,423,432,441,451,460,469,478,487

New Line._virtual_line193_line207_line222 bus1=180.1.2.3.4 bus2=223.1.2.3.4 phases=4 linecode=LC4 length=33.85153 units=m
! reduced_from=line193,line207,line222
! eliminated_buses=194,208

New Line._virtual_line237_line253_line272 bus1=223.1.2.3.4 bus2=273.1.2.3.4 phases=4 linecode=LC6 length=14.7959 units=m
! reduced_from=line237,line253,line272
! eliminated_buses=238,254

New Line._virtual_line254_line273_line291_line307_line322_line337_line351_line363_line375_line386_line396_line406_line416_line425_line434_line443_line453_line462_line471_line480_line489_line498_line508_line516_line523_line531_line537_line544_line550_line556_line561_line565_line568_line571_line574_line577_line580 bus1=581.1.2.3.4 bus2=239.1.2.3.4 phases=4 linecode=LC2 length=15.310073 units=m
! reduced_from=line254,line273,line291,line307,line322,line337,line351,line363,line375,line386,line396,line406,line416,line425,line434,line443,line453,line462,line471,line480,line489,line498,line508,line516,line523,line531,line537,line544,line550,line556,line561,line565,line568,line571,line574,line577,line580
! eliminated_buses=255,274,292,308,323,338,352,364,376,387,397,407,417,426,435,444,454,463,472,481,490,499,509,517,524,532,538,545,551,557,562,566,569,572,575,578

New Line._virtual_line255_line274_line292_line308_line323_line338_line352_line364_line376_line387_line397_line407_line417_line426_line435_line444_line454_line463_line472_line481_line490_line499_line509_line517 bus1=518.1.2.3.4 bus2=239.1.2.3.4 phases=4 linecode=LC2 length=11.40961 units=m
! reduced_from=line255,line274,line292,line308,line323,line338,line352,line364,line376,line387,line397,line407,line417,line426,line435,line444,line454,line463,line472,line481,line490,line499,line509,line517
! eliminated_buses=256,275,293,309,324,339,353,365,377,388,398,408,418,427,436,445,455,464,473,482,491,500,510

New Line._virtual_line289_line305_line320_line335_line349_line361_line373_line384_line394_line404_line414_line423_line432_line441_line451_line460_line469_line478_line487_line496_line506_line515 bus1=516.1.2.3.4 bus2=273.1.2.3.4 phases=4 linecode=LC6 length=7.003636 units=m
! reduced_from=line289,line305,line320,line335,line349,line361,line373,line384,line394,line404,line414,line423,line432,line441,line451,line460,line469,line478,line487,line496,line506,line515
! eliminated_buses=290,306,321,336,350,362,374,385,395,405,415,424,433,442,452,461,470,479,488,497,507

New Line._virtual_line290_line306_line321_line336_line350_line362_line374_line385_line395_line405_line415_line424_line433_line442_line452_line461_line470_line479_line488_line497_line507 bus1=508.1.2.3.4 bus2=273.1.2.3.4 phases=4 linecode=LC2 length=14.691803 units=m
! reduced_from=line290,line306,line321,line336,line350,line362,line374,line385,line395,line405,line415,line424,line433,line442,line452,line461,line470,line479,line488,line497,line507
! eliminated_buses=291,307,322,337,351,363,375,386,396,406,416,425,434,443,453,462,471,480,489,498

New Line._virtual_line400_line411_line420_line429_line438_line448_line457_line466_line475_line484_line493_line502 bus1=392.1.2.3.4 bus2=503.1.2.3.4 phases=4 linecode=LC6 length=17.744232 units=m
! reduced_from=line400,line411,line420,line429,line438,line448,line457,line466,line475,line484,line493,line502
! eliminated_buses=401,412,421,430,439,449,458,467,476,485,494

New Line._virtual_line409_line419_line428_line437_line447_line456_line465_line474_line483_line492_line501_line511_line519_line527 bus1=400.1.2.3.4 bus2=528.1.2.3.4 phases=4 linecode=LC6 length=13.073712 units=m
! reduced_from=line409,line419,line428,line437,line447,line456,line465,line474,line483,line492,line501,line511,line519,line527
! eliminated_buses=410,420,429,438,448,457,466,475,484,493,502,512,520

New Line._virtual_line445_line455_line464_line473_line482_line491_line500_line510_line518_line526_line533_line539_line546_line552_line558_line563 bus1=437.1.2.3.4 bus2=564.1.2.3.4 phases=4 linecode=LC6 length=14.27753 units=m
! reduced_from=line445,line455,line464,line473,line482,line491,line500,line510,line518,line526,line533,line539,line546,line552,line558,line563
! eliminated_buses=446,456,465,474,483,492,501,511,519,527,534,540,547,553,559

New Line._virtual_line504_line513_line521_line529_line535_line542_line548_line554 bus1=496.1.2.3.4 bus2=555.1.2.3.4 phases=4 linecode=LC6 length=3.5641 units=m
! reduced_from=line504,line513,line521,line529,line535,line542,line548,line554
! eliminated_buses=505,514,522,530,536,543,549

New Line._virtual_line505_line514_line522_line530_line536_line543_line549_line555_line560 bus1=496.1.2.3.4 bus2=561.1.2.3.4 phases=4 linecode=LC6 length=9.774864 units=m
! reduced_from=line505,line514,line522,line530,line536,line543,line549,line555,line560
! eliminated_buses=506,515,523,531,537,544,550,556

New Line._virtual_line524_line532_line538_line545_line551_line557_line562_line566_line569_line572_line575_line578_line581_line585_line588_line591_line594_line597_line600_line603_line606_line609_line612_line615 bus1=518.1.2.3.4 bus2=616.1.2.3.4 phases=4 linecode=LC2 length=10.074251 units=m
! reduced_from=line524,line532,line538,line545,line551,line557,line562,line566,line569,line572,line575,line578,line581,line585,line588,line591,line594,line597,line600,line603,line606,line609,line612,line615
! eliminated_buses=525,533,539,546,552,558,563,567,570,573,576,579,582,586,589,592,595,598,601,604,607,610,613

New Line._virtual_line540_line547_line553_line559_line564_line567_line570_line573_line576_line579_line582_line586_line589_line592_line595_line598_line601_line604_line607_line610_line613_line616_line618_line620_line622_line624_line626_line628_line630 bus1=535.1.2.3.4 bus2=631.1.2.3.4 phases=4 linecode=LC6 length=14.23109 units=m
! reduced_from=line540,line547,line553,line559,line564,line567,line570,line573,line576,line579,line582,line586,line589,line592,line595,line598,line601,line604,line607,line610,line613,line616,line618,line620,line622,line624,line626,line628,line630
! eliminated_buses=541,548,554,560,565,568,571,574,577,580,583,587,590,593,596,599,602,605,608,611,614,617,619,621,623,625,627,629

New Line._virtual_line583_line587_line590_line593_line596_line599_line602_line605_line608_line611_line614_line617_line619_line621_line623_line625_line627_line629_line631_line632_line633_line634 bus1=635.1.2.3.4 bus2=581.1.2.3.4 phases=4 linecode=LC2 length=9.739507 units=m
! reduced_from=line583,line587,line590,line593,line596,line599,line602,line605,line608,line611,line614,line617,line619,line621,line623,line625,line627,line629,line631,line632,line633,line634
! eliminated_buses=584,588,591,594,597,600,603,606,609,612,615,618,620,622,624,626,628,630,632,633,634

New Line.LINE38 bus1=38.1.2.3.4 bus2=39.1.2.3.4 phases=4 linecode=LC6 length=6.9688 units=m

New Line.LINE40 bus1=39.1.2.3.4 bus2=41.1.2.3.4 phases=4 linecode=LC6 length=2.0364 units=m

New Line.LINE44 bus1=41.1.2.3.4 bus2=45.1.2.3.4 phases=4 linecode=LC6 length=3.6469 units=m

New Line.LINE57 bus1=53.1.2.3.4 bus2=58.1.2.3.4 phases=4 linecode=LC4 length=0.8918 units=m

New Line.LINE63 bus1=58.1.2.3.4 bus2=64.1.2.3.4 phases=4 linecode=LC4 length=34.1742 units=m

New Line.LINE92 bus1=85.1.2.3.4 bus2=93.1.2.3.4 phases=4 linecode=LC4 length=0.58856 units=m

New Line.LINE126 bus1=116.1.2.3.4 bus2=127.1.2.3.4 phases=4 linecode=LC6 length=3.1556 units=m

New Line.LINE127 bus1=116.1.2.3.4 bus2=128.1.2.3.4 phases=4 linecode=LC6 length=2.1758 units=m

New Line.LINE140 bus1=127.1.2.3.4 bus2=141.1.2.3.4 phases=4 linecode=LC6 length=3.7148 units=m

New Line.LINE142 bus1=128.1.2.3.4 bus2=143.1.2.3.4 phases=4 linecode=LC6 length=3.3616 units=m

New Line.LINE148 bus1=134.1.2.3.4 bus2=149.1.2.3.4 phases=4 linecode=LC6 length=2.3589 units=m

New Line.LINE149 bus1=134.1.2.3.4 bus2=150.1.2.3.4 phases=4 linecode=LC6 length=2.7389 units=m

New Line.LINE163 bus1=149.1.2.3.4 bus2=164.1.2.3.4 phases=4 linecode=LC6 length=2.5717 units=m

New Line.LINE165 bus1=150.1.2.3.4 bus2=166.1.2.3.4 phases=4 linecode=LC6 length=2.3109 units=m

New Line.LINE179 bus1=167.1.2.3.4 bus2=180.1.2.3.4 phases=4 linecode=LC4 length=0.97646 units=m

New Line.LINE238 bus1=223.1.2.3.4 bus2=239.1.2.3.4 phases=4 linecode=LC4 length=12.3661 units=m

New Line.LINE401 bus1=392.1.2.3.4 bus2=402.1.2.3.4 phases=4 linecode=LC6 length=3.2101 units=m

New Line.LINE410 bus1=400.1.2.3.4 bus2=411.1.2.3.4 phases=4 linecode=LC6 length=1.9983 units=m

New Line.LINE446 bus1=437.1.2.3.4 bus2=447.1.2.3.4 phases=4 linecode=LC6 length=1.1981 units=m

New Line.LINE525 bus1=518.1.2.3.4 bus2=526.1.2.3.4 phases=4 linecode=LC2 length=3.9932 units=m

New Line.LINE541 bus1=535.1.2.3.4 bus2=542.1.2.3.4 phases=4 linecode=LC6 length=2.1252 units=m

New Line.LINE584 bus1=581.1.2.3.4 bus2=585.1.2.3.4 phases=4 linecode=LC2 length=3.3831 units=m
