! Reduced enabled lines.

New Line._virtual_line0_line1_line2_line3_line4_line5_line6_line7_line8_line9_line10_line11_line12_line13_line14_line15_line16_line17_line18_line19_line20_line21_line22_line23_line24_line25_line26_line27_line28_line29_line30_line31_line32_line33_line34_line35_line36_line37_line38_line39_line40 bus1=41.1.2.3.4 bus2=sourcebus.1.2.3.4 phases=4 linecode=LC5 length=42.379813 units=m
! reduced_from=line0,line1,line2,line3,line4,line5,line6,line7,line8,line9,line10,line11,line12,line13,line14,line15,line16,line17,line18,line19,line20,line21,line22,line23,line24,line25,line26,line27,line28,line29,line30,line31,line32,line33,line34,line35,line36,line37,line38,line39,line40
! eliminated_buses=1,2,3,4,5,6,7,8,9,10,11,12,13,14,15,16,17,18,19,20,21,22,23,24,25,26,27,28,29,30,31,32,33,34,35,36,37,38,39,40

New Line._virtual_line41_line43_line46_line49_line52_line56_line61_line66_line72_line78 bus1=41.1.2.3.4 bus2=79.1.2.3.4 phases=4 linecode=LC1 length=65.63083 units=m
! reduced_from=line41,line43,line46,line49,line52,line56,line61,line66,line72,line78
! eliminated_buses=42,44,47,50,53,57,62,67,73

New Line._virtual_line44_line47_line50_line53_line57_line62_line67_line73_line79_line86_line92_line98_line104_line111_line118_line126_line135_line143_line150_line157 bus1=43.1.2.3.4 bus2=158.1.2.3.4 phases=4 linecode=LC6 length=24.51205 units=m
! reduced_from=line44,line47,line50,line53,line57,line62,line67,line73,line79,line86,line92,line98,line104,line111,line118,line126,line135,line143,line150,line157
! eliminated_buses=45,48,51,54,58,63,68,74,80,87,93,99,105,112,119,127,136,144,151

New Line._virtual_line45_line48 bus1=49.1.2.3.4 bus2=43.1.2.3.4 phases=4 linecode=LC5 length=15.6061 units=m
! reduced_from=line45,line48
! eliminated_buses=46

New Line._virtual_line54_line58_line63_line68_line74_line80_line87_line93_line99_line105_line112_line119 bus1=120.1.2.3.4 bus2=52.1.2.3.4 phases=4 linecode=LC1 length=19.73245 units=m
! reduced_from=line54,line58,line63,line68,line74,line80,line87,line93,line99,line105,line112,line119
! eliminated_buses=55,59,64,69,75,81,88,94,100,106,113

New Line._virtual_line55_line60_line65_line70_line76 bus1=77.1.2.3.4 bus2=52.1.2.3.4 phases=4 linecode=LC4 length=19.0845 units=m
! reduced_from=line55,line60,line65,line70,line76
! eliminated_buses=56,61,66,71

New Line._virtual_line82_line89_line95_line101_line107_line114_line121_line130_line138_line145_line152_line159_line165_line171_line178_line185_line192 bus1=193.1.2.3.4 bus2=77.1.2.3.4 phases=4 linecode=LC6 length=17.693383 units=m
! reduced_from=line82,line89,line95,line101,line107,line114,line121,line130,line138,line145,line152,line159,line165,line171,line178,line185,line192
! eliminated_buses=83,90,96,102,108,115,122,131,139,146,153,160,166,172,179,186

New Line._virtual_line84_line90_line96_line102_line109 bus1=110.1.2.3.4 bus2=77.1.2.3.4 phases=4 linecode=LC4 length=30.857768 units=m
! reduced_from=line84,line90,line96,line102,line109
! eliminated_buses=85,91,97,103

New Line._virtual_line117_line125_line134_line142_line149_line156_line163_line169_line176_line183_line190_line197_line204_line211_line216_line221_line226_line231_line236_line242 bus1=110.1.2.3.4 bus2=243.1.2.3.4 phases=4 linecode=LC2 length=30.03729 units=m
! reduced_from=line117,line125,line134,line142,line149,line156,line163,line169,line176,line183,line190,line197,line204,line211,line216,line221,line226,line231,line236,line242
! eliminated_buses=118,126,135,143,150,157,164,170,177,184,191,198,205,212,217,222,227,232,237

New Line._virtual_line123_line132_line140_line147_line154_line161_line167_line173_line180_line187_line194_line201 bus1=202.1.2.3.4 bus2=117.1.2.3.4 phases=4 linecode=LC6 length=22.81042 units=m
! reduced_from=line123,line132,line140,line147,line154,line161,line167,line173,line180,line187,line194,line201
! eliminated_buses=124,133,141,148,155,162,168,174,181,188,195

New Line._virtual_line124_line133_line141_line148_line155_line162_line168_line175_line182_line189_line196_line203_line210_line215_line220_line225_line230 bus1=231.1.2.3.4 bus2=117.1.2.3.4 phases=4 linecode=LC4 length=19.19189 units=m
! reduced_from=line124,line133,line141,line148,line155,line162,line168,line175,line182,line189,line196,line203,line210,line215,line220,line225,line230
! eliminated_buses=125,134,142,149,156,163,169,176,183,190,197,204,211,216,221,226

New Line._virtual_line127_line136 bus1=120.1.2.3.4 bus2=137.1.2.3.4 phases=4 linecode=LC1 length=6.8554 units=m
! reduced_from=line127,line136
! eliminated_buses=128

New Line._virtual_line199_line206_line213_line218_line223_line227_line232_line237_line243_line249_line255_line260_line264_line268_line272_line277_line282 bus1=283.1.2.3.4 bus2=193.1.2.3.4 phases=4 linecode=LC6 length=20.86929 units=m
! reduced_from=line199,line206,line213,line218,line223,line227,line232,line237,line243,line249,line255,line260,line264,line268,line272,line277,line282
! eliminated_buses=200,207,214,219,224,228,233,238,244,250,256,261,265,269,273,278

New Line._virtual_line207_line214_line219_line224_line228 bus1=229.1.2.3.4 bus2=202.1.2.3.4 phases=4 linecode=LC6 length=10.40447 units=m
! reduced_from=line207,line214,line219,line224,line228
! eliminated_buses=208,215,220,225

New Line._virtual_line235_line241_line246 bus1=247.1.2.3.4 bus2=231.1.2.3.4 phases=4 linecode=LC4 length=16.9563 units=m
! reduced_from=line235,line241,line246
! eliminated_buses=236,242

New Line._virtual_line239_line245_line251_line257_line261_line265_line269_line273_line278_line283_line287_line291_line296_line302_line310_line317 bus1=318.1.2.3.4 bus2=235.1.2.3.4 phases=4 linecode=LC6 length=9.02074 units=m
! reduced_from=line239,line245,line251,line257,line261,line265,line269,line273,line278,line283,line287,line291,line296,line302,line310,line317
! eliminated_buses=240,246,252,258,262,266,270,274,279,284,288,292,297,303,311

New Line._virtual_line247_line254 bus1=243.1.2.3.4 bus2=255.1.2.3.4 phases=4 linecode=LC2 length=6.3565 units=m
! reduced_from=line247,line254
! eliminated_buses=248

New Line._virtual_line252_line258_line262_line266_line270_line274_line279_line284_line288_line292_line297 bus1=298.1.2.3.4 bus2=247.1.2.3.4 phases=4 linecode=LC2 length=18.4452 units=m
! reduced_from=line252,line258,line262,line266,line270,line274,line279,line284,line288,line292,line297
! eliminated_buses=253,259,263,267,271,275,280,285,289,293

New Line._virtual_line253_line259_line263_line267_line271 bus1=247.1.2.3.4 bus2=272.1.2.3.4 phases=4 linecode=LC4 length=23.046 units=m
! reduced_from=line253,line259,line263,line267,line271
! eliminated_buses=254,260,264,268

New Line._virtual_line275_line280_line285_line289_line293_line298_line305_line312_line318 bus1=272.1.2.3.4 bus2=319.1.2.3.4 phases=4 linecode=LC2 length=17.33246 units=m
! reduced_from=line275,line280,line285,line289,line293,line298,line305,line312,line318
! eliminated_buses=276,281,286,290,294,299,306,313

New Line._virtual_line276_line281_line286_line290 bus1=272.1.2.3.4 bus2=291.1.2.3.4 phases=4 linecode=LC4 length=15.9181 units=m
! reduced_from=line276,line281,line286,line290
! eliminated_buses=277,282,287

New Line._virtual_line294_line299_line306_line313_line319 bus1=320.1.2.3.4 bus2=291.1.2.3.4 phases=4 linecode=LC1 length=15.7101 units=m
! reduced_from=line294,line299,line306,line313,line319
! eliminated_buses=295,300,307,314

New Line._virtual_line295_line301 bus1=291.1.2.3.4 bus2=302.1.2.3.4 phases=4 linecode=LC4 length=5.75613 units=m
! reduced_from=line295,line301
! eliminated_buses=296

New Line._virtual_line303_line311 bus1=312.1.2.3.4 bus2=298.1.2.3.4 phases=4 linecode=LC2 length=13.4358 units=m
! reduced_from=line303,line311
! eliminated_buses=304

New Line._virtual_line308_line315_line321_line327_line332 bus1=333.1.2.3.4 bus2=302.1.2.3.4 phases=4 linecode=LC1 length=16.928539 units=m
! reduced_from=line308,line315,line321,line327,line332
! eliminated_buses=309,316,322,328

New Line._virtual_line309_line316 bus1=317.1.2.3.4 bus2=302.1.2.3.4 phases=4 linecode=LC4 length=10.7139 units=m
! reduced_from=line309,line316
! eliminated_buses=310

New Line._virtual_line322_line328_line333_line336_line339 bus1=317.1.2.3.4 bus2=340.1.2.3.4 phases=4 linecode=LC1 length=16.3243 units=m
! reduced_from=line322,line328,line333,line336,line339
! eliminated_buses=323,329,334,337

New Line._virtual_line323_line329 bus1=330.1.2.3.4 bus2=317.1.2.3.4 phases=4 linecode=LC4 length=11.5599 units=m
! reduced_from=line323,line329
! eliminated_buses=324

New Line._virtual_line324_line330 bus1=331.1.2.3.4 bus2=319.1.2.3.4 phases=4 linecode=LC2 length=11.9375 units=m
! reduced_from=line324,line330
! eliminated_buses=325

New Line._virtual_line334_line337_line340_line343_line346 bus1=330.1.2.3.4 bus2=347.1.2.3.4 phases=4 linecode=LC1 length=15.58671 units=m
! reduced_from=line334,line337,line340,line343,line346
! eliminated_buses=335,338,341,344

New Line._virtual_line335_line338 bus1=339.1.2.3.4 bus2=330.1.2.3.4 phases=4 linecode=LC4 length=5.10222 units=m
! reduced_from=line335,line338
! eliminated_buses=336

New Line._virtual_line341_line344 bus1=345.1.2.3.4 bus2=339.1.2.3.4 phases=4 linecode=LC1 length=16.0342 units=m
! reduced_from=line341,line344
! eliminated_buses=342

New Line.LINE42 bus1=41.1.2.3.4 bus2=43.1.2.3.4 phases=4 linecode=LC5 length=9.3467 units=m

New Line.LINE51 bus1=49.1.2.3.4 bus2=52.1.2.3.4 phases=4 linecode=LC4 length=0.81214 units=m

New Line.LINE116 bus1=110.1.2.3.4 bus2=117.1.2.3.4 phases=4 linecode=LC4 length=7.2833 units=m

New Line.LINE128 bus1=120.1.2.3.4 bus2=129.1.2.3.4 phases=4 linecode=LC1 length=4.8977 units=m

New Line.LINE200 bus1=193.1.2.3.4 bus2=201.1.2.3.4 phases=4 linecode=LC6 length=2.7591 units=m

New Line.LINE208 bus1=202.1.2.3.4 bus2=209.1.2.3.4 phases=4 linecode=LC6 length=5.2729 units=m

New Line.LINE234 bus1=231.1.2.3.4 bus2=235.1.2.3.4 phases=4 linecode=LC6 length=16.5181 units=m

New Line.LINE240 bus1=235.1.2.3.4 bus2=241.1.2.3.4 phases=4 linecode=LC6 length=3.9111 units=m

New Line.LINE248 bus1=243.1.2.3.4 bus2=249.1.2.3.4 phases=4 linecode=LC2 length=3.5973 units=m

New Line.LINE304 bus1=298.1.2.3.4 bus2=305.1.2.3.4 phases=4 linecode=LC2 length=2.282 units=m

New Line.LINE325 bus1=319.1.2.3.4 bus2=326.1.2.3.4 phases=4 linecode=LC2 length=2.365 units=m
