! Reduced enabled lines.

New Line._virtual_line0_line1_line2_line3_line4_line5_line6_line7_line8_line9_line10_line11_line12_line13_line14_line15_line16_line17_line18_line19_line20_line21_line22_line23_line24_line25_line26_line27_line28_line29_line30_line31_line32_line33_line34_line36_line39 bus1=40.1.2.3.4 bus2=sourcebus.1.2.3.4 phases=4 linecode=LC5 length=25.333598 units=m
! reduced_from=line0,line1,line2,line3,line4,line5,line6,line7,line8,line9,line10,line11,line12,line13,line14,line15,line16,line17,line18,line19,line20,line21,line22,line23,line24,line25,line26,line27,line28,line29,line30,line31,line32,line33,line34,line36,line39
! eliminated_buses=1,2,3,4,5,6,7,8,9,10,11,12,13,14,15,16,17,18,19,20,21,22,23,24,25,26,27,28,29,30,31,32,33,34,35,37

New Line._virtual_line42_line46_line50_line54_line58_line63_line68_line73_line78_line83_line87_line91_line94_line97 bus1=98.1.2.3.4 bus2=40.1.2.3.4 phases=4 linecode=LC5 length=34.778549 units=m
! reduced_from=line42,line46,line50,line54,line58,line63,line68,line73,line78,line83,line87,line91,line94,line97
! eliminated_buses=43,47,51,55,59,64,69,74,79,84,88,92,95

New Line._virtual_line43_line47_line51_line55_line59_line64_line69_line74_line79_line84_line88_line92_line95_line98_line102_line106_line110_line114_line118_line123 bus1=40.1.2.3.4 bus2=124.1.2.3.4 phases=4 linecode=LC6 length=13.53876 units=m
! reduced_from=line43,line47,line51,line55,line59,line64,line69,line74,line79,line84,line88,line92,line95,line98,line102,line106,line110,line114,line118,line123
! eliminated_buses=44,48,52,56,60,65,70,75,80,85,89,93,96,99,103,107,111,115,119

New Line._virtual_line99_line103_line107_line111_line115_line119_line124_line130_line136_line142_line148_line154_line160_line166_line172_line179_line184_line190_line196_line202_line208_line215_line223_line232_line242_line253_line263_line273_line282_line291_line302_line311_line320_line330_line340_line349_line358_line367_line374_line380_line386_line392_line398_line405_line410 bus1=98.1.2.3.4 bus2=411.1.2.3.4 phases=4 linecode=LC6 length=15.67184 units=m
! reduced_from=line99,line103,line107,line111,line115,line119,line124,line130,line136,line142,line148,line154,line160,line166,line172,line179,line184,line190,line196,line202,line208,line215,line223,line232,line242,line253,line263,line273,line282,line291,line302,line311,line320,line330,line340,line349,line358,line367,line374,line380,line386,line392,line398,line405,line410
! eliminated_buses=100,104,108,112,116,120,125,131,137,143,149,155,161,167,173,180,185,191,197,203,209,216,224,233,243,254,264,274,283,292,303,312,321,331,341,350,359,368,375,381,387,393,399,406

New Line._virtual_line100_line104_line108_line112_line116_line120_line125_line131_line137_line143_line149_line155_line161_line167_line173_line180_line185_line191_line197_line203_line209_line216_line224_line233_line243_line254_line264_line274_line283_line292_line303_line312_line321 bus1=322.1.2.3.4 bus2=98.1.2.3.4 phases=4 linecode=LC6 length=10.638188 units=m
! reduced_from=line100,line104,line108,line112,line116,line120,line125,line131,line137,line143,line149,line155,line161,line167,line173,line180,line185,line191,line197,line203,line209,line216,line224,line233,line243,line254,line264,line274,line283,line292,line303,line312,line321
! eliminated_buses=101,105,109,113,117,121,126,132,138,144,150,156,162,168,174,181,186,192,198,204,210,217,225,234,244,255,265,275,284,293,304,313

New Line._virtual_line101_line105_line109_line113_line117 bus1=118.1.2.3.4 bus2=98.1.2.3.4 phases=4 linecode=LC5 length=20.25056 units=m
! reduced_from=line101,line105,line109,line113,line117
! eliminated_buses=102,106,110,114

New Line._virtual_line121_line126_line132_line138_line144_line150_line156_line162 bus1=163.1.2.3.4 bus2=118.1.2.3.4 phases=4 linecode=LC6 length=18.694524 units=m
! reduced_from=line121,line126,line132,line138,line144,line150,line156,line162
! eliminated_buses=122,127,133,139,145,151,157

New Line._virtual_line122_line127_line134_line140_line146_line152_line158_line164 bus1=118.1.2.3.4 bus2=165.1.2.3.4 phases=4 linecode=LC5 length=22.31802 units=m
! reduced_from=line122,line127,line134,line140,line146,line152,line158,line164
! eliminated_buses=123,128,135,141,147,153,159

New Line._virtual_line128_line135_line141_line147_line153_line159_line165_line171 bus1=172.1.2.3.4 bus2=124.1.2.3.4 phases=4 linecode=LC6 length=8.31246 units=m
! reduced_from=line128,line135,line141,line147,line153,line159,line165,line171
! eliminated_buses=129,136,142,148,154,160,166

New Line._virtual_line169_line175_line181_line186_line192_line198_line204_line210_line217_line225_line234_line244_line255_line265_line275_line284 bus1=285.1.2.3.4 bus2=165.1.2.3.4 phases=4 linecode=LC2 length=15.00561 units=m
! reduced_from=line169,line175,line181,line186,line192,line198,line204,line210,line217,line225,line234,line244,line255,line265,line275,line284
! eliminated_buses=170,176,182,187,193,199,205,211,218,226,235,245,256,266,276

New Line._virtual_line170_line176_line182 bus1=183.1.2.3.4 bus2=165.1.2.3.4 phases=4 linecode=LC5 length=19.2241 units=m
! reduced_from=line170,line176,line182
! eliminated_buses=171,177

New Line._virtual_line177_line183_line189_line195_line201_line207_line214_line222_line231_line241_line252_line262_line272 bus1=172.1.2.3.4 bus2=273.1.2.3.4 phases=4 linecode=LC6 length=14.5064 units=m
! reduced_from=line177,line183,line189,line195,line201,line207,line214,line222,line231,line241,line252,line262,line272
! eliminated_buses=178,184,190,196,202,208,215,223,232,242,253,263

New Line._virtual_line187_line193_line199_line205_line211_line218_line226_line235_line245_line256_line266_line276_line285_line295_line305_line314_line323_line334_line343_line352 bus1=183.1.2.3.4 bus2=353.1.2.3.4 phases=4 linecode=LC2 length=14.53824 units=m
! reduced_from=line187,line193,line199,line205,line211,line218,line226,line235,line245,line256,line266,line276,line285,line295,line305,line314,line323,line334,line343,line352
! eliminated_buses=188,194,200,206,212,219,227,236,246,257,267,277,286,296,306,315,324,335,344

New Line._virtual_line188_line194_line200_line206 bus1=183.1.2.3.4 bus2=207.1.2.3.4 phases=4 linecode=LC5 length=27.1036 units=m
! reduced_from=line188,line194,line200,line206
! eliminated_buses=189,195,201

New Line._virtual_line212_line219_line227_line236_line246_line257_line267_line277_line286 bus1=287.1.2.3.4 bus2=207.1.2.3.4 phases=4 linecode=LC6 length=13.58171 units=m
! reduced_from=line212,line219,line227,line236,line246,line257,line267,line277,line286
! eliminated_buses=213,220,228,237,247,258,268,278

New Line._virtual_line213_line221 bus1=207.1.2.3.4 bus2=222.1.2.3.4 phases=4 linecode=LC5 length=19.0306 units=m
! reduced_from=line213,line221
! eliminated_buses=214

New Line._virtual_line229_line238_line248_line258_line268_line278_line287_line298_line307_line316_line325_line336_line345_line354_line364_line371 bus1=222.1.2.3.4 bus2=372.1.2.3.4 phases=4 linecode=LC6 length=19.06467 units=m
! reduced_from=line229,line238,line248,line258,line268,line278,line287,line298,line307,line316,line325,line336,line345,line354,line364,line371
! eliminated_buses=230,239,249,259,269,279,288,299,308,317,326,337,346,355,365

New Line._virtual_line230_line240_line251_line261_line271_line281_line290_line301_line310_line319 bus1=222.1.2.3.4 bus2=320.1.2.3.4 phases=4 linecode=LC5 length=16.54675 units=m
! reduced_from=line230,line240,line251,line261,line271,line281,line290,line301,line310,line319
! eliminated_buses=231,241,252,262,272,282,291,302,311

New Line._virtual_line293_line304_line313_line322_line333_line342_line351_line360 bus1=361.1.2.3.4 bus2=285.1.2.3.4 phases=4 linecode=LC2 length=14.51223 units=m
! reduced_from=line293,line304,line313,line322,line333,line342,line351,line360
! eliminated_buses=294,305,314,323,334,343,352

New Line._virtual_line296_line306_line315_line324_line335_line344_line353_line363_line370_line377_line383_line389_line395_line402 bus1=403.1.2.3.4 bus2=287.1.2.3.4 phases=4 linecode=LC6 length=11.88676 units=m
! reduced_from=line296,line306,line315,line324,line335,line344,line353,line363,line370,line377,line383,line389,line395,line402
! eliminated_buses=297,307,316,325,336,345,354,364,371,378,384,390,396

New Line._virtual_line328_line338_line347_line356_line365_line372_line378_line384_line390_line396_line403_line408_line413_line419_line424_line429_line434_line438_line442_line446_line450_line454_line457_line459_line461_line463_line465_line467_line469_line471_line473_line475_line477_line479_line481_line483_line485_line487_line489_line492_line495_line499_line503 bus1=320.1.2.3.4 bus2=504.1.2.3.4 phases=4 linecode=LC5 length=34.01597 units=m
! reduced_from=line328,line338,line347,line356,line365,line372,line378,line384,line390,line396,line403,line408,line413,line419,line424,line429,line434,line438,line442,line446,line450,line454,line457,line459,line461,line463,line465,line467,line469,line471,line473,line475,line477,line479,line481,line483,line485,line487,line489,line492,line495,line499,line503
! eliminated_buses=329,339,348,357,366,373,379,385,391,397,404,409,414,420,425,430,435,439,443,447,451,455,458,460,462,464,466,468,470,472,474,476,478,480,482,484,486,488,490,493,496,500

New Line._virtual_line329_line339_line348_line357_line366_line373_line379_line385_line391_line397_line404_line409_line414_line420_line425_line430_line435_line439_line443_line447_line451_line455_line458_line460_line462_line464_line466_line468_line470_line472_line474_line476_line478_line480_line482_line484_line486_line488_line491 bus1=320.1.2.3.4 bus2=492.1.2.3.4 phases=4 linecode=LC4 length=39.894203 units=m
! reduced_from=line329,line339,line348,line357,line366,line373,line379,line385,line391,line397,line404,line409,line414,line420,line425,line430,line435,line439,line443,line447,line451,line455,line458,line460,line462,line464,line466,line468,line470,line472,line474,line476,line478,line480,line482,line484,line486,line488,line491
! eliminated_buses=330,340,349,358,367,374,380,386,392,398,405,410,415,421,426,431,436,440,444,448,452,456,459,461,463,465,467,469,471,473,475,477,479,481,483,485,487,489

New Line._virtual_line331_line341_line350_line359_line368_line375_line381_line387_line393 bus1=322.1.2.3.4 bus2=394.1.2.3.4 phases=4 linecode=LC6 length=8.33374 units=m
! reduced_from=line331,line341,line350,line359,line368,line375,line381,line387,line393
! eliminated_buses=332,342,351,360,369,376,382,388

New Line._virtual_line361_line369_line376_line382_line388_line394_line401_line407_line412_line418_line423_line428_line433 bus1=353.1.2.3.4 bus2=434.1.2.3.4 phases=4 linecode=LC2 length=15.9836 units=m
! reduced_from=line361,line369,line376,line382,line388,line394,line401,line407,line412,line418,line423,line428,line433
! eliminated_buses=362,370,377,383,389,395,402,408,413,419,424,429

New Line._virtual_line399_line406_line411_line417_line422_line427_line432_line437_line441_line445_line449_line453_line456 bus1=394.1.2.3.4 bus2=457.1.2.3.4 phases=4 linecode=LC6 length=15.40522 units=m
! reduced_from=line399,line406,line411,line417,line422,line427,line432,line437,line441,line445,line449,line453,line456
! eliminated_buses=400,407,412,418,423,428,433,438,442,446,450,454

New Line._virtual_line415_line421_line426_line431_line436_line440_line444_line448_line452 bus1=453.1.2.3.4 bus2=411.1.2.3.4 phases=4 linecode=LC6 length=14.22858 units=m
! reduced_from=line415,line421,line426,line431,line436,line440,line444,line448,line452
! eliminated_buses=416,422,427,432,437,441,445,449

New Line._virtual_line497_line501_line505_line508_line512_line517_line521_line526_line531_line537_line545_line553_line560_line569_line578 bus1=579.1.2.3.4 bus2=495.1.2.3.4 phases=4 linecode=LC6 length=9.536963 units=m
! reduced_from=line497,line501,line505,line508,line512,line517,line521,line526,line531,line537,line545,line553,line560,line569,line578
! eliminated_buses=498,502,506,509,513,518,522,527,532,538,546,554,561,570

New Line._virtual_line498_line502_line506_line509_line513_line518_line522_line527 bus1=495.1.2.3.4 bus2=528.1.2.3.4 phases=4 linecode=LC3 length=6.71538 units=m
! reduced_from=line498,line502,line506,line509,line513,line518,line522,line527
! eliminated_buses=499,503,507,510,514,519,523

New Line._virtual_line510_line514_line519_line523_line528_line534_line541 bus1=542.1.2.3.4 bus2=508.1.2.3.4 phases=4 linecode=LC6 length=17.56829 units=m
! reduced_from=line510,line514,line519,line523,line528,line534,line541
! eliminated_buses=511,515,520,524,529,535

New Line._virtual_line511_line516_line520 bus1=508.1.2.3.4 bus2=521.1.2.3.4 phases=4 linecode=LC4 length=17.81463 units=m
! reduced_from=line511,line516,line520
! eliminated_buses=512,517

New Line._virtual_line524_line529_line535_line542_line549_line557 bus1=558.1.2.3.4 bus2=521.1.2.3.4 phases=4 linecode=LC2 length=13.91128 units=m
! reduced_from=line524,line529,line535,line542,line549,line557
! eliminated_buses=525,530,536,543,550

New Line._virtual_line525_line530_line536_line544 bus1=545.1.2.3.4 bus2=521.1.2.3.4 phases=4 linecode=LC4 length=26.4808 units=m
! reduced_from=line525,line530,line536,line544
! eliminated_buses=526,531,537

New Line._virtual_line532_line538_line546_line554_line561_line570_line579_line589_line599_line608_line619_line630_line639_line649_line658_line667_line676 bus1=528.1.2.3.4 bus2=677.1.2.3.4 phases=4 linecode=LC6 length=20.91847 units=m
! reduced_from=line532,line538,line546,line554,line561,line570,line579,line589,line599,line608,line619,line630,line639,line649,line658,line667,line676
! eliminated_buses=533,539,547,555,562,571,580,590,600,609,620,631,640,650,659,668

New Line._virtual_line539_line547_line555_line562_line571_line580_line590_line600_line609_line620_line631_line640_line650_line659_line668_line677_line687_line696_line703_line710_line718_line725_line732_line739_line746_line752_line758_line764_line769_line774_line779_line783_line787_line791_line795_line798_line802_line805_line808_line811_line814_line817 bus1=818.1.2.3.4 bus2=534.1.2.3.4 phases=4 linecode=LC6 length=31.482941 units=m
! reduced_from=line539,line547,line555,line562,line571,line580,line590,line600,line609,line620,line631,line640,line650,line659,line668,line677,line687,line696,line703,line710,line718,line725,line732,line739,line746,line752,line758,line764,line769,line774,line779,line783,line787,line791,line795,line798,line802,line805,line808,line811,line814,line817
! eliminated_buses=540,548,556,563,572,581,591,601,610,621,632,641,651,660,669,678,688,697,704,711,719,726,733,740,747,753,759,765,770,775,780,784,788,792,796,799,803,806,809,812,815

New Line._virtual_line540_line548_line556_line563_line573 bus1=534.1.2.3.4 bus2=574.1.2.3.4 phases=4 linecode=LC3 length=21.25207 units=m
! reduced_from=line540,line548,line556,line563,line573
! eliminated_buses=541,549,557,564

New Line._virtual_line551_line558_line566_line575_line584_line594_line603 bus1=545.1.2.3.4 bus2=604.1.2.3.4 phases=4 linecode=LC2 length=12.66109 units=m
! reduced_from=line551,line558,line566,line575,line584,line594,line603
! eliminated_buses=552,559,567,576,585,595

New Line._virtual_line552_line559 bus1=545.1.2.3.4 bus2=560.1.2.3.4 phases=4 linecode=LC4 length=15.4327 units=m
! reduced_from=line552,line559
! eliminated_buses=553

New Line._virtual_line564_line574 bus1=558.1.2.3.4 bus2=575.1.2.3.4 phases=4 linecode=LC2 length=9.8063 units=m
! reduced_from=line564,line574
! eliminated_buses=565

New Line._virtual_line567_line576_line585_line595_line604_line614_line624_line634_line643_line653_line662_line671_line680 bus1=560.1.2.3.4 bus2=681.1.2.3.4 phases=4 linecode=LC2 length=13.17286 units=m
! reduced_from=line567,line576,line585,line595,line604,line614,line624,line634,line643,line653,line662,line671,line680
! eliminated_buses=568,577,586,596,605,615,625,635,644,654,663,672

New Line._virtual_line568_line577_line586_line596_line605_line615_line625_line635_line644_line654_line663_line672_line681_line691_line699_line706 bus1=560.1.2.3.4 bus2=707.1.2.3.4 phases=4 linecode=LC4 length=23.60478 units=m
! reduced_from=line568,line577,line586,line596,line605,line615,line625,line635,line644,line654,line663,line672,line681,line691,line699,line706
! eliminated_buses=569,578,587,597,606,616,626,636,645,655,664,673,682,692,700

New Line._virtual_line582_line592_line602_line611_line622_line633_line642_line652_line661_line670_line679_line688_line697_line704_line711_line719_line726_line733_line740_line747_line753_line759_line765_line770_line775_line780_line784_line788_line792_line796 bus1=797.1.2.3.4 bus2=574.1.2.3.4 phases=4 linecode=LC2 length=20.466807 units=m
! reduced_from=line582,line592,line602,line611,line622,line633,line642,line652,line661,line670,line679,line688,line697,line704,line711,line719,line726,line733,line740,line747,line753,line759,line765,line770,line775,line780,line784,line788,line792,line796
! eliminated_buses=583,593,603,612,623,634,643,653,662,671,680,689,698,705,712,720,727,734,741,748,754,760,766,771,776,781,785,789,793

New Line._virtual_line587_line597_line606_line617_line627_line637 bus1=638.1.2.3.4 bus2=579.1.2.3.4 phases=4 linecode=LC6 length=25.06246 units=m
! reduced_from=line587,line597,line606,line617,line627,line637
! eliminated_buses=588,598,607,618,628

New Line._virtual_line588_line598_line607_line618 bus1=619.1.2.3.4 bus2=579.1.2.3.4 phases=4 linecode=LC3 length=6.8909 units=m
! reduced_from=line588,line598,line607,line618
! eliminated_buses=589,599,608

New Line._virtual_line612_line623 bus1=604.1.2.3.4 bus2=624.1.2.3.4 phases=4 linecode=LC2 length=11.896 units=m
! reduced_from=line612,line623
! eliminated_buses=613

New Line._virtual_line628_line638_line648_line657_line666_line675_line684_line694 bus1=619.1.2.3.4 bus2=695.1.2.3.4 phases=4 linecode=LC3 length=13.52322 units=m
! reduced_from=line628,line638,line648,line657,line666,line675,line684,line694
! eliminated_buses=629,639,649,658,667,676,685

New Line._virtual_line646_line656_line665_line674_line683_line693_line701_line708_line716_line723_line730_line737_line744_line750_line756_line762_line767_line772_line777 bus1=638.1.2.3.4 bus2=778.1.2.3.4 phases=4 linecode=LC6 length=10.5741 units=m
! reduced_from=line646,line656,line665,line674,line683,line693,line701,line708,line716,line723,line730,line737,line744,line750,line756,line762,line767,line772,line777
! eliminated_buses=647,657,666,675,684,694,702,709,717,724,731,738,745,751,757,763,768,773

New Line._virtual_line685_line695_line702_line709_line717_line724_line731_line738_line745_line751_line757_line763_line768_line773_line778_line782_line786_line790_line794 bus1=795.1.2.3.4 bus2=677.1.2.3.4 phases=4 linecode=LC6 length=12.65522 units=m
! reduced_from=line685,line695,line702,line709,line717,line724,line731,line738,line745,line751,line757,line763,line768,line773,line778,line782,line786,line790,line794
! eliminated_buses=686,696,703,710,718,725,732,739,746,752,758,764,769,774,779,783,787,791

New Line._virtual_line689_line698_line705_line712 bus1=713.1.2.3.4 bus2=681.1.2.3.4 phases=4 linecode=LC2 length=6.62685 units=m
! reduced_from=line689,line698,line705,line712
! eliminated_buses=690,699,706

New Line._virtual_line714_line721_line728_line735_line742_line748_line754_line760_line766_line771_line776_line781_line785_line789_line793_line797_line801_line804_line807_line810_line813_line816_line819_line823_line827_line831_line835_line839_line843_line847_line851_line854_line857_line860_line863_line866_line870_line874_line879_line883_line887_line891_line896 bus1=897.1.2.3.4 bus2=707.1.2.3.4 phases=4 linecode=LC5 length=84.911436 units=m
! reduced_from=line714,line721,line728,line735,line742,line748,line754,line760,line766,line771,line776,line781,line785,line789,line793,line797,line801,line804,line807,line810,line813,line816,line819,line823,line827,line831,line835,line839,line843,line847,line851,line854,line857,line860,line863,line866,line870,line874,line879,line883,line887,line891,line896
! eliminated_buses=715,722,729,736,743,749,755,761,767,772,777,782,786,790,794,798,802,805,808,811,814,817,820,824,828,832,836,840,844,848,852,855,858,861,864,867,871,875,880,884,888,892

New Line._virtual_line799_line803_line806_line809_line812_line815_line818_line822_line826_line830_line834_line838_line842_line846_line850 bus1=851.1.2.3.4 bus2=797.1.2.3.4 phases=4 linecode=LC2 length=15.593 units=m
! reduced_from=line799,line803,line806,line809,line812,line815,line818,line822,line826,line830,line834,line838,line842,line846,line850
! eliminated_buses=800,804,807,810,813,816,819,823,827,831,835,839,843,847

New Line._virtual_line820_line824_line828_line832_line836_line840_line844_line848_line852_line855_line858_line861_line864_line868_line872 bus1=818.1.2.3.4 bus2=873.1.2.3.4 phases=4 linecode=LC6 length=5.736454 units=m
! reduced_from=line820,line824,line828,line832,line836,line840,line844,line848,line852,line855,line858,line861,line864,line868,line872
! eliminated_buses=821,825,829,833,837,841,845,849,853,856,859,862,865,869

New Line._virtual_line821_line825_line829_line833_line837_line841_line845_line849_line853_line856_line859_line862_line865_line869_line873_line878_line882_line886_line890_line894_line900_line907_line915_line922_line929_line936_line943 bus1=944.1.2.3.4 bus2=818.1.2.3.4 phases=4 linecode=LC6 length=15.885668 units=m
! reduced_from=line821,line825,line829,line833,line837,line841,line845,line849,line853,line856,line859,line862,line865,line869,line873,line878,line882,line886,line890,line894,line900,line907,line915,line922,line929,line936,line943
! eliminated_buses=822,826,830,834,838,842,846,850,854,857,860,863,866,870,874,879,883,887,891,895,901,908,916,923,930,937

New Line._virtual_line876_line881_line885_line889_line893_line899_line906_line914_line921_line928_line935_line942_line949_line956_line962_line968_line974_line980_line988 bus1=873.1.2.3.4 bus2=989.1.2.3.4 phases=4 linecode=LC6 length=12.05924 units=m
! reduced_from=line876,line881,line885,line889,line893,line899,line906,line914,line921,line928,line935,line942,line949,line956,line962,line968,line974,line980,line988
! eliminated_buses=877,882,886,890,894,900,907,915,922,929,936,943,950,957,963,969,975,981

New Line._virtual_line902_line909_line917_line924_line931_line938_line945_line952_line958_line964_line970_line976_line982_line990_line997_line1004_line1011_line1020 bus1=1021.1.2.3.4 bus2=897.1.2.3.4 phases=4 linecode=LC2 length=12.107744 units=m
! reduced_from=line902,line909,line917,line924,line931,line938,line945,line952,line958,line964,line970,line976,line982,line990,line997,line1004,line1011,line1020
! eliminated_buses=903,910,918,925,932,939,946,953,959,965,971,977,983,991,998,1005,1012

New Line._virtual_line903_line910_line918_line925_line932_line939_line946_line953_line959_line965_line971_line977 bus1=897.1.2.3.4 bus2=978.1.2.3.4 phases=4 linecode=LC2 length=9.30289 units=m
! reduced_from=line903,line910,line918,line925,line932,line939,line946,line953,line959,line965,line971,line977
! eliminated_buses=904,911,919,926,933,940,947,954,960,966,972

New Line._virtual_line904_line911_line919_line926_line933_line940_line947_line954_line960_line966_line972_line978_line983_line991_line998_line1005_line1012_line1021_line1030_line1039_line1048_line1056 bus1=1057.1.2.3.4 bus2=897.1.2.3.4 phases=4 linecode=LC2 length=14.49193 units=m
! reduced_from=line904,line911,line919,line926,line933,line940,line947,line954,line960,line966,line972,line978,line983,line991,line998,line1005,line1012,line1021,line1030,line1039,line1048,line1056
! eliminated_buses=905,912,920,927,934,941,948,955,961,967,973,979,984,992,999,1006,1013,1022,1031,1040,1049

New Line._virtual_line913_line920_line927_line934_line941_line948_line955_line961_line967_line973_line979 bus1=906.1.2.3.4 bus2=980.1.2.3.4 phases=4 linecode=LC5 length=15.5571 units=m
! reduced_from=line913,line920,line927,line934,line941,line948,line955,line961,line967,line973,line979
! eliminated_buses=914,921,928,935,942,949,956,962,968,974

New Line._virtual_line950_line957_line963_line969_line975_line981_line989_line996_line1003_line1010_line1019_line1029_line1038_line1047_line1055_line1063_line1070_line1077_line1087_line1097_line1107_line1117 bus1=944.1.2.3.4 bus2=1118.1.2.3.4 phases=4 linecode=LC6 length=14.645898 units=m
! reduced_from=line950,line957,line963,line969,line975,line981,line989,line996,line1003,line1010,line1019,line1029,line1038,line1047,line1055,line1063,line1070,line1077,line1087,line1097,line1107,line1117
! eliminated_buses=951,958,964,970,976,982,990,997,1004,1011,1020,1030,1039,1048,1056,1064,1071,1078,1088,1098,1108

New Line._virtual_line984_line992_line999_line1006_line1013_line1022_line1031_line1040 bus1=980.1.2.3.4 bus2=1041.1.2.3.4 phases=4 linecode=LC2 length=10.09786 units=m
! reduced_from=line984,line992,line999,line1006,line1013,line1022,line1031,line1040
! eliminated_buses=985,993,1000,1007,1014,1023,1032

New Line._virtual_line985_line993_line1000_line1007 bus1=1008.1.2.3.4 bus2=980.1.2.3.4 phases=4 linecode=LC5 length=22.4063 units=m
! reduced_from=line985,line993,line1000,line1007
! eliminated_buses=986,994,1001

New Line._virtual_line986_line995_line1002_line1009_line1018_line1028_line1037_line1046_line1054_line1062_line1069_line1076 bus1=980.1.2.3.4 bus2=1077.1.2.3.4 phases=4 linecode=LC5 length=34.93344 units=m
! reduced_from=line986,line995,line1002,line1009,line1018,line1028,line1037,line1046,line1054,line1062,line1069,line1076
! eliminated_buses=987,996,1003,1010,1019,1029,1038,1047,1055,1063,1070

New Line._virtual_line1015_line1026_line1035_line1044_line1052_line1060_line1067_line1074_line1081_line1091_line1101_line1111_line1121 bus1=1122.1.2.3.4 bus2=1008.1.2.3.4 phases=4 linecode=LC2 length=5.761215 units=m
! reduced_from=line1015,line1026,line1035,line1044,line1052,line1060,line1067,line1074,line1081,line1091,line1101,line1111,line1121
! eliminated_buses=1016,1027,1036,1045,1053,1061,1068,1075,1082,1092,1102,1112

New Line._virtual_line1016_line1027_line1036_line1045_line1053_line1061_line1068_line1075_line1082_line1092_line1102_line1112_line1122_line1131_line1139_line1146_line1153_line1160_line1167_line1174 bus1=1175.1.2.3.4 bus2=1008.1.2.3.4 phases=4 linecode=LC2 length=8.127173 units=m
! reduced_from=line1016,line1027,line1036,line1045,line1053,line1061,line1068,line1075,line1082,line1092,line1102,line1112,line1122,line1131,line1139,line1146,line1153,line1160,line1167,line1174
! eliminated_buses=1017,1028,1037,1046,1054,1062,1069,1076,1083,1093,1103,1113,1123,1132,1140,1147,1154,1161,1168

New Line._virtual_line1024_line1033_line1042_line1050_line1058_line1065_line1072_line1079_line1089_line1099_line1109_line1119_line1128_line1137_line1144_line1151_line1158_line1165_line1172 bus1=1173.1.2.3.4 bus2=1015.1.2.3.4 phases=4 linecode=LC2 length=9.798828 units=m
! reduced_from=line1024,line1033,line1042,line1050,line1058,line1065,line1072,line1079,line1089,line1099,line1109,line1119,line1128,line1137,line1144,line1151,line1158,line1165,line1172
! eliminated_buses=1025,1034,1043,1051,1059,1066,1073,1080,1090,1100,1110,1120,1129,1138,1145,1152,1159,1166

New Line._virtual_line1025_line1034_line1043_line1051_line1059_line1066_line1073_line1080_line1090_line1100_line1110_line1120_line1129_line1138_line1145_line1152_line1159_line1166_line1173_line1179 bus1=1015.1.2.3.4 bus2=1180.1.2.3.4 phases=4 linecode=LC2 length=18.385949 units=m
! reduced_from=line1025,line1034,line1043,line1051,line1059,line1066,line1073,line1080,line1090,line1100,line1110,line1120,line1129,line1138,line1145,line1152,line1159,line1166,line1173,line1179
! eliminated_buses=1026,1035,1044,1052,1060,1067,1074,1081,1091,1101,1111,1121,1130,1139,1146,1153,1160,1167,1174

New Line._virtual_line1083_line1093_line1103_line1113_line1123_line1132_line1140_line1147_line1154_line1161_line1168_line1175_line1182_line1186_line1190 bus1=1191.1.2.3.4 bus2=1077.1.2.3.4 phases=4 linecode=LC2 length=4.976503 units=m
! reduced_from=line1083,line1093,line1103,line1113,line1123,line1132,line1140,line1147,line1154,line1161,line1168,line1175,line1182,line1186,line1190
! eliminated_buses=1084,1094,1104,1114,1124,1133,1141,1148,1155,1162,1169,1176,1183,1187

New Line._virtual_line1084_line1094_line1104_line1114_line1124_line1133_line1141_line1148_line1155_line1162_line1169_line1176_line1183_line1187_line1191_line1194_line1197 bus1=1198.1.2.3.4 bus2=1077.1.2.3.4 phases=4 linecode=LC2 length=12.911103 units=m
! reduced_from=line1084,line1094,line1104,line1114,line1124,line1133,line1141,line1148,line1155,line1162,line1169,line1176,line1183,line1187,line1191,line1194,line1197
! eliminated_buses=1085,1095,1105,1115,1125,1134,1142,1149,1156,1163,1170,1177,1184,1188,1192,1195

New Line._virtual_line1085_line1095_line1105_line1115_line1125_line1134_line1142_line1149_line1156_line1163_line1170_line1177_line1184_line1188_line1192_line1195_line1198_line1200_line1202 bus1=1203.1.2.3.4 bus2=1077.1.2.3.4 phases=4 linecode=LC2 length=9.60901 units=m
! reduced_from=line1085,line1095,line1105,line1115,line1125,line1134,line1142,line1149,line1156,line1163,line1170,line1177,line1184,line1188,line1192,line1195,line1198,line1200,line1202
! eliminated_buses=1086,1096,1106,1116,1126,1135,1143,1150,1157,1164,1171,1178,1185,1189,1193,1196,1199,1201

New Line._virtual_line1086_line1096_line1106_line1116_line1126_line1135_line1143_line1150_line1157_line1164_line1171_line1178_line1185_line1189_line1193_line1196_line1199_line1201_line1203_line1204 bus1=1205.1.2.3.4 bus2=1077.1.2.3.4 phases=4 linecode=LC2 length=18.964901 units=m
! reduced_from=line1086,line1096,line1106,line1116,line1126,line1135,line1143,line1150,line1157,line1164,line1171,line1178,line1185,line1189,line1193,line1196,line1199,line1201,line1203,line1204
! eliminated_buses=1087,1097,1107,1117,1127,1136,1144,1151,1158,1165,1172,1179,1186,1190,1194,1197,1200,1202,1204

New Line.LINE129 bus1=124.1.2.3.4 bus2=130.1.2.3.4 phases=4 linecode=LC6 length=6.5162 units=m

New Line.LINE178 bus1=172.1.2.3.4 bus2=179.1.2.3.4 phases=4 linecode=LC6 length=5.7601 units=m

New Line.LINE294 bus1=285.1.2.3.4 bus2=295.1.2.3.4 phases=4 linecode=LC2 length=2.3149 units=m

New Line.LINE297 bus1=287.1.2.3.4 bus2=298.1.2.3.4 phases=4 linecode=LC2 length=3.8303 units=m

New Line.LINE332 bus1=322.1.2.3.4 bus2=333.1.2.3.4 phases=4 linecode=LC6 length=6.2125 units=m

New Line.LINE362 bus1=353.1.2.3.4 bus2=363.1.2.3.4 phases=4 linecode=LC2 length=2.9253 units=m

New Line.LINE400 bus1=394.1.2.3.4 bus2=401.1.2.3.4 phases=4 linecode=LC6 length=5.9745 units=m

New Line.LINE416 bus1=411.1.2.3.4 bus2=417.1.2.3.4 phases=4 linecode=LC6 length=6.2336 units=m

New Line.LINE494 bus1=492.1.2.3.4 bus2=495.1.2.3.4 phases=4 linecode=LC3 length=7.9883 units=m

New Line.LINE507 bus1=504.1.2.3.4 bus2=508.1.2.3.4 phases=4 linecode=LC4 length=1.8352 units=m

New Line.LINE533 bus1=528.1.2.3.4 bus2=534.1.2.3.4 phases=4 linecode=LC3 length=5.0081 units=m

New Line.LINE565 bus1=558.1.2.3.4 bus2=566.1.2.3.4 phases=4 linecode=LC2 length=4.7784 units=m

New Line.LINE613 bus1=604.1.2.3.4 bus2=614.1.2.3.4 phases=4 linecode=LC2 length=4.0267 units=m

New Line.LINE629 bus1=619.1.2.3.4 bus2=630.1.2.3.4 phases=4 linecode=LC3 length=4.2473 units=m

New Line.LINE647 bus1=638.1.2.3.4 bus2=648.1.2.3.4 phases=4 linecode=LC3 length=2.5558 units=m

New Line.LINE686 bus1=677.1.2.3.4 bus2=687.1.2.3.4 phases=4 linecode=LC6 length=2.3434 units=m

New Line.LINE690 bus1=681.1.2.3.4 bus2=691.1.2.3.4 phases=4 linecode=LC2 length=2.4379 units=m

New Line.LINE800 bus1=797.1.2.3.4 bus2=801.1.2.3.4 phases=4 linecode=LC2 length=0.94226 units=m

New Line.LINE877 bus1=873.1.2.3.4 bus2=878.1.2.3.4 phases=4 linecode=LC6 length=2.3909 units=m

New Line.LINE905 bus1=897.1.2.3.4 bus2=906.1.2.3.4 phases=4 linecode=LC5 length=6.0147 units=m

New Line.LINE912 bus1=906.1.2.3.4 bus2=913.1.2.3.4 phases=4 linecode=LC1 length=10.6374 units=m

New Line.LINE951 bus1=944.1.2.3.4 bus2=952.1.2.3.4 phases=4 linecode=LC6 length=2.0517 units=m

New Line.LINE1014 bus1=1008.1.2.3.4 bus2=1015.1.2.3.4 phases=4 linecode=LC5 length=21.16 units=m

New Line.LINE1130 bus1=1122.1.2.3.4 bus2=1131.1.2.3.4 phases=4 linecode=LC2 length=4.5377 units=m

New Line.LINE1180 bus1=1175.1.2.3.4 bus2=1181.1.2.3.4 phases=4 linecode=LC2 length=5.7459 units=m

New Line.LINE1181 bus1=1175.1.2.3.4 bus2=1182.1.2.3.4 phases=4 linecode=LC2 length=4.9602 units=m
