! Reduced enabled lines.

New Line._virtual_line0_line1_line2_line3_line4_line5_line6_line7_line8_line9_line10_line11_line12_line13_line14_line15_line16_line17_line18_line19_line20_line21_line22_line23_line24_line25_line26_line27_line28_line29_line30_line31_line32_line33_line34_line35_line36_line37_line38_line39_line40_line41_line42_line43_line44_line45_line46_line47_line49_line51_line53_line55_line57_line58_line59_line60 bus1=61.1.2.3.4 bus2=sourcebus.1.2.3.4 phases=4 linecode=LC5 length=75.326077 units=m
! reduced_from=line0,line1,line2,line3,line4,line5,line6,line7,line8,line9,line10,line11,line12,line13,line14,line15,line16,line17,line18,line19,line20,line21,line22,line23,line24,line25,line26,line27,line28,line29,line30,line31,line32,line33,line34,line35,line36,line37,line38,line39,line40,line41,line42,line43,line44,line45,line46,line47,line49,line51,line53,line55,line57,line58,line59,line60
! eliminated_buses=1,2,3,4,5,6,7,8,9,10,11,12,13,14,15,16,17,18,19,20,21,22,23,24,25,26,27,28,29,30,31,32,33,34,35,36,37,38,39,40,41,42,43,44,45,46,47,48,50,52,54,56,58,59,60

New Line._virtual_line61_line63_line65_line67_line69 bus1=61.1.2.3.4 bus2=70.1.2.3.4 phases=4 linecode=LC5 length=24.3178 units=m
! reduced_from=line61,line63,line65,line67,line69
! eliminated_buses=62,64,66,68

New Line._virtual_line62_line64_line66_line68_line70_line73_line76_line80_line85_line91 bus1=61.1.2.3.4 bus2=92.1.2.3.4 phases=4 linecode=LC6 length=17.809894 units=m
! reduced_from=line62,line64,line66,line68,line70,line73,line76,line80,line85,line91
! eliminated_buses=63,65,67,69,71,74,77,81,86

New Line._virtual_line71_line74_line77_line81_line86_line92 bus1=70.1.2.3.4 bus2=93.1.2.3.4 phases=4 linecode=LC5 length=30.977 units=m
! reduced_from=line71,line74,line77,line81,line86,line92
! eliminated_buses=72,75,78,82,87

New Line._virtual_line72_line75_line79 bus1=80.1.2.3.4 bus2=70.1.2.3.4 phases=4 linecode=LC6 length=15.50887 units=m
! reduced_from=line72,line75,line79
! eliminated_buses=73,76

New Line._virtual_line83_line89_line95_line103_line110_line117_line124_line130 bus1=131.1.2.3.4 bus2=80.1.2.3.4 phases=4 linecode=LC6 length=7.4601 units=m
! reduced_from=line83,line89,line95,line103,line110,line117,line124,line130
! eliminated_buses=84,90,96,104,111,118,125

New Line._virtual_line84_line90_line96_line104_line111_line118_line125_line131_line136_line141_line146_line150 bus1=151.1.2.3.4 bus2=80.1.2.3.4 phases=4 linecode=LC6 length=14.19074 units=m
! reduced_from=line84,line90,line96,line104,line111,line118,line125,line131,line136,line141,line146,line150
! eliminated_buses=85,91,97,105,112,119,126,132,137,142,147

New Line._virtual_line98_line105_line112_line119_line126_line132_line137_line142_line147 bus1=92.1.2.3.4 bus2=148.1.2.3.4 phases=4 linecode=LC6 length=12.18065 units=m
! reduced_from=line98,line105,line112,line119,line126,line132,line137,line142,line147
! eliminated_buses=99,106,113,120,127,133,138,143

New Line._virtual_line99_line106_line113_line120_line127_line133_line138_line143_line148 bus1=93.1.2.3.4 bus2=149.1.2.3.4 phases=4 linecode=LC5 length=10.33106 units=m
! reduced_from=line99,line106,line113,line120,line127,line133,line138,line143,line148
! eliminated_buses=100,107,114,121,128,134,139,144

New Line._virtual_line100_line107_line114 bus1=93.1.2.3.4 bus2=115.1.2.3.4 phases=4 linecode=LC6 length=16.5632 units=m
! reduced_from=line100,line107,line114
! eliminated_buses=101,108

New Line._virtual_line122_line128_line134_line139_line144_line149_line154_line160 bus1=115.1.2.3.4 bus2=161.1.2.3.4 phases=4 linecode=LC6 length=9.498945 units=m
! reduced_from=line122,line128,line134,line139,line144,line149,line154,line160
! eliminated_buses=123,129,135,140,145,150,155

New Line._virtual_line151_line155_line161_line166_line172_line179_line186_line193_line200_line207_line214_line221_line227 bus1=228.1.2.3.4 bus2=149.1.2.3.4 phases=4 linecode=LC5 length=11.670512 units=m
! reduced_from=line151,line155,line161,line166,line172,line179,line186,line193,line200,line207,line214,line221,line227
! eliminated_buses=152,156,162,167,173,180,187,194,201,208,215,222

New Line._virtual_line157_line163_line169 bus1=154.1.2.3.4 bus2=170.1.2.3.4 phases=4 linecode=LC4 length=34.2335 units=m
! reduced_from=line157,line163,line169
! eliminated_buses=158,164

New Line._virtual_line158_line165_line171_line178_line185_line192_line199_line206_line213_line220_line226_line232_line240_line247_line254_line262_line270 bus1=154.1.2.3.4 bus2=271.1.2.3.4 phases=4 linecode=LC4 length=6.371642 units=m
! reduced_from=line158,line165,line171,line178,line185,line192,line199,line206,line213,line220,line226,line232,line240,line247,line254,line262,line270
! eliminated_buses=159,166,172,179,186,193,200,207,214,221,227,233,241,248,255,263

New Line._virtual_line175_line182_line189_line196_line203_line210_line217_line223_line229_line236_line243_line250_line258_line266_line274_line283_line292_line301_line309_line317_line325_line334_line343_line354_line364_line377_line388_line400_line413_line426_line436_line448_line459_line470_line481_line491_line503_line514_line526_line537_line547_line559 bus1=170.1.2.3.4 bus2=560.1.2.3.4 phases=4 linecode=LC2 length=15.384339 units=m
! reduced_from=line175,line182,line189,line196,line203,line210,line217,line223,line229,line236,line243,line250,line258,line266,line274,line283,line292,line301,line309,line317,line325,line334,line343,line354,line364,line377,line388,line400,line413,line426,line436,line448,line459,line470,line481,line491,line503,line514,line526,line537,line547,line559
! eliminated_buses=176,183,190,197,204,211,218,224,230,237,244,251,259,267,275,284,293,302,310,318,326,335,344,355,365,378,389,401,414,427,437,449,460,471,482,492,504,515,527,538,548

New Line._virtual_line176_line183_line190_line197_line204_line211_line218_line224_line230 bus1=170.1.2.3.4 bus2=231.1.2.3.4 phases=4 linecode=LC4 length=16.82559 units=m
! reduced_from=line176,line183,line190,line197,line204,line211,line218,line224,line230
! eliminated_buses=177,184,191,198,205,212,219,225

New Line._virtual_line234_line241_line248 bus1=228.1.2.3.4 bus2=249.1.2.3.4 phases=4 linecode=LC5 length=1.20264 units=m
! reduced_from=line234,line241,line248
! eliminated_buses=235,242

New Line._virtual_line237_line244_line251_line259_line267_line275_line284_line293_line302_line310_line318_line326_line335_line344_line355_line365_line378_line389 bus1=231.1.2.3.4 bus2=390.1.2.3.4 phases=4 linecode=LC6 length=8.596097 units=m
! reduced_from=line237,line244,line251,line259,line267,line275,line284,line293,line302,line310,line318,line326,line335,line344,line355,line365,line378,line389
! eliminated_buses=238,245,252,260,268,276,285,294,303,311,319,327,336,345,356,366,379

New Line._virtual_line238_line245_line252_line260_line268_line276_line285_line294_line303_line311_line319_line327_line336_line345_line356_line366_line379 bus1=380.1.2.3.4 bus2=231.1.2.3.4 phases=4 linecode=LC4 length=9.17892 units=m
! reduced_from=line238,line245,line252,line260,line268,line276,line285,line294,line303,line311,line319,line327,line336,line345,line356,line366,line379
! eliminated_buses=239,246,253,261,269,277,286,295,304,312,320,328,337,346,357,367

New Line._virtual_line255_line263_line271_line280_line289_line298_line307_line315_line323_line332_line341 bus1=342.1.2.3.4 bus2=249.1.2.3.4 phases=4 linecode=LC5 length=12.16956 units=m
! reduced_from=line255,line263,line271,line280,line289,line298,line307,line315,line323,line332,line341
! eliminated_buses=256,264,272,281,290,299,308,316,324,333

New Line._virtual_line265_line273_line282_line291_line300 bus1=301.1.2.3.4 bus2=258.1.2.3.4 phases=4 linecode=LC2 length=23.87064 units=m
! reduced_from=line265,line273,line282,line291,line300
! eliminated_buses=266,274,283,292

New Line._virtual_line278_line287_line296_line305_line313_line321 bus1=271.1.2.3.4 bus2=322.1.2.3.4 phases=4 linecode=LC4 length=23.1479 units=m
! reduced_from=line278,line287,line296,line305,line313,line321
! eliminated_buses=279,288,297,306,314

New Line._virtual_line279_line288_line297_line306_line314_line322_line331_line340 bus1=341.1.2.3.4 bus2=271.1.2.3.4 phases=4 linecode=LC4 length=12.44251 units=m
! reduced_from=line279,line288,line297,line306,line314,line322,line331,line340
! eliminated_buses=280,289,298,307,315,323,332

New Line._virtual_line329_line338 bus1=322.1.2.3.4 bus2=339.1.2.3.4 phases=4 linecode=LC4 length=14.6323 units=m
! reduced_from=line329,line338
! eliminated_buses=330

New Line._virtual_line330_line339 bus1=322.1.2.3.4 bus2=340.1.2.3.4 phases=4 linecode=LC4 length=19.8305 units=m
! reduced_from=line330,line339
! eliminated_buses=331

New Line._virtual_line347_line358 bus1=339.1.2.3.4 bus2=359.1.2.3.4 phases=4 linecode=LC4 length=10.1737 units=m
! reduced_from=line347,line358
! eliminated_buses=348

New Line._virtual_line348_line359_line370_line383_line395_line408_line421 bus1=422.1.2.3.4 bus2=339.1.2.3.4 phases=4 linecode=LC4 length=11.72642 units=m
! reduced_from=line348,line359,line370,line383,line395,line408,line421
! eliminated_buses=349,360,371,384,396,409

New Line._virtual_line350_line360_line371_line384_line396_line409_line422_line432_line444_line455_line466 bus1=341.1.2.3.4 bus2=467.1.2.3.4 phases=4 linecode=LC4 length=15.86799 units=m
! reduced_from=line350,line360,line371,line384,line396,line409,line422,line432,line444,line455,line466
! eliminated_buses=351,361,372,385,397,410,423,433,445,456

New Line._virtual_line352_line363_line376_line387_line399_line412_line425_line435_line447_line458_line469_line480_line490 bus1=342.1.2.3.4 bus2=491.1.2.3.4 phases=4 linecode=LC6 length=17.496268 units=m
! reduced_from=line352,line363,line376,line387,line399,line412,line425,line435,line447,line458,line469,line480,line490
! eliminated_buses=353,364,377,388,400,413,426,436,448,459,470,481

New Line._virtual_line361_line372_line385_line397_line410_line423_line433_line445_line456_line467_line478_line488_line499_line509_line520_line531 bus1=352.1.2.3.4 bus2=532.1.2.3.4 phases=4 linecode=LC5 length=32.32828 units=m
! reduced_from=line361,line372,line385,line397,line410,line423,line433,line445,line456,line467,line478,line488,line499,line509,line520,line531
! eliminated_buses=362,373,386,398,411,424,434,446,457,468,479,489,500,510,521

New Line._virtual_line368_line381_line393_line406 bus1=407.1.2.3.4 bus2=359.1.2.3.4 phases=4 linecode=LC4 length=15.0231 units=m
! reduced_from=line368,line381,line393,line406
! eliminated_buses=369,382,394

New Line._virtual_line369_line382_line394_line407_line420 bus1=359.1.2.3.4 bus2=421.1.2.3.4 phases=4 linecode=LC4 length=12.59623 units=m
! reduced_from=line369,line382,line394,line407,line420
! eliminated_buses=370,383,395,408

New Line._virtual_line390_line403_line415 bus1=380.1.2.3.4 bus2=416.1.2.3.4 phases=4 linecode=LC4 length=15.7529 units=m
! reduced_from=line390,line403,line415
! eliminated_buses=391,404

New Line._virtual_line391_line404_line416_line427_line437_line449_line460_line471_line482 bus1=483.1.2.3.4 bus2=380.1.2.3.4 phases=4 linecode=LC4 length=3.55433 units=m
! reduced_from=line391,line404,line416,line427,line437,line449,line460,line471,line482
! eliminated_buses=392,405,417,428,438,450,461,472

New Line._virtual_line401_line414 bus1=390.1.2.3.4 bus2=415.1.2.3.4 phases=4 linecode=LC6 length=10.7211 units=m
! reduced_from=line401,line414
! eliminated_buses=402

New Line._virtual_line419_line431_line443_line454_line465_line477 bus1=478.1.2.3.4 bus2=407.1.2.3.4 phases=4 linecode=LC4 length=16.94541 units=m
! reduced_from=line419,line431,line443,line454,line465,line477
! eliminated_buses=420,432,444,455,466

New Line._virtual_line439_line451_line462 bus1=463.1.2.3.4 bus2=430.1.2.3.4 phases=4 linecode=LC4 length=9.52965 units=m
! reduced_from=line439,line451,line462
! eliminated_buses=440,452

New Line._virtual_line440_line452_line463_line475 bus1=476.1.2.3.4 bus2=430.1.2.3.4 phases=4 linecode=LC4 length=23.2744 units=m
! reduced_from=line440,line452,line463,line475
! eliminated_buses=441,453,464

New Line._virtual_line442_line453_line464_line476_line487 bus1=431.1.2.3.4 bus2=488.1.2.3.4 phases=4 linecode=LC4 length=12.96257 units=m
! reduced_from=line442,line453,line464,line476,line487
! eliminated_buses=443,454,465,477

New Line._virtual_line473_line484 bus1=463.1.2.3.4 bus2=485.1.2.3.4 phases=4 linecode=LC4 length=17.9379 units=m
! reduced_from=line473,line484
! eliminated_buses=474

New Line._virtual_line485_line497_line507_line518_line529 bus1=530.1.2.3.4 bus2=475.1.2.3.4 phases=4 linecode=LC4 length=36.5513 units=m
! reduced_from=line485,line497,line507,line518,line529
! eliminated_buses=486,498,508,519

New Line._virtual_line486_line498_line508_line519_line530_line540 bus1=541.1.2.3.4 bus2=475.1.2.3.4 phases=4 linecode=LC4 length=16.06646 units=m
! reduced_from=line486,line498,line508,line519,line530,line540
! eliminated_buses=487,499,509,520,531

New Line._virtual_line492_line504 bus1=483.1.2.3.4 bus2=505.1.2.3.4 phases=4 linecode=LC4 length=13.5866 units=m
! reduced_from=line492,line504
! eliminated_buses=493

New Line._virtual_line493_line505_line515_line527_line538_line548_line560_line570_line579_line587_line596_line605_line615_line625_line635_line645_line654_line663_line672_line680_line687_line694_line701_line708_line715_line722_line729_line736_line743_line752 bus1=483.1.2.3.4 bus2=753.1.2.3.4 phases=4 linecode=LC4 length=12.7724 units=m
! reduced_from=line493,line505,line515,line527,line538,line548,line560,line570,line579,line587,line596,line605,line615,line625,line635,line645,line654,line663,line672,line680,line687,line694,line701,line708,line715,line722,line729,line736,line743,line752
! eliminated_buses=494,506,516,528,539,549,561,571,580,588,597,606,616,626,636,646,655,664,673,681,688,695,702,709,716,723,730,737,744

New Line._virtual_line501_line511_line522_line534_line544_line556_line565_line575_line584_line593 bus1=594.1.2.3.4 bus2=491.1.2.3.4 phases=4 linecode=LC6 length=11.83698 units=m
! reduced_from=line501,line511,line522,line534,line544,line556,line565,line575,line584,line593
! eliminated_buses=502,512,523,535,545,557,566,576,585

New Line._virtual_line502_line513_line525_line536_line546_line558_line567_line577_line586_line595_line604_line613_line623_line633_line643_line652_line661_line670_line679_line686_line693_line700_line707_line714_line721_line728_line735_line742_line751_line760_line770_line783_line796_line808_line820_line831 bus1=491.1.2.3.4 bus2=832.1.2.3.4 phases=4 linecode=LC6 length=56.915827 units=m
! reduced_from=line502,line513,line525,line536,line546,line558,line567,line577,line586,line595,line604,line613,line623,line633,line643,line652,line661,line670,line679,line686,line693,line700,line707,line714,line721,line728,line735,line742,line751,line760,line770,line783,line796,line808,line820,line831
! eliminated_buses=503,514,526,537,547,559,568,578,587,596,605,614,624,634,644,653,662,671,680,687,694,701,708,715,722,729,736,743,752,761,771,784,797,809,821

New Line._virtual_line541_line550_line562_line572_line582 bus1=583.1.2.3.4 bus2=532.1.2.3.4 phases=4 linecode=LC5 length=35.7932 units=m
! reduced_from=line541,line550,line562,line572,line582
! eliminated_buses=542,551,563,573

New Line._virtual_line568_line578 bus1=560.1.2.3.4 bus2=579.1.2.3.4 phases=4 linecode=LC2 length=11.419 units=m
! reduced_from=line568,line578
! eliminated_buses=569

New Line._virtual_line590_line599_line608_line618_line628_line638_line647_line656_line665_line674_line682_line689_line696_line703_line710_line717_line724_line731_line738_line745_line754_line764_line775_line788_line800_line813_line824_line835_line846_line855_line864_line874_line883_line891 bus1=892.1.2.3.4 bus2=583.1.2.3.4 phases=4 linecode=LC4 length=37.9155 units=m
! reduced_from=line590,line599,line608,line618,line628,line638,line647,line656,line665,line674,line682,line689,line696,line703,line710,line717,line724,line731,line738,line745,line754,line764,line775,line788,line800,line813,line824,line835,line846,line855,line864,line874,line883,line891
! eliminated_buses=591,600,609,619,629,639,648,657,666,675,683,690,697,704,711,718,725,732,739,746,755,765,776,789,801,814,825,836,847,856,865,875,884

New Line._virtual_line600_line609_line619_line629_line640_line649_line658_line667_line676_line684_line691_line698_line705_line712_line719_line726_line733_line740_line748_line758_line768_line781_line794_line806_line818_line829_line841_line852_line861 bus1=592.1.2.3.4 bus2=862.1.2.3.4 phases=4 linecode=LC6 length=35.45083 units=m
! reduced_from=line600,line609,line619,line629,line640,line649,line658,line667,line676,line684,line691,line698,line705,line712,line719,line726,line733,line740,line748,line758,line768,line781,line794,line806,line818,line829,line841,line852,line861
! eliminated_buses=601,610,620,630,641,650,659,668,677,685,692,699,706,713,720,727,734,741,749,759,769,782,795,807,819,830,842,853

New Line._virtual_line762_line773_line786_line799 bus1=800.1.2.3.4 bus2=753.1.2.3.4 phases=4 linecode=LC4 length=15.3669 units=m
! reduced_from=line762,line773,line786,line799
! eliminated_buses=763,774,787

New Line._virtual_line771_line784_line797_line809_line821_line832_line843 bus1=762.1.2.3.4 bus2=844.1.2.3.4 phases=4 linecode=LC4 length=11.13608 units=m
! reduced_from=line771,line784,line797,line809,line821,line832,line843
! eliminated_buses=772,785,798,810,822,833

New Line._virtual_line811_line823_line834_line845_line854_line863_line873 bus1=800.1.2.3.4 bus2=874.1.2.3.4 phases=4 linecode=LC4 length=14.03177 units=m
! reduced_from=line811,line823,line834,line845,line854,line863,line873
! eliminated_buses=812,824,835,846,855,864

New Line._virtual_line870_line880_line887_line895_line904_line914_line922_line931 bus1=932.1.2.3.4 bus2=862.1.2.3.4 phases=4 linecode=LC6 length=14.685499 units=m
! reduced_from=line870,line880,line887,line895,line904,line914,line922,line931
! eliminated_buses=871,881,888,896,905,915,923

New Line._virtual_line871_line882_line889_line897_line906_line916_line924_line933_line943 bus1=862.1.2.3.4 bus2=944.1.2.3.4 phases=4 linecode=LC6 length=10.98982 units=m
! reduced_from=line871,line882,line889,line897,line906,line916,line924,line933,line943
! eliminated_buses=872,883,890,898,907,917,925,934

New Line._virtual_line899_line908 bus1=909.1.2.3.4 bus2=892.1.2.3.4 phases=4 linecode=LC4 length=14.2401 units=m
! reduced_from=line899,line908
! eliminated_buses=900

New Line._virtual_line909_line917_line925_line934_line944 bus1=945.1.2.3.4 bus2=901.1.2.3.4 phases=4 linecode=LC4 length=10.28679 units=m
! reduced_from=line909,line917,line925,line934,line944
! eliminated_buses=910,918,926,935

New Line._virtual_line910_line918 bus1=919.1.2.3.4 bus2=901.1.2.3.4 phases=4 linecode=LC4 length=7.58528 units=m
! reduced_from=line910,line918
! eliminated_buses=911

New Line._virtual_line927_line938 bus1=919.1.2.3.4 bus2=939.1.2.3.4 phases=4 linecode=LC4 length=8.6578 units=m
! reduced_from=line927,line938
! eliminated_buses=928

New Line._virtual_line935_line945 bus1=927.1.2.3.4 bus2=946.1.2.3.4 phases=4 linecode=LC4 length=7.1489 units=m
! reduced_from=line935,line945
! eliminated_buses=936

New Line._virtual_line936_line947_line954_line958_line961_line965_line970_line974 bus1=975.1.2.3.4 bus2=927.1.2.3.4 phases=4 linecode=LC4 length=9.9983 units=m
! reduced_from=line936,line947,line954,line958,line961,line965,line970,line974
! eliminated_buses=937,948,955,959,962,966,971

New Line._virtual_line951_line955_line959 bus1=946.1.2.3.4 bus2=960.1.2.3.4 phases=4 linecode=LC4 length=6.8816 units=m
! reduced_from=line951,line955,line959
! eliminated_buses=952,956

New Line._virtual_line952_line957 bus1=958.1.2.3.4 bus2=946.1.2.3.4 phases=4 linecode=LC4 length=9.4326 units=m
! reduced_from=line952,line957
! eliminated_buses=953

New Line._virtual_line963_line969 bus1=960.1.2.3.4 bus2=970.1.2.3.4 phases=4 linecode=LC4 length=9.3599 units=m
! reduced_from=line963,line969
! eliminated_buses=964

New Line._virtual_line966_line971 bus1=963.1.2.3.4 bus2=972.1.2.3.4 phases=4 linecode=LC4 length=4.9023 units=m
! reduced_from=line966,line971
! eliminated_buses=967

New Line._virtual_line967_line973_line978_line982_line985_line989_line993_line996_line999_line1002_line1006_line1011_line1016_line1021_line1026 bus1=963.1.2.3.4 bus2=1027.1.2.3.4 phases=4 linecode=LC4 length=10.519721 units=m
! reduced_from=line967,line973,line978,line982,line985,line989,line993,line996,line999,line1002,line1006,line1011,line1016,line1021,line1026
! eliminated_buses=968,974,979,983,986,990,994,997,1000,1003,1007,1012,1017,1022

New Line._virtual_line975_line979_line983 bus1=984.1.2.3.4 bus2=972.1.2.3.4 phases=4 linecode=LC4 length=3.50767 units=m
! reduced_from=line975,line979,line983
! eliminated_buses=976,980

New Line._virtual_line976_line981 bus1=972.1.2.3.4 bus2=982.1.2.3.4 phases=4 linecode=LC4 length=9.929 units=m
! reduced_from=line976,line981
! eliminated_buses=977

New Line._virtual_line986_line990_line994_line997_line1000 bus1=984.1.2.3.4 bus2=1001.1.2.3.4 phases=4 linecode=LC4 length=7.43302 units=m
! reduced_from=line986,line990,line994,line997,line1000
! eliminated_buses=987,991,995,998

New Line._virtual_line987_line992 bus1=993.1.2.3.4 bus2=984.1.2.3.4 phases=4 linecode=LC4 length=9.8568 units=m
! reduced_from=line987,line992
! eliminated_buses=988

New Line._virtual_line1003_line1007_line1012_line1017_line1022 bus1=1023.1.2.3.4 bus2=1001.1.2.3.4 phases=4 linecode=LC4 length=7.87832 units=m
! reduced_from=line1003,line1007,line1012,line1017,line1022
! eliminated_buses=1004,1008,1013,1018

New Line._virtual_line1004_line1010_line1015_line1020_line1025_line1031_line1037_line1042_line1047_line1053 bus1=1001.1.2.3.4 bus2=1054.1.2.3.4 phases=4 linecode=LC4 length=9.983403 units=m
! reduced_from=line1004,line1010,line1015,line1020,line1025,line1031,line1037,line1042,line1047,line1053
! eliminated_buses=1005,1011,1016,1021,1026,1032,1038,1043,1048

New Line._virtual_line1027_line1032_line1038_line1043 bus1=1023.1.2.3.4 bus2=1044.1.2.3.4 phases=4 linecode=LC4 length=8.5943 units=m
! reduced_from=line1027,line1032,line1038,line1043
! eliminated_buses=1028,1033,1039

New Line._virtual_line1035_line1040_line1045_line1051_line1058_line1063 bus1=1064.1.2.3.4 bus2=1029.1.2.3.4 phases=4 linecode=LC4 length=7.01503 units=m
! reduced_from=line1035,line1040,line1045,line1051,line1058,line1063
! eliminated_buses=1036,1041,1046,1052,1059

New Line._virtual_line1049_line1057 bus1=1058.1.2.3.4 bus2=1044.1.2.3.4 phases=4 linecode=LC4 length=9.2975 units=m
! reduced_from=line1049,line1057
! eliminated_buses=1050

New Line._virtual_line1054_line1060_line1065_line1069_line1073_line1077_line1082_line1088_line1093 bus1=1049.1.2.3.4 bus2=1094.1.2.3.4 phases=4 linecode=LC4 length=18.53085 units=m
! reduced_from=line1054,line1060,line1065,line1069,line1073,line1077,line1082,line1088,line1093
! eliminated_buses=1055,1061,1066,1070,1074,1078,1083,1089

New Line._virtual_line1055_line1062_line1067_line1071_line1075_line1079_line1084_line1089_line1094_line1097 bus1=1049.1.2.3.4 bus2=1098.1.2.3.4 phases=4 linecode=LC4 length=9.84856 units=m
! reduced_from=line1055,line1062,line1067,line1071,line1075,line1079,line1084,line1089,line1094,line1097
! eliminated_buses=1056,1063,1068,1072,1076,1080,1085,1090,1095

New Line.LINE97 bus1=92.1.2.3.4 bus2=98.1.2.3.4 phases=4 linecode=LC6 length=4.4127 units=m

New Line.LINE121 bus1=115.1.2.3.4 bus2=122.1.2.3.4 phases=4 linecode=LC6 length=8.5002 units=m

New Line.LINE153 bus1=149.1.2.3.4 bus2=154.1.2.3.4 phases=4 linecode=LC5 length=2.5295 units=m

New Line.LINE233 bus1=228.1.2.3.4 bus2=234.1.2.3.4 phases=4 linecode=LC1 length=10.5727 units=m

New Line.LINE257 bus1=249.1.2.3.4 bus2=258.1.2.3.4 phases=4 linecode=LC2 length=0.090427 units=m

New Line.LINE349 bus1=341.1.2.3.4 bus2=350.1.2.3.4 phases=4 linecode=LC4 length=4.8223 units=m

New Line.LINE351 bus1=342.1.2.3.4 bus2=352.1.2.3.4 phases=4 linecode=LC5 length=1.8061 units=m

New Line.LINE362 bus1=352.1.2.3.4 bus2=363.1.2.3.4 phases=4 linecode=LC5 length=1.3158 units=m

New Line.LINE375 bus1=363.1.2.3.4 bus2=376.1.2.3.4 phases=4 linecode=LC1 length=9.4485 units=m

New Line.LINE402 bus1=390.1.2.3.4 bus2=403.1.2.3.4 phases=4 linecode=LC6 length=3.5227 units=m

New Line.LINE418 bus1=407.1.2.3.4 bus2=419.1.2.3.4 phases=4 linecode=LC4 length=10.1025 units=m

New Line.LINE429 bus1=419.1.2.3.4 bus2=430.1.2.3.4 phases=4 linecode=LC4 length=8.1762 units=m

New Line.LINE430 bus1=419.1.2.3.4 bus2=431.1.2.3.4 phases=4 linecode=LC4 length=7.8415 units=m

New Line.LINE441 bus1=431.1.2.3.4 bus2=442.1.2.3.4 phases=4 linecode=LC4 length=3.8829 units=m

New Line.LINE474 bus1=463.1.2.3.4 bus2=475.1.2.3.4 phases=4 linecode=LC4 length=1.7956 units=m

New Line.LINE495 bus1=485.1.2.3.4 bus2=496.1.2.3.4 phases=4 linecode=LC4 length=4.6835 units=m

New Line.LINE496 bus1=485.1.2.3.4 bus2=497.1.2.3.4 phases=4 linecode=LC4 length=4.6835 units=m

New Line.LINE542 bus1=532.1.2.3.4 bus2=543.1.2.3.4 phases=4 linecode=LC5 length=1.6843 units=m

New Line.LINE553 bus1=543.1.2.3.4 bus2=554.1.2.3.4 phases=4 linecode=LC1 length=1.4658 units=m

New Line.LINE554 bus1=543.1.2.3.4 bus2=555.1.2.3.4 phases=4 linecode=LC1 length=1.4658 units=m

New Line.LINE569 bus1=560.1.2.3.4 bus2=570.1.2.3.4 phases=4 linecode=LC2 length=4.1108 units=m

New Line.LINE591 bus1=583.1.2.3.4 bus2=592.1.2.3.4 phases=4 linecode=LC5 length=1.3086 units=m

New Line.LINE761 bus1=753.1.2.3.4 bus2=762.1.2.3.4 phases=4 linecode=LC4 length=5.7934 units=m

New Line.LINE772 bus1=762.1.2.3.4 bus2=773.1.2.3.4 phases=4 linecode=LC4 length=3.8146 units=m

New Line.LINE812 bus1=800.1.2.3.4 bus2=813.1.2.3.4 phases=4 linecode=LC4 length=4.4986 units=m

New Line.LINE900 bus1=892.1.2.3.4 bus2=901.1.2.3.4 phases=4 linecode=LC4 length=4.0314 units=m

New Line.LINE926 bus1=919.1.2.3.4 bus2=927.1.2.3.4 phases=4 linecode=LC4 length=2.061 units=m

New Line.LINE941 bus1=932.1.2.3.4 bus2=942.1.2.3.4 phases=4 linecode=LC1 length=44.6581 units=m

New Line.LINE962 bus1=960.1.2.3.4 bus2=963.1.2.3.4 phases=4 linecode=LC4 length=3.544 units=m

New Line.LINE1028 bus1=1023.1.2.3.4 bus2=1029.1.2.3.4 phases=4 linecode=LC4 length=4.1302 units=m

New Line.LINE1034 bus1=1029.1.2.3.4 bus2=1035.1.2.3.4 phases=4 linecode=LC4 length=5.7654 units=m

New Line.LINE1048 bus1=1044.1.2.3.4 bus2=1049.1.2.3.4 phases=4 linecode=LC4 length=0.583 units=m
