! Reduced enabled lines.

New Line._virtual_line0_line1_line2_line3_line4_line5_line6_line7_line8_line9_line10_line11_line12_line13_line14_line15_line16_line17 bus1=sourcebus.1.2.3.4 bus2=18.1.2.3.4 phases=4 linecode=LC8 length=8.165317 units=m
! reduced_from=line0,line1,line2,line3,line4,line5,line6,line7,line8,line9,line10,line11,line12,line13,line14,line15,line16,line17
! eliminated_buses=1,2,3,4,5,6,7,8,9,10,11,12,13,14,15,16,17

New Line._virtual_line18_line19_line20_line21_line22_line23_line24_line25_line26_line27_line28_line29_line30_line31_line32_line33_line34_line35_line36_line37_line38_line39_line40_line41_line42_line43_line44_line45_line46_line47_line48_line49_line51_line53_line55_line57_line59_line62_line66_line70_line74_line78_line82_line87_line92_line97_line101_line105_line109_line112 bus1=18.1.2.3.4 bus2=113.1.2.3.4 phases=4 linecode=LC7 length=121.39165 units=m
! reduced_from=line18,line19,line20,line21,line22,line23,line24,line25,line26,line27,line28,line29,line30,line31,line32,line33,line34,line35,line36,line37,line38,line39,line40,line41,line42,line43,line44,line45,line46,line47,line48,line49,line51,line53,line55,line57,line59,line62,line66,line70,line74,line78,line82,line87,line92,line97,line101,line105,line109,line112
! eliminated_buses=19,20,21,22,23,24,25,26,27,28,29,30,31,32,33,34,35,36,37,38,39,40,41,42,43,44,45,46,47,48,49,50,52,54,56,58,60,63,67,71,75,79,83,88,93,98,102,106,110

New Line._virtual_line115_line119_line123_line127_line131_line134_line137_line140_line143_line146_line149_line152 bus1=113.1.2.3.4 bus2=153.1.2.3.4 phases=4 linecode=LC7 length=18.74125 units=m
! reduced_from=line115,line119,line123,line127,line131,line134,line137,line140,line143,line146,line149,line152
! eliminated_buses=116,120,124,128,132,135,138,141,144,147,150

New Line._virtual_line116_line120_line124_line128_line132_line135_line138_line141_line144_line147_line150_line153_line158_line164_line171_line179_line188_line198_line206_line215_line225_line234_line244_line253 bus1=254.1.2.3.4 bus2=113.1.2.3.4 phases=4 linecode=LC2 length=21.686238 units=m
! reduced_from=line116,line120,line124,line128,line132,line135,line138,line141,line144,line147,line150,line153,line158,line164,line171,line179,line188,line198,line206,line215,line225,line234,line244,line253
! eliminated_buses=117,121,125,129,133,136,139,142,145,148,151,154,159,165,172,180,189,199,207,216,226,235,245

New Line._virtual_line156_line162_line169_line177_line186_line196 bus1=197.1.2.3.4 bus2=153.1.2.3.4 phases=4 linecode=LC1 length=12.21278 units=m
! reduced_from=line156,line162,line169,line177,line186,line196
! eliminated_buses=157,163,170,178,187

New Line._virtual_line157_line163_line170_line178_line187 bus1=153.1.2.3.4 bus2=188.1.2.3.4 phases=4 linecode=LC1 length=13.04372 units=m
! reduced_from=line157,line163,line170,line178,line187
! eliminated_buses=158,164,171,179

New Line._virtual_line160_line166 bus1=156.1.2.3.4 bus2=167.1.2.3.4 phases=4 linecode=LC7 length=4.7014 units=m
! reduced_from=line160,line166
! eliminated_buses=161

New Line._virtual_line161_line168_line176_line185_line195_line204_line213_line223_line232_line243_line252 bus1=253.1.2.3.4 bus2=156.1.2.3.4 phases=4 linecode=LC6 length=11.985165 units=m
! reduced_from=line161,line168,line176,line185,line195,line204,line213,line223,line232,line243,line252
! eliminated_buses=162,169,177,186,196,205,214,224,233,244

New Line._virtual_line174_line183_line193_line203_line212 bus1=213.1.2.3.4 bus2=167.1.2.3.4 phases=4 linecode=LC2 length=13.55134 units=m
! reduced_from=line174,line183,line193,line203,line212
! eliminated_buses=175,184,194,204

New Line._virtual_line182_line192_line202_line211_line222_line231 bus1=174.1.2.3.4 bus2=232.1.2.3.4 phases=4 linecode=LC2 length=7.23387 units=m
! reduced_from=line182,line192,line202,line211,line222,line231
! eliminated_buses=183,193,203,212,223

New Line._virtual_line190_line200 bus1=201.1.2.3.4 bus2=182.1.2.3.4 phases=4 linecode=LC7 length=5.83115 units=m
! reduced_from=line190,line200
! eliminated_buses=191

New Line._virtual_line191_line201_line210_line221_line230_line240_line250_line258 bus1=182.1.2.3.4 bus2=259.1.2.3.4 phases=4 linecode=LC2 length=11.77885 units=m
! reduced_from=line191,line201,line210,line221,line230,line240,line250,line258
! eliminated_buses=192,202,211,222,231,241,251

New Line._virtual_line208_line217 bus1=201.1.2.3.4 bus2=218.1.2.3.4 phases=4 linecode=LC7 length=7.84932 units=m
! reduced_from=line208,line217
! eliminated_buses=209

New Line._virtual_line228_line238_line248_line257_line265_line272 bus1=218.1.2.3.4 bus2=273.1.2.3.4 phases=4 linecode=LC6 length=11.6038 units=m
! reduced_from=line228,line238,line248,line257,line265,line272
! eliminated_buses=229,239,249,258,266

New Line._virtual_line236_line246_line255_line263 bus1=228.1.2.3.4 bus2=264.1.2.3.4 phases=4 linecode=LC7 length=6.35711 units=m
! reduced_from=line236,line246,line255,line263
! eliminated_buses=237,247,256

New Line._virtual_line237_line247_line256_line264_line271_line278_line284 bus1=228.1.2.3.4 bus2=285.1.2.3.4 phases=4 linecode=LC6 length=12.93324 units=m
! reduced_from=line237,line247,line256,line264,line271,line278,line284
! eliminated_buses=238,248,257,265,272,279

New Line._virtual_line242_line251_line259_line266_line273 bus1=232.1.2.3.4 bus2=274.1.2.3.4 phases=4 linecode=LC2 length=8.15932 units=m
! reduced_from=line242,line251,line259,line266,line273
! eliminated_buses=243,252,260,267

New Line._virtual_line261_line267_line274_line279_line285_line289_line294_line299_line304_line310_line316_line322_line327_line333_line338_line343_line349 bus1=254.1.2.3.4 bus2=350.1.2.3.4 phases=4 linecode=LC2 length=2.616049 units=m
! reduced_from=line261,line267,line274,line279,line285,line289,line294,line299,line304,line310,line316,line322,line327,line333,line338,line343,line349
! eliminated_buses=262,268,275,280,286,290,295,300,305,311,317,323,328,334,339,344

New Line._virtual_line269_line276_line281_line286_line290_line295_line300_line305_line311_line317 bus1=318.1.2.3.4 bus2=264.1.2.3.4 phases=4 linecode=LC6 length=12.233345 units=m
! reduced_from=line269,line276,line281,line286,line290,line295,line300,line305,line311,line317
! eliminated_buses=270,277,282,287,291,296,301,306,312

New Line._virtual_line270_line277 bus1=278.1.2.3.4 bus2=264.1.2.3.4 phases=4 linecode=LC7 length=9.2043 units=m
! reduced_from=line270,line277
! eliminated_buses=271

New Line._virtual_line282_line287_line291_line296_line301_line306_line312_line318_line323_line328 bus1=278.1.2.3.4 bus2=329.1.2.3.4 phases=4 linecode=LC6 length=12.826561 units=m
! reduced_from=line282,line287,line291,line296,line301,line306,line312,line318,line323,line328
! eliminated_buses=283,288,292,297,302,307,313,319,324

New Line._virtual_line283_line288 bus1=289.1.2.3.4 bus2=278.1.2.3.4 phases=4 linecode=LC7 length=4.7341 units=m
! reduced_from=line283,line288
! eliminated_buses=284

New Line._virtual_line292_line297_line302_line307_line313_line319_line324_line329_line334_line339_line344 bus1=345.1.2.3.4 bus2=289.1.2.3.4 phases=4 linecode=LC6 length=12.403467 units=m
! reduced_from=line292,line297,line302,line307,line313,line319,line324,line329,line334,line339,line344
! eliminated_buses=293,298,303,308,314,320,325,330,335,340

New Line._virtual_line293_line298_line303 bus1=304.1.2.3.4 bus2=289.1.2.3.4 phases=4 linecode=LC7 length=8.26441 units=m
! reduced_from=line293,line298,line303
! eliminated_buses=294,299

New Line._virtual_line308_line314_line320_line325_line330_line335_line340_line345_line350_line356_line361_line367_line373_line380_line390_line398_line407 bus1=408.1.2.3.4 bus2=304.1.2.3.4 phases=4 linecode=LC6 length=2.64028 units=m
! reduced_from=line308,line314,line320,line325,line330,line335,line340,line345,line350,line356,line361,line367,line373,line380,line390,line398,line407
! eliminated_buses=309,315,321,326,331,336,341,346,351,357,362,368,374,381,391,399

New Line._virtual_line309_line315 bus1=316.1.2.3.4 bus2=304.1.2.3.4 phases=4 linecode=LC7 length=2.2303 units=m
! reduced_from=line309,line315
! eliminated_buses=310

New Line._virtual_line331_line336_line341_line346_line351_line357_line362_line368_line374_line381_line391_line399_line408 bus1=409.1.2.3.4 bus2=327.1.2.3.4 phases=4 linecode=LC2 length=37.68175 units=m
! reduced_from=line331,line336,line341,line346,line351,line357,line362,line368,line374,line381,line391,line399,line408
! eliminated_buses=332,337,342,347,352,358,363,369,375,382,392,400

New Line._virtual_line332_line337_line342 bus1=343.1.2.3.4 bus2=327.1.2.3.4 phases=4 linecode=LC4 length=13.0143 units=m
! reduced_from=line332,line337,line342
! eliminated_buses=333,338

New Line._virtual_line347_line352_line358 bus1=343.1.2.3.4 bus2=359.1.2.3.4 phases=4 linecode=LC2 length=0.68431 units=m
! reduced_from=line347,line352,line358
! eliminated_buses=348,353

New Line._virtual_line348_line353_line359_line365_line371_line378_line388_line396_line405_line415_line427_line439_line453_line469_line485_line501_line513_line524_line535_line547_line559_line570_line580_line587_line594 bus1=343.1.2.3.4 bus2=595.1.2.3.4 phases=4 linecode=LC4 length=45.032995 units=m
! reduced_from=line348,line353,line359,line365,line371,line378,line388,line396,line405,line415,line427,line439,line453,line469,line485,line501,line513,line524,line535,line547,line559,line570,line580,line587,line594
! eliminated_buses=349,354,360,366,372,379,389,397,406,416,428,440,454,470,486,502,514,525,536,548,560,571,581,588

New Line._virtual_line355_line360_line366_line372_line379_line389_line397_line406_line416_line428_line440 bus1=441.1.2.3.4 bus2=350.1.2.3.4 phases=4 linecode=LC2 length=6.484098 units=m
! reduced_from=line355,line360,line366,line372,line379,line389,line397,line406,line416,line428,line440
! eliminated_buses=356,361,367,373,380,390,398,407,417,429

New Line._virtual_line363_line369_line375_line382_line392_line400_line409_line421_line433_line446_line461_line478 bus1=479.1.2.3.4 bus2=359.1.2.3.4 phases=4 linecode=LC6 length=7.791555 units=m
! reduced_from=line363,line369,line375,line382,line392,line400,line409,line421,line433,line446,line461,line478
! eliminated_buses=364,370,376,383,393,401,410,422,434,447,462

New Line._virtual_line364_line370 bus1=359.1.2.3.4 bus2=371.1.2.3.4 phases=4 linecode=LC2 length=8.6944 units=m
! reduced_from=line364,line370
! eliminated_buses=365

New Line._virtual_line377_line387_line395 bus1=371.1.2.3.4 bus2=396.1.2.3.4 phases=4 linecode=LC2 length=11.03 units=m
! reduced_from=line377,line387,line395
! eliminated_buses=378,388

New Line._virtual_line385_line393_line401_line410_line422_line434_line447_line462_line479_line495 bus1=377.1.2.3.4 bus2=496.1.2.3.4 phases=4 linecode=LC6 length=11.62151 units=m
! reduced_from=line385,line393,line401,line410,line422,line434,line447,line462,line479,line495
! eliminated_buses=386,394,402,411,423,435,448,463,480

New Line._virtual_line403_line412 bus1=396.1.2.3.4 bus2=413.1.2.3.4 phases=4 linecode=LC4 length=13.5215 units=m
! reduced_from=line403,line412
! eliminated_buses=404

New Line._virtual_line413_line424 bus1=405.1.2.3.4 bus2=425.1.2.3.4 phases=4 linecode=LC4 length=12.7671 units=m
! reduced_from=line413,line424
! eliminated_buses=414

New Line._virtual_line417_line429_line442_line456_line472_line487_line502_line514_line525_line536_line548_line560_line571 bus1=408.1.2.3.4 bus2=572.1.2.3.4 phases=4 linecode=LC6 length=12.042509 units=m
! reduced_from=line417,line429,line442,line456,line472,line487,line502,line514,line525,line536,line548,line560,line571
! eliminated_buses=418,430,443,457,473,488,503,515,526,537,549,561

New Line._virtual_line418_line430_line443_line457_line473_line488_line503_line515_line526_line537_line549 bus1=550.1.2.3.4 bus2=408.1.2.3.4 phases=4 linecode=LC6 length=15.446913 units=m
! reduced_from=line418,line430,line443,line457,line473,line488,line503,line515,line526,line537,line549
! eliminated_buses=419,431,444,458,474,489,504,516,527,538

New Line._virtual_line419_line431_line444 bus1=445.1.2.3.4 bus2=409.1.2.3.4 phases=4 linecode=LC2 length=2.03377 units=m
! reduced_from=line419,line431,line444
! eliminated_buses=420,432

New Line._virtual_line420_line432_line445_line460_line477_line492_line507_line519_line530_line542_line555_line566 bus1=567.1.2.3.4 bus2=409.1.2.3.4 phases=4 linecode=LC6 length=18.539732 units=m
! reduced_from=line420,line432,line445,line460,line477,line492,line507,line519,line530,line542,line555,line566
! eliminated_buses=421,433,446,461,478,493,508,520,531,543,556

New Line._virtual_line425_line436_line449_line464_line481_line497_line509_line521 bus1=415.1.2.3.4 bus2=522.1.2.3.4 phases=4 linecode=LC4 length=13.266813 units=m
! reduced_from=line425,line436,line449,line464,line481,line497,line509,line521
! eliminated_buses=426,437,450,465,482,498,510

New Line._virtual_line426_line437_line450_line465_line482_line498_line510_line522 bus1=523.1.2.3.4 bus2=415.1.2.3.4 phases=4 linecode=LC2 length=10.87675 units=m
! reduced_from=line426,line437,line450,line465,line482,line498,line510,line522
! eliminated_buses=427,438,451,466,483,499,511

New Line._virtual_line459_line476_line491_line506_line518_line529_line541_line554_line565_line575_line583_line590_line598_line606_line614_line621_line627_line632_line637_line641_line645_line649_line653_line657_line661_line665_line669_line673_line677_line681_line685_line689 bus1=445.1.2.3.4 bus2=690.1.2.3.4 phases=4 linecode=LC2 length=33.45836 units=m
! reduced_from=line459,line476,line491,line506,line518,line529,line541,line554,line565,line575,line583,line590,line598,line606,line614,line621,line627,line632,line637,line641,line645,line649,line653,line657,line661,line665,line669,line673,line677,line681,line685,line689
! eliminated_buses=460,477,492,507,519,530,542,555,566,576,584,591,599,607,615,622,628,633,638,642,646,650,654,658,662,666,670,674,678,682,686

New Line._virtual_line475_line490_line505_line517_line528_line540_line553_line564_line574_line582_line589_line597_line605_line613 bus1=614.1.2.3.4 bus2=459.1.2.3.4 phases=4 linecode=LC6 length=13.329915 units=m
! reduced_from=line475,line490,line505,line517,line528,line540,line553,line564,line574,line582,line589,line597,line605,line613
! eliminated_buses=476,491,506,518,529,541,554,565,575,583,590,598,606

New Line._virtual_line489_line504_line516_line527 bus1=528.1.2.3.4 bus2=475.1.2.3.4 phases=4 linecode=LC6 length=13.7382 units=m
! reduced_from=line489,line504,line516,line527
! eliminated_buses=490,505,517

New Line._virtual_line532_line544_line557_line568_line579_line586_line593_line600_line608_line616 bus1=617.1.2.3.4 bus2=523.1.2.3.4 phases=4 linecode=LC2 length=8.90983 units=m
! reduced_from=line532,line544,line557,line568,line579,line586,line593,line600,line608,line616
! eliminated_buses=533,545,558,569,580,587,594,601,609

New Line._virtual_line533_line545 bus1=523.1.2.3.4 bus2=546.1.2.3.4 phases=4 linecode=LC4 length=7.2159 units=m
! reduced_from=line533,line545
! eliminated_buses=534

New Line._virtual_line538_line550 bus1=528.1.2.3.4 bus2=551.1.2.3.4 phases=4 linecode=LC6 length=8.7591 units=m
! reduced_from=line538,line550
! eliminated_buses=539

New Line._virtual_line539_line552_line562_line573 bus1=574.1.2.3.4 bus2=528.1.2.3.4 phases=4 linecode=LC6 length=24.8163 units=m
! reduced_from=line539,line552,line562,line573
! eliminated_buses=540,553,563

New Line._virtual_line577_line584_line591_line599_line607_line615_line622 bus1=623.1.2.3.4 bus2=567.1.2.3.4 phases=4 linecode=LC6 length=10.54377 units=m
! reduced_from=line577,line584,line591,line599,line607,line615,line622
! eliminated_buses=578,585,592,600,608,616

New Line._virtual_line601_line609_line617_line623_line628_line633_line638_line642_line646_line650_line654_line658_line662_line666_line670_line674_line678_line682_line686_line690_line695_line699_line704_line709_line714_line719_line724_line730_line737_line744_line752_line759_line767_line775_line784_line794_line806_line816_line826_line835_line844_line853_line861_line869_line876_line883_line890_line896_line902_line908_line913_line920_line927_line934_line941_line949 bus1=950.1.2.3.4 bus2=595.1.2.3.4 phases=4 linecode=LC4 length=23.08851 units=m
! reduced_from=line601,line609,line617,line623,line628,line633,line638,line642,line646,line650,line654,line658,line662,line666,line670,line674,line678,line682,line686,line690,line695,line699,line704,line709,line714,line719,line724,line730,line737,line744,line752,line759,line767,line775,line784,line794,line806,line816,line826,line835,line844,line853,line861,line869,line876,line883,line890,line896,line902,line908,line913,line920,line927,line934,line941,line949
! eliminated_buses=602,610,618,624,629,634,639,643,647,651,655,659,663,667,671,675,679,683,687,691,696,700,705,710,715,720,725,731,738,745,753,760,768,776,785,795,807,817,827,836,845,854,862,870,877,884,891,897,903,909,914,921,928,935,942

New Line._virtual_line602_line610_line618_line624_line629_line634_line639_line643_line647_line651_line655_line659_line663_line667_line671_line675_line679_line683_line687_line691_line696 bus1=595.1.2.3.4 bus2=697.1.2.3.4 phases=4 linecode=LC4 length=36.58106 units=m
! reduced_from=line602,line610,line618,line624,line629,line634,line639,line643,line647,line651,line655,line659,line663,line667,line671,line675,line679,line683,line687,line691,line696
! eliminated_buses=603,611,619,625,630,635,640,644,648,652,656,660,664,668,672,676,680,684,688,692

New Line._virtual_line694_line698_line703_line708_line713_line718_line723_line729_line736_line743_line751 bus1=752.1.2.3.4 bus2=690.1.2.3.4 phases=4 linecode=LC2 length=12.27776 units=m
! reduced_from=line694,line698,line703,line708,line713,line718,line723,line729,line736,line743,line751
! eliminated_buses=695,699,704,709,714,719,724,730,737,744

New Line._virtual_line701_line706_line711_line716_line721_line727_line734_line741_line749_line758_line766_line774_line783_line793_line805_line815_line825_line834_line843_line852_line860_line868_line875_line882_line889_line895_line901_line907_line912 bus1=913.1.2.3.4 bus2=697.1.2.3.4 phases=4 linecode=LC4 length=8.59532 units=m
! reduced_from=line701,line706,line711,line716,line721,line727,line734,line741,line749,line758,line766,line774,line783,line793,line805,line815,line825,line834,line843,line852,line860,line868,line875,line882,line889,line895,line901,line907,line912
! eliminated_buses=702,707,712,717,722,728,735,742,750,759,767,775,784,794,806,816,826,835,844,853,861,869,876,883,890,896,902,908

New Line._virtual_line705_line710_line715_line720 bus1=701.1.2.3.4 bus2=721.1.2.3.4 phases=4 linecode=LC2 length=26.1469 units=m
! reduced_from=line705,line710,line715,line720
! eliminated_buses=706,711,716

New Line._virtual_line725_line731_line738_line745_line753 bus1=721.1.2.3.4 bus2=754.1.2.3.4 phases=4 linecode=LC6 length=5.10602 units=m
! reduced_from=line725,line731,line738,line745,line753
! eliminated_buses=726,732,739,746

New Line._virtual_line726_line732_line739 bus1=740.1.2.3.4 bus2=721.1.2.3.4 phases=4 linecode=LC2 length=6.56168 units=m
! reduced_from=line726,line732,line739
! eliminated_buses=727,733

New Line._virtual_line747_line756_line764_line772_line781_line791_line802_line813_line823_line832_line841_line850_line858_line866_line873_line880_line887_line893_line899_line905 bus1=740.1.2.3.4 bus2=906.1.2.3.4 phases=4 linecode=LC2 length=13.443816 units=m
! reduced_from=line747,line756,line764,line772,line781,line791,line802,line813,line823,line832,line841,line850,line858,line866,line873,line880,line887,line893,line899,line905
! eliminated_buses=748,757,765,773,782,792,803,814,824,833,842,851,859,867,874,881,888,894,900

New Line._virtual_line754_line762_line770 bus1=747.1.2.3.4 bus2=771.1.2.3.4 phases=4 linecode=LC2 length=19.10638 units=m
! reduced_from=line754,line762,line770
! eliminated_buses=755,763

New Line._virtual_line755_line763_line771_line780_line790 bus1=747.1.2.3.4 bus2=791.1.2.3.4 phases=4 linecode=LC6 length=5.28044 units=m
! reduced_from=line755,line763,line771,line780,line790
! eliminated_buses=756,764,772,781

New Line._virtual_line761_line769_line777_line786_line796_line808_line818 bus1=819.1.2.3.4 bus2=754.1.2.3.4 phases=4 linecode=LC6 length=12.00972 units=m
! reduced_from=line761,line769,line777,line786,line796,line808,line818
! eliminated_buses=762,770,778,787,797,809

New Line._virtual_line779_line789_line799_line811_line821_line830_line839_line848_line857_line865_line872_line879_line886 bus1=887.1.2.3.4 bus2=771.1.2.3.4 phases=4 linecode=LC2 length=9.457163 units=m
! reduced_from=line779,line789,line799,line811,line821,line830,line839,line848,line857,line865,line872,line879,line886
! eliminated_buses=780,790,800,812,822,831,840,849,858,866,873,880

New Line._virtual_line787_line797_line809_line819_line828_line837_line846_line855_line863_line870 bus1=779.1.2.3.4 bus2=871.1.2.3.4 phases=4 linecode=LC9 length=16.87217 units=m
! reduced_from=line787,line797,line809,line819,line828,line837,line846,line855,line863,line870
! eliminated_buses=788,798,810,820,829,838,847,856,864

New Line._virtual_line788_line798_line810_line820_line829_line838_line847_line856_line864_line871_line878_line885_line892_line898_line904_line910_line916_line923_line930_line937_line944 bus1=779.1.2.3.4 bus2=945.1.2.3.4 phases=4 linecode=LC2 length=7.55013 units=m
! reduced_from=line788,line798,line810,line820,line829,line838,line847,line856,line864,line871,line878,line885,line892,line898,line904,line910,line916,line923,line930,line937,line944
! eliminated_buses=789,799,811,821,830,839,848,857,865,872,879,886,893,899,905,911,917,924,931,938

New Line._virtual_line801_line812_line822_line831_line840_line849 bus1=850.1.2.3.4 bus2=791.1.2.3.4 phases=4 linecode=LC6 length=8.73181 units=m
! reduced_from=line801,line812,line822,line831,line840,line849
! eliminated_buses=802,813,823,832,841

New Line._virtual_line877_line884_line891_line897_line903_line909_line915_line922_line929_line936_line943_line951_line958_line967 bus1=871.1.2.3.4 bus2=968.1.2.3.4 phases=4 linecode=LC6 length=16.42944 units=m
! reduced_from=line877,line884,line891,line897,line903,line909,line915,line922,line929,line936,line943,line951,line958,line967
! eliminated_buses=878,885,892,898,904,910,916,923,930,937,944,952,959

New Line._virtual_line918_line924_line931_line938_line945_line952_line959_line968_line977_line985_line995 bus1=996.1.2.3.4 bus2=913.1.2.3.4 phases=4 linecode=LC4 length=14.734588 units=m
! reduced_from=line918,line924,line931,line938,line945,line952,line959,line968,line977,line985,line995
! eliminated_buses=919,925,932,939,946,953,960,969,978,986

New Line._virtual_line925_line932 bus1=920.1.2.3.4 bus2=933.1.2.3.4 phases=4 linecode=LC4 length=8.9855 units=m
! reduced_from=line925,line932
! eliminated_buses=926

New Line._virtual_line926_line933 bus1=920.1.2.3.4 bus2=934.1.2.3.4 phases=4 linecode=LC4 length=8.5133 units=m
! reduced_from=line926,line933
! eliminated_buses=927

New Line._virtual_line939_line946 bus1=934.1.2.3.4 bus2=947.1.2.3.4 phases=4 linecode=LC4 length=10.6058 units=m
! reduced_from=line939,line946
! eliminated_buses=940

New Line._virtual_line947_line953_line960_line969_line978_line986_line996_line1006_line1016_line1027_line1038_line1047_line1055 bus1=941.1.2.3.4 bus2=1056.1.2.3.4 phases=4 linecode=LC4 length=9.24278 units=m
! reduced_from=line947,line953,line960,line969,line978,line986,line996,line1006,line1016,line1027,line1038,line1047,line1055
! eliminated_buses=948,954,961,970,979,987,997,1007,1017,1028,1039,1048

New Line._virtual_line948_line954 bus1=955.1.2.3.4 bus2=941.1.2.3.4 phases=4 linecode=LC4 length=3.3739 units=m
! reduced_from=line948,line954
! eliminated_buses=949

New Line._virtual_line955_line963_line972 bus1=973.1.2.3.4 bus2=950.1.2.3.4 phases=4 linecode=LC4 length=9.4844 units=m
! reduced_from=line955,line963,line972
! eliminated_buses=956,964

New Line._virtual_line956_line964_line974 bus1=975.1.2.3.4 bus2=950.1.2.3.4 phases=4 linecode=LC4 length=13.5111 units=m
! reduced_from=line956,line964,line974
! eliminated_buses=957,965

New Line._virtual_line961_line970 bus1=955.1.2.3.4 bus2=971.1.2.3.4 phases=4 linecode=LC4 length=9.5816 units=m
! reduced_from=line961,line970
! eliminated_buses=962

New Line._virtual_line962_line971_line979 bus1=980.1.2.3.4 bus2=955.1.2.3.4 phases=4 linecode=LC4 length=11.5916 units=m
! reduced_from=line962,line971,line979
! eliminated_buses=963,972

New Line._virtual_line981_line991_line1002_line1012 bus1=973.1.2.3.4 bus2=1013.1.2.3.4 phases=4 linecode=LC4 length=13.6312 units=m
! reduced_from=line981,line991,line1002,line1012
! eliminated_buses=982,992,1003

New Line._virtual_line987_line997 bus1=998.1.2.3.4 bus2=980.1.2.3.4 phases=4 linecode=LC4 length=8.7567 units=m
! reduced_from=line987,line997
! eliminated_buses=988

New Line._virtual_line988_line998 bus1=999.1.2.3.4 bus2=980.1.2.3.4 phases=4 linecode=LC4 length=6.2964 units=m
! reduced_from=line988,line998
! eliminated_buses=989

New Line._virtual_line989_line999 bus1=981.1.2.3.4 bus2=1000.1.2.3.4 phases=4 linecode=LC4 length=8.0756 units=m
! reduced_from=line989,line999
! eliminated_buses=990

New Line._virtual_line1001_line1011_line1023_line1035 bus1=991.1.2.3.4 bus2=1036.1.2.3.4 phases=4 linecode=LC4 length=7.27375 units=m
! reduced_from=line1001,line1011,line1023,line1035
! eliminated_buses=1002,1012,1024

New Line._virtual_line1007_line1017_line1028_line1039 bus1=999.1.2.3.4 bus2=1040.1.2.3.4 phases=4 linecode=LC4 length=16.3101 units=m
! reduced_from=line1007,line1017,line1028,line1039
! eliminated_buses=1008,1018,1029

New Line._virtual_line1010_line1022_line1034 bus1=1035.1.2.3.4 bus2=1000.1.2.3.4 phases=4 linecode=LC4 length=11.1387 units=m
! reduced_from=line1010,line1022,line1034
! eliminated_buses=1011,1023

New Line._virtual_line1021_line1033_line1045_line1053_line1060_line1066_line1073_line1082_line1092_line1101_line1109_line1118_line1126_line1134_line1143_line1152 bus1=1153.1.2.3.4 bus2=1010.1.2.3.4 phases=4 linecode=LC4 length=11.390057 units=m
! reduced_from=line1021,line1033,line1045,line1053,line1060,line1066,line1073,line1082,line1092,line1101,line1109,line1118,line1126,line1134,line1143,line1152
! eliminated_buses=1022,1034,1046,1054,1061,1067,1074,1083,1093,1102,1110,1119,1127,1135,1144

New Line._virtual_line1030_line1042 bus1=1020.1.2.3.4 bus2=1043.1.2.3.4 phases=4 linecode=LC4 length=9.1552 units=m
! reduced_from=line1030,line1042
! eliminated_buses=1031

New Line._virtual_line1031_line1043 bus1=1044.1.2.3.4 bus2=1021.1.2.3.4 phases=4 linecode=LC4 length=9.3027 units=m
! reduced_from=line1031,line1043
! eliminated_buses=1032

New Line._virtual_line1032_line1044_line1052 bus1=1021.1.2.3.4 bus2=1053.1.2.3.4 phases=4 linecode=LC4 length=11.0944 units=m
! reduced_from=line1032,line1044,line1052
! eliminated_buses=1033,1045

New Line._virtual_line1040_line1048 bus1=1030.1.2.3.4 bus2=1049.1.2.3.4 phases=4 linecode=LC4 length=1.86834 units=m
! reduced_from=line1040,line1048
! eliminated_buses=1041

New Line._virtual_line1041_line1049 bus1=1030.1.2.3.4 bus2=1050.1.2.3.4 phases=4 linecode=LC4 length=8.5761 units=m
! reduced_from=line1041,line1049
! eliminated_buses=1042

New Line._virtual_line1050_line1058_line1064_line1070_line1078_line1087_line1097_line1106_line1115_line1123_line1131_line1139_line1147_line1155_line1160_line1164_line1168_line1172_line1176_line1180_line1184_line1188_line1192 bus1=1193.1.2.3.4 bus2=1044.1.2.3.4 phases=4 linecode=LC4 length=22.525098 units=m
! reduced_from=line1050,line1058,line1064,line1070,line1078,line1087,line1097,line1106,line1115,line1123,line1131,line1139,line1147,line1155,line1160,line1164,line1168,line1172,line1176,line1180,line1184,line1188,line1192
! eliminated_buses=1051,1059,1065,1071,1079,1088,1098,1107,1116,1124,1132,1140,1148,1156,1161,1165,1169,1173,1177,1181,1185,1189

New Line._virtual_line1051_line1059_line1065_line1072 bus1=1044.1.2.3.4 bus2=1073.1.2.3.4 phases=4 linecode=LC4 length=12.1663 units=m
! reduced_from=line1051,line1059,line1065,line1072
! eliminated_buses=1052,1060,1066

New Line._virtual_line1056_line1062 bus1=1049.1.2.3.4 bus2=1063.1.2.3.4 phases=4 linecode=LC4 length=8.84882 units=m
! reduced_from=line1056,line1062
! eliminated_buses=1057

New Line._virtual_line1057_line1063 bus1=1064.1.2.3.4 bus2=1049.1.2.3.4 phases=4 linecode=LC4 length=9.0414 units=m
! reduced_from=line1057,line1063
! eliminated_buses=1058

New Line._virtual_line1068_line1075_line1084_line1094_line1103 bus1=1063.1.2.3.4 bus2=1104.1.2.3.4 phases=4 linecode=LC4 length=12.94065 units=m
! reduced_from=line1068,line1075,line1084,line1094,line1103
! eliminated_buses=1069,1076,1085,1095

New Line._virtual_line1077_line1086_line1096_line1105_line1114_line1122_line1130_line1138_line1146 bus1=1147.1.2.3.4 bus2=1070.1.2.3.4 phases=4 linecode=LC4 length=10.27986 units=m
! reduced_from=line1077,line1086,line1096,line1105,line1114,line1122,line1130,line1138,line1146
! eliminated_buses=1078,1087,1097,1106,1115,1123,1131,1139

New Line._virtual_line1081_line1091 bus1=1092.1.2.3.4 bus2=1073.1.2.3.4 phases=4 linecode=LC4 length=3.16671 units=m
! reduced_from=line1081,line1091
! eliminated_buses=1082

New Line._virtual_line1089_line1099_line1108_line1117_line1125_line1133 bus1=1081.1.2.3.4 bus2=1134.1.2.3.4 phases=4 linecode=LC4 length=28.5327 units=m
! reduced_from=line1089,line1099,line1108,line1117,line1125,line1133
! eliminated_buses=1090,1100,1109,1118,1126

New Line._virtual_line1090_line1100 bus1=1081.1.2.3.4 bus2=1101.1.2.3.4 phases=4 linecode=LC4 length=6.6986 units=m
! reduced_from=line1090,line1100
! eliminated_buses=1091

New Line._virtual_line1112_line1120_line1128_line1136 bus1=1137.1.2.3.4 bus2=1104.1.2.3.4 phases=4 linecode=LC4 length=8.1681 units=m
! reduced_from=line1112,line1120,line1128,line1136
! eliminated_buses=1113,1121,1129

New Line._virtual_line1142_line1151 bus1=1134.1.2.3.4 bus2=1152.1.2.3.4 phases=4 linecode=LC4 length=3.17118 units=m
! reduced_from=line1142,line1151
! eliminated_buses=1143

New Line._virtual_line1149_line1157_line1162_line1166_line1170_line1174_line1178_line1182_line1186_line1190_line1194_line1197 bus1=1198.1.2.3.4 bus2=1142.1.2.3.4 phases=4 linecode=LC4 length=9.043174 units=m
! reduced_from=line1149,line1157,line1162,line1166,line1170,line1174,line1178,line1182,line1186,line1190,line1194,line1197
! eliminated_buses=1150,1158,1163,1167,1171,1175,1179,1183,1187,1191,1195

New Line._virtual_line1150_line1158_line1163_line1167_line1171_line1175_line1179_line1183_line1187_line1191_line1195_line1198_line1200_line1202_line1204_line1206 bus1=1142.1.2.3.4 bus2=1207.1.2.3.4 phases=4 linecode=LC4 length=12.352244 units=m
! reduced_from=line1150,line1158,line1163,line1167,line1171,line1175,line1179,line1183,line1187,line1191,line1195,line1198,line1200,line1202,line1204,line1206
! eliminated_buses=1151,1159,1164,1168,1172,1176,1180,1184,1188,1192,1196,1199,1201,1203,1205

New Line.LINE155 bus1=153.1.2.3.4 bus2=156.1.2.3.4 phases=4 linecode=LC7 length=10.3947 units=m

New Line.LINE173 bus1=167.1.2.3.4 bus2=174.1.2.3.4 phases=4 linecode=LC7 length=16.7535 units=m

New Line.LINE181 bus1=174.1.2.3.4 bus2=182.1.2.3.4 phases=4 linecode=LC7 length=8.4162 units=m

New Line.LINE209 bus1=201.1.2.3.4 bus2=210.1.2.3.4 phases=4 linecode=LC6 length=6.9349 units=m

New Line.LINE219 bus1=210.1.2.3.4 bus2=220.1.2.3.4 phases=4 linecode=LC6 length=6.0011 units=m

New Line.LINE220 bus1=210.1.2.3.4 bus2=221.1.2.3.4 phases=4 linecode=LC6 length=6.0011 units=m

New Line.LINE227 bus1=218.1.2.3.4 bus2=228.1.2.3.4 phases=4 linecode=LC7 length=3.9575 units=m

New Line.LINE241 bus1=232.1.2.3.4 bus2=242.1.2.3.4 phases=4 linecode=LC2 length=4.5658 units=m

New Line.LINE260 bus1=254.1.2.3.4 bus2=261.1.2.3.4 phases=4 linecode=LC2 length=5.0467 units=m

New Line.LINE321 bus1=316.1.2.3.4 bus2=322.1.2.3.4 phases=4 linecode=LC5 length=5.6017 units=m

New Line.LINE326 bus1=322.1.2.3.4 bus2=327.1.2.3.4 phases=4 linecode=LC7 length=3.901 units=m

New Line.LINE354 bus1=350.1.2.3.4 bus2=355.1.2.3.4 phases=4 linecode=LC2 length=2.8969 units=m

New Line.LINE376 bus1=371.1.2.3.4 bus2=377.1.2.3.4 phases=4 linecode=LC6 length=7.6159 units=m

New Line.LINE383 bus1=377.1.2.3.4 bus2=384.1.2.3.4 phases=4 linecode=LC4 length=9.1216 units=m

New Line.LINE384 bus1=377.1.2.3.4 bus2=385.1.2.3.4 phases=4 linecode=LC4 length=4.1218 units=m

New Line.LINE404 bus1=396.1.2.3.4 bus2=405.1.2.3.4 phases=4 linecode=LC2 length=6.4364 units=m

New Line.LINE414 bus1=405.1.2.3.4 bus2=415.1.2.3.4 phases=4 linecode=LC2 length=6.1167 units=m

New Line.LINE454 bus1=441.1.2.3.4 bus2=455.1.2.3.4 phases=4 linecode=LC2 length=5.6503 units=m

New Line.LINE458 bus1=445.1.2.3.4 bus2=459.1.2.3.4 phases=4 linecode=LC2 length=1.1921 units=m

New Line.LINE474 bus1=459.1.2.3.4 bus2=475.1.2.3.4 phases=4 linecode=LC2 length=0.56373 units=m

New Line.LINE493 bus1=479.1.2.3.4 bus2=494.1.2.3.4 phases=4 linecode=LC6 length=6.6765 units=m

New Line.LINE494 bus1=479.1.2.3.4 bus2=495.1.2.3.4 phases=4 linecode=LC6 length=6.6765 units=m

New Line.LINE576 bus1=567.1.2.3.4 bus2=577.1.2.3.4 phases=4 linecode=LC6 length=6.0111 units=m

New Line.LINE693 bus1=690.1.2.3.4 bus2=694.1.2.3.4 phases=4 linecode=LC2 length=10.5671 units=m

New Line.LINE700 bus1=697.1.2.3.4 bus2=701.1.2.3.4 phases=4 linecode=LC4 length=1.7352 units=m

New Line.LINE746 bus1=740.1.2.3.4 bus2=747.1.2.3.4 phases=4 linecode=LC2 length=16.8711 units=m

New Line.LINE760 bus1=754.1.2.3.4 bus2=761.1.2.3.4 phases=4 linecode=LC6 length=5.4227 units=m

New Line.LINE778 bus1=771.1.2.3.4 bus2=779.1.2.3.4 phases=4 linecode=LC2 length=2.8535 units=m

New Line.LINE800 bus1=791.1.2.3.4 bus2=801.1.2.3.4 phases=4 linecode=LC2 length=7.1695 units=m

New Line.LINE919 bus1=913.1.2.3.4 bus2=920.1.2.3.4 phases=4 linecode=LC4 length=2.9292 units=m

New Line.LINE940 bus1=934.1.2.3.4 bus2=941.1.2.3.4 phases=4 linecode=LC4 length=7.8954 units=m

New Line.LINE980 bus1=973.1.2.3.4 bus2=981.1.2.3.4 phases=4 linecode=LC4 length=6.6851 units=m

New Line.LINE990 bus1=981.1.2.3.4 bus2=991.1.2.3.4 phases=4 linecode=LC4 length=6.8636 units=m

New Line.LINE1000 bus1=991.1.2.3.4 bus2=1001.1.2.3.4 phases=4 linecode=LC4 length=4.9394 units=m

New Line.LINE1008 bus1=999.1.2.3.4 bus2=1009.1.2.3.4 phases=4 linecode=LC4 length=4.4658 units=m

New Line.LINE1009 bus1=1000.1.2.3.4 bus2=1010.1.2.3.4 phases=4 linecode=LC4 length=4.9987 units=m

New Line.LINE1018 bus1=1009.1.2.3.4 bus2=1019.1.2.3.4 phases=4 linecode=LC4 length=0.44964 units=m

New Line.LINE1019 bus1=1009.1.2.3.4 bus2=1020.1.2.3.4 phases=4 linecode=LC4 length=4.9209 units=m

New Line.LINE1020 bus1=1010.1.2.3.4 bus2=1021.1.2.3.4 phases=4 linecode=LC4 length=5.66 units=m

New Line.LINE1029 bus1=1020.1.2.3.4 bus2=1030.1.2.3.4 phases=4 linecode=LC4 length=8.1065 units=m

New Line.LINE1069 bus1=1063.1.2.3.4 bus2=1070.1.2.3.4 phases=4 linecode=LC4 length=0.1461 units=m

New Line.LINE1080 bus1=1073.1.2.3.4 bus2=1081.1.2.3.4 phases=4 linecode=LC4 length=0.704 units=m

New Line.LINE1111 bus1=1104.1.2.3.4 bus2=1112.1.2.3.4 phases=4 linecode=LC4 length=5.1376 units=m

New Line.LINE1141 bus1=1134.1.2.3.4 bus2=1142.1.2.3.4 phases=4 linecode=LC4 length=1.1418 units=m
