! Reduced enabled lines.

New Line._virtual_line0_line1_line2_line3_line4_line5_line6_line7_line8_line9_line10_line11_line12_line13_line14_line15_line16_line17_line18_line19_line20_line21_line22_line23_line24_line25_line26_line27_line28_line29_line30_line31_line32_line33_line34_line35_line36_line37_line38_line39_line40_line41 bus1=42.1.2.3.4 bus2=sourcebus.1.2.3.4 phases=4 linecode=LC8 length=27.976543 units=m
! reduced_from=line0,line1,line2,line3,line4,line5,line6,line7,line8,line9,line10,line11,line12,line13,line14,line15,line16,line17,line18,line19,line20,line21,line22,line23,line24,line25,line26,line27,line28,line29,line30,line31,line32,line33,line34,line35,line36,line37,line38,line39,line40,line41
! eliminated_buses=1,2,3,4,5,6,7,8,9,10,11,12,13,14,15,16,17,18,19,20,21,22,23,24,25,26,27,28,29,30,31,32,33,34,35,36,37,38,39,40,41

New Line._virtual_line42_line44_line46_line49_line52_line55_line59_line63_line66 bus1=42.1.2.3.4 bus2=67.1.2.3.4 phases=4 linecode=LC2 length=14.88328 units=m
! reduced_from=line42,line44,line46,line49,line52,line55,line59,line63,line66
! eliminated_buses=43,45,47,50,53,56,60,64

New Line._virtual_line43_line45_line47_line50_line53 bus1=54.1.2.3.4 bus2=42.1.2.3.4 phases=4 linecode=LC8 length=47.002 units=m
! reduced_from=line43,line45,line47,line50,line53
! eliminated_buses=44,46,48,51

New Line._virtual_line56_line60_line64_line68_line71_line74_line77 bus1=78.1.2.3.4 bus2=54.1.2.3.4 phases=4 linecode=LC8 length=38.8906 units=m
! reduced_from=line56,line60,line64,line68,line71,line74,line77
! eliminated_buses=57,61,65,69,72,75

New Line._virtual_line57_line61_line65_line69_line72_line75_line78_line82_line86 bus1=87.1.2.3.4 bus2=54.1.2.3.4 phases=4 linecode=LC3 length=15.07293 units=m
! reduced_from=line57,line61,line65,line69,line72,line75,line78,line82,line86
! eliminated_buses=58,62,66,70,73,76,79,83

New Line._virtual_line79_line83_line87_line94_line100_line107_line115_line124_line137_line152_line169 bus1=78.1.2.3.4 bus2=170.1.2.3.4 phases=4 linecode=LC8 length=40.86726 units=m
! reduced_from=line79,line83,line87,line94,line100,line107,line115,line124,line137,line152,line169
! eliminated_buses=80,84,88,95,101,108,116,125,138,153

New Line._virtual_line80_line84_line88_line95_line101_line108 bus1=109.1.2.3.4 bus2=78.1.2.3.4 phases=4 linecode=LC4 length=28.45854 units=m
! reduced_from=line80,line84,line88,line95,line101,line108
! eliminated_buses=81,85,89,96,102

New Line._virtual_line92_line98 bus1=99.1.2.3.4 bus2=87.1.2.3.4 phases=4 linecode=LC3 length=7.5867 units=m
! reduced_from=line92,line98
! eliminated_buses=93

New Line._virtual_line93_line99_line106_line114_line123_line136_line151_line167_line187_line206_line229_line253_line280 bus1=281.1.2.3.4 bus2=87.1.2.3.4 phases=4 linecode=LC2 length=7.9074 units=m
! reduced_from=line93,line99,line106,line114,line123,line136,line151,line167,line187,line206,line229,line253,line280
! eliminated_buses=94,100,107,115,124,137,152,168,188,207,230,254

New Line._virtual_line105_line113_line122_line135_line150 bus1=151.1.2.3.4 bus2=99.1.2.3.4 phases=4 linecode=LC6 length=13.24249 units=m
! reduced_from=line105,line113,line122,line135,line150
! eliminated_buses=106,114,123,136

New Line._virtual_line112_line121_line133_line148_line165 bus1=105.1.2.3.4 bus2=166.1.2.3.4 phases=4 linecode=LC2 length=8.41209 units=m
! reduced_from=line112,line121,line133,line148,line165
! eliminated_buses=113,122,134,149

New Line._virtual_line117_line128_line142_line158 bus1=159.1.2.3.4 bus2=109.1.2.3.4 phases=4 linecode=LC3 length=6.77713 units=m
! reduced_from=line117,line128,line142,line158
! eliminated_buses=118,129,143

New Line._virtual_line120_line132_line147_line164_line183_line204_line228 bus1=229.1.2.3.4 bus2=112.1.2.3.4 phases=4 linecode=LC2 length=9.3485 units=m
! reduced_from=line120,line132,line147,line164,line183,line204,line228
! eliminated_buses=121,133,148,165,184,205

New Line._virtual_line126_line141_line157_line175_line197_line218_line241_line267 bus1=117.1.2.3.4 bus2=268.1.2.3.4 phases=4 linecode=LC2 length=11.32195 units=m
! reduced_from=line126,line141,line157,line175,line197,line218,line241,line267
! eliminated_buses=127,142,158,176,198,219,242

New Line._virtual_line129_line143_line159_line177_line198 bus1=199.1.2.3.4 bus2=120.1.2.3.4 phases=4 linecode=LC3 length=8.16777 units=m
! reduced_from=line129,line143,line159,line177,line198
! eliminated_buses=130,144,160,178

New Line._virtual_line138_line153 bus1=154.1.2.3.4 bus2=126.1.2.3.4 phases=4 linecode=LC4 length=15.5782 units=m
! reduced_from=line138,line153
! eliminated_buses=139

New Line._virtual_line139_line156_line174_line196_line217_line240 bus1=241.1.2.3.4 bus2=126.1.2.3.4 phases=4 linecode=LC2 length=9.86434 units=m
! reduced_from=line139,line156,line174,line196,line217,line240
! eliminated_buses=140,157,175,197,218

New Line._virtual_line145_line163_line182_line203_line227_line250 bus1=131.1.2.3.4 bus2=251.1.2.3.4 phases=4 linecode=LC2 length=9.28404 units=m
! reduced_from=line145,line163,line182,line203,line227,line250
! eliminated_buses=146,164,183,204,228

New Line._virtual_line160_line178_line199 bus1=145.1.2.3.4 bus2=200.1.2.3.4 phases=4 linecode=LC3 length=13.7653 units=m
! reduced_from=line160,line178,line199
! eliminated_buses=161,179

New Line._virtual_line161_line181_line202_line226_line249_line276_line304_line334 bus1=145.1.2.3.4 bus2=335.1.2.3.4 phases=4 linecode=LC2 length=9.56635 units=m
! reduced_from=line161,line181,line202,line226,line249,line276,line304,line334
! eliminated_buses=162,182,203,227,250,277,305

New Line._virtual_line171_line194_line215_line239_line264_line291 bus1=154.1.2.3.4 bus2=292.1.2.3.4 phases=4 linecode=LC2 length=10.11349 units=m
! reduced_from=line171,line194,line215,line239,line264,line291
! eliminated_buses=172,195,216,240,265

New Line._virtual_line189_line208_line231_line255_line282_line310 bus1=311.1.2.3.4 bus2=170.1.2.3.4 phases=4 linecode=LC2 length=12.2873 units=m
! reduced_from=line189,line208,line231,line255,line282,line310
! eliminated_buses=190,209,232,256,283

New Line._virtual_line192_line214_line238_line263_line290_line319_line346 bus1=347.1.2.3.4 bus2=171.1.2.3.4 phases=4 linecode=LC2 length=8.3454 units=m
! reduced_from=line192,line214,line238,line263,line290,line319,line346
! eliminated_buses=193,215,239,264,291,320

New Line._virtual_line209_line232_line256_line283_line311_line336_line364_line394 bus1=191.1.2.3.4 bus2=395.1.2.3.4 phases=4 linecode=LC1 length=14.68685 units=m
! reduced_from=line209,line232,line256,line283,line311,line336,line364,line394
! eliminated_buses=210,233,257,284,312,337,365

New Line._virtual_line210_line233_line258_line286_line314 bus1=191.1.2.3.4 bus2=315.1.2.3.4 phases=4 linecode=LC8 length=17.582559 units=m
! reduced_from=line210,line233,line258,line286,line314
! eliminated_buses=211,234,259,287

New Line._virtual_line212_line237_line262_line289_line318_line345_line374_line407 bus1=408.1.2.3.4 bus2=192.1.2.3.4 phases=4 linecode=LC2 length=9.29496 units=m
! reduced_from=line212,line237,line262,line289,line318,line345,line374,line407
! eliminated_buses=213,238,263,290,319,346,375

New Line._virtual_line219_line243 bus1=244.1.2.3.4 bus2=199.1.2.3.4 phases=4 linecode=LC3 length=8.9479 units=m
! reduced_from=line219,line243
! eliminated_buses=220

New Line._virtual_line223_line247_line274_line302_line332_line359_line390_line422_line450_line475 bus1=476.1.2.3.4 bus2=200.1.2.3.4 phases=4 linecode=LC2 length=11.73598 units=m
! reduced_from=line223,line247,line274,line302,line332,line359,line390,line422,line450,line475
! eliminated_buses=224,248,275,303,333,360,391,423,451

New Line._virtual_line234_line259_line287 bus1=212.1.2.3.4 bus2=288.1.2.3.4 phases=4 linecode=LC4 length=11.3736 units=m
! reduced_from=line234,line259,line287
! eliminated_buses=235,260

New Line._virtual_line235_line261_line288_line317_line344_line373 bus1=374.1.2.3.4 bus2=212.1.2.3.4 phases=4 linecode=LC2 length=9.26466 units=m
! reduced_from=line235,line261,line288,line317,line344,line373
! eliminated_buses=236,262,289,318,345

New Line._virtual_line244_line271_line296_line326_line352_line382_line415_line443_line468_line492 bus1=493.1.2.3.4 bus2=223.1.2.3.4 phases=4 linecode=LC6 length=10.92989 units=m
! reduced_from=line244,line271,line296,line326,line352,line382,line415,line443,line468,line492
! eliminated_buses=245,272,297,327,353,383,416,444,469

New Line._virtual_line251_line279 bus1=280.1.2.3.4 bus2=229.1.2.3.4 phases=4 linecode=LC2 length=7.9526 units=m
! reduced_from=line251,line279
! eliminated_buses=252

New Line._virtual_line265_line292 bus1=293.1.2.3.4 bus2=241.1.2.3.4 phases=4 linecode=LC2 length=8.8785 units=m
! reduced_from=line265,line292
! eliminated_buses=266

New Line._virtual_line269_line294_line323_line349_line378_line410_line438_line464_line488 bus1=244.1.2.3.4 bus2=489.1.2.3.4 phases=4 linecode=LC2 length=8.79291 units=m
! reduced_from=line269,line294,line323,line349,line378,line410,line438,line464,line488
! eliminated_buses=270,295,324,350,379,411,439,465

New Line._virtual_line270_line295 bus1=296.1.2.3.4 bus2=244.1.2.3.4 phases=4 linecode=LC3 length=14.037 units=m
! reduced_from=line270,line295
! eliminated_buses=271

New Line._virtual_line277_line305 bus1=306.1.2.3.4 bus2=251.1.2.3.4 phases=4 linecode=LC2 length=6.0903 units=m
! reduced_from=line277,line305
! eliminated_buses=278

New Line._virtual_line297_line327 bus1=273.1.2.3.4 bus2=328.1.2.3.4 phases=4 linecode=LC3 length=14.1461 units=m
! reduced_from=line297,line327
! eliminated_buses=298

New Line._virtual_line299_line330_line357_line388_line420_line448_line473_line497_line524 bus1=525.1.2.3.4 bus2=273.1.2.3.4 phases=4 linecode=LC2 length=9.29358 units=m
! reduced_from=line299,line330,line357,line388,line420,line448,line473,line497,line524
! eliminated_buses=300,331,358,389,421,449,474,498

New Line._virtual_line301_line331_line358_line389_line421_line449_line474 bus1=274.1.2.3.4 bus2=475.1.2.3.4 phases=4 linecode=LC2 length=9.30939 units=m
! reduced_from=line301,line331,line358,line389,line421,line449,line474
! eliminated_buses=302,332,359,390,422,450

New Line._virtual_line315_line341_line370 bus1=288.1.2.3.4 bus2=371.1.2.3.4 phases=4 linecode=LC4 length=17.2038 units=m
! reduced_from=line315,line341,line370
! eliminated_buses=316,342

New Line._virtual_line316_line343_line372_line404_line433_line461_line486_line510_line539_line564 bus1=565.1.2.3.4 bus2=288.1.2.3.4 phases=4 linecode=LC2 length=10.17048 units=m
! reduced_from=line316,line343,line372,line404,line433,line461,line486,line510,line539,line564
! eliminated_buses=317,344,373,405,434,462,487,511,540

New Line._virtual_line320_line347 bus1=348.1.2.3.4 bus2=292.1.2.3.4 phases=4 linecode=LC2 length=7.8469 units=m
! reduced_from=line320,line347
! eliminated_buses=321

New Line._virtual_line324_line350_line379_line411_line439_line465_line489_line515_line541_line565 bus1=566.1.2.3.4 bus2=296.1.2.3.4 phases=4 linecode=LC2 length=9.91079 units=m
! reduced_from=line324,line350,line379,line411,line439,line465,line489,line515,line541,line565
! eliminated_buses=325,351,380,412,440,466,490,516,542

New Line._virtual_line325_line351 bus1=296.1.2.3.4 bus2=352.1.2.3.4 phases=4 linecode=LC3 length=14.2215 units=m
! reduced_from=line325,line351
! eliminated_buses=326

New Line._virtual_line340_line369_line400_line429_line458 bus1=315.1.2.3.4 bus2=459.1.2.3.4 phases=4 linecode=LC6 length=6.62991 units=m
! reduced_from=line340,line369,line400,line429,line458
! eliminated_buses=341,370,401,430

New Line._virtual_line355_line386_line418_line446_line471_line495_line522_line547_line570 bus1=328.1.2.3.4 bus2=571.1.2.3.4 phases=4 linecode=LC2 length=9.97186 units=m
! reduced_from=line355,line386,line418,line446,line471,line495,line522,line547,line570
! eliminated_buses=356,387,419,447,472,496,523,548

New Line._virtual_line361_line392 bus1=335.1.2.3.4 bus2=393.1.2.3.4 phases=4 linecode=LC2 length=7.362 units=m
! reduced_from=line361,line392
! eliminated_buses=362

New Line._virtual_line367_line397_line426_line453_line477_line502_line527_line551_line573_line597_line620_line643_line667 bus1=340.1.2.3.4 bus2=668.1.2.3.4 phases=4 linecode=LC2 length=8.093116 units=m
! reduced_from=line367,line397,line426,line453,line477,line502,line527,line551,line573,line597,line620,line643,line667
! eliminated_buses=368,398,427,454,478,503,528,552,574,598,621,644

New Line._virtual_line368_line399_line428 bus1=340.1.2.3.4 bus2=429.1.2.3.4 phases=4 linecode=LC8 length=5.2962 units=m
! reduced_from=line368,line399,line428
! eliminated_buses=369,400

New Line._virtual_line375_line408 bus1=409.1.2.3.4 bus2=347.1.2.3.4 phases=4 linecode=LC2 length=7.7715 units=m
! reduced_from=line375,line408
! eliminated_buses=376

New Line._virtual_line380_line412_line440_line466_line490_line516_line542_line566_line591 bus1=592.1.2.3.4 bus2=352.1.2.3.4 phases=4 linecode=LC2 length=10.0592 units=m
! reduced_from=line380,line412,line440,line466,line490,line516,line542,line566,line591
! eliminated_buses=381,413,441,467,491,517,543,567

New Line._virtual_line385_line417_line445_line470_line494_line521_line546_line569_line593_line617_line641 bus1=354.1.2.3.4 bus2=642.1.2.3.4 phases=4 linecode=LC2 length=13.79436 units=m
! reduced_from=line385,line417,line445,line470,line494,line521,line546,line569,line593,line617,line641
! eliminated_buses=386,418,446,471,495,522,547,570,594,618

New Line._virtual_line401_line430_line459 bus1=460.1.2.3.4 bus2=371.1.2.3.4 phases=4 linecode=LC4 length=11.1655 units=m
! reduced_from=line401,line430,line459
! eliminated_buses=402,431

New Line._virtual_line402_line431_line460_line485_line509_line538_line563_line586_line611 bus1=371.1.2.3.4 bus2=612.1.2.3.4 phases=4 linecode=LC2 length=10.15699 units=m
! reduced_from=line402,line431,line460,line485,line509,line538,line563,line586,line611
! eliminated_buses=403,432,461,486,510,539,564,587

New Line._virtual_line405_line434 bus1=435.1.2.3.4 bus2=374.1.2.3.4 phases=4 linecode=LC2 length=6.6597 units=m
! reduced_from=line405,line434
! eliminated_buses=406

New Line._virtual_line413_line441_line467_line491_line517_line543_line567_line592_line616 bus1=617.1.2.3.4 bus2=382.1.2.3.4 phases=4 linecode=LC2 length=9.5442 units=m
! reduced_from=line413,line441,line467,line491,line517,line543,line567,line592,line616
! eliminated_buses=414,442,468,492,518,544,568,593

New Line._virtual_line416_line444_line469_line493_line520_line545_line568 bus1=384.1.2.3.4 bus2=569.1.2.3.4 phases=4 linecode=LC6 length=13.95756 units=m
! reduced_from=line416,line444,line469,line493,line520,line545,line568
! eliminated_buses=417,445,470,494,521,546

New Line._virtual_line435_line462 bus1=463.1.2.3.4 bus2=408.1.2.3.4 phases=4 linecode=LC2 length=7.6472 units=m
! reduced_from=line435,line462
! eliminated_buses=436

New Line._virtual_line455_line479_line504_line529_line553_line575_line599 bus1=600.1.2.3.4 bus2=429.1.2.3.4 phases=4 linecode=LC3 length=2.17265 units=m
! reduced_from=line455,line479,line504,line529,line553,line575,line599
! eliminated_buses=456,480,505,530,554,576

New Line._virtual_line456_line481_line506 bus1=429.1.2.3.4 bus2=507.1.2.3.4 phases=4 linecode=LC8 length=9.8099 units=m
! reduced_from=line456,line481,line506
! eliminated_buses=457,482

New Line._virtual_line483_line507 bus1=460.1.2.3.4 bus2=508.1.2.3.4 phases=4 linecode=LC4 length=15.3024 units=m
! reduced_from=line483,line507
! eliminated_buses=484

New Line._virtual_line484_line508_line537_line562_line585_line610_line635_line664 bus1=460.1.2.3.4 bus2=665.1.2.3.4 phases=4 linecode=LC2 length=9.90336 units=m
! reduced_from=line484,line508,line537,line562,line585,line610,line635,line664
! eliminated_buses=485,509,538,563,586,611,636

New Line._virtual_line499_line525 bus1=526.1.2.3.4 bus2=475.1.2.3.4 phases=4 linecode=LC2 length=8.2466 units=m
! reduced_from=line499,line525
! eliminated_buses=500

New Line._virtual_line500_line526 bus1=527.1.2.3.4 bus2=476.1.2.3.4 phases=4 linecode=LC2 length=7.4521 units=m
! reduced_from=line500,line526
! eliminated_buses=501

New Line._virtual_line512_line540 bus1=541.1.2.3.4 bus2=489.1.2.3.4 phases=4 linecode=LC2 length=6.1295 units=m
! reduced_from=line512,line540
! eliminated_buses=513

New Line._virtual_line518_line544 bus1=545.1.2.3.4 bus2=493.1.2.3.4 phases=4 linecode=LC6 length=5.5157 units=m
! reduced_from=line518,line544
! eliminated_buses=519

New Line._virtual_line532_line558_line581_line606_line630_line659_line683_line709_line734_line763_line791_line823_line858_line895 bus1=896.1.2.3.4 bus2=507.1.2.3.4 phases=4 linecode=LC3 length=25.685615 units=m
! reduced_from=line532,line558,line581,line606,line630,line659,line683,line709,line734,line763,line791,line823,line858,line895
! eliminated_buses=533,559,582,607,631,660,684,710,735,764,792,824,859

New Line._virtual_line535_line560_line583_line608 bus1=508.1.2.3.4 bus2=609.1.2.3.4 phases=4 linecode=LC4 length=15.9867 units=m
! reduced_from=line535,line560,line583,line608
! eliminated_buses=536,561,584

New Line._virtual_line536_line561_line584_line609_line634_line663_line687_line714_line740_line769 bus1=508.1.2.3.4 bus2=770.1.2.3.4 phases=4 linecode=LC2 length=10.05951 units=m
! reduced_from=line536,line561,line584,line609,line634,line663,line687,line714,line740,line769
! eliminated_buses=537,562,585,610,635,664,688,715,741

New Line._virtual_line550_line572 bus1=573.1.2.3.4 bus2=525.1.2.3.4 phases=4 linecode=LC2 length=7.3957 units=m
! reduced_from=line550,line572
! eliminated_buses=551

New Line._virtual_line555_line577 bus1=532.1.2.3.4 bus2=578.1.2.3.4 phases=4 linecode=LC8 length=13.2081 units=m
! reduced_from=line555,line577
! eliminated_buses=556

New Line._virtual_line556_line580_line605_line629_line658_line682_line708_line733 bus1=734.1.2.3.4 bus2=532.1.2.3.4 phases=4 linecode=LC2 length=14.7467 units=m
! reduced_from=line556,line580,line605,line629,line658,line682,line708,line733
! eliminated_buses=557,581,606,630,659,683,709

New Line._virtual_line587_line612 bus1=565.1.2.3.4 bus2=613.1.2.3.4 phases=4 linecode=LC2 length=6.1349 units=m
! reduced_from=line587,line612
! eliminated_buses=588

New Line._virtual_line589_line613 bus1=566.1.2.3.4 bus2=614.1.2.3.4 phases=4 linecode=LC2 length=6.6821 units=m
! reduced_from=line589,line613
! eliminated_buses=590

New Line._virtual_line595_line618 bus1=619.1.2.3.4 bus2=571.1.2.3.4 phases=4 linecode=LC2 length=7.7395 units=m
! reduced_from=line595,line618
! eliminated_buses=596

New Line._virtual_line602_line627_line656_line680_line706_line732 bus1=733.1.2.3.4 bus2=578.1.2.3.4 phases=4 linecode=LC2 length=11.7514 units=m
! reduced_from=line602,line627,line656,line680,line706,line732
! eliminated_buses=603,628,657,681,707

New Line._virtual_line614_line638 bus1=592.1.2.3.4 bus2=639.1.2.3.4 phases=4 linecode=LC2 length=5.3608 units=m
! reduced_from=line614,line638
! eliminated_buses=615

New Line._virtual_line624_line651_line675_line701 bus1=602.1.2.3.4 bus2=702.1.2.3.4 phases=4 linecode=LC8 length=18.3244 units=m
! reduced_from=line624,line651,line675,line701
! eliminated_buses=625,652,676

New Line._virtual_line625_line655_line679_line705_line731 bus1=732.1.2.3.4 bus2=602.1.2.3.4 phases=4 linecode=LC2 length=9.45141 units=m
! reduced_from=line625,line655,line679,line705,line731
! eliminated_buses=626,656,680,706

New Line._virtual_line632_line661_line685_line711 bus1=609.1.2.3.4 bus2=712.1.2.3.4 phases=4 linecode=LC4 length=14.4558 units=m
! reduced_from=line632,line661,line685,line711
! eliminated_buses=633,662,686

New Line._virtual_line633_line662_line686_line713_line739_line768_line796_line828 bus1=829.1.2.3.4 bus2=609.1.2.3.4 phases=4 linecode=LC2 length=10.06641 units=m
! reduced_from=line633,line662,line686,line713,line739,line768,line796,line828
! eliminated_buses=634,663,687,714,740,769,797

New Line._virtual_line637_line665 bus1=612.1.2.3.4 bus2=666.1.2.3.4 phases=4 linecode=LC2 length=6.8923 units=m
! reduced_from=line637,line665
! eliminated_buses=638

New Line._virtual_line639_line666 bus1=617.1.2.3.4 bus2=667.1.2.3.4 phases=4 linecode=LC2 length=6.4329 units=m
! reduced_from=line639,line666
! eliminated_buses=640

New Line._virtual_line645_line668 bus1=623.1.2.3.4 bus2=669.1.2.3.4 phases=4 linecode=LC3 length=14.4681 units=m
! reduced_from=line645,line668
! eliminated_buses=646

New Line._virtual_line646_line671_line697_line721_line747_line776_line806_line838_line872_line907_line942_line979_line1019_line1064_line1113_line1166_line1219 bus1=623.1.2.3.4 bus2=1220.1.2.3.4 phases=4 linecode=LC6 length=14.336148 units=m
! reduced_from=line646,line671,line697,line721,line747,line776,line806,line838,line872,line907,line942,line979,line1019,line1064,line1113,line1166,line1219
! eliminated_buses=647,672,698,722,748,777,807,839,873,908,943,980,1020,1065,1114,1167

New Line._virtual_line650_line673_line699_line723_line749_line778_line808_line840_line874_line909 bus1=910.1.2.3.4 bus2=624.1.2.3.4 phases=4 linecode=LC2 length=14.41295 units=m
! reduced_from=line650,line673,line699,line723,line749,line778,line808,line840,line874,line909
! eliminated_buses=651,674,700,724,750,779,809,841,875

New Line._virtual_line689_line715_line741 bus1=742.1.2.3.4 bus2=665.1.2.3.4 phases=4 linecode=LC2 length=7.4825 units=m
! reduced_from=line689,line715,line741
! eliminated_buses=690,716

New Line._virtual_line694_line719_line746_line775_line805_line837_line871_line906_line941_line978_line1018_line1063_line1112 bus1=1113.1.2.3.4 bus2=669.1.2.3.4 phases=4 linecode=LC6 length=8.602427 units=m
! reduced_from=line694,line719,line746,line775,line805,line837,line871,line906,line941,line978,line1018,line1063,line1112
! eliminated_buses=695,720,747,776,806,838,872,907,942,979,1019,1064

New Line._virtual_line717_line745_line774_line804_line836_line870_line905_line940_line977_line1017_line1062_line1111 bus1=1112.1.2.3.4 bus2=694.1.2.3.4 phases=4 linecode=LC6 length=9.894776 units=m
! reduced_from=line717,line745,line774,line804,line836,line870,line905,line940,line977,line1017,line1062,line1111
! eliminated_buses=718,746,775,805,837,871,906,941,978,1018,1063

New Line._virtual_line737_line766_line794_line826_line860_line897_line932_line969_line1008_line1053 bus1=1054.1.2.3.4 bus2=712.1.2.3.4 phases=4 linecode=LC2 length=12.86428 units=m
! reduced_from=line737,line766,line794,line826,line860,line897,line932,line969,line1008,line1053
! eliminated_buses=738,767,795,827,861,898,933,970,1009

New Line._virtual_line743_line773_line803_line835_line869_line904_line939_line976_line1016_line1061_line1110_line1161_line1216_line1270 bus1=717.1.2.3.4 bus2=1271.1.2.3.4 phases=4 linecode=LC6 length=10.635479 units=m
! reduced_from=line743,line773,line803,line835,line869,line904,line939,line976,line1016,line1061,line1110,line1161,line1216,line1270
! eliminated_buses=744,774,804,836,870,905,940,977,1017,1062,1111,1162,1217

New Line._virtual_line751_line780_line810_line843 bus1=844.1.2.3.4 bus2=726.1.2.3.4 phases=4 linecode=LC2 length=5.85611 units=m
! reduced_from=line751,line780,line810,line843
! eliminated_buses=752,781,811

New Line._virtual_line752_line782 bus1=726.1.2.3.4 bus2=783.1.2.3.4 phases=4 linecode=LC3 length=18.5436 units=m
! reduced_from=line752,line782
! eliminated_buses=753

New Line._virtual_line755_line785_line816_line850_line887_line920 bus1=728.1.2.3.4 bus2=921.1.2.3.4 phases=4 linecode=LC3 length=7.48905 units=m
! reduced_from=line755,line785,line816,line850,line887,line920
! eliminated_buses=756,786,817,851,888

New Line._virtual_line757_line788 bus1=728.1.2.3.4 bus2=789.1.2.3.4 phases=4 linecode=LC8 length=16.8505 units=m
! reduced_from=line757,line788
! eliminated_buses=758

New Line._virtual_line770_line799 bus1=800.1.2.3.4 bus2=743.1.2.3.4 phases=4 linecode=LC3 length=16.2751 units=m
! reduced_from=line770,line799
! eliminated_buses=771

New Line._virtual_line771_line802_line834_line868_line903_line938_line975_line1015_line1060_line1109_line1160_line1215_line1269 bus1=1270.1.2.3.4 bus2=743.1.2.3.4 phases=4 linecode=LC6 length=8.190532 units=m
! reduced_from=line771,line802,line834,line868,line903,line938,line975,line1015,line1060,line1109,line1160,line1215,line1269
! eliminated_buses=772,803,835,869,904,939,976,1016,1061,1110,1161,1216

New Line._virtual_line798_line829_line864 bus1=770.1.2.3.4 bus2=865.1.2.3.4 phases=4 linecode=LC2 length=7.2913 units=m
! reduced_from=line798,line829,line864
! eliminated_buses=799,830

New Line._virtual_line812_line845_line881_line913_line946_line983_line1023 bus1=783.1.2.3.4 bus2=1024.1.2.3.4 phases=4 linecode=LC6 length=11.70802 units=m
! reduced_from=line812,line845,line881,line913,line946,line983,line1023
! eliminated_buses=813,846,882,914,947,984

New Line._virtual_line820_line855_line892_line926_line962_line1000_line1044_line1092_line1143_line1198_line1251_line1302 bus1=789.1.2.3.4 bus2=1303.1.2.3.4 phases=4 linecode=LC2 length=12.93001 units=m
! reduced_from=line820,line855,line892,line926,line962,line1000,line1044,line1092,line1143,line1198,line1251,line1302
! eliminated_buses=821,856,893,927,963,1001,1045,1093,1144,1199,1252

New Line._virtual_line830_line865_line900 bus1=901.1.2.3.4 bus2=800.1.2.3.4 phases=4 linecode=LC3 length=14.9133 units=m
! reduced_from=line830,line865,line900
! eliminated_buses=831,866

New Line._virtual_line831_line867_line902_line937_line974_line1014_line1059_line1108_line1159_line1214 bus1=800.1.2.3.4 bus2=1215.1.2.3.4 phases=4 linecode=LC6 length=10.42626 units=m
! reduced_from=line831,line867,line902,line937,line974,line1014,line1059,line1108,line1159,line1214
! eliminated_buses=832,868,903,938,975,1015,1060,1109,1160

New Line._virtual_line846_line882_line914_line947_line984_line1024 bus1=814.1.2.3.4 bus2=1025.1.2.3.4 phases=4 linecode=LC6 length=8.65339 units=m
! reduced_from=line846,line882,line914,line947,line984,line1024
! eliminated_buses=847,883,915,948,985

New Line._virtual_line853_line890_line923 bus1=820.1.2.3.4 bus2=924.1.2.3.4 phases=4 linecode=LC8 length=16.6967 units=m
! reduced_from=line853,line890,line923
! eliminated_buses=854,891

New Line._virtual_line854_line891_line925_line961_line999_line1043_line1091_line1142_line1197_line1250_line1301_line1353_line1398 bus1=1399.1.2.3.4 bus2=820.1.2.3.4 phases=4 linecode=LC6 length=16.39705 units=m
! reduced_from=line854,line891,line925,line961,line999,line1043,line1091,line1142,line1197,line1250,line1301,line1353,line1398
! eliminated_buses=855,892,926,962,1000,1044,1092,1143,1198,1251,1302,1354

New Line._virtual_line863_line899 bus1=829.1.2.3.4 bus2=900.1.2.3.4 phases=4 linecode=LC2 length=6.4299 units=m
! reduced_from=line863,line899
! eliminated_buses=864

New Line._virtual_line883_line915_line948_line985_line1025_line1070 bus1=1071.1.2.3.4 bus2=848.1.2.3.4 phases=4 linecode=LC6 length=9.18709 units=m
! reduced_from=line883,line915,line948,line985,line1025,line1070
! eliminated_buses=884,916,949,986,1026

New Line._virtual_line916_line949_line986_line1026_line1071_line1120_line1172 bus1=1173.1.2.3.4 bus2=885.1.2.3.4 phases=4 linecode=LC6 length=9.96555 units=m
! reduced_from=line916,line949,line986,line1026,line1071,line1120,line1172
! eliminated_buses=917,950,987,1027,1072,1121

New Line._virtual_line930_line968_line1007_line1052_line1101_line1153 bus1=1154.1.2.3.4 bus2=896.1.2.3.4 phases=4 linecode=LC6 length=12.90733 units=m
! reduced_from=line930,line968,line1007,line1052,line1101,line1153
! eliminated_buses=931,969,1008,1053,1102

New Line._virtual_line934_line971 bus1=972.1.2.3.4 bus2=901.1.2.3.4 phases=4 linecode=LC3 length=16.2495 units=m
! reduced_from=line934,line971
! eliminated_buses=935

New Line._virtual_line936_line973_line1013_line1058_line1107_line1158_line1213_line1266 bus1=1267.1.2.3.4 bus2=901.1.2.3.4 phases=4 linecode=LC6 length=11.01996 units=m
! reduced_from=line936,line973,line1013,line1058,line1107,line1158,line1213,line1266
! eliminated_buses=937,974,1014,1059,1108,1159,1214

New Line._virtual_line950_line987_line1027_line1072_line1121_line1173 bus1=1174.1.2.3.4 bus2=918.1.2.3.4 phases=4 linecode=LC6 length=9.81551 units=m
! reduced_from=line950,line987,line1027,line1072,line1121,line1173
! eliminated_buses=951,988,1028,1073,1122

New Line._virtual_line951_line988_line1028 bus1=1029.1.2.3.4 bus2=918.1.2.3.4 phases=4 linecode=LC3 length=13.5079 units=m
! reduced_from=line951,line988,line1028
! eliminated_buses=952,989

New Line._virtual_line954_line991 bus1=992.1.2.3.4 bus2=921.1.2.3.4 phases=4 linecode=LC3 length=18.4029 units=m
! reduced_from=line954,line991
! eliminated_buses=955

New Line._virtual_line956_line994_line1037_line1084_line1135_line1189 bus1=1190.1.2.3.4 bus2=921.1.2.3.4 phases=4 linecode=LC2 length=11.26969 units=m
! reduced_from=line956,line994,line1037,line1084,line1135,line1189
! eliminated_buses=957,995,1038,1085,1136

New Line._virtual_line959_line997_line1041_line1089_line1140_line1195_line1249_line1300_line1352_line1397_line1443_line1487 bus1=1488.1.2.3.4 bus2=924.1.2.3.4 phases=4 linecode=LC2 length=15.94388 units=m
! reduced_from=line959,line997,line1041,line1089,line1140,line1195,line1249,line1300,line1352,line1397,line1443,line1487
! eliminated_buses=960,998,1042,1090,1141,1196,1250,1301,1353,1398,1444

New Line._virtual_line966_line1006_line1051_line1100_line1152_line1208 bus1=930.1.2.3.4 bus2=1209.1.2.3.4 phases=4 linecode=LC6 length=12.19395 units=m
! reduced_from=line966,line1006,line1051,line1100,line1152,line1208
! eliminated_buses=967,1007,1052,1101,1153

New Line._virtual_line996_line1040_line1088_line1139_line1194_line1248_line1299_line1351_line1396_line1442_line1486 bus1=1487.1.2.3.4 bus2=959.1.2.3.4 phases=4 linecode=LC6 length=13.59067 units=m
! reduced_from=line996,line1040,line1088,line1139,line1194,line1248,line1299,line1351,line1396,line1442,line1486
! eliminated_buses=997,1041,1089,1140,1195,1249,1300,1352,1397,1443

New Line._virtual_line1003_line1047_line1095_line1146_line1201_line1254_line1305_line1356_line1401_line1444_line1488_line1531_line1572_line1611_line1643_line1676_line1707_line1735_line1761_line1788_line1813_line1835_line1855 bus1=1856.1.2.3.4 bus2=966.1.2.3.4 phases=4 linecode=LC6 length=14.344187 units=m
! reduced_from=line1003,line1047,line1095,line1146,line1201,line1254,line1305,line1356,line1401,line1444,line1488,line1531,line1572,line1611,line1643,line1676,line1707,line1735,line1761,line1788,line1813,line1835,line1855
! eliminated_buses=1004,1048,1096,1147,1202,1255,1306,1357,1402,1445,1489,1532,1573,1612,1644,1677,1708,1736,1762,1789,1814,1836

New Line._virtual_line1010_line1055_line1103 bus1=1104.1.2.3.4 bus2=972.1.2.3.4 phases=4 linecode=LC3 length=13.8357 units=m
! reduced_from=line1010,line1055,line1103
! eliminated_buses=1011,1056

New Line._virtual_line1012_line1057_line1106_line1157_line1212_line1265_line1315_line1367 bus1=972.1.2.3.4 bus2=1368.1.2.3.4 phases=4 linecode=LC6 length=10.90615 units=m
! reduced_from=line1012,line1057,line1106,line1157,line1212,line1265,line1315,line1367
! eliminated_buses=1013,1058,1107,1158,1213,1266,1316

New Line._virtual_line1032_line1078_line1128_line1181_line1235_line1286_line1338_line1383_line1429_line1470_line1514 bus1=1515.1.2.3.4 bus2=992.1.2.3.4 phases=4 linecode=LC6 length=15.09291 units=m
! reduced_from=line1032,line1078,line1128,line1181,line1235,line1286,line1338,line1383,line1429,line1470,line1514
! eliminated_buses=1033,1079,1129,1182,1236,1287,1339,1384,1430,1471

New Line._virtual_line1038_line1085_line1136_line1190_line1244_line1295_line1347_line1393 bus1=996.1.2.3.4 bus2=1394.1.2.3.4 phases=4 linecode=LC2 length=25.0028 units=m
! reduced_from=line1038,line1085,line1136,line1190,line1244,line1295,line1347,line1393
! eliminated_buses=1039,1086,1137,1191,1245,1296,1348

New Line._virtual_line1048_line1096 bus1=1097.1.2.3.4 bus2=1005.1.2.3.4 phases=4 linecode=LC3 length=13.4752 units=m
! reduced_from=line1048,line1096
! eliminated_buses=1049

New Line._virtual_line1049_line1099_line1151_line1207_line1261_line1311_line1363_line1409_line1452_line1497_line1540_line1580_line1619_line1652_line1685_line1716_line1745_line1771_line1796_line1823_line1843 bus1=1005.1.2.3.4 bus2=1844.1.2.3.4 phases=4 linecode=LC6 length=10.605893 units=m
! reduced_from=line1049,line1099,line1151,line1207,line1261,line1311,line1363,line1409,line1452,line1497,line1540,line1580,line1619,line1652,line1685,line1716,line1745,line1771,line1796,line1823,line1843
! eliminated_buses=1050,1100,1152,1208,1262,1312,1364,1410,1453,1498,1541,1581,1620,1653,1686,1717,1746,1772,1797,1824

New Line._virtual_line1068_line1117_line1170 bus1=1025.1.2.3.4 bus2=1171.1.2.3.4 phases=4 linecode=LC6 length=6.15118 units=m
! reduced_from=line1068,line1117,line1170
! eliminated_buses=1069,1118

New Line._virtual_line1075_line1126_line1179_line1234_line1285_line1337_line1382_line1428_line1469_line1513_line1555 bus1=1556.1.2.3.4 bus2=1029.1.2.3.4 phases=4 linecode=LC6 length=9.111255 units=m
! reduced_from=line1075,line1126,line1179,line1234,line1285,line1337,line1382,line1428,line1469,line1513,line1555
! eliminated_buses=1076,1127,1180,1235,1286,1338,1383,1429,1470,1514

New Line._virtual_line1080_line1130_line1183_line1237_line1288_line1340_line1385_line1431_line1472 bus1=1473.1.2.3.4 bus2=1034.1.2.3.4 phases=4 linecode=LC6 length=9.36856 units=m
! reduced_from=line1080,line1130,line1183,line1237,line1288,line1340,line1385,line1431,line1472
! eliminated_buses=1081,1131,1184,1238,1289,1341,1386,1432

New Line._virtual_line1081_line1132 bus1=1133.1.2.3.4 bus2=1034.1.2.3.4 phases=4 linecode=LC3 length=14.0272 units=m
! reduced_from=line1081,line1132
! eliminated_buses=1082

New Line._virtual_line1086_line1137_line1191_line1245_line1296_line1348 bus1=1040.1.2.3.4 bus2=1349.1.2.3.4 phases=4 linecode=LC6 length=15.04706 units=m
! reduced_from=line1086,line1137,line1191,line1245,line1296,line1348
! eliminated_buses=1087,1138,1192,1246,1297

New Line._virtual_line1087_line1138_line1192_line1246_line1297_line1349_line1394_line1440 bus1=1040.1.2.3.4 bus2=1441.1.2.3.4 phases=4 linecode=LC8 length=10.77859 units=m
! reduced_from=line1087,line1138,line1192,line1246,line1297,line1349,line1394,line1440
! eliminated_buses=1088,1139,1193,1247,1298,1350,1395

New Line._virtual_line1118_line1171_line1223 bus1=1071.1.2.3.4 bus2=1224.1.2.3.4 phases=4 linecode=LC6 length=6.4043 units=m
! reduced_from=line1118,line1171,line1223
! eliminated_buses=1119,1172

New Line._virtual_line1124_line1178_line1233_line1284_line1336_line1381_line1427_line1468_line1512_line1554_line1592_line1627_line1662_line1693 bus1=1074.1.2.3.4 bus2=1694.1.2.3.4 phases=4 linecode=LC6 length=8.384438 units=m
! reduced_from=line1124,line1178,line1233,line1284,line1336,line1381,line1427,line1468,line1512,line1554,line1592,line1627,line1662,line1693
! eliminated_buses=1125,1179,1234,1285,1337,1382,1428,1469,1513,1555,1593,1628,1663

New Line._virtual_line1148_line1205_line1259_line1310_line1362_line1408_line1451_line1496_line1539_line1579_line1618_line1651_line1684_line1715_line1744 bus1=1097.1.2.3.4 bus2=1745.1.2.3.4 phases=4 linecode=LC6 length=10.623593 units=m
! reduced_from=line1148,line1205,line1259,line1310,line1362,line1408,line1451,line1496,line1539,line1579,line1618,line1651,line1684,line1715,line1744
! eliminated_buses=1149,1206,1260,1311,1363,1409,1452,1497,1540,1580,1619,1652,1685,1716

New Line._virtual_line1155_line1210_line1263_line1313_line1365_line1411_line1454_line1499_line1542_line1582_line1621 bus1=1622.1.2.3.4 bus2=1104.1.2.3.4 phases=4 linecode=LC6 length=10.38542 units=m
! reduced_from=line1155,line1210,line1263,line1313,line1365,line1411,line1454,line1499,line1542,line1582,line1621
! eliminated_buses=1156,1211,1264,1314,1366,1412,1455,1500,1543,1583

New Line._virtual_line1162_line1217_line1271_line1323_line1371_line1418_line1459_line1503 bus1=1112.1.2.3.4 bus2=1504.1.2.3.4 phases=4 linecode=LC6 length=7.973316 units=m
! reduced_from=line1162,line1217,line1271,line1323,line1371,line1418,line1459,line1503
! eliminated_buses=1163,1218,1272,1324,1372,1419,1460

New Line._virtual_line1164_line1218_line1272_line1324 bus1=1113.1.2.3.4 bus2=1325.1.2.3.4 phases=4 linecode=LC6 length=7.797894 units=m
! reduced_from=line1164,line1218,line1272,line1324
! eliminated_buses=1165,1219,1273

New Line._virtual_line1174_line1228 bus1=1229.1.2.3.4 bus2=1123.1.2.3.4 phases=4 linecode=LC3 length=14.1456 units=m
! reduced_from=line1174,line1228
! eliminated_buses=1175

New Line._virtual_line1176_line1232_line1283_line1335_line1380_line1426_line1467_line1511_line1553_line1591_line1626_line1661_line1692_line1721_line1750 bus1=1751.1.2.3.4 bus2=1123.1.2.3.4 phases=4 linecode=LC6 length=10.257152 units=m
! reduced_from=line1176,line1232,line1283,line1335,line1380,line1426,line1467,line1511,line1553,line1591,line1626,line1661,line1692,line1721,line1750
! eliminated_buses=1177,1233,1284,1336,1381,1427,1468,1512,1554,1592,1627,1662,1693,1722

New Line._virtual_line1185_line1239_line1290_line1341_line1386_line1432_line1473_line1517 bus1=1518.1.2.3.4 bus2=1133.1.2.3.4 phases=4 linecode=LC6 length=9.08663 units=m
! reduced_from=line1185,line1239,line1290,line1341,line1386,line1432,line1473,line1517
! eliminated_buses=1186,1240,1291,1342,1387,1433,1474

New Line._virtual_line1203_line1258_line1309_line1361_line1407_line1450_line1495_line1538_line1578_line1617_line1650_line1683_line1714_line1743_line1768_line1794 bus1=1795.1.2.3.4 bus2=1148.1.2.3.4 phases=4 linecode=LC2 length=8.832126 units=m
! reduced_from=line1203,line1258,line1309,line1361,line1407,line1450,line1495,line1538,line1578,line1617,line1650,line1683,line1714,line1743,line1768,line1794
! eliminated_buses=1204,1259,1310,1362,1408,1451,1496,1539,1579,1618,1651,1684,1715,1744,1769

New Line._virtual_line1224_line1276_line1328 bus1=1329.1.2.3.4 bus2=1173.1.2.3.4 phases=4 linecode=LC6 length=6.40939 units=m
! reduced_from=line1224,line1276,line1328
! eliminated_buses=1225,1277

New Line._virtual_line1226_line1277_line1329 bus1=1330.1.2.3.4 bus2=1174.1.2.3.4 phases=4 linecode=LC6 length=5.82204 units=m
! reduced_from=line1226,line1277,line1329
! eliminated_buses=1227,1278

New Line._virtual_line1240_line1291_line1342_line1387_line1433_line1474 bus1=1475.1.2.3.4 bus2=1187.1.2.3.4 phases=4 linecode=LC6 length=10.575296 units=m
! reduced_from=line1240,line1291,line1342,line1387,line1433,line1474
! eliminated_buses=1241,1292,1343,1388,1434

New Line._virtual_line1241_line1292 bus1=1187.1.2.3.4 bus2=1293.1.2.3.4 phases=4 linecode=LC3 length=14.91935 units=m
! reduced_from=line1241,line1292
! eliminated_buses=1242

New Line._virtual_line1255_line1306 bus1=1307.1.2.3.4 bus2=1203.1.2.3.4 phases=4 linecode=LC3 length=16.0859 units=m
! reduced_from=line1255,line1306
! eliminated_buses=1256

New Line._virtual_line1256_line1308_line1360_line1406_line1449_line1494_line1537_line1577_line1616_line1648_line1681_line1712_line1741_line1766_line1792_line1818_line1839_line1859_line1879_line1898_line1916 bus1=1203.1.2.3.4 bus2=1917.1.2.3.4 phases=4 linecode=LC2 length=10.396719 units=m
! reduced_from=line1256,line1308,line1360,line1406,line1449,line1494,line1537,line1577,line1616,line1648,line1681,line1712,line1741,line1766,line1792,line1818,line1839,line1859,line1879,line1898,line1916
! eliminated_buses=1257,1309,1361,1407,1450,1495,1538,1578,1617,1649,1682,1713,1742,1767,1793,1819,1840,1860,1880,1899

New Line._virtual_line1267_line1318 bus1=1215.1.2.3.4 bus2=1319.1.2.3.4 phases=4 linecode=LC6 length=8.0338 units=m
! reduced_from=line1267,line1318
! eliminated_buses=1268

New Line._virtual_line1278_line1330_line1375_line1421_line1462_line1506_line1548_line1586 bus1=1229.1.2.3.4 bus2=1587.1.2.3.4 phases=4 linecode=LC3 length=6.38723 units=m
! reduced_from=line1278,line1330,line1375,line1421,line1462,line1506,line1548,line1586
! eliminated_buses=1279,1331,1376,1422,1463,1507,1549

New Line._virtual_line1280_line1333_line1378_line1424_line1465_line1509_line1551_line1589_line1624 bus1=1625.1.2.3.4 bus2=1229.1.2.3.4 phases=4 linecode=LC6 length=8.91373 units=m
! reduced_from=line1280,line1333,line1378,line1424,line1465,line1509,line1551,line1589,line1624
! eliminated_buses=1281,1334,1379,1425,1466,1510,1552,1590

New Line._virtual_line1316_line1368_line1415 bus1=1416.1.2.3.4 bus2=1267.1.2.3.4 phases=4 linecode=LC6 length=8.3291 units=m
! reduced_from=line1316,line1368,line1415
! eliminated_buses=1317,1369

New Line._virtual_line1319_line1369_line1416_line1457_line1501_line1544 bus1=1545.1.2.3.4 bus2=1270.1.2.3.4 phases=4 linecode=LC6 length=7.293289 units=m
! reduced_from=line1319,line1369,line1416,line1457,line1501,line1544
! eliminated_buses=1320,1370,1417,1458,1502

New Line._virtual_line1321_line1370_line1417_line1458_line1502_line1545 bus1=1546.1.2.3.4 bus2=1271.1.2.3.4 phases=4 linecode=LC6 length=8.391303 units=m
! reduced_from=line1321,line1370,line1417,line1458,line1502,line1545
! eliminated_buses=1322,1371,1418,1459,1503

New Line._virtual_line1345_line1392_line1439_line1481_line1527_line1567_line1606_line1638_line1671_line1702_line1730_line1757 bus1=1293.1.2.3.4 bus2=1758.1.2.3.4 phases=4 linecode=LC6 length=10.9076 units=m
! reduced_from=line1345,line1392,line1439,line1481,line1527,line1567,line1606,line1638,line1671,line1702,line1730,line1757
! eliminated_buses=1346,1393,1440,1482,1528,1568,1607,1639,1672,1703,1731

New Line._virtual_line1357_line1402_line1445 bus1=1307.1.2.3.4 bus2=1446.1.2.3.4 phases=4 linecode=LC3 length=15.6083 units=m
! reduced_from=line1357,line1402,line1445
! eliminated_buses=1358,1403

New Line._virtual_line1359_line1405_line1448_line1493_line1536_line1576_line1615_line1647_line1680_line1711 bus1=1307.1.2.3.4 bus2=1712.1.2.3.4 phases=4 linecode=LC2 length=11.00375 units=m
! reduced_from=line1359,line1405,line1448,line1493,line1536,line1576,line1615,line1647,line1680,line1711
! eliminated_buses=1360,1406,1449,1494,1537,1577,1616,1648,1681

New Line._virtual_line1390_line1438_line1480_line1526_line1566_line1605_line1637_line1670_line1701_line1729_line1756_line1782 bus1=1344.1.2.3.4 bus2=1783.1.2.3.4 phases=4 linecode=LC6 length=10.08214 units=m
! reduced_from=line1390,line1438,line1480,line1526,line1566,line1605,line1637,line1670,line1701,line1729,line1756,line1782
! eliminated_buses=1391,1439,1481,1527,1567,1606,1638,1671,1702,1730,1757

New Line._virtual_line1414_line1456 bus1=1368.1.2.3.4 bus2=1457.1.2.3.4 phases=4 linecode=LC6 length=8.0455 units=m
! reduced_from=line1414,line1456
! eliminated_buses=1415

New Line._virtual_line1434_line1475 bus1=1389.1.2.3.4 bus2=1476.1.2.3.4 phases=4 linecode=LC3 length=14.2912 units=m
! reduced_from=line1434,line1475
! eliminated_buses=1435

New Line._virtual_line1436_line1479_line1525_line1565_line1604_line1636_line1669_line1700_line1728_line1755_line1781 bus1=1782.1.2.3.4 bus2=1389.1.2.3.4 phases=4 linecode=LC6 length=10.26489 units=m
! reduced_from=line1436,line1479,line1525,line1565,line1604,line1636,line1669,line1700,line1728,line1755,line1781
! eliminated_buses=1437,1480,1526,1566,1605,1637,1670,1701,1729,1756

New Line._virtual_line1483_line1528_line1568_line1607_line1639_line1672_line1703_line1731_line1758_line1785 bus1=1441.1.2.3.4 bus2=1786.1.2.3.4 phases=4 linecode=LC8 length=29.84463 units=m
! reduced_from=line1483,line1528,line1568,line1607,line1639,line1672,line1703,line1731,line1758,line1785
! eliminated_buses=1484,1529,1569,1608,1640,1673,1704,1732,1759

New Line._virtual_line1489_line1532_line1573_line1612 bus1=1613.1.2.3.4 bus2=1446.1.2.3.4 phases=4 linecode=LC3 length=12.4086 units=m
! reduced_from=line1489,line1532,line1573,line1612
! eliminated_buses=1490,1533,1574

New Line._virtual_line1491_line1534_line1575_line1614_line1646_line1679_line1710_line1738_line1764_line1791 bus1=1446.1.2.3.4 bus2=1792.1.2.3.4 phases=4 linecode=LC2 length=10.99393 units=m
! reduced_from=line1491,line1534,line1575,line1614,line1646,line1679,line1710,line1738,line1764,line1791
! eliminated_buses=1492,1535,1576,1615,1647,1680,1711,1739,1765

New Line._virtual_line1515_line1556_line1595 bus1=1596.1.2.3.4 bus2=1473.1.2.3.4 phases=4 linecode=LC6 length=6.00821 units=m
! reduced_from=line1515,line1556,line1595
! eliminated_buses=1516,1557

New Line._virtual_line1518_line1559_line1597 bus1=1598.1.2.3.4 bus2=1475.1.2.3.4 phases=4 linecode=LC6 length=5.86736 units=m
! reduced_from=line1518,line1559,line1597
! eliminated_buses=1519,1560

New Line._virtual_line1520_line1560 bus1=1476.1.2.3.4 bus2=1561.1.2.3.4 phases=4 linecode=LC3 length=13.7037 units=m
! reduced_from=line1520,line1560
! eliminated_buses=1521

New Line._virtual_line1522_line1563_line1602_line1634_line1667_line1698_line1726_line1754_line1780_line1803_line1828_line1849_line1870 bus1=1476.1.2.3.4 bus2=1871.1.2.3.4 phases=4 linecode=LC6 length=11.763757 units=m
! reduced_from=line1522,line1563,line1602,line1634,line1667,line1698,line1726,line1754,line1780,line1803,line1828,line1849,line1870
! eliminated_buses=1523,1564,1603,1635,1668,1699,1727,1755,1781,1804,1829,1850

New Line._virtual_line1557_line1596_line1629 bus1=1630.1.2.3.4 bus2=1518.1.2.3.4 phases=4 linecode=LC6 length=6.40223 units=m
! reduced_from=line1557,line1596,line1629
! eliminated_buses=1558,1597

New Line._virtual_line1569_line1608_line1640_line1673_line1704_line1732_line1759_line1786_line1811_line1833_line1853_line1875_line1894_line1912_line1929 bus1=1930.1.2.3.4 bus2=1530.1.2.3.4 phases=4 linecode=LC4 length=21.26251 units=m
! reduced_from=line1569,line1608,line1640,line1673,line1704,line1732,line1759,line1786,line1811,line1833,line1853,line1875,line1894,line1912,line1929
! eliminated_buses=1570,1609,1641,1674,1705,1733,1760,1787,1812,1834,1854,1876,1895,1913

New Line._virtual_line1594_line1628 bus1=1629.1.2.3.4 bus2=1556.1.2.3.4 phases=4 linecode=LC6 length=5.9685 units=m
! reduced_from=line1594,line1628
! eliminated_buses=1595

New Line._virtual_line1598_line1630_line1663_line1694 bus1=1695.1.2.3.4 bus2=1561.1.2.3.4 phases=4 linecode=LC3 length=5.80376 units=m
! reduced_from=line1598,line1630,line1663,line1694
! eliminated_buses=1599,1631,1664

New Line._virtual_line1600_line1633_line1666_line1697_line1725_line1753_line1779_line1802_line1827 bus1=1561.1.2.3.4 bus2=1828.1.2.3.4 phases=4 linecode=LC6 length=9.49606 units=m
! reduced_from=line1600,line1633,line1666,line1697,line1725,line1753,line1779,line1802,line1827
! eliminated_buses=1601,1634,1667,1698,1726,1754,1780,1803

New Line._virtual_line1623_line1657_line1689_line1719_line1748_line1774_line1799_line1825_line1845 bus1=1846.1.2.3.4 bus2=1587.1.2.3.4 phases=4 linecode=LC6 length=14.8355 units=m
! reduced_from=line1623,line1657,line1689,line1719,line1748,line1774,line1799,line1825,line1845
! eliminated_buses=1624,1658,1690,1720,1749,1775,1800,1826

New Line._virtual_line1644_line1677_line1708_line1736_line1762_line1789_line1814_line1836 bus1=1837.1.2.3.4 bus2=1613.1.2.3.4 phases=4 linecode=LC2 length=11.16261 units=m
! reduced_from=line1644,line1677,line1708,line1736,line1762,line1789,line1814,line1836
! eliminated_buses=1645,1678,1709,1737,1763,1790,1815

New Line._virtual_line1645_line1678_line1709_line1737_line1763_line1790_line1815_line1837_line1858_line1878_line1897_line1915_line1932 bus1=1613.1.2.3.4 bus2=1933.1.2.3.4 phases=4 linecode=LC6 length=17.66482 units=m
! reduced_from=line1645,line1678,line1709,line1737,line1763,line1790,line1815,line1837,line1858,line1878,line1897,line1915,line1932
! eliminated_buses=1646,1679,1710,1738,1764,1791,1816,1838,1859,1879,1898,1916

New Line._virtual_line1655_line1687_line1718_line1747_line1773_line1798 bus1=1622.1.2.3.4 bus2=1799.1.2.3.4 phases=4 linecode=LC6 length=11.22857 units=m
! reduced_from=line1655,line1687,line1718,line1747,line1773,line1798
! eliminated_buses=1656,1688,1719,1748,1774

New Line._virtual_line1659_line1690 bus1=1625.1.2.3.4 bus2=1691.1.2.3.4 phases=4 linecode=LC6 length=6.5765 units=m
! reduced_from=line1659,line1690
! eliminated_buses=1660

New Line._virtual_line1723_line1751 bus1=1694.1.2.3.4 bus2=1752.1.2.3.4 phases=4 linecode=LC6 length=6.8089 units=m
! reduced_from=line1723,line1751
! eliminated_buses=1724

New Line._virtual_line1724_line1752_line1778_line1801_line1826_line1846_line1868_line1886_line1904_line1922_line1939 bus1=1695.1.2.3.4 bus2=1940.1.2.3.4 phases=4 linecode=LC6 length=14.77512 units=m
! reduced_from=line1724,line1752,line1778,line1801,line1826,line1846,line1868,line1886,line1904,line1922,line1939
! eliminated_buses=1725,1753,1779,1802,1827,1847,1869,1887,1905,1923

New Line._virtual_line1740_line1765 bus1=1766.1.2.3.4 bus2=1712.1.2.3.4 phases=4 linecode=LC2 length=8.2871 units=m
! reduced_from=line1740,line1765
! eliminated_buses=1741

New Line._virtual_line1769_line1795_line1822_line1842_line1862_line1882 bus1=1745.1.2.3.4 bus2=1883.1.2.3.4 phases=4 linecode=LC6 length=8.09601 units=m
! reduced_from=line1769,line1795,line1822,line1842,line1862,line1882
! eliminated_buses=1770,1796,1823,1843,1863

New Line._virtual_line1777_line1800 bus1=1801.1.2.3.4 bus2=1751.1.2.3.4 phases=4 linecode=LC6 length=6.7909 units=m
! reduced_from=line1777,line1800
! eliminated_buses=1778

New Line._virtual_line1783_line1808 bus1=1809.1.2.3.4 bus2=1758.1.2.3.4 phases=4 linecode=LC6 length=6.0791 units=m
! reduced_from=line1783,line1808
! eliminated_buses=1784

New Line._virtual_line1805_line1829 bus1=1830.1.2.3.4 bus2=1782.1.2.3.4 phases=4 linecode=LC6 length=6.4678 units=m
! reduced_from=line1805,line1829
! eliminated_buses=1806

New Line._virtual_line1807_line1830 bus1=1831.1.2.3.4 bus2=1783.1.2.3.4 phases=4 linecode=LC6 length=6.8015 units=m
! reduced_from=line1807,line1830
! eliminated_buses=1808

New Line._virtual_line1809_line1831 bus1=1786.1.2.3.4 bus2=1832.1.2.3.4 phases=4 linecode=LC4 length=11.8798 units=m
! reduced_from=line1809,line1831
! eliminated_buses=1810

New Line._virtual_line1817_line1838 bus1=1839.1.2.3.4 bus2=1792.1.2.3.4 phases=4 linecode=LC2 length=8.1069 units=m
! reduced_from=line1817,line1838
! eliminated_buses=1818

New Line._virtual_line1820_line1841_line1861_line1881_line1900_line1918 bus1=1795.1.2.3.4 bus2=1919.1.2.3.4 phases=4 linecode=LC2 length=8.859499 units=m
! reduced_from=line1820,line1841,line1861,line1881,line1900,line1918
! eliminated_buses=1821,1842,1862,1882,1901

New Line._virtual_line1848_line1869 bus1=1828.1.2.3.4 bus2=1870.1.2.3.4 phases=4 linecode=LC6 length=6.2486 units=m
! reduced_from=line1848,line1869
! eliminated_buses=1849

New Line._virtual_line1850_line1871 bus1=1872.1.2.3.4 bus2=1832.1.2.3.4 phases=4 linecode=LC4 length=15.7495 units=m
! reduced_from=line1850,line1871
! eliminated_buses=1851

New Line._virtual_line1851_line1874_line1893_line1911_line1928_line1947_line1967_line1983_line1999_line2014 bus1=2015.1.2.3.4 bus2=1832.1.2.3.4 phases=4 linecode=LC6 length=7.95819 units=m
! reduced_from=line1851,line1874,line1893,line1911,line1928,line1947,line1967,line1983,line1999,line2014
! eliminated_buses=1852,1875,1894,1912,1929,1948,1968,1984,2000

New Line._virtual_line1857_line1877_line1896_line1914_line1931_line1951 bus1=1952.1.2.3.4 bus2=1837.1.2.3.4 phases=4 linecode=LC2 length=10.06796 units=m
! reduced_from=line1857,line1877,line1896,line1914,line1931,line1951
! eliminated_buses=1858,1878,1897,1915,1932

New Line._virtual_line1863_line1883_line1901_line1919_line1936_line1956 bus1=1957.1.2.3.4 bus2=1844.1.2.3.4 phases=4 linecode=LC6 length=6.667485 units=m
! reduced_from=line1863,line1883,line1901,line1919,line1936,line1956
! eliminated_buses=1864,1884,1902,1920,1937

New Line._virtual_line1867_line1885_line1903_line1921_line1938 bus1=1939.1.2.3.4 bus2=1846.1.2.3.4 phases=4 linecode=LC6 length=13.04758 units=m
! reduced_from=line1867,line1885,line1903,line1921,line1938
! eliminated_buses=1868,1886,1904,1922

New Line._virtual_line1888_line1905 bus1=1871.1.2.3.4 bus2=1906.1.2.3.4 phases=4 linecode=LC6 length=5.9959 units=m
! reduced_from=line1888,line1905
! eliminated_buses=1889

New Line._virtual_line1890_line1909_line1926_line1945_line1965_line1981_line1997_line2012 bus1=2013.1.2.3.4 bus2=1872.1.2.3.4 phases=4 linecode=LC6 length=9.11394 units=m
! reduced_from=line1890,line1909,line1926,line1945,line1965,line1981,line1997,line2012
! eliminated_buses=1891,1910,1927,1946,1966,1982,1998

New Line._virtual_line1906_line1923 bus1=1924.1.2.3.4 bus2=1890.1.2.3.4 phases=4 linecode=LC4 length=16.5443 units=m
! reduced_from=line1906,line1923
! eliminated_buses=1907

New Line._virtual_line1907_line1925_line1944_line1964_line1980_line1996_line2011 bus1=2012.1.2.3.4 bus2=1890.1.2.3.4 phases=4 linecode=LC6 length=7.14041 units=m
! reduced_from=line1907,line1925,line1944,line1964,line1980,line1996,line2011
! eliminated_buses=1908,1926,1945,1965,1981,1997

New Line._virtual_line1933_line1954_line1972_line1988_line2004 bus1=1917.1.2.3.4 bus2=2005.1.2.3.4 phases=4 linecode=LC2 length=8.797425 units=m
! reduced_from=line1933,line1954,line1972,line1988,line2004
! eliminated_buses=1934,1955,1973,1989

New Line._virtual_line1940_line1960 bus1=1961.1.2.3.4 bus2=1924.1.2.3.4 phases=4 linecode=LC4 length=15.1852 units=m
! reduced_from=line1940,line1960
! eliminated_buses=1941

New Line._virtual_line1941_line1962_line1978_line1994_line2009_line2025_line2046_line2063_line2079 bus1=1924.1.2.3.4 bus2=2080.1.2.3.4 phases=4 linecode=LC6 length=8.3963 units=m
! reduced_from=line1941,line1962,line1978,line1994,line2009,line2025,line2046,line2063,line2079
! eliminated_buses=1942,1963,1979,1995,2010,2026,2047,2064

New Line._virtual_line1948_line1968_line1984_line2000 bus1=2001.1.2.3.4 bus2=1930.1.2.3.4 phases=4 linecode=LC4 length=33.6194 units=m
! reduced_from=line1948,line1968,line1984,line2000
! eliminated_buses=1949,1969,1985

New Line._virtual_line1949_line1970_line1986_line2002_line2018_line2038 bus1=1930.1.2.3.4 bus2=2039.1.2.3.4 phases=4 linecode=LC6 length=11.7712 units=m
! reduced_from=line1949,line1970,line1986,line2002,line2018,line2038
! eliminated_buses=1950,1971,1987,2003,2019

New Line._virtual_line1953_line1971_line1987_line2003_line2019_line2039 bus1=1933.1.2.3.4 bus2=2040.1.2.3.4 phases=4 linecode=LC6 length=12.32563 units=m
! reduced_from=line1953,line1971,line1987,line2003,line2019,line2039
! eliminated_buses=1954,1972,1988,2004,2020

New Line._virtual_line1959_line1974_line1990_line2005_line2020_line2040_line2058_line2074 bus1=1940.1.2.3.4 bus2=2075.1.2.3.4 phases=4 linecode=LC6 length=12.50072 units=m
! reduced_from=line1959,line1974,line1990,line2005,line2020,line2040,line2058,line2074
! eliminated_buses=1960,1975,1991,2006,2021,2041,2059

New Line._virtual_line1975_line1991_line2006 bus1=1961.1.2.3.4 bus2=2007.1.2.3.4 phases=4 linecode=LC4 length=15.8857 units=m
! reduced_from=line1975,line1991,line2006
! eliminated_buses=1976,1992

New Line._virtual_line1977_line1993_line2008_line2024_line2045_line2062_line2078_line2094_line2110_line2123_line2135_line2147_line2158_line2171 bus1=1961.1.2.3.4 bus2=2172.1.2.3.4 phases=4 linecode=LC6 length=8.663587 units=m
! reduced_from=line1977,line1993,line2008,line2024,line2045,line2062,line2078,line2094,line2110,line2123,line2135,line2147,line2158,line2171
! eliminated_buses=1978,1994,2009,2025,2046,2063,2079,2095,2111,2124,2136,2148,2159

New Line._virtual_line2015_line2034 bus1=2035.1.2.3.4 bus2=2001.1.2.3.4 phases=4 linecode=LC4 length=28.7424 units=m
! reduced_from=line2015,line2034
! eliminated_buses=2016

New Line._virtual_line2017_line2037_line2057_line2073_line2089_line2105_line2118_line2130_line2141_line2152_line2165_line2177_line2188_line2198 bus1=2001.1.2.3.4 bus2=2199.1.2.3.4 phases=4 linecode=LC2 length=13.01598 units=m
! reduced_from=line2017,line2037,line2057,line2073,line2089,line2105,line2118,line2130,line2141,line2152,line2165,line2177,line2188,line2198
! eliminated_buses=2018,2038,2058,2074,2090,2106,2119,2131,2142,2153,2166,2178,2189

New Line._virtual_line2021_line2041_line2059_line2075 bus1=2007.1.2.3.4 bus2=2076.1.2.3.4 phases=4 linecode=LC4 length=15.9438 units=m
! reduced_from=line2021,line2041,line2059,line2075
! eliminated_buses=2022,2042,2060

New Line._virtual_line2023_line2044_line2061_line2077_line2093_line2109_line2122_line2134_line2146_line2157_line2170_line2182_line2193_line2204_line2212 bus1=2213.1.2.3.4 bus2=2007.1.2.3.4 phases=4 linecode=LC6 length=8.260565 units=m
! reduced_from=line2023,line2044,line2061,line2077,line2093,line2109,line2122,line2134,line2146,line2157,line2170,line2182,line2193,line2204,line2212
! eliminated_buses=2024,2045,2062,2078,2094,2110,2123,2135,2147,2158,2171,2183,2194,2205

New Line._virtual_line2027_line2048_line2065_line2081_line2098 bus1=2012.1.2.3.4 bus2=2099.1.2.3.4 phases=4 linecode=LC6 length=5.64495 units=m
! reduced_from=line2027,line2048,line2065,line2081,line2098
! eliminated_buses=2028,2049,2066,2082

New Line._virtual_line2028_line2049_line2066_line2082_line2099 bus1=2100.1.2.3.4 bus2=2012.1.2.3.4 phases=4 linecode=LC6 length=5.98454 units=m
! reduced_from=line2028,line2049,line2066,line2082,line2099
! eliminated_buses=2029,2050,2067,2083

New Line._virtual_line2030_line2050 bus1=2051.1.2.3.4 bus2=2013.1.2.3.4 phases=4 linecode=LC6 length=7.2603 units=m
! reduced_from=line2030,line2050
! eliminated_buses=2031

New Line._virtual_line2033_line2052_line2068_line2084 bus1=2085.1.2.3.4 bus2=2015.1.2.3.4 phases=4 linecode=LC6 length=6.86871 units=m
! reduced_from=line2033,line2052,line2068,line2084
! eliminated_buses=2034,2053,2069

New Line._virtual_line2055_line2071_line2087_line2103_line2116_line2128_line2139_line2151 bus1=2035.1.2.3.4 bus2=2152.1.2.3.4 phases=4 linecode=LC2 length=7.11126 units=m
! reduced_from=line2055,line2071,line2087,line2103,line2116,line2128,line2139,line2151
! eliminated_buses=2056,2072,2088,2104,2117,2129,2140

New Line._virtual_line2090_line2106_line2119_line2131_line2142_line2153_line2166_line2178_line2189_line2199_line2208_line2216_line2224_line2229_line2233_line2237_line2241_line2245 bus1=2246.1.2.3.4 bus2=2076.1.2.3.4 phases=4 linecode=LC6 length=8.58703 units=m
! reduced_from=line2090,line2106,line2119,line2131,line2142,line2153,line2166,line2178,line2189,line2199,line2208,line2216,line2224,line2229,line2233,line2237,line2241,line2245
! eliminated_buses=2091,2107,2120,2132,2143,2154,2167,2179,2190,2200,2209,2217,2225,2230,2234,2238,2242

New Line._virtual_line2091_line2107_line2120_line2132 bus1=2076.1.2.3.4 bus2=2133.1.2.3.4 phases=4 linecode=LC4 length=13.4131 units=m
! reduced_from=line2091,line2107,line2120,line2132
! eliminated_buses=2092,2108,2121

New Line._virtual_line2096_line2111_line2124 bus1=2080.1.2.3.4 bus2=2125.1.2.3.4 phases=4 linecode=LC6 length=7.3922 units=m
! reduced_from=line2096,line2111,line2124
! eliminated_buses=2097,2112

New Line._virtual_line2143_line2154_line2167_line2179_line2190_line2200_line2209_line2217_line2225_line2230_line2234_line2238_line2242_line2246 bus1=2133.1.2.3.4 bus2=2247.1.2.3.4 phases=4 linecode=LC6 length=9.135576 units=m
! reduced_from=line2143,line2154,line2167,line2179,line2190,line2200,line2209,line2217,line2225,line2230,line2234,line2238,line2242,line2246
! eliminated_buses=2144,2155,2168,2180,2191,2201,2210,2218,2226,2231,2235,2239,2243

New Line._virtual_line2164_line2176 bus1=2152.1.2.3.4 bus2=2177.1.2.3.4 phases=4 linecode=LC2 length=18.4006 units=m
! reduced_from=line2164,line2176
! eliminated_buses=2165

New Line._virtual_line2184_line2194 bus1=2172.1.2.3.4 bus2=2195.1.2.3.4 phases=4 linecode=LC6 length=7.6605 units=m
! reduced_from=line2184,line2194
! eliminated_buses=2185

New Line._virtual_line2220_line2226 bus1=2213.1.2.3.4 bus2=2227.1.2.3.4 phases=4 linecode=LC6 length=5.7539 units=m
! reduced_from=line2220,line2226
! eliminated_buses=2221

New Line._virtual_line2250_line2255 bus1=2246.1.2.3.4 bus2=2256.1.2.3.4 phases=4 linecode=LC6 length=6.0193 units=m
! reduced_from=line2250,line2255
! eliminated_buses=2251

New Line._virtual_line2252_line2256_line2259_line2262_line2265 bus1=2266.1.2.3.4 bus2=2247.1.2.3.4 phases=4 linecode=LC6 length=18.65904 units=m
! reduced_from=line2252,line2256,line2259,line2262,line2265
! eliminated_buses=2253,2257,2260,2263

New Line.LINE104 bus1=99.1.2.3.4 bus2=105.1.2.3.4 phases=4 linecode=LC3 length=12.3641 units=m

New Line.LINE111 bus1=105.1.2.3.4 bus2=112.1.2.3.4 phases=4 linecode=LC3 length=12.3277 units=m

New Line.LINE116 bus1=109.1.2.3.4 bus2=117.1.2.3.4 phases=4 linecode=LC4 length=10.1612 units=m

New Line.LINE119 bus1=112.1.2.3.4 bus2=120.1.2.3.4 phases=4 linecode=LC3 length=12.6711 units=m

New Line.LINE125 bus1=117.1.2.3.4 bus2=126.1.2.3.4 phases=4 linecode=LC4 length=11.5083 units=m

New Line.LINE130 bus1=120.1.2.3.4 bus2=131.1.2.3.4 phases=4 linecode=LC3 length=2.0251 units=m

New Line.LINE144 bus1=131.1.2.3.4 bus2=145.1.2.3.4 phases=4 linecode=LC3 length=14.0713 units=m

New Line.LINE170 bus1=154.1.2.3.4 bus2=171.1.2.3.4 phases=4 linecode=LC4 length=14.7715 units=m

New Line.LINE176 bus1=159.1.2.3.4 bus2=177.1.2.3.4 phases=4 linecode=LC1 length=10.078 units=m

New Line.LINE184 bus1=166.1.2.3.4 bus2=185.1.2.3.4 phases=4 linecode=LC2 length=2.8694 units=m

New Line.LINE185 bus1=166.1.2.3.4 bus2=186.1.2.3.4 phases=4 linecode=LC2 length=2.8694 units=m

New Line.LINE190 bus1=170.1.2.3.4 bus2=191.1.2.3.4 phases=4 linecode=LC8 length=3.356 units=m

New Line.LINE191 bus1=171.1.2.3.4 bus2=192.1.2.3.4 phases=4 linecode=LC4 length=15.4009 units=m

New Line.LINE211 bus1=192.1.2.3.4 bus2=212.1.2.3.4 phases=4 linecode=LC4 length=19.0374 units=m

New Line.LINE220 bus1=199.1.2.3.4 bus2=221.1.2.3.4 phases=4 linecode=LC1 length=7.8243 units=m

New Line.LINE221 bus1=199.1.2.3.4 bus2=222.1.2.3.4 phases=4 linecode=LC1 length=8.6966 units=m

New Line.LINE222 bus1=200.1.2.3.4 bus2=223.1.2.3.4 phases=4 linecode=LC3 length=14.9342 units=m

New Line.LINE245 bus1=223.1.2.3.4 bus2=246.1.2.3.4 phases=4 linecode=LC3 length=12.7568 units=m

New Line.LINE252 bus1=229.1.2.3.4 bus2=253.1.2.3.4 phases=4 linecode=LC2 length=3.036 units=m

New Line.LINE266 bus1=241.1.2.3.4 bus2=267.1.2.3.4 phases=4 linecode=LC2 length=1.4217 units=m

New Line.LINE272 bus1=246.1.2.3.4 bus2=273.1.2.3.4 phases=4 linecode=LC3 length=14.9485 units=m

New Line.LINE273 bus1=246.1.2.3.4 bus2=274.1.2.3.4 phases=4 linecode=LC3 length=0.76895 units=m

New Line.LINE278 bus1=251.1.2.3.4 bus2=279.1.2.3.4 phases=4 linecode=LC2 length=2.5485 units=m

New Line.LINE306 bus1=281.1.2.3.4 bus2=307.1.2.3.4 phases=4 linecode=LC2 length=6.8105 units=m

New Line.LINE307 bus1=281.1.2.3.4 bus2=308.1.2.3.4 phases=4 linecode=LC2 length=6.7533 units=m

New Line.LINE308 bus1=281.1.2.3.4 bus2=309.1.2.3.4 phases=4 linecode=LC2 length=6.7533 units=m

New Line.LINE321 bus1=292.1.2.3.4 bus2=322.1.2.3.4 phases=4 linecode=LC2 length=3.0123 units=m

New Line.LINE339 bus1=315.1.2.3.4 bus2=340.1.2.3.4 phases=4 linecode=LC8 length=6.7892 units=m

New Line.LINE353 bus1=328.1.2.3.4 bus2=354.1.2.3.4 phases=4 linecode=LC3 length=14.578 units=m

New Line.LINE362 bus1=335.1.2.3.4 bus2=363.1.2.3.4 phases=4 linecode=LC2 length=3.2025 units=m

New Line.LINE376 bus1=347.1.2.3.4 bus2=377.1.2.3.4 phases=4 linecode=LC2 length=2.4015 units=m

New Line.LINE381 bus1=352.1.2.3.4 bus2=382.1.2.3.4 phases=4 linecode=LC3 length=14.4837 units=m

New Line.LINE383 bus1=354.1.2.3.4 bus2=384.1.2.3.4 phases=4 linecode=LC3 length=2.9213 units=m

New Line.LINE406 bus1=374.1.2.3.4 bus2=407.1.2.3.4 phases=4 linecode=LC2 length=3.3189 units=m

New Line.LINE436 bus1=408.1.2.3.4 bus2=437.1.2.3.4 phases=4 linecode=LC2 length=1.3946 units=m

New Line.LINE482 bus1=459.1.2.3.4 bus2=483.1.2.3.4 phases=4 linecode=LC1 length=5.8073 units=m

New Line.LINE498 bus1=475.1.2.3.4 bus2=499.1.2.3.4 phases=4 linecode=LC2 length=2.8315 units=m

New Line.LINE501 bus1=476.1.2.3.4 bus2=502.1.2.3.4 phases=4 linecode=LC2 length=2.8306 units=m

New Line.LINE513 bus1=489.1.2.3.4 bus2=514.1.2.3.4 phases=4 linecode=LC2 length=2.7511 units=m

New Line.LINE514 bus1=489.1.2.3.4 bus2=515.1.2.3.4 phases=4 linecode=LC2 length=2.7511 units=m

New Line.LINE519 bus1=493.1.2.3.4 bus2=520.1.2.3.4 phases=4 linecode=LC6 length=2.1079 units=m

New Line.LINE531 bus1=507.1.2.3.4 bus2=532.1.2.3.4 phases=4 linecode=LC8 length=3.9484 units=m

New Line.LINE549 bus1=525.1.2.3.4 bus2=550.1.2.3.4 phases=4 linecode=LC2 length=2.9291 units=m

New Line.LINE588 bus1=565.1.2.3.4 bus2=589.1.2.3.4 phases=4 linecode=LC2 length=1.8097 units=m

New Line.LINE590 bus1=566.1.2.3.4 bus2=591.1.2.3.4 phases=4 linecode=LC2 length=2.9041 units=m

New Line.LINE594 bus1=571.1.2.3.4 bus2=595.1.2.3.4 phases=4 linecode=LC2 length=1.4744 units=m

New Line.LINE601 bus1=578.1.2.3.4 bus2=602.1.2.3.4 phases=4 linecode=LC8 length=10.2854 units=m

New Line.LINE615 bus1=592.1.2.3.4 bus2=616.1.2.3.4 phases=4 linecode=LC2 length=3.9502 units=m

New Line.LINE622 bus1=600.1.2.3.4 bus2=623.1.2.3.4 phases=4 linecode=LC3 length=20.4188 units=m

New Line.LINE623 bus1=600.1.2.3.4 bus2=624.1.2.3.4 phases=4 linecode=LC3 length=14.3632 units=m

New Line.LINE636 bus1=612.1.2.3.4 bus2=637.1.2.3.4 phases=4 linecode=LC2 length=2.6777 units=m

New Line.LINE640 bus1=617.1.2.3.4 bus2=641.1.2.3.4 phases=4 linecode=LC2 length=3.8582 units=m

New Line.LINE688 bus1=665.1.2.3.4 bus2=689.1.2.3.4 phases=4 linecode=LC2 length=1.3965 units=m

New Line.LINE690 bus1=668.1.2.3.4 bus2=691.1.2.3.4 phases=4 linecode=LC2 length=5.1686 units=m

New Line.LINE691 bus1=668.1.2.3.4 bus2=692.1.2.3.4 phases=4 linecode=LC2 length=6.5402 units=m

New Line.LINE692 bus1=668.1.2.3.4 bus2=693.1.2.3.4 phases=4 linecode=LC2 length=6.5402 units=m

New Line.LINE693 bus1=669.1.2.3.4 bus2=694.1.2.3.4 phases=4 linecode=LC3 length=16.6882 units=m

New Line.LINE716 bus1=694.1.2.3.4 bus2=717.1.2.3.4 phases=4 linecode=LC3 length=16.3068 units=m

New Line.LINE725 bus1=702.1.2.3.4 bus2=726.1.2.3.4 phases=4 linecode=LC3 length=7.2829 units=m

New Line.LINE727 bus1=702.1.2.3.4 bus2=728.1.2.3.4 phases=4 linecode=LC8 length=8.581 units=m

New Line.LINE742 bus1=717.1.2.3.4 bus2=743.1.2.3.4 phases=4 linecode=LC3 length=16.1624 units=m

New Line.LINE761 bus1=732.1.2.3.4 bus2=762.1.2.3.4 phases=4 linecode=LC2 length=4.6396 units=m

New Line.LINE762 bus1=732.1.2.3.4 bus2=763.1.2.3.4 phases=4 linecode=LC2 length=4.9181 units=m

New Line.LINE797 bus1=770.1.2.3.4 bus2=798.1.2.3.4 phases=4 linecode=LC2 length=1.4059 units=m

New Line.LINE813 bus1=783.1.2.3.4 bus2=814.1.2.3.4 phases=4 linecode=LC3 length=11.3714 units=m

New Line.LINE819 bus1=789.1.2.3.4 bus2=820.1.2.3.4 phases=4 linecode=LC8 length=9.1746 units=m

New Line.LINE847 bus1=814.1.2.3.4 bus2=848.1.2.3.4 phases=4 linecode=LC3 length=14.1924 units=m

New Line.LINE862 bus1=829.1.2.3.4 bus2=863.1.2.3.4 phases=4 linecode=LC2 length=2.5249 units=m

New Line.LINE877 bus1=844.1.2.3.4 bus2=878.1.2.3.4 phases=4 linecode=LC2 length=1.8634 units=m

New Line.LINE878 bus1=844.1.2.3.4 bus2=879.1.2.3.4 phases=4 linecode=LC2 length=1.8634 units=m

New Line.LINE879 bus1=844.1.2.3.4 bus2=880.1.2.3.4 phases=4 linecode=LC2 length=2.6725 units=m

New Line.LINE884 bus1=848.1.2.3.4 bus2=885.1.2.3.4 phases=4 linecode=LC3 length=14.334 units=m

New Line.LINE917 bus1=885.1.2.3.4 bus2=918.1.2.3.4 phases=4 linecode=LC3 length=13.9327 units=m

New Line.LINE929 bus1=896.1.2.3.4 bus2=930.1.2.3.4 phases=4 linecode=LC3 length=12.6572 units=m

New Line.LINE958 bus1=924.1.2.3.4 bus2=959.1.2.3.4 phases=4 linecode=LC8 length=6.6388 units=m

New Line.LINE965 bus1=930.1.2.3.4 bus2=966.1.2.3.4 phases=4 linecode=LC3 length=1.1403 units=m

New Line.LINE995 bus1=959.1.2.3.4 bus2=996.1.2.3.4 phases=4 linecode=LC8 length=1.3798 units=m

New Line.LINE1004 bus1=966.1.2.3.4 bus2=1005.1.2.3.4 phases=4 linecode=LC3 length=18.1426 units=m

New Line.LINE1033 bus1=992.1.2.3.4 bus2=1034.1.2.3.4 phases=4 linecode=LC3 length=11.4019 units=m

New Line.LINE1039 bus1=996.1.2.3.4 bus2=1040.1.2.3.4 phases=4 linecode=LC8 length=1.9591 units=m

New Line.LINE1069 bus1=1025.1.2.3.4 bus2=1070.1.2.3.4 phases=4 linecode=LC6 length=2.9623 units=m

New Line.LINE1073 bus1=1029.1.2.3.4 bus2=1074.1.2.3.4 phases=4 linecode=LC3 length=15.0919 units=m

New Line.LINE1119 bus1=1071.1.2.3.4 bus2=1120.1.2.3.4 phases=4 linecode=LC6 length=2.3982 units=m

New Line.LINE1122 bus1=1074.1.2.3.4 bus2=1123.1.2.3.4 phases=4 linecode=LC3 length=13.8061 units=m

New Line.LINE1147 bus1=1097.1.2.3.4 bus2=1148.1.2.3.4 phases=4 linecode=LC3 length=16.4747 units=m

New Line.LINE1163 bus1=1112.1.2.3.4 bus2=1164.1.2.3.4 phases=4 linecode=LC6 length=1.9922 units=m

New Line.LINE1165 bus1=1113.1.2.3.4 bus2=1166.1.2.3.4 phases=4 linecode=LC6 length=1.5576 units=m

New Line.LINE1186 bus1=1133.1.2.3.4 bus2=1187.1.2.3.4 phases=4 linecode=LC3 length=14.0179 units=m

New Line.LINE1202 bus1=1148.1.2.3.4 bus2=1203.1.2.3.4 phases=4 linecode=LC3 length=16.306 units=m

New Line.LINE1225 bus1=1173.1.2.3.4 bus2=1226.1.2.3.4 phases=4 linecode=LC6 length=2.7866 units=m

New Line.LINE1227 bus1=1174.1.2.3.4 bus2=1228.1.2.3.4 phases=4 linecode=LC6 length=2.5242 units=m

New Line.LINE1268 bus1=1215.1.2.3.4 bus2=1269.1.2.3.4 phases=4 linecode=LC6 length=2.959 units=m

New Line.LINE1317 bus1=1267.1.2.3.4 bus2=1318.1.2.3.4 phases=4 linecode=LC6 length=2.8169 units=m

New Line.LINE1320 bus1=1270.1.2.3.4 bus2=1321.1.2.3.4 phases=4 linecode=LC6 length=1.8017 units=m

New Line.LINE1322 bus1=1271.1.2.3.4 bus2=1323.1.2.3.4 phases=4 linecode=LC6 length=2.8977 units=m

New Line.LINE1343 bus1=1293.1.2.3.4 bus2=1344.1.2.3.4 phases=4 linecode=LC3 length=13.5848 units=m

New Line.LINE1388 bus1=1344.1.2.3.4 bus2=1389.1.2.3.4 phases=4 linecode=LC3 length=14.3313 units=m

New Line.LINE1413 bus1=1368.1.2.3.4 bus2=1414.1.2.3.4 phases=4 linecode=LC6 length=1.37 units=m

New Line.LINE1484 bus1=1441.1.2.3.4 bus2=1485.1.2.3.4 phases=4 linecode=LC8 length=2.2181 units=m

New Line.LINE1516 bus1=1473.1.2.3.4 bus2=1517.1.2.3.4 phases=4 linecode=LC6 length=1.3722 units=m

New Line.LINE1519 bus1=1475.1.2.3.4 bus2=1520.1.2.3.4 phases=4 linecode=LC6 length=3.3364 units=m

New Line.LINE1529 bus1=1485.1.2.3.4 bus2=1530.1.2.3.4 phases=4 linecode=LC1 length=0.70641 units=m

New Line.LINE1558 bus1=1518.1.2.3.4 bus2=1559.1.2.3.4 phases=4 linecode=LC6 length=2.9939 units=m

New Line.LINE1593 bus1=1556.1.2.3.4 bus2=1594.1.2.3.4 phases=4 linecode=LC6 length=2.7826 units=m

New Line.LINE1654 bus1=1622.1.2.3.4 bus2=1655.1.2.3.4 phases=4 linecode=LC6 length=1.2134 units=m

New Line.LINE1658 bus1=1625.1.2.3.4 bus2=1659.1.2.3.4 phases=4 linecode=LC6 length=2.554 units=m

New Line.LINE1722 bus1=1694.1.2.3.4 bus2=1723.1.2.3.4 phases=4 linecode=LC6 length=2.9682 units=m

New Line.LINE1739 bus1=1712.1.2.3.4 bus2=1740.1.2.3.4 phases=4 linecode=LC2 length=3.465 units=m

New Line.LINE1770 bus1=1745.1.2.3.4 bus2=1771.1.2.3.4 phases=4 linecode=LC6 length=4.4155 units=m

New Line.LINE1776 bus1=1751.1.2.3.4 bus2=1777.1.2.3.4 phases=4 linecode=LC6 length=2.5921 units=m

New Line.LINE1784 bus1=1758.1.2.3.4 bus2=1785.1.2.3.4 phases=4 linecode=LC6 length=4.766 units=m

New Line.LINE1804 bus1=1782.1.2.3.4 bus2=1805.1.2.3.4 phases=4 linecode=LC6 length=1.8618 units=m

New Line.LINE1806 bus1=1783.1.2.3.4 bus2=1807.1.2.3.4 phases=4 linecode=LC6 length=2.1699 units=m

New Line.LINE1816 bus1=1792.1.2.3.4 bus2=1817.1.2.3.4 phases=4 linecode=LC2 length=2.591 units=m

New Line.LINE1821 bus1=1795.1.2.3.4 bus2=1822.1.2.3.4 phases=4 linecode=LC2 length=4.1516 units=m

New Line.LINE1847 bus1=1828.1.2.3.4 bus2=1848.1.2.3.4 phases=4 linecode=LC6 length=2.965 units=m

New Line.LINE1856 bus1=1837.1.2.3.4 bus2=1857.1.2.3.4 phases=4 linecode=LC2 length=3.2278 units=m

New Line.LINE1864 bus1=1844.1.2.3.4 bus2=1865.1.2.3.4 phases=4 linecode=LC6 length=5.4341 units=m

New Line.LINE1866 bus1=1846.1.2.3.4 bus2=1867.1.2.3.4 phases=4 linecode=LC6 length=2.2877 units=m

New Line.LINE1887 bus1=1871.1.2.3.4 bus2=1888.1.2.3.4 phases=4 linecode=LC6 length=1.9181 units=m

New Line.LINE1889 bus1=1872.1.2.3.4 bus2=1890.1.2.3.4 phases=4 linecode=LC4 length=15.6418 units=m

New Line.LINE1935 bus1=1917.1.2.3.4 bus2=1936.1.2.3.4 phases=4 linecode=LC2 length=3.8576 units=m

New Line.LINE1952 bus1=1933.1.2.3.4 bus2=1953.1.2.3.4 phases=4 linecode=LC6 length=1.7564 units=m

New Line.LINE1958 bus1=1940.1.2.3.4 bus2=1959.1.2.3.4 phases=4 linecode=LC6 length=4.2216 units=m

New Line.LINE2029 bus1=2013.1.2.3.4 bus2=2030.1.2.3.4 phases=4 linecode=LC6 length=4.1983 units=m

New Line.LINE2032 bus1=2015.1.2.3.4 bus2=2033.1.2.3.4 phases=4 linecode=LC6 length=3.1328 units=m

New Line.LINE2095 bus1=2080.1.2.3.4 bus2=2096.1.2.3.4 phases=4 linecode=LC6 length=3.8827 units=m

New Line.LINE2163 bus1=2152.1.2.3.4 bus2=2164.1.2.3.4 phases=4 linecode=LC2 length=1.5268 units=m

New Line.LINE2183 bus1=2172.1.2.3.4 bus2=2184.1.2.3.4 phases=4 linecode=LC6 length=3.2515 units=m

New Line.LINE2219 bus1=2213.1.2.3.4 bus2=2220.1.2.3.4 phases=4 linecode=LC6 length=3.3774 units=m

New Line.LINE2249 bus1=2246.1.2.3.4 bus2=2250.1.2.3.4 phases=4 linecode=LC6 length=3.9135 units=m

New Line.LINE2251 bus1=2247.1.2.3.4 bus2=2252.1.2.3.4 phases=4 linecode=LC6 length=4.4422 units=m
