! Reduced enabled lines.

New Line._virtual_line0_line1_line2_line3_line4_line5_line6_line7_line8_line9_line10_line11_line12_line13_line14_line15_line16_line17_line18_line19_line20_line21_line22_line23_line24_line25_line26_line27_line28_line29_line30_line31_line32_line33_line34 bus1=35.1.2.3.4 bus2=sourcebus.1.2.3.4 phases=4 linecode=LC8 length=23.223188 units=m
! reduced_from=line0,line1,line2,line3,line4,line5,line6,line7,line8,line9,line10,line11,line12,line13,line14,line15,line16,line17,line18,line19,line20,line21,line22,line23,line24,line25,line26,line27,line28,line29,line30,line31,line32,line33,line34
! eliminated_buses=1,2,3,4,5,6,7,8,9,10,11,12,13,14,15,16,17,18,19,20,21,22,23,24,25,26,27,28,29,30,31,32,33,34

New Line._virtual_line35_line37_line39_line41_line43_line45_line47_line49_line51_line53_line55_line57_line59_line61_line63_line65_line67_line69_line72_line75_line78_line81_line84_line89_line95_line103_line111_line117 bus1=118.1.2.3.4 bus2=35.1.2.3.4 phases=4 linecode=LC8 length=48.78165 units=m
! reduced_from=line35,line37,line39,line41,line43,line45,line47,line49,line51,line53,line55,line57,line59,line61,line63,line65,line67,line69,line72,line75,line78,line81,line84,line89,line95,line103,line111,line117
! eliminated_buses=36,38,40,42,44,46,48,50,52,54,56,58,60,62,64,66,68,70,73,76,79,82,85,90,96,104,112

New Line._virtual_line36_line38_line40_line42_line44_line46_line48_line50_line52_line54_line56_line58_line60_line62_line64_line66_line68_line70_line73_line76_line79_line82_line87_line93_line100 bus1=101.1.2.3.4 bus2=35.1.2.3.4 phases=4 linecode=LC4 length=36.86071 units=m
! reduced_from=line36,line38,line40,line42,line44,line46,line48,line50,line52,line54,line56,line58,line60,line62,line64,line66,line68,line70,line73,line76,line79,line82,line87,line93,line100
! eliminated_buses=37,39,41,43,45,47,49,51,53,55,57,59,61,63,65,67,69,71,74,77,80,83,88,94

New Line._virtual_line107_line113_line118_line126_line134_line142_line148_line158_line170_line181_line192_line205_line216 bus1=217.1.2.3.4 bus2=101.1.2.3.4 phases=4 linecode=LC6 length=26.883186 units=m
! reduced_from=line107,line113,line118,line126,line134,line142,line148,line158,line170,line181,line192,line205,line216
! eliminated_buses=108,114,119,127,135,143,149,159,171,182,193,206

New Line._virtual_line108_line115_line121 bus1=122.1.2.3.4 bus2=101.1.2.3.4 phases=4 linecode=LC4 length=8.5625 units=m
! reduced_from=line108,line115,line121
! eliminated_buses=109,116

New Line._virtual_line123_line131_line139_line145_line152_line163_line175 bus1=118.1.2.3.4 bus2=176.1.2.3.4 phases=4 linecode=LC4 length=73.8275 units=m
! reduced_from=line123,line131,line139,line145,line152,line163,line175
! eliminated_buses=124,132,140,146,153,164

New Line._virtual_line124_line133_line141_line147_line157_line169_line180_line191_line204_line215 bus1=118.1.2.3.4 bus2=216.1.2.3.4 phases=4 linecode=LC9 length=14.97031 units=m
! reduced_from=line124,line133,line141,line147,line157,line169,line180,line191,line204,line215
! eliminated_buses=125,134,142,148,158,170,181,192,205

New Line._virtual_line129_line137_line143_line149_line159_line171_line182_line193_line206_line217_line227_line237_line249_line262 bus1=263.1.2.3.4 bus2=122.1.2.3.4 phases=4 linecode=LC1 length=19.40802 units=m
! reduced_from=line129,line137,line143,line149,line159,line171,line182,line193,line206,line217,line227,line237,line249,line262
! eliminated_buses=130,138,144,150,160,172,183,194,207,218,228,238,250

New Line._virtual_line185_line195_line208_line218_line228_line238_line250_line263_line275_line286_line297_line307_line316_line327_line339_line350_line361_line371_line380_line387 bus1=176.1.2.3.4 bus2=388.1.2.3.4 phases=4 linecode=LC4 length=93.66649 units=m
! reduced_from=line185,line195,line208,line218,line228,line238,line250,line263,line275,line286,line297,line307,line316,line327,line339,line350,line361,line371,line380,line387
! eliminated_buses=186,196,209,219,229,239,251,264,276,287,298,308,317,328,340,351,362,372,381

New Line._virtual_line200_line212_line222_line232_line244_line257_line268_line279_line290_line300 bus1=188.1.2.3.4 bus2=301.1.2.3.4 phases=4 linecode=LC2 length=9.26099 units=m
! reduced_from=line200,line212,line222,line232,line244,line257,line268,line279,line290,line300
! eliminated_buses=201,213,223,233,245,258,269,280,291

New Line._virtual_line225_line235_line247_line260_line271_line281_line292_line302_line311 bus1=312.1.2.3.4 bus2=216.1.2.3.4 phases=4 linecode=LC2 length=17.00613 units=m
! reduced_from=line225,line235,line247,line260,line271,line281,line292,line302,line311
! eliminated_buses=226,236,248,261,272,282,293,303

New Line._virtual_line226_line236_line248_line261 bus1=216.1.2.3.4 bus2=262.1.2.3.4 phases=4 linecode=LC9 length=8.8859 units=m
! reduced_from=line226,line236,line248,line261
! eliminated_buses=227,237,249

New Line._virtual_line272_line282_line293_line303_line312_line322_line334_line345_line356_line366_line375_line384_line391 bus1=392.1.2.3.4 bus2=262.1.2.3.4 phases=4 linecode=LC2 length=15.207447 units=m
! reduced_from=line272,line282,line293,line303,line312,line322,line334,line345,line356,line366,line375,line384,line391
! eliminated_buses=273,283,294,304,313,323,335,346,357,367,376,385

New Line._virtual_line273_line283_line294_line304_line313_line323_line335_line346_line357_line367_line376 bus1=262.1.2.3.4 bus2=377.1.2.3.4 phases=4 linecode=LC2 length=14.33966 units=m
! reduced_from=line273,line283,line294,line304,line313,line323,line335,line346,line357,line367,line376
! eliminated_buses=274,284,295,305,314,324,336,347,358,368

New Line._virtual_line284_line295_line305_line314_line324_line336_line347_line358_line368_line377 bus1=378.1.2.3.4 bus2=275.1.2.3.4 phases=4 linecode=LC2 length=14.90776 units=m
! reduced_from=line284,line295,line305,line314,line324,line336,line347,line358,line368,line377
! eliminated_buses=285,296,306,315,325,337,348,359,369

New Line._virtual_line285_line296_line306_line315 bus1=316.1.2.3.4 bus2=275.1.2.3.4 phases=4 linecode=LC9 length=5.76087 units=m
! reduced_from=line285,line296,line306,line315
! eliminated_buses=286,297,307

New Line._virtual_line309_line320_line332_line343_line354_line364_line373_line382_line389_line395_line401_line408 bus1=409.1.2.3.4 bus2=301.1.2.3.4 phases=4 linecode=LC2 length=30.45955 units=m
! reduced_from=line309,line320,line332,line343,line354,line364,line373,line382,line389,line395,line401,line408
! eliminated_buses=310,321,333,344,355,365,374,383,390,396,402

New Line._virtual_line310_line321_line333_line344_line355_line365_line374_line383_line390_line396_line402 bus1=301.1.2.3.4 bus2=403.1.2.3.4 phases=4 linecode=LC2 length=5.05674 units=m
! reduced_from=line310,line321,line333,line344,line355,line365,line374,line383,line390,line396,line402
! eliminated_buses=311,322,334,345,356,366,375,384,391,397

New Line._virtual_line325_line337_line348_line359_line369_line378_line385_line392_line397_line403_line412_line420_line428 bus1=429.1.2.3.4 bus2=316.1.2.3.4 phases=4 linecode=LC2 length=14.66579 units=m
! reduced_from=line325,line337,line348,line359,line369,line378,line385,line392,line397,line403,line412,line420,line428
! eliminated_buses=326,338,349,360,370,379,386,393,398,404,413,421

New Line._virtual_line326_line338_line349_line360_line370_line379_line386_line393_line398_line404_line413_line421_line429_line437_line446_line453_line460_line469_line479_line491 bus1=492.1.2.3.4 bus2=316.1.2.3.4 phases=4 linecode=LC9 length=20.71195 units=m
! reduced_from=line326,line338,line349,line360,line370,line379,line386,line393,line398,line404,line413,line421,line429,line437,line446,line453,line460,line469,line479,line491
! eliminated_buses=327,339,350,361,371,380,387,394,399,405,414,422,430,438,447,454,461,470,480

New Line._virtual_line394_line400_line406_line415_line423_line431 bus1=432.1.2.3.4 bus2=388.1.2.3.4 phases=4 linecode=LC8 length=23.18192 units=m
! reduced_from=line394,line400,line406,line415,line423,line431
! eliminated_buses=395,401,407,416,424

New Line._virtual_line409_line417_line425 bus1=426.1.2.3.4 bus2=403.1.2.3.4 phases=4 linecode=LC2 length=26.3396 units=m
! reduced_from=line409,line417,line425
! eliminated_buses=410,418

New Line._virtual_line411_line419_line427_line436_line445_line452_line459_line468_line478_line490_line501_line513_line527 bus1=403.1.2.3.4 bus2=528.1.2.3.4 phases=4 linecode=LC2 length=13.0064 units=m
! reduced_from=line411,line419,line427,line436,line445,line452,line459,line468,line478,line490,line501,line513,line527
! eliminated_buses=412,420,428,437,446,453,460,469,479,491,502,514

New Line._virtual_line433_line442_line449_line456_line465_line475_line486_line498_line511_line525_line539 bus1=540.1.2.3.4 bus2=426.1.2.3.4 phases=4 linecode=LC2 length=16.22412 units=m
! reduced_from=line433,line442,line449,line456,line465,line475,line486,line498,line511,line525,line539
! eliminated_buses=434,443,450,457,466,476,487,499,512,526

New Line._virtual_line434_line443_line450_line457_line466_line476 bus1=426.1.2.3.4 bus2=477.1.2.3.4 phases=4 linecode=LC2 length=14.4181 units=m
! reduced_from=line434,line443,line450,line457,line466,line476
! eliminated_buses=435,444,451,458,467

New Line._virtual_line440_line447_line454_line462 bus1=463.1.2.3.4 bus2=432.1.2.3.4 phases=4 linecode=LC8 length=26.9233 units=m
! reduced_from=line440,line447,line454,line462
! eliminated_buses=441,448,455

New Line._virtual_line471_line481_line493_line505_line519_line533_line546_line558_line571_line585 bus1=463.1.2.3.4 bus2=586.1.2.3.4 phases=4 linecode=LC6 length=9.745424 units=m
! reduced_from=line471,line481,line493,line505,line519,line533,line546,line558,line571,line585
! eliminated_buses=472,482,494,506,520,534,547,559,572

New Line._virtual_line482_line494_line506_line520_line534_line547_line559 bus1=560.1.2.3.4 bus2=473.1.2.3.4 phases=4 linecode=LC6 length=7.743919 units=m
! reduced_from=line482,line494,line506,line520,line534,line547,line559
! eliminated_buses=483,495,507,521,535,548

New Line._virtual_line483_line495 bus1=496.1.2.3.4 bus2=473.1.2.3.4 phases=4 linecode=LC8 length=6.365 units=m
! reduced_from=line483,line495
! eliminated_buses=484

New Line._virtual_line487_line499 bus1=477.1.2.3.4 bus2=500.1.2.3.4 phases=4 linecode=LC2 length=5.9425 units=m
! reduced_from=line487,line499
! eliminated_buses=488

New Line._virtual_line503_line517_line531_line544_line557_line570_line584_line597_line609_line623_line638_line657 bus1=492.1.2.3.4 bus2=658.1.2.3.4 phases=4 linecode=LC9 length=17.3771 units=m
! reduced_from=line503,line517,line531,line544,line557,line570,line584,line597,line609,line623,line638,line657
! eliminated_buses=504,518,532,545,558,571,585,598,610,624,639

New Line._virtual_line507_line521_line535 bus1=536.1.2.3.4 bus2=496.1.2.3.4 phases=4 linecode=LC8 length=11.9948 units=m
! reduced_from=line507,line521,line535
! eliminated_buses=508,522

New Line._virtual_line508_line522_line536_line550_line563_line578_line592_line604 bus1=496.1.2.3.4 bus2=605.1.2.3.4 phases=4 linecode=LC4 length=7.15819 units=m
! reduced_from=line508,line522,line536,line550,line563,line578,line592,line604
! eliminated_buses=509,523,537,551,564,579,593

New Line._virtual_line514_line528_line541_line554_line567_line581_line593_line605_line619_line634_line653 bus1=654.1.2.3.4 bus2=503.1.2.3.4 phases=4 linecode=LC1 length=16.09062 units=m
! reduced_from=line514,line528,line541,line554,line567,line581,line593,line605,line619,line634,line653
! eliminated_buses=515,529,542,555,568,582,594,606,620,635

New Line._virtual_line515_line529_line542_line555_line568_line582 bus1=503.1.2.3.4 bus2=583.1.2.3.4 phases=4 linecode=LC9 length=18.3623 units=m
! reduced_from=line515,line529,line542,line555,line568,line582
! eliminated_buses=516,530,543,556,569

New Line._virtual_line516_line530_line543_line556_line569_line583_line596_line608_line622_line637_line656_line669_line685_line701 bus1=702.1.2.3.4 bus2=503.1.2.3.4 phases=4 linecode=LC2 length=17.28034 units=m
! reduced_from=line516,line530,line543,line556,line569,line583,line596,line608,line622,line637,line656,line669,line685,line701
! eliminated_buses=517,531,544,557,570,584,597,609,623,638,657,670,686

New Line._virtual_line548_line560 bus1=536.1.2.3.4 bus2=561.1.2.3.4 phases=4 linecode=LC4 length=0.444474 units=m
! reduced_from=line548,line560
! eliminated_buses=549

New Line._virtual_line561_line575_line587_line599_line611 bus1=550.1.2.3.4 bus2=612.1.2.3.4 phases=4 linecode=LC6 length=3.43636 units=m
! reduced_from=line561,line575,line587,line599,line611
! eliminated_buses=562,576,588,600

New Line._virtual_line562_line577 bus1=550.1.2.3.4 bus2=578.1.2.3.4 phases=4 linecode=LC8 length=7.9574 units=m
! reduced_from=line562,line577
! eliminated_buses=563

New Line._virtual_line574_line586_line598_line610_line624_line639_line658_line673_line690_line707_line721_line735 bus1=561.1.2.3.4 bus2=736.1.2.3.4 phases=4 linecode=LC4 length=44.03505 units=m
! reduced_from=line574,line586,line598,line610,line624,line639,line658,line673,line690,line707,line721,line735
! eliminated_buses=575,587,599,611,625,640,659,674,691,708,722

New Line._virtual_line589_line601_line613_line628_line642_line661_line676_line692 bus1=578.1.2.3.4 bus2=693.1.2.3.4 phases=4 linecode=LC6 length=7.82631 units=m
! reduced_from=line589,line601,line613,line628,line642,line661,line676,line692
! eliminated_buses=590,602,614,629,643,662,677

New Line._virtual_line606_line620_line635_line654_line666_line682_line698_line713_line727_line742_line757 bus1=758.1.2.3.4 bus2=596.1.2.3.4 phases=4 linecode=LC2 length=17.53648 units=m
! reduced_from=line606,line620,line635,line654,line666,line682,line698,line713,line727,line742,line757
! eliminated_buses=607,621,636,655,667,683,699,714,728,743

New Line._virtual_line607_line621_line636_line655_line668_line684_line700_line715_line729_line744_line759_line776_line793 bus1=596.1.2.3.4 bus2=794.1.2.3.4 phases=4 linecode=LC9 length=16.99069 units=m
! reduced_from=line607,line621,line636,line655,line668,line684,line700,line715,line729,line744,line759,line776,line793
! eliminated_buses=608,622,637,656,669,685,701,716,730,745,760,777

New Line._virtual_line617_line632_line646_line664_line679_line695_line711 bus1=605.1.2.3.4 bus2=712.1.2.3.4 phases=4 linecode=LC6 length=4.449384 units=m
! reduced_from=line617,line632,line646,line664,line679,line695,line711
! eliminated_buses=618,633,647,665,680,696

New Line._virtual_line618_line633 bus1=605.1.2.3.4 bus2=634.1.2.3.4 phases=4 linecode=LC4 length=2.04256 units=m
! reduced_from=line618,line633
! eliminated_buses=619

New Line._virtual_line626_line640_line659_line674_line691_line708_line722_line736 bus1=612.1.2.3.4 bus2=737.1.2.3.4 phases=4 linecode=LC6 length=7.3641 units=m
! reduced_from=line626,line640,line659,line674,line691,line708,line722,line736
! eliminated_buses=627,641,660,675,692,709,723

New Line._virtual_line652_line665_line680_line696_line712 bus1=713.1.2.3.4 bus2=634.1.2.3.4 phases=4 linecode=LC4 length=18.7461 units=m
! reduced_from=line652,line665,line680,line696,line712
! eliminated_buses=653,666,681,697

New Line._virtual_line670_line686_line702_line716_line730_line745_line760_line777 bus1=658.1.2.3.4 bus2=778.1.2.3.4 phases=4 linecode=LC9 length=13.54515 units=m
! reduced_from=line670,line686,line702,line716,line730,line745,line760,line777
! eliminated_buses=671,687,703,717,731,746,761

New Line._virtual_line671_line687_line703_line717_line731_line746_line761_line778_line796_line817_line837 bus1=838.1.2.3.4 bus2=658.1.2.3.4 phases=4 linecode=LC2 length=20.63284 units=m
! reduced_from=line671,line687,line703,line717,line731,line746,line761,line778,line796,line817,line837
! eliminated_buses=672,688,704,718,732,747,762,779,797,818

New Line._virtual_line672_line688_line704_line718_line732_line747_line762_line779_line797_line818_line838_line858 bus1=859.1.2.3.4 bus2=658.1.2.3.4 phases=4 linecode=LC2 length=17.65662 units=m
! reduced_from=line672,line688,line704,line718,line732,line747,line762,line779,line797,line818,line838,line858
! eliminated_buses=673,689,705,719,733,748,763,780,798,819,839

New Line._virtual_line726_line741_line756_line775_line792_line812_line833_line854 bus1=855.1.2.3.4 bus2=713.1.2.3.4 phases=4 linecode=LC6 length=8.12367 units=m
! reduced_from=line726,line741,line756,line775,line792,line812,line833,line854
! eliminated_buses=727,742,757,776,793,813,834

New Line._virtual_line750_line765_line780_line798_line819_line839_line859_line878_line897_line916_line935_line953 bus1=736.1.2.3.4 bus2=954.1.2.3.4 phases=4 linecode=LC6 length=9.623857 units=m
! reduced_from=line750,line765,line780,line798,line819,line839,line859,line878,line897,line916,line935,line953
! eliminated_buses=751,766,781,799,820,840,860,879,898,917,936

New Line._virtual_line766_line782 bus1=752.1.2.3.4 bus2=783.1.2.3.4 phases=4 linecode=LC4 length=20.7947 units=m
! reduced_from=line766,line782
! eliminated_buses=767

New Line._virtual_line767_line783_line802_line823_line843_line863_line882_line901_line922_line940 bus1=752.1.2.3.4 bus2=941.1.2.3.4 phases=4 linecode=LC1 length=15.37497 units=m
! reduced_from=line767,line783,line802,line823,line843,line863,line882,line901,line922,line940
! eliminated_buses=768,784,803,824,844,864,883,902,923

New Line._virtual_line768_line784_line803_line824_line844_line864_line883_line902 bus1=752.1.2.3.4 bus2=903.1.2.3.4 phases=4 linecode=LC1 length=10.6581 units=m
! reduced_from=line768,line784,line803,line824,line844,line864,line883,line902
! eliminated_buses=769,785,804,825,845,865,884

New Line._virtual_line769_line785_line804_line825_line845_line865_line884_line903_line923_line941 bus1=752.1.2.3.4 bus2=942.1.2.3.4 phases=4 linecode=LC1 length=13.20052 units=m
! reduced_from=line769,line785,line804,line825,line845,line865,line884,line903,line923,line941
! eliminated_buses=770,786,805,826,846,866,885,904,924

New Line._virtual_line773_line789_line808_line828_line848_line868_line887_line906 bus1=907.1.2.3.4 bus2=756.1.2.3.4 phases=4 linecode=LC6 length=7.219041 units=m
! reduced_from=line773,line789,line808,line828,line848,line868,line887,line906
! eliminated_buses=774,790,809,829,849,869,888

New Line._virtual_line791_line811_line832_line853_line874_line893_line912 bus1=775.1.2.3.4 bus2=913.1.2.3.4 phases=4 linecode=LC6 length=7.438652 units=m
! reduced_from=line791,line811,line832,line853,line874,line893,line912
! eliminated_buses=792,812,833,854,875,894

New Line._virtual_line794_line815_line835_line856_line876_line895_line914_line933_line952_line970 bus1=971.1.2.3.4 bus2=778.1.2.3.4 phases=4 linecode=LC9 length=11.15041 units=m
! reduced_from=line794,line815,line835,line856,line876,line895,line914,line933,line952,line970
! eliminated_buses=795,816,836,857,877,896,915,934,953

New Line._virtual_line795_line816_line836_line857_line877_line896_line915_line934 bus1=778.1.2.3.4 bus2=935.1.2.3.4 phases=4 linecode=LC2 length=12.49987 units=m
! reduced_from=line795,line816,line836,line857,line877,line896,line915,line934
! eliminated_buses=796,817,837,858,878,897,916

New Line._virtual_line800_line821_line841_line861_line879_line898 bus1=899.1.2.3.4 bus2=783.1.2.3.4 phases=4 linecode=LC6 length=4.44502 units=m
! reduced_from=line800,line821,line841,line861,line879,line898
! eliminated_buses=801,822,842,862,880

New Line._virtual_line801_line822_line842_line862 bus1=863.1.2.3.4 bus2=783.1.2.3.4 phases=4 linecode=LC4 length=16.0961 units=m
! reduced_from=line801,line822,line842,line862
! eliminated_buses=802,823,843

New Line._virtual_line809_line829_line849_line869_line888_line907_line927_line945_line961_line980_line1000_line1022_line1042_line1064 bus1=1065.1.2.3.4 bus2=791.1.2.3.4 phases=4 linecode=LC6 length=7.871934 units=m
! reduced_from=line809,line829,line849,line869,line888,line907,line927,line945,line961,line980,line1000,line1022,line1042,line1064
! eliminated_buses=810,830,850,870,889,908,928,946,962,981,1001,1023,1043

New Line._virtual_line813_line834_line855_line875_line894_line913_line932_line951 bus1=794.1.2.3.4 bus2=952.1.2.3.4 phases=4 linecode=LC9 length=6.50183 units=m
! reduced_from=line813,line834,line855,line875,line894,line913,line932,line951
! eliminated_buses=814,835,856,876,895,914,933

New Line._virtual_line830_line850_line870_line889_line908_line928_line946_line962_line981_line1001 bus1=811.1.2.3.4 bus2=1002.1.2.3.4 phases=4 linecode=LC2 length=7.35745 units=m
! reduced_from=line830,line850,line870,line889,line908,line928,line946,line962,line981,line1001
! eliminated_buses=831,851,871,890,909,929,947,963,982

New Line._virtual_line851_line871_line890_line909_line929_line947_line963_line982_line1002_line1023 bus1=832.1.2.3.4 bus2=1024.1.2.3.4 phases=4 linecode=LC6 length=7.924555 units=m
! reduced_from=line851,line871,line890,line909,line929,line947,line963,line982,line1002,line1023
! eliminated_buses=852,872,891,910,930,948,964,983,1003

New Line._virtual_line872_line891_line910_line930_line948_line964_line983_line1003_line1024_line1043_line1065_line1084 bus1=853.1.2.3.4 bus2=1085.1.2.3.4 phases=4 linecode=LC6 length=6.827939 units=m
! reduced_from=line872,line891,line910,line930,line948,line964,line983,line1003,line1024,line1043,line1065,line1084
! eliminated_buses=873,892,911,931,949,965,984,1004,1025,1044,1066

New Line._virtual_line873_line892_line911_line931 bus1=853.1.2.3.4 bus2=932.1.2.3.4 phases=4 linecode=LC4 length=15.6074 units=m
! reduced_from=line873,line892,line911,line931
! eliminated_buses=874,893,912

New Line._virtual_line880_line899 bus1=863.1.2.3.4 bus2=900.1.2.3.4 phases=4 linecode=LC4 length=13.6076 units=m
! reduced_from=line880,line899
! eliminated_buses=881

New Line._virtual_line881_line900_line921_line939_line958 bus1=959.1.2.3.4 bus2=863.1.2.3.4 phases=4 linecode=LC2 length=4.82448 units=m
! reduced_from=line881,line900,line921,line939,line958
! eliminated_buses=882,901,922,940

New Line._virtual_line918_line936_line954_line971_line992_line1013_line1034_line1054_line1076_line1094_line1110_line1127 bus1=1128.1.2.3.4 bus2=899.1.2.3.4 phases=4 linecode=LC6 length=7.622043 units=m
! reduced_from=line918,line936,line954,line971,line992,line1013,line1034,line1054,line1076,line1094,line1110,line1127
! eliminated_buses=919,937,955,972,993,1014,1035,1055,1077,1095,1111

New Line._virtual_line919_line937_line955_line972_line993 bus1=994.1.2.3.4 bus2=900.1.2.3.4 phases=4 linecode=LC2 length=4.41985 units=m
! reduced_from=line919,line937,line955,line972,line993
! eliminated_buses=920,938,956,973

New Line._virtual_line920_line938 bus1=900.1.2.3.4 bus2=939.1.2.3.4 phases=4 linecode=LC4 length=16.1176 units=m
! reduced_from=line920,line938
! eliminated_buses=921

New Line._virtual_line949_line965_line984_line1004_line1025_line1044 bus1=932.1.2.3.4 bus2=1045.1.2.3.4 phases=4 linecode=LC6 length=7.84982 units=m
! reduced_from=line949,line965,line984,line1004,line1025,line1044
! eliminated_buses=950,966,985,1005,1026

New Line._virtual_line956_line973_line994_line1016_line1036 bus1=939.1.2.3.4 bus2=1037.1.2.3.4 phases=4 linecode=LC2 length=4.75109 units=m
! reduced_from=line956,line973,line994,line1016,line1036
! eliminated_buses=957,974,995,1017

New Line._virtual_line957_line975_line996 bus1=939.1.2.3.4 bus2=997.1.2.3.4 phases=4 linecode=LC4 length=17.5744 units=m
! reduced_from=line957,line975,line996
! eliminated_buses=958,976

New Line._virtual_line967_line987_line1008_line1030_line1050 bus1=951.1.2.3.4 bus2=1051.1.2.3.4 phases=4 linecode=LC6 length=6.3029 units=m
! reduced_from=line967,line987,line1008,line1030,line1050
! eliminated_buses=968,988,1009,1031

New Line._virtual_line977_line997_line1019_line1040_line1062 bus1=959.1.2.3.4 bus2=1063.1.2.3.4 phases=4 linecode=LC2 length=5.70934 units=m
! reduced_from=line977,line997,line1019,line1040,line1062
! eliminated_buses=978,998,1020,1041

New Line._virtual_line985_line1005_line1026_line1045_line1066_line1085 bus1=967.1.2.3.4 bus2=1086.1.2.3.4 phases=4 linecode=LC6 length=7.08465 units=m
! reduced_from=line985,line1005,line1026,line1045,line1066,line1085
! eliminated_buses=986,1006,1027,1046,1067

New Line._virtual_line988_line1009_line1031_line1051 bus1=969.1.2.3.4 bus2=1052.1.2.3.4 phases=4 linecode=LC9 length=4.69 units=m
! reduced_from=line988,line1009,line1031,line1051
! eliminated_buses=989,1010,1032

New Line._virtual_line990_line1010_line1032_line1052_line1074_line1092_line1108_line1124_line1142_line1163 bus1=971.1.2.3.4 bus2=1164.1.2.3.4 phases=4 linecode=LC9 length=10.10799 units=m
! reduced_from=line990,line1010,line1032,line1052,line1074,line1092,line1108,line1124,line1142,line1163
! eliminated_buses=991,1011,1033,1053,1075,1093,1109,1125,1143

New Line._virtual_line1007_line1029_line1049_line1071_line1090_line1105 bus1=987.1.2.3.4 bus2=1106.1.2.3.4 phases=4 linecode=LC6 length=6.01792 units=m
! reduced_from=line1007,line1029,line1049,line1071,line1090,line1105
! eliminated_buses=1008,1030,1050,1072,1091

New Line._virtual_line1011_line1033_line1053_line1075_line1093_line1109_line1125_line1143_line1164_line1187 bus1=992.1.2.3.4 bus2=1188.1.2.3.4 phases=4 linecode=LC9 length=10.46071 units=m
! reduced_from=line1011,line1033,line1053,line1075,line1093,line1109,line1125,line1143,line1164,line1187
! eliminated_buses=1012,1034,1054,1076,1094,1110,1126,1144,1165

New Line._virtual_line1015_line1035_line1055_line1077_line1095 bus1=1096.1.2.3.4 bus2=994.1.2.3.4 phases=4 linecode=LC2 length=7.6019 units=m
! reduced_from=line1015,line1035,line1055,line1077,line1095
! eliminated_buses=1016,1036,1056,1078

New Line._virtual_line1017_line1037_line1058_line1079_line1097 bus1=997.1.2.3.4 bus2=1098.1.2.3.4 phases=4 linecode=LC2 length=4.46555 units=m
! reduced_from=line1017,line1037,line1058,line1079,line1097
! eliminated_buses=1018,1038,1059,1080

New Line._virtual_line1027_line1046 bus1=1007.1.2.3.4 bus2=1047.1.2.3.4 phases=4 linecode=LC4 length=5.2008 units=m
! reduced_from=line1027,line1046
! eliminated_buses=1028

New Line._virtual_line1028_line1048_line1070_line1089 bus1=1090.1.2.3.4 bus2=1007.1.2.3.4 phases=4 linecode=LC6 length=5.62103 units=m
! reduced_from=line1028,line1048,line1070,line1089
! eliminated_buses=1029,1049,1071

New Line._virtual_line1057_line1078_line1096_line1111_line1128 bus1=1037.1.2.3.4 bus2=1129.1.2.3.4 phases=4 linecode=LC2 length=6.12965 units=m
! reduced_from=line1057,line1078,line1096,line1111,line1128
! eliminated_buses=1058,1079,1097,1112

New Line._virtual_line1059_line1080 bus1=1081.1.2.3.4 bus2=1039.1.2.3.4 phases=4 linecode=LC3 length=8.3855 units=m
! reduced_from=line1059,line1080
! eliminated_buses=1060

New Line._virtual_line1061_line1082_line1101_line1120_line1136_line1154_line1174 bus1=1175.1.2.3.4 bus2=1039.1.2.3.4 phases=4 linecode=LC6 length=10.89743 units=m
! reduced_from=line1061,line1082,line1101,line1120,line1136,line1154,line1174
! eliminated_buses=1062,1083,1102,1121,1137,1155

New Line._virtual_line1067_line1086_line1102_line1121 bus1=1047.1.2.3.4 bus2=1122.1.2.3.4 phases=4 linecode=LC4 length=22.9783 units=m
! reduced_from=line1067,line1086,line1102,line1121
! eliminated_buses=1068,1087,1103

New Line._virtual_line1068_line1087_line1103_line1122 bus1=1123.1.2.3.4 bus2=1047.1.2.3.4 phases=4 linecode=LC6 length=6.29805 units=m
! reduced_from=line1068,line1087,line1103,line1122
! eliminated_buses=1069,1088,1104

New Line._virtual_line1073_line1091 bus1=1092.1.2.3.4 bus2=1052.1.2.3.4 phases=4 linecode=LC9 length=9.5355 units=m
! reduced_from=line1073,line1091
! eliminated_buses=1074

New Line._virtual_line1098_line1114_line1130_line1146_line1167_line1190_line1215_line1238 bus1=1081.1.2.3.4 bus2=1239.1.2.3.4 phases=4 linecode=LC6 length=10.17741 units=m
! reduced_from=line1098,line1114,line1130,line1146,line1167,line1190,line1215,line1238
! eliminated_buses=1099,1115,1131,1147,1168,1191,1216

New Line._virtual_line1099_line1115 bus1=1081.1.2.3.4 bus2=1116.1.2.3.4 phases=4 linecode=LC3 length=28.0896 units=m
! reduced_from=line1099,line1115
! eliminated_buses=1100

New Line._virtual_line1107_line1123_line1141_line1162 bus1=1092.1.2.3.4 bus2=1163.1.2.3.4 phases=4 linecode=LC9 length=13.9444 units=m
! reduced_from=line1107,line1123,line1141,line1162
! eliminated_buses=1108,1124,1142

New Line._virtual_line1113_line1129_line1145_line1166_line1189 bus1=1190.1.2.3.4 bus2=1098.1.2.3.4 phases=4 linecode=LC2 length=7.13916 units=m
! reduced_from=line1113,line1129,line1145,line1166,line1189
! eliminated_buses=1114,1130,1146,1167

New Line._virtual_line1119_line1135_line1153_line1173_line1196_line1220_line1243_line1265 bus1=1101.1.2.3.4 bus2=1266.1.2.3.4 phases=4 linecode=LC6 length=5.11884 units=m
! reduced_from=line1119,line1135,line1153,line1173,line1196,line1220,line1243,line1265
! eliminated_buses=1120,1136,1154,1174,1197,1221,1244

New Line._virtual_line1131_line1147_line1168_line1191_line1216_line1239_line1261 bus1=1116.1.2.3.4 bus2=1262.1.2.3.4 phases=4 linecode=LC6 length=10.4189 units=m
! reduced_from=line1131,line1147,line1168,line1191,line1216,line1239,line1261
! eliminated_buses=1132,1148,1169,1192,1217,1240

New Line._virtual_line1132_line1148_line1169_line1192_line1217_line1240_line1262_line1284 bus1=1116.1.2.3.4 bus2=1285.1.2.3.4 phases=4 linecode=LC3 length=20.5409 units=m
! reduced_from=line1132,line1148,line1169,line1192,line1217,line1240,line1262,line1284
! eliminated_buses=1133,1149,1170,1193,1218,1241,1263

New Line._virtual_line1137_line1155_line1175_line1197_line1221_line1244_line1266_line1290_line1312_line1333_line1353_line1375 bus1=1376.1.2.3.4 bus2=1122.1.2.3.4 phases=4 linecode=LC3 length=23.0873 units=m
! reduced_from=line1137,line1155,line1175,line1197,line1221,line1244,line1266,line1290,line1312,line1333,line1353,line1375
! eliminated_buses=1138,1156,1176,1198,1222,1245,1267,1291,1313,1334,1354

New Line._virtual_line1157_line1179_line1203_line1228_line1252 bus1=1253.1.2.3.4 bus2=1139.1.2.3.4 phases=4 linecode=LC6 length=2.21477 units=m
! reduced_from=line1157,line1179,line1203,line1228,line1252
! eliminated_buses=1158,1180,1204,1229

New Line._virtual_line1160_line1180_line1204_line1229_line1253_line1276 bus1=1277.1.2.3.4 bus2=1140.1.2.3.4 phases=4 linecode=LC6 length=6.60907 units=m
! reduced_from=line1160,line1180,line1204,line1229,line1253,line1276
! eliminated_buses=1161,1181,1205,1230,1254

New Line._virtual_line1176_line1198_line1222_line1245_line1267_line1291 bus1=1157.1.2.3.4 bus2=1292.1.2.3.4 phases=4 linecode=LC6 length=5.16833 units=m
! reduced_from=line1176,line1198,line1222,line1245,line1267,line1291
! eliminated_buses=1177,1199,1223,1246,1268

New Line._virtual_line1182_line1206_line1231_line1254_line1277_line1300_line1320_line1339_line1358 bus1=1359.1.2.3.4 bus2=1163.1.2.3.4 phases=4 linecode=LC2 length=16.38755 units=m
! reduced_from=line1182,line1206,line1231,line1254,line1277,line1300,line1320,line1339,line1358
! eliminated_buses=1183,1207,1232,1255,1278,1301,1321,1340

New Line._virtual_line1183_line1207_line1232_line1255_line1278_line1301_line1321_line1340_line1359_line1381_line1403 bus1=1404.1.2.3.4 bus2=1163.1.2.3.4 phases=4 linecode=LC2 length=16.22776 units=m
! reduced_from=line1183,line1207,line1232,line1255,line1278,line1301,line1321,line1340,line1359,line1381,line1403
! eliminated_buses=1184,1208,1233,1256,1279,1302,1322,1341,1360,1382

New Line._virtual_line1185_line1210_line1235_line1258_line1281_line1304_line1324_line1343_line1363_line1385_line1408_line1435_line1463_line1492_line1519 bus1=1520.1.2.3.4 bus2=1164.1.2.3.4 phases=4 linecode=LC9 length=15.7501 units=m
! reduced_from=line1185,line1210,line1235,line1258,line1281,line1304,line1324,line1343,line1363,line1385,line1408,line1435,line1463,line1492,line1519
! eliminated_buses=1186,1211,1236,1259,1282,1305,1325,1344,1364,1386,1409,1436,1464,1493

New Line._virtual_line1199_line1223_line1246_line1268_line1292_line1313 bus1=1314.1.2.3.4 bus2=1178.1.2.3.4 phases=4 linecode=LC6 length=6.00899 units=m
! reduced_from=line1199,line1223,line1246,line1268,line1292,line1313
! eliminated_buses=1200,1224,1247,1269,1293

New Line._virtual_line1201_line1227_line1251_line1273_line1298_line1319 bus1=1320.1.2.3.4 bus2=1179.1.2.3.4 phases=4 linecode=LC6 length=5.93688 units=m
! reduced_from=line1201,line1227,line1251,line1273,line1298,line1319
! eliminated_buses=1202,1228,1252,1274,1299

New Line._virtual_line1208_line1233_line1256_line1279_line1302_line1322_line1341_line1360_line1382_line1404_line1431_line1459_line1488_line1515_line1541_line1566_line1589 bus1=1185.1.2.3.4 bus2=1590.1.2.3.4 phases=4 linecode=LC2 length=22.74743 units=m
! reduced_from=line1208,line1233,line1256,line1279,line1302,line1322,line1341,line1360,line1382,line1404,line1431,line1459,line1488,line1515,line1541,line1566,line1589
! eliminated_buses=1209,1234,1257,1280,1303,1323,1342,1361,1383,1405,1432,1460,1489,1516,1542,1567

New Line._virtual_line1209_line1234_line1257_line1280_line1303_line1323_line1342 bus1=1343.1.2.3.4 bus2=1185.1.2.3.4 phases=4 linecode=LC9 length=10.58701 units=m
! reduced_from=line1209,line1234,line1257,line1280,line1303,line1323,line1342
! eliminated_buses=1210,1235,1258,1281,1304,1324

New Line._virtual_line1212_line1236_line1259_line1282_line1305_line1325_line1344_line1364_line1386_line1409_line1436_line1464_line1493_line1520_line1547_line1571_line1593_line1615_line1634 bus1=1188.1.2.3.4 bus2=1635.1.2.3.4 phases=4 linecode=LC9 length=13.91893 units=m
! reduced_from=line1212,line1236,line1259,line1282,line1305,line1325,line1344,line1364,line1386,line1409,line1436,line1464,line1493,line1520,line1547,line1571,line1593,line1615,line1634
! eliminated_buses=1213,1237,1260,1283,1306,1326,1345,1365,1387,1410,1437,1465,1494,1521,1548,1572,1594,1616

New Line._virtual_line1225_line1250_line1272_line1297_line1318_line1338 bus1=1201.1.2.3.4 bus2=1339.1.2.3.4 phases=4 linecode=LC6 length=5.50545 units=m
! reduced_from=line1225,line1250,line1272,line1297,line1318,line1338
! eliminated_buses=1226,1251,1273,1298,1319

New Line._virtual_line1247_line1269_line1293_line1314_line1334 bus1=1335.1.2.3.4 bus2=1225.1.2.3.4 phases=4 linecode=LC4 length=15.4742 units=m
! reduced_from=line1247,line1269,line1293,line1314,line1334
! eliminated_buses=1248,1270,1294,1315

New Line._virtual_line1248_line1271_line1296_line1317_line1337 bus1=1338.1.2.3.4 bus2=1225.1.2.3.4 phases=4 linecode=LC6 length=7.04729 units=m
! reduced_from=line1248,line1271,line1296,line1317,line1337
! eliminated_buses=1249,1272,1297,1318

New Line._virtual_line1275_line1299 bus1=1300.1.2.3.4 bus2=1253.1.2.3.4 phases=4 linecode=LC6 length=4.7622 units=m
! reduced_from=line1275,line1299
! eliminated_buses=1276

New Line._virtual_line1289_line1311_line1332_line1352_line1374_line1395_line1418_line1445_line1472_line1499_line1525_line1552 bus1=1553.1.2.3.4 bus2=1266.1.2.3.4 phases=4 linecode=LC6 length=12.21036 units=m
! reduced_from=line1289,line1311,line1332,line1352,line1374,line1395,line1418,line1445,line1472,line1499,line1525,line1552
! eliminated_buses=1290,1312,1333,1353,1375,1396,1419,1446,1473,1500,1526

New Line._virtual_line1308_line1330_line1350_line1372_line1393_line1416_line1443_line1470_line1497_line1524 bus1=1525.1.2.3.4 bus2=1285.1.2.3.4 phases=4 linecode=LC6 length=12.746283 units=m
! reduced_from=line1308,line1330,line1350,line1372,line1393,line1416,line1443,line1470,line1497,line1524
! eliminated_buses=1309,1331,1351,1373,1394,1417,1444,1471,1498

New Line._virtual_line1328_line1349_line1371_line1392_line1415_line1442_line1469 bus1=1470.1.2.3.4 bus2=1308.1.2.3.4 phases=4 linecode=LC6 length=9.98745 units=m
! reduced_from=line1328,line1349,line1371,line1392,line1415,line1442,line1469
! eliminated_buses=1329,1350,1372,1393,1416,1443

New Line._virtual_line1347_line1367_line1389_line1412_line1439_line1466_line1494 bus1=1328.1.2.3.4 bus2=1495.1.2.3.4 phases=4 linecode=LC3 length=33.88299 units=m
! reduced_from=line1347,line1367,line1389,line1412,line1439,line1466,line1494
! eliminated_buses=1348,1368,1390,1413,1440,1467

New Line._virtual_line1354_line1376_line1398_line1422_line1450_line1477_line1504 bus1=1335.1.2.3.4 bus2=1505.1.2.3.4 phases=4 linecode=LC6 length=6.97066 units=m
! reduced_from=line1354,line1376,line1398,line1422,line1450,line1477,line1504
! eliminated_buses=1355,1377,1399,1423,1451,1478

New Line._virtual_line1361_line1383_line1406_line1433_line1461_line1490_line1517_line1543_line1568_line1590_line1612_line1632_line1652 bus1=1343.1.2.3.4 bus2=1653.1.2.3.4 phases=4 linecode=LC9 length=10.07211 units=m
! reduced_from=line1361,line1383,line1406,line1433,line1461,line1490,line1517,line1543,line1568,line1590,line1612,line1632,line1652
! eliminated_buses=1362,1384,1407,1434,1462,1491,1518,1544,1569,1591,1613,1633

New Line._virtual_line1362_line1384_line1407_line1434_line1462_line1491_line1518_line1544_line1569_line1591_line1613 bus1=1614.1.2.3.4 bus2=1343.1.2.3.4 phases=4 linecode=LC2 length=19.668048 units=m
! reduced_from=line1362,line1384,line1407,line1434,line1462,line1491,line1518,line1544,line1569,line1591,line1613
! eliminated_buses=1363,1385,1408,1435,1463,1492,1519,1545,1570,1592

New Line._virtual_line1370_line1391_line1414_line1441_line1468_line1496 bus1=1497.1.2.3.4 bus2=1349.1.2.3.4 phases=4 linecode=LC6 length=10.74103 units=m
! reduced_from=line1370,line1391,line1414,line1441,line1468,line1496
! eliminated_buses=1371,1392,1415,1442,1469

New Line._virtual_line1377_line1399_line1423_line1451_line1478_line1505_line1531 bus1=1532.1.2.3.4 bus2=1356.1.2.3.4 phases=4 linecode=LC6 length=6.25161 units=m
! reduced_from=line1377,line1399,line1423,line1451,line1478,line1505,line1531
! eliminated_buses=1378,1400,1424,1452,1479,1506

New Line._virtual_line1396_line1419_line1446_line1473_line1500_line1526_line1553_line1577_line1600_line1622_line1641_line1666 bus1=1376.1.2.3.4 bus2=1667.1.2.3.4 phases=4 linecode=LC6 length=11.18682 units=m
! reduced_from=line1396,line1419,line1446,line1473,line1500,line1526,line1553,line1577,line1600,line1622,line1641,line1666
! eliminated_buses=1397,1420,1447,1474,1501,1527,1554,1578,1601,1623,1642

New Line._virtual_line1397_line1421 bus1=1422.1.2.3.4 bus2=1376.1.2.3.4 phases=4 linecode=LC3 length=10.3941 units=m
! reduced_from=line1397,line1421
! eliminated_buses=1398

New Line._virtual_line1400_line1424_line1452_line1479_line1506_line1532_line1558 bus1=1379.1.2.3.4 bus2=1559.1.2.3.4 phases=4 linecode=LC6 length=6.73219 units=m
! reduced_from=line1400,line1424,line1452,line1479,line1506,line1532,line1558
! eliminated_buses=1401,1425,1453,1480,1507,1533

New Line._virtual_line1425_line1453_line1480_line1507_line1533_line1559_line1582 bus1=1402.1.2.3.4 bus2=1583.1.2.3.4 phases=4 linecode=LC6 length=7.46848 units=m
! reduced_from=line1425,line1453,line1480,line1507,line1533,line1559,line1582
! eliminated_buses=1426,1454,1481,1508,1534,1560

New Line._virtual_line1429_line1458_line1487_line1514_line1540_line1565_line1588_line1611 bus1=1403.1.2.3.4 bus2=1612.1.2.3.4 phases=4 linecode=LC6 length=7.86111 units=m
! reduced_from=line1429,line1458,line1487,line1514,line1540,line1565,line1588,line1611
! eliminated_buses=1430,1459,1488,1515,1541,1566,1589

New Line._virtual_line1448_line1475_line1502_line1528_line1555_line1578_line1601_line1623_line1642 bus1=1643.1.2.3.4 bus2=1422.1.2.3.4 phases=4 linecode=LC2 length=9.155643 units=m
! reduced_from=line1448,line1475,line1502,line1528,line1555,line1578,line1601,line1623,line1642
! eliminated_buses=1449,1476,1503,1529,1556,1579,1602,1624

New Line._virtual_line1454_line1481_line1508_line1534_line1560_line1583_line1606 bus1=1427.1.2.3.4 bus2=1607.1.2.3.4 phases=4 linecode=LC6 length=8.3371 units=m
! reduced_from=line1454,line1481,line1508,line1534,line1560,line1583,line1606
! eliminated_buses=1455,1482,1509,1535,1561,1584

New Line._virtual_line1455_line1482 bus1=1427.1.2.3.4 bus2=1483.1.2.3.4 phases=4 linecode=LC4 length=7.8237 units=m
! reduced_from=line1455,line1482
! eliminated_buses=1456

New Line._virtual_line1457_line1486_line1513_line1539_line1564_line1587_line1610_line1631_line1651 bus1=1429.1.2.3.4 bus2=1652.1.2.3.4 phases=4 linecode=LC6 length=8.73371 units=m
! reduced_from=line1457,line1486,line1513,line1539,line1564,line1587,line1610,line1631,line1651
! eliminated_buses=1458,1487,1514,1540,1565,1588,1611,1632

New Line._virtual_line1509_line1535_line1561_line1584_line1607_line1628_line1648_line1674 bus1=1483.1.2.3.4 bus2=1675.1.2.3.4 phases=4 linecode=LC6 length=7.920521 units=m
! reduced_from=line1509,line1535,line1561,line1584,line1607,line1628,line1648,line1674
! eliminated_buses=1510,1536,1562,1585,1608,1629,1649

New Line._virtual_line1522_line1551_line1576_line1599_line1621_line1640_line1665 bus1=1666.1.2.3.4 bus2=1495.1.2.3.4 phases=4 linecode=LC6 length=13.05868 units=m
! reduced_from=line1522,line1551,line1576,line1599,line1621,line1640,line1665
! eliminated_buses=1523,1552,1577,1600,1622,1641

New Line._virtual_line1529_line1556_line1579_line1602_line1624_line1643_line1669_line1691 bus1=1504.1.2.3.4 bus2=1692.1.2.3.4 phases=4 linecode=LC2 length=9.28924 units=m
! reduced_from=line1529,line1556,line1579,line1602,line1624,line1643,line1669,line1691
! eliminated_buses=1530,1557,1580,1603,1625,1644,1670

New Line._virtual_line1530_line1557 bus1=1504.1.2.3.4 bus2=1558.1.2.3.4 phases=4 linecode=LC3 length=11.5981 units=m
! reduced_from=line1530,line1557
! eliminated_buses=1531

New Line._virtual_line1545_line1570_line1592_line1614_line1633 bus1=1520.1.2.3.4 bus2=1634.1.2.3.4 phases=4 linecode=LC9 length=9.38125 units=m
! reduced_from=line1545,line1570,line1592,line1614,line1633
! eliminated_buses=1546,1571,1593,1615

New Line._virtual_line1549_line1575_line1598_line1620_line1639_line1664 bus1=1665.1.2.3.4 bus2=1522.1.2.3.4 phases=4 linecode=LC6 length=6.66488 units=m
! reduced_from=line1549,line1575,line1598,line1620,line1639,line1664
! eliminated_buses=1550,1576,1599,1621,1640

New Line._virtual_line1572_line1594_line1616_line1635_line1660_line1685_line1705_line1723_line1738_line1753_line1768_line1781_line1795 bus1=1549.1.2.3.4 bus2=1796.1.2.3.4 phases=4 linecode=LC3 length=8.17445 units=m
! reduced_from=line1572,line1594,line1616,line1635,line1660,line1685,line1705,line1723,line1738,line1753,line1768,line1781,line1795
! eliminated_buses=1573,1595,1617,1636,1661,1686,1706,1724,1739,1754,1769,1782

New Line._virtual_line1573_line1597_line1619_line1638_line1663_line1687 bus1=1549.1.2.3.4 bus2=1688.1.2.3.4 phases=4 linecode=LC6 length=13.92139 units=m
! reduced_from=line1573,line1597,line1619,line1638,line1663,line1687
! eliminated_buses=1574,1598,1620,1639,1664

New Line._virtual_line1580_line1603_line1625_line1644_line1670_line1692_line1710_line1727_line1742 bus1=1743.1.2.3.4 bus2=1558.1.2.3.4 phases=4 linecode=LC2 length=9.40353 units=m
! reduced_from=line1580,line1603,line1625,line1644,line1670,line1692,line1710,line1727,line1742
! eliminated_buses=1581,1604,1626,1645,1671,1693,1711,1728

New Line._virtual_line1605_line1627_line1646_line1672_line1693_line1711_line1728_line1743_line1758_line1772_line1784_line1798_line1812_line1826_line1839_line1851_line1861 bus1=1582.1.2.3.4 bus2=1862.1.2.3.4 phases=4 linecode=LC6 length=20.83746 units=m
! reduced_from=line1605,line1627,line1646,line1672,line1693,line1711,line1728,line1743,line1758,line1772,line1784,line1798,line1812,line1826,line1839,line1851,line1861
! eliminated_buses=1606,1628,1647,1673,1694,1712,1729,1744,1759,1773,1785,1799,1813,1827,1840,1852

New Line._virtual_line1654_line1679_line1699_line1717_line1732_line1747_line1762_line1777_line1789_line1803_line1817_line1830_line1843_line1854_line1864_line1873_line1882_line1889_line1895_line1901_line1907 bus1=1634.1.2.3.4 bus2=1908.1.2.3.4 phases=4 linecode=LC2 length=18.63004 units=m
! reduced_from=line1654,line1679,line1699,line1717,line1732,line1747,line1762,line1777,line1789,line1803,line1817,line1830,line1843,line1854,line1864,line1873,line1882,line1889,line1895,line1901,line1907
! eliminated_buses=1655,1680,1700,1718,1733,1748,1763,1778,1790,1804,1818,1831,1844,1855,1865,1874,1883,1890,1896,1902

New Line._virtual_line1655_line1680_line1700_line1718_line1733_line1748_line1763_line1778_line1790_line1804_line1818_line1831_line1844_line1855_line1865_line1874 bus1=1634.1.2.3.4 bus2=1875.1.2.3.4 phases=4 linecode=LC2 length=14.0159 units=m
! reduced_from=line1655,line1680,line1700,line1718,line1733,line1748,line1763,line1778,line1790,line1804,line1818,line1831,line1844,line1855,line1865,line1874
! eliminated_buses=1656,1681,1701,1719,1734,1749,1764,1779,1791,1805,1819,1832,1845,1856,1866

New Line._virtual_line1656_line1681_line1701_line1719_line1734_line1749_line1764 bus1=1765.1.2.3.4 bus2=1634.1.2.3.4 phases=4 linecode=LC2 length=12.62817 units=m
! reduced_from=line1656,line1681,line1701,line1719,line1734,line1749,line1764
! eliminated_buses=1657,1682,1702,1720,1735,1750

New Line._virtual_line1657_line1682_line1702_line1720_line1735_line1750_line1765 bus1=1635.1.2.3.4 bus2=1766.1.2.3.4 phases=4 linecode=LC2 length=12.2683 units=m
! reduced_from=line1657,line1682,line1702,line1720,line1735,line1750,line1765
! eliminated_buses=1658,1683,1703,1721,1736,1751

New Line._virtual_line1658_line1683_line1703_line1721_line1736_line1751_line1766_line1779_line1791_line1805_line1819_line1832 bus1=1635.1.2.3.4 bus2=1833.1.2.3.4 phases=4 linecode=LC2 length=14.4023 units=m
! reduced_from=line1658,line1683,line1703,line1721,line1736,line1751,line1766,line1779,line1791,line1805,line1819,line1832
! eliminated_buses=1659,1684,1704,1722,1737,1752,1767,1780,1792,1806,1820

New Line._virtual_line1659_line1684_line1704_line1722_line1737_line1752_line1767_line1780 bus1=1781.1.2.3.4 bus2=1635.1.2.3.4 phases=4 linecode=LC9 length=11.29822 units=m
! reduced_from=line1659,line1684,line1704,line1722,line1737,line1752,line1767,line1780
! eliminated_buses=1660,1685,1705,1723,1738,1753,1768

New Line._virtual_line1668_line1690 bus1=1643.1.2.3.4 bus2=1691.1.2.3.4 phases=4 linecode=LC2 length=4.364 units=m
! reduced_from=line1668,line1690
! eliminated_buses=1669

New Line._virtual_line1676_line1696_line1714_line1730_line1745_line1760 bus1=1761.1.2.3.4 bus2=1653.1.2.3.4 phases=4 linecode=LC9 length=4.14332 units=m
! reduced_from=line1676,line1696,line1714,line1730,line1745,line1760
! eliminated_buses=1677,1697,1715,1731,1746

New Line._virtual_line1677_line1697_line1715_line1731_line1746_line1761_line1776_line1788_line1802_line1816 bus1=1817.1.2.3.4 bus2=1653.1.2.3.4 phases=4 linecode=LC2 length=16.595149 units=m
! reduced_from=line1677,line1697,line1715,line1731,line1746,line1761,line1776,line1788,line1802,line1816
! eliminated_buses=1678,1698,1716,1732,1747,1762,1777,1789,1803

New Line._virtual_line1689_line1707_line1725_line1740_line1755_line1770_line1783_line1797_line1811_line1825_line1838_line1850 bus1=1851.1.2.3.4 bus2=1665.1.2.3.4 phases=4 linecode=LC6 length=13.158809 units=m
! reduced_from=line1689,line1707,line1725,line1740,line1755,line1770,line1783,line1797,line1811,line1825,line1838,line1850
! eliminated_buses=1690,1708,1726,1741,1756,1771,1784,1798,1812,1826,1839

New Line._virtual_line1709_line1726_line1741 bus1=1692.1.2.3.4 bus2=1742.1.2.3.4 phases=4 linecode=LC2 length=5.3716 units=m
! reduced_from=line1709,line1726,line1741
! eliminated_buses=1710,1727

New Line._virtual_line1757_line1771 bus1=1772.1.2.3.4 bus2=1743.1.2.3.4 phases=4 linecode=LC2 length=4.4537 units=m
! reduced_from=line1757,line1771
! eliminated_buses=1758

New Line._virtual_line1774_line1786_line1800_line1814_line1828_line1841_line1852_line1862_line1871_line1880_line1887_line1893_line1899_line1905_line1911_line1916_line1922 bus1=1923.1.2.3.4 bus2=1761.1.2.3.4 phases=4 linecode=LC9 length=9.04982 units=m
! reduced_from=line1774,line1786,line1800,line1814,line1828,line1841,line1852,line1862,line1871,line1880,line1887,line1893,line1899,line1905,line1911,line1916,line1922
! eliminated_buses=1775,1787,1801,1815,1829,1842,1853,1863,1872,1881,1888,1894,1900,1906,1912,1917

New Line._virtual_line1775_line1787_line1801_line1815_line1829_line1842_line1853_line1863_line1872_line1881_line1888_line1894_line1900_line1906_line1912_line1917_line1923_line1931_line1939_line1946 bus1=1947.1.2.3.4 bus2=1761.1.2.3.4 phases=4 linecode=LC2 length=18.14381 units=m
! reduced_from=line1775,line1787,line1801,line1815,line1829,line1842,line1853,line1863,line1872,line1881,line1888,line1894,line1900,line1906,line1912,line1917,line1923,line1931,line1939,line1946
! eliminated_buses=1776,1788,1802,1816,1830,1843,1854,1864,1873,1882,1889,1895,1901,1907,1913,1918,1924,1932,1940

New Line._virtual_line1793_line1806_line1820_line1833_line1845_line1856_line1866_line1875_line1883 bus1=1781.1.2.3.4 bus2=1884.1.2.3.4 phases=4 linecode=LC2 length=14.5481 units=m
! reduced_from=line1793,line1806,line1820,line1833,line1845,line1856,line1866,line1875,line1883
! eliminated_buses=1794,1807,1821,1834,1846,1857,1867,1876

New Line._virtual_line1794_line1807_line1821_line1834_line1846_line1857_line1867_line1876_line1884_line1890_line1896_line1902_line1908_line1913_line1918_line1924_line1932 bus1=1781.1.2.3.4 bus2=1933.1.2.3.4 phases=4 linecode=LC2 length=15.13942 units=m
! reduced_from=line1794,line1807,line1821,line1834,line1846,line1857,line1867,line1876,line1884,line1890,line1896,line1902,line1908,line1913,line1918,line1924,line1932
! eliminated_buses=1795,1808,1822,1835,1847,1858,1868,1877,1885,1891,1897,1903,1909,1914,1919,1925

New Line._virtual_line1808_line1822_line1835_line1847_line1858_line1868_line1877_line1885_line1891_line1897_line1903_line1909_line1914 bus1=1915.1.2.3.4 bus2=1796.1.2.3.4 phases=4 linecode=LC3 length=8.17856 units=m
! reduced_from=line1808,line1822,line1835,line1847,line1858,line1868,line1877,line1885,line1891,line1897,line1903,line1909,line1914
! eliminated_buses=1809,1823,1836,1848,1859,1869,1878,1886,1892,1898,1904,1910

New Line._virtual_line1809_line1824_line1837_line1849_line1860_line1870_line1879 bus1=1796.1.2.3.4 bus2=1880.1.2.3.4 phases=4 linecode=LC6 length=13.285 units=m
! reduced_from=line1809,line1824,line1837,line1849,line1860,line1870,line1879
! eliminated_buses=1810,1825,1838,1850,1861,1871

New Line._virtual_line1919_line1925_line1933_line1940_line1947_line1953 bus1=1915.1.2.3.4 bus2=1954.1.2.3.4 phases=4 linecode=LC3 length=4.91171 units=m
! reduced_from=line1919,line1925,line1933,line1940,line1947,line1953
! eliminated_buses=1920,1926,1934,1941,1948

New Line._virtual_line1920_line1928_line1936_line1943_line1950_line1956_line1962_line1968 bus1=1969.1.2.3.4 bus2=1915.1.2.3.4 phases=4 linecode=LC2 length=7.87485 units=m
! reduced_from=line1920,line1928,line1936,line1943,line1950,line1956,line1962,line1968
! eliminated_buses=1921,1929,1937,1944,1951,1957,1963

New Line._virtual_line1929_line1937_line1944_line1951_line1957_line1963_line1969_line1976_line1982_line1988_line1995 bus1=1996.1.2.3.4 bus2=1923.1.2.3.4 phases=4 linecode=LC9 length=8.60331 units=m
! reduced_from=line1929,line1937,line1944,line1951,line1957,line1963,line1969,line1976,line1982,line1988,line1995
! eliminated_buses=1930,1938,1945,1952,1958,1964,1970,1977,1983,1989

New Line._virtual_line1930_line1938_line1945_line1952_line1958_line1964_line1970_line1977_line1983 bus1=1984.1.2.3.4 bus2=1923.1.2.3.4 phases=4 linecode=LC9 length=10.23877 units=m
! reduced_from=line1930,line1938,line1945,line1952,line1958,line1964,line1970,line1977,line1983
! eliminated_buses=1931,1939,1946,1953,1959,1965,1971,1978

New Line._virtual_line1959_line1965_line1971_line1978_line1984_line1991_line1998_line2008_line2017_line2025 bus1=2026.1.2.3.4 bus2=1954.1.2.3.4 phases=4 linecode=LC3 length=8.30764 units=m
! reduced_from=line1959,line1965,line1971,line1978,line1984,line1991,line1998,line2008,line2017,line2025
! eliminated_buses=1960,1966,1972,1979,1985,1992,1999,2009,2018

New Line._virtual_line1960_line1967_line1973_line1980_line1986_line1993 bus1=1994.1.2.3.4 bus2=1954.1.2.3.4 phases=4 linecode=LC6 length=8.2701 units=m
! reduced_from=line1960,line1967,line1973,line1980,line1986,line1993
! eliminated_buses=1961,1968,1974,1981,1987

New Line._virtual_line1975_line1981_line1987_line1994_line2002_line2011 bus1=2012.1.2.3.4 bus2=1969.1.2.3.4 phases=4 linecode=LC2 length=9.76254 units=m
! reduced_from=line1975,line1981,line1987,line1994,line2002,line2011
! eliminated_buses=1976,1982,1988,1995,2003

New Line._virtual_line1989_line1996 bus1=1984.1.2.3.4 bus2=1997.1.2.3.4 phases=4 linecode=LC9 length=10.6105 units=m
! reduced_from=line1989,line1996
! eliminated_buses=1990

New Line._virtual_line1990_line1997_line2007_line2016_line2024_line2033_line2043_line2053_line2063_line2073_line2083_line2093 bus1=2094.1.2.3.4 bus2=1984.1.2.3.4 phases=4 linecode=LC2 length=19.16059 units=m
! reduced_from=line1990,line1997,line2007,line2016,line2024,line2033,line2043,line2053,line2063,line2073,line2083,line2093
! eliminated_buses=1991,1998,2008,2017,2025,2034,2044,2054,2064,2074,2084

New Line._virtual_line2001_line2010_line2019_line2027_line2037_line2047_line2057 bus1=2058.1.2.3.4 bus2=1994.1.2.3.4 phases=4 linecode=LC6 length=11.91857 units=m
! reduced_from=line2001,line2010,line2019,line2027,line2037,line2047,line2057
! eliminated_buses=2002,2011,2020,2028,2038,2048

New Line._virtual_line2003_line2012_line2020_line2028_line2038_line2048_line2058_line2067_line2077_line2087_line2097_line2105_line2113 bus1=1996.1.2.3.4 bus2=2114.1.2.3.4 phases=4 linecode=LC2 length=14.640553 units=m
! reduced_from=line2003,line2012,line2020,line2028,line2038,line2048,line2058,line2067,line2077,line2087,line2097,line2105,line2113
! eliminated_buses=2004,2013,2021,2029,2039,2049,2059,2068,2078,2088,2098,2106

New Line._virtual_line2004_line2013_line2021 bus1=2022.1.2.3.4 bus2=1996.1.2.3.4 phases=4 linecode=LC9 length=4.15672 units=m
! reduced_from=line2004,line2013,line2021
! eliminated_buses=2005,2014

New Line._virtual_line2005_line2014 bus1=1997.1.2.3.4 bus2=2015.1.2.3.4 phases=4 linecode=LC9 length=4.5076 units=m
! reduced_from=line2005,line2014
! eliminated_buses=2006

New Line._virtual_line2006_line2015_line2023_line2032_line2042_line2052_line2062_line2072_line2082_line2092 bus1=1997.1.2.3.4 bus2=2093.1.2.3.4 phases=4 linecode=LC2 length=10.99989 units=m
! reduced_from=line2006,line2015,line2023,line2032,line2042,line2052,line2062,line2072,line2082,line2092
! eliminated_buses=2007,2016,2024,2033,2043,2053,2063,2073,2083

New Line._virtual_line2022_line2031_line2041_line2051_line2061_line2071_line2081_line2091_line2101_line2109_line2117_line2128 bus1=2129.1.2.3.4 bus2=2015.1.2.3.4 phases=4 linecode=LC2 length=25.7739 units=m
! reduced_from=line2022,line2031,line2041,line2051,line2061,line2071,line2081,line2091,line2101,line2109,line2117,line2128
! eliminated_buses=2023,2032,2042,2052,2062,2072,2082,2092,2102,2110,2118

New Line._virtual_line2029_line2039_line2049_line2059 bus1=2022.1.2.3.4 bus2=2060.1.2.3.4 phases=4 linecode=LC9 length=2.70706 units=m
! reduced_from=line2029,line2039,line2049,line2059
! eliminated_buses=2030,2040,2050

New Line._virtual_line2034_line2044_line2054_line2064_line2074_line2084_line2094 bus1=2026.1.2.3.4 bus2=2095.1.2.3.4 phases=4 linecode=LC3 length=4.30153 units=m
! reduced_from=line2034,line2044,line2054,line2064,line2074,line2084,line2094
! eliminated_buses=2035,2045,2055,2065,2075,2085

New Line._virtual_line2035_line2046_line2056_line2066_line2076_line2086_line2096 bus1=2097.1.2.3.4 bus2=2026.1.2.3.4 phases=4 linecode=LC6 length=14.04658 units=m
! reduced_from=line2035,line2046,line2056,line2066,line2076,line2086,line2096
! eliminated_buses=2036,2047,2057,2067,2077,2087

New Line._virtual_line2040_line2050_line2060_line2070_line2080_line2090_line2100_line2108_line2116_line2127_line2136_line2145_line2154_line2165_line2174_line2183_line2190_line2197_line2203_line2209_line2215 bus1=2031.1.2.3.4 bus2=2216.1.2.3.4 phases=4 linecode=LC2 length=35.53918 units=m
! reduced_from=line2040,line2050,line2060,line2070,line2080,line2090,line2100,line2108,line2116,line2127,line2136,line2145,line2154,line2165,line2174,line2183,line2190,line2197,line2203,line2209,line2215
! eliminated_buses=2041,2051,2061,2071,2081,2091,2101,2109,2117,2128,2137,2146,2155,2166,2175,2184,2191,2198,2204,2210

New Line._virtual_line2068_line2078_line2088_line2098_line2106_line2114_line2124_line2133_line2142_line2151 bus1=2152.1.2.3.4 bus2=2060.1.2.3.4 phases=4 linecode=LC9 length=12.18664 units=m
! reduced_from=line2068,line2078,line2088,line2098,line2106,line2114,line2124,line2133,line2142,line2151
! eliminated_buses=2069,2079,2089,2099,2107,2115,2125,2134,2143

New Line._virtual_line2069_line2079_line2089_line2099_line2107_line2115_line2125_line2134_line2143_line2152_line2164_line2173_line2182 bus1=2183.1.2.3.4 bus2=2060.1.2.3.4 phases=4 linecode=LC2 length=12.926375 units=m
! reduced_from=line2069,line2079,line2089,line2099,line2107,line2115,line2125,line2134,line2143,line2152,line2164,line2173,line2182
! eliminated_buses=2070,2080,2090,2100,2108,2116,2126,2135,2144,2153,2165,2174

New Line._virtual_line2102_line2110 bus1=2111.1.2.3.4 bus2=2095.1.2.3.4 phases=4 linecode=LC3 length=18.0119 units=m
! reduced_from=line2102,line2110
! eliminated_buses=2103

New Line._virtual_line2103_line2112_line2123_line2132_line2141_line2150 bus1=2151.1.2.3.4 bus2=2095.1.2.3.4 phases=4 linecode=LC6 length=6.47074 units=m
! reduced_from=line2103,line2112,line2123,line2132,line2141,line2150
! eliminated_buses=2104,2113,2124,2133,2142

New Line._virtual_line2119_line2130_line2139_line2148_line2157_line2168_line2177 bus1=2178.1.2.3.4 bus2=2111.1.2.3.4 phases=4 linecode=LC6 length=12.40248 units=m
! reduced_from=line2119,line2130,line2139,line2148,line2157,line2168,line2177
! eliminated_buses=2120,2131,2140,2149,2158,2169

New Line._virtual_line2137_line2146_line2155_line2166_line2175_line2184_line2191 bus1=2192.1.2.3.4 bus2=2130.1.2.3.4 phases=4 linecode=LC6 length=8.62881 units=m
! reduced_from=line2137,line2146,line2155,line2166,line2175,line2184,line2191
! eliminated_buses=2138,2147,2156,2167,2176,2185

New Line._virtual_line2138_line2147_line2156_line2167_line2176_line2185_line2192_line2198_line2204_line2210_line2216 bus1=2217.1.2.3.4 bus2=2130.1.2.3.4 phases=4 linecode=LC6 length=13.34863 units=m
! reduced_from=line2138,line2147,line2156,line2167,line2176,line2185,line2192,line2198,line2204,line2210,line2216
! eliminated_buses=2139,2148,2157,2168,2177,2186,2193,2199,2205,2211

New Line._virtual_line2160_line2169_line2178_line2186_line2193_line2199_line2205_line2211_line2217_line2221_line2224_line2229_line2233_line2236_line2239 bus1=2240.1.2.3.4 bus2=2151.1.2.3.4 phases=4 linecode=LC6 length=13.62647 units=m
! reduced_from=line2160,line2169,line2178,line2186,line2193,line2199,line2205,line2211,line2217,line2221,line2224,line2229,line2233,line2236,line2239
! eliminated_buses=2161,2170,2179,2187,2194,2200,2206,2212,2218,2222,2225,2230,2234,2237

New Line._virtual_line2161_line2170_line2179_line2187_line2194_line2200_line2206_line2212_line2218_line2222 bus1=2152.1.2.3.4 bus2=2223.1.2.3.4 phases=4 linecode=LC9 length=12.35212 units=m
! reduced_from=line2161,line2170,line2179,line2187,line2194,line2200,line2206,line2212,line2218,line2222
! eliminated_buses=2162,2171,2180,2188,2195,2201,2207,2213,2219

New Line._virtual_line2162_line2171_line2180_line2188_line2195_line2201_line2207_line2213_line2219 bus1=2220.1.2.3.4 bus2=2152.1.2.3.4 phases=4 linecode=LC2 length=12.095712 units=m
! reduced_from=line2162,line2171,line2180,line2188,line2195,line2201,line2207,line2213,line2219
! eliminated_buses=2163,2172,2181,2189,2196,2202,2208,2214

New Line._virtual_line2163_line2172_line2181_line2189_line2196_line2202_line2208_line2214_line2220_line2223_line2228 bus1=2229.1.2.3.4 bus2=2152.1.2.3.4 phases=4 linecode=LC2 length=14.41075 units=m
! reduced_from=line2163,line2172,line2181,line2189,line2196,line2202,line2208,line2214,line2220,line2223,line2228
! eliminated_buses=2164,2173,2182,2190,2197,2203,2209,2215,2221,2224

New Line._virtual_line2226_line2231_line2234_line2237_line2240_line2242_line2244_line2246_line2248_line2250 bus1=2251.1.2.3.4 bus2=2223.1.2.3.4 phases=4 linecode=LC2 length=16.353 units=m
! reduced_from=line2226,line2231,line2234,line2237,line2240,line2242,line2244,line2246,line2248,line2250
! eliminated_buses=2227,2232,2235,2238,2241,2243,2245,2247,2249

New Line._virtual_line2227_line2232_line2235_line2238_line2241_line2243_line2245_line2247_line2249_line2251_line2252 bus1=2253.1.2.3.4 bus2=2223.1.2.3.4 phases=4 linecode=LC2 length=13.451662 units=m
! reduced_from=line2227,line2232,line2235,line2238,line2241,line2243,line2245,line2247,line2249,line2251,line2252
! eliminated_buses=2228,2233,2236,2239,2242,2244,2246,2248,2250,2252

New Line.LINE187 bus1=176.1.2.3.4 bus2=188.1.2.3.4 phases=4 linecode=LC4 length=2.4456 units=m

New Line.LINE274 bus1=262.1.2.3.4 bus2=275.1.2.3.4 phases=4 linecode=LC9 length=11.4804 units=m

New Line.LINE439 bus1=432.1.2.3.4 bus2=440.1.2.3.4 phases=4 linecode=LC1 length=18.8596 units=m

New Line.LINE472 bus1=463.1.2.3.4 bus2=473.1.2.3.4 phases=4 linecode=LC8 length=7.1122 units=m

New Line.LINE488 bus1=477.1.2.3.4 bus2=489.1.2.3.4 phases=4 linecode=LC2 length=5.0704 units=m

New Line.LINE502 bus1=492.1.2.3.4 bus2=503.1.2.3.4 phases=4 linecode=LC9 length=4.4261 units=m

New Line.LINE549 bus1=536.1.2.3.4 bus2=550.1.2.3.4 phases=4 linecode=LC8 length=3.148 units=m

New Line.LINE572 bus1=561.1.2.3.4 bus2=573.1.2.3.4 phases=4 linecode=LC1 length=4.3124 units=m

New Line.LINE573 bus1=561.1.2.3.4 bus2=574.1.2.3.4 phases=4 linecode=LC1 length=4.3124 units=m

New Line.LINE594 bus1=583.1.2.3.4 bus2=595.1.2.3.4 phases=4 linecode=LC1 length=13.3214 units=m

New Line.LINE595 bus1=583.1.2.3.4 bus2=596.1.2.3.4 phases=4 linecode=LC9 length=7.5456 units=m

New Line.LINE625 bus1=612.1.2.3.4 bus2=626.1.2.3.4 phases=4 linecode=LC6 length=5.391 units=m

New Line.LINE647 bus1=634.1.2.3.4 bus2=648.1.2.3.4 phases=4 linecode=LC1 length=4.502 units=m

New Line.LINE648 bus1=634.1.2.3.4 bus2=649.1.2.3.4 phases=4 linecode=LC1 length=4.502 units=m

New Line.LINE649 bus1=634.1.2.3.4 bus2=650.1.2.3.4 phases=4 linecode=LC1 length=4.502 units=m

New Line.LINE650 bus1=634.1.2.3.4 bus2=651.1.2.3.4 phases=4 linecode=LC1 length=4.502 units=m

New Line.LINE651 bus1=634.1.2.3.4 bus2=652.1.2.3.4 phases=4 linecode=LC1 length=4.502 units=m

New Line.LINE725 bus1=713.1.2.3.4 bus2=726.1.2.3.4 phases=4 linecode=LC4 length=0.2843 units=m

New Line.LINE740 bus1=726.1.2.3.4 bus2=741.1.2.3.4 phases=4 linecode=LC7 length=1.5075 units=m

New Line.LINE751 bus1=736.1.2.3.4 bus2=752.1.2.3.4 phases=4 linecode=LC4 length=7.9242 units=m

New Line.LINE755 bus1=741.1.2.3.4 bus2=756.1.2.3.4 phases=4 linecode=LC4 length=2.0915 units=m

New Line.LINE774 bus1=756.1.2.3.4 bus2=775.1.2.3.4 phases=4 linecode=LC4 length=3.4039 units=m

New Line.LINE790 bus1=775.1.2.3.4 bus2=791.1.2.3.4 phases=4 linecode=LC4 length=5.6365 units=m

New Line.LINE810 bus1=791.1.2.3.4 bus2=811.1.2.3.4 phases=4 linecode=LC4 length=4.872 units=m

New Line.LINE814 bus1=794.1.2.3.4 bus2=815.1.2.3.4 phases=4 linecode=LC1 length=7.9267 units=m

New Line.LINE831 bus1=811.1.2.3.4 bus2=832.1.2.3.4 phases=4 linecode=LC4 length=5.2229 units=m

New Line.LINE852 bus1=832.1.2.3.4 bus2=853.1.2.3.4 phases=4 linecode=LC4 length=2.3064 units=m

New Line.LINE917 bus1=899.1.2.3.4 bus2=918.1.2.3.4 phases=4 linecode=LC2 length=5.015 units=m

New Line.LINE950 bus1=932.1.2.3.4 bus2=951.1.2.3.4 phases=4 linecode=LC4 length=3.304 units=m

New Line.LINE966 bus1=951.1.2.3.4 bus2=967.1.2.3.4 phases=4 linecode=LC4 length=5.1703 units=m

New Line.LINE968 bus1=952.1.2.3.4 bus2=969.1.2.3.4 phases=4 linecode=LC9 length=0.25239 units=m

New Line.LINE969 bus1=952.1.2.3.4 bus2=970.1.2.3.4 phases=4 linecode=LC1 length=17.0124 units=m

New Line.LINE976 bus1=959.1.2.3.4 bus2=977.1.2.3.4 phases=4 linecode=LC2 length=3.5991 units=m

New Line.LINE986 bus1=967.1.2.3.4 bus2=987.1.2.3.4 phases=4 linecode=LC4 length=4.3872 units=m

New Line.LINE989 bus1=969.1.2.3.4 bus2=990.1.2.3.4 phases=4 linecode=LC1 length=10.4876 units=m

New Line.LINE991 bus1=971.1.2.3.4 bus2=992.1.2.3.4 phases=4 linecode=LC9 length=1.0275 units=m

New Line.LINE1006 bus1=987.1.2.3.4 bus2=1007.1.2.3.4 phases=4 linecode=LC4 length=3.116 units=m

New Line.LINE1012 bus1=992.1.2.3.4 bus2=1013.1.2.3.4 phases=4 linecode=LC1 length=6.7727 units=m

New Line.LINE1014 bus1=994.1.2.3.4 bus2=1015.1.2.3.4 phases=4 linecode=LC2 length=6.0021 units=m

New Line.LINE1018 bus1=997.1.2.3.4 bus2=1019.1.2.3.4 phases=4 linecode=LC4 length=9.2562 units=m

New Line.LINE1038 bus1=1019.1.2.3.4 bus2=1039.1.2.3.4 phases=4 linecode=LC3 length=1.9826 units=m

New Line.LINE1056 bus1=1037.1.2.3.4 bus2=1057.1.2.3.4 phases=4 linecode=LC2 length=5.0361 units=m

New Line.LINE1072 bus1=1052.1.2.3.4 bus2=1073.1.2.3.4 phases=4 linecode=LC1 length=11.1644 units=m

New Line.LINE1100 bus1=1081.1.2.3.4 bus2=1101.1.2.3.4 phases=4 linecode=LC3 length=11.175 units=m

New Line.LINE1106 bus1=1092.1.2.3.4 bus2=1107.1.2.3.4 phases=4 linecode=LC1 length=11.0847 units=m

New Line.LINE1112 bus1=1098.1.2.3.4 bus2=1113.1.2.3.4 phases=4 linecode=LC2 length=4.6843 units=m

New Line.LINE1138 bus1=1122.1.2.3.4 bus2=1139.1.2.3.4 phases=4 linecode=LC4 length=7.2454 units=m

New Line.LINE1139 bus1=1122.1.2.3.4 bus2=1140.1.2.3.4 phases=4 linecode=LC4 length=1.6811 units=m

New Line.LINE1156 bus1=1139.1.2.3.4 bus2=1157.1.2.3.4 phases=4 linecode=LC4 length=6.58 units=m

New Line.LINE1177 bus1=1157.1.2.3.4 bus2=1178.1.2.3.4 phases=4 linecode=LC4 length=8.9518 units=m

New Line.LINE1178 bus1=1157.1.2.3.4 bus2=1179.1.2.3.4 phases=4 linecode=LC4 length=4.8851 units=m

New Line.LINE1184 bus1=1163.1.2.3.4 bus2=1185.1.2.3.4 phases=4 linecode=LC9 length=6.2433 units=m

New Line.LINE1186 bus1=1164.1.2.3.4 bus2=1187.1.2.3.4 phases=4 linecode=LC1 length=0.045651 units=m

New Line.LINE1200 bus1=1178.1.2.3.4 bus2=1201.1.2.3.4 phases=4 linecode=LC4 length=4.3861 units=m

New Line.LINE1211 bus1=1187.1.2.3.4 bus2=1212.1.2.3.4 phases=4 linecode=LC1 length=8.34 units=m

New Line.LINE1213 bus1=1188.1.2.3.4 bus2=1214.1.2.3.4 phases=4 linecode=LC1 length=7.587 units=m

New Line.LINE1224 bus1=1201.1.2.3.4 bus2=1225.1.2.3.4 phases=4 linecode=LC4 length=4.1118 units=m

New Line.LINE1274 bus1=1253.1.2.3.4 bus2=1275.1.2.3.4 phases=4 linecode=LC6 length=4.9333 units=m

New Line.LINE1287 bus1=1266.1.2.3.4 bus2=1288.1.2.3.4 phases=4 linecode=LC6 length=1.5297 units=m

New Line.LINE1288 bus1=1266.1.2.3.4 bus2=1289.1.2.3.4 phases=4 linecode=LC6 length=3.7336 units=m

New Line.LINE1307 bus1=1285.1.2.3.4 bus2=1308.1.2.3.4 phases=4 linecode=LC3 length=9.9143 units=m

New Line.LINE1327 bus1=1308.1.2.3.4 bus2=1328.1.2.3.4 phases=4 linecode=LC3 length=3.6289 units=m

New Line.LINE1348 bus1=1328.1.2.3.4 bus2=1349.1.2.3.4 phases=4 linecode=LC3 length=7.628 units=m

New Line.LINE1355 bus1=1335.1.2.3.4 bus2=1356.1.2.3.4 phases=4 linecode=LC4 length=4.2141 units=m

New Line.LINE1378 bus1=1356.1.2.3.4 bus2=1379.1.2.3.4 phases=4 linecode=LC4 length=4.1357 units=m

New Line.LINE1401 bus1=1379.1.2.3.4 bus2=1402.1.2.3.4 phases=4 linecode=LC4 length=12.6038 units=m

New Line.LINE1402 bus1=1379.1.2.3.4 bus2=1403.1.2.3.4 phases=4 linecode=LC4 length=4.3995 units=m

New Line.LINE1426 bus1=1402.1.2.3.4 bus2=1427.1.2.3.4 phases=4 linecode=LC4 length=4.0757 units=m

New Line.LINE1428 bus1=1402.1.2.3.4 bus2=1429.1.2.3.4 phases=4 linecode=LC4 length=2.9354 units=m

New Line.LINE1449 bus1=1422.1.2.3.4 bus2=1450.1.2.3.4 phases=4 linecode=LC3 length=2.012 units=m

New Line.LINE1476 bus1=1450.1.2.3.4 bus2=1477.1.2.3.4 phases=4 linecode=LC8 length=5.7161 units=m

New Line.LINE1503 bus1=1477.1.2.3.4 bus2=1504.1.2.3.4 phases=4 linecode=LC3 length=5.782 units=m

New Line.LINE1521 bus1=1495.1.2.3.4 bus2=1522.1.2.3.4 phases=4 linecode=LC3 length=5.9217 units=m

New Line.LINE1546 bus1=1520.1.2.3.4 bus2=1547.1.2.3.4 phases=4 linecode=LC1 length=7.029 units=m

New Line.LINE1548 bus1=1522.1.2.3.4 bus2=1549.1.2.3.4 phases=4 linecode=LC3 length=14.014 units=m

New Line.LINE1581 bus1=1558.1.2.3.4 bus2=1582.1.2.3.4 phases=4 linecode=LC3 length=1.7945 units=m

New Line.LINE1667 bus1=1643.1.2.3.4 bus2=1668.1.2.3.4 phases=4 linecode=LC2 length=2.2726 units=m

New Line.LINE1688 bus1=1665.1.2.3.4 bus2=1689.1.2.3.4 phases=4 linecode=LC6 length=6.0994 units=m

New Line.LINE1708 bus1=1692.1.2.3.4 bus2=1709.1.2.3.4 phases=4 linecode=LC2 length=2.5962 units=m

New Line.LINE1756 bus1=1743.1.2.3.4 bus2=1757.1.2.3.4 phases=4 linecode=LC2 length=2.3381 units=m

New Line.LINE1974 bus1=1969.1.2.3.4 bus2=1975.1.2.3.4 phases=4 linecode=LC2 length=7.7082 units=m

New Line.LINE2000 bus1=1994.1.2.3.4 bus2=2001.1.2.3.4 phases=4 linecode=LC2 length=5.5988 units=m

New Line.LINE2030 bus1=2022.1.2.3.4 bus2=2031.1.2.3.4 phases=4 linecode=LC2 length=0.14142 units=m

New Line.LINE2118 bus1=2111.1.2.3.4 bus2=2119.1.2.3.4 phases=4 linecode=LC3 length=1.1261 units=m

New Line.LINE2129 bus1=2119.1.2.3.4 bus2=2130.1.2.3.4 phases=4 linecode=LC6 length=1.9741 units=m

New Line.LINE2159 bus1=2151.1.2.3.4 bus2=2160.1.2.3.4 phases=4 linecode=LC2 length=3.9276 units=m
