! Reduced enabled lines.

New Line._virtual_line0_line1_line2_line3_line4_line5_line6_line7_line8_line9_line10_line11_line12_line13_line14_line15_line16_line17_line18_line19_line20_line21_line22_line23_line24_line25_line26_line27_line28_line29_line30_line31_line32_line33_line34_line35_line36_line37_line38_line39_line40_line41_line42_line43_line44_line45_line46_line47_line48_line49_line50_line51_line52_line53_line54_line55_line56_line57 bus1=sourcebus.1.2.3.4 bus2=58.1.2.3.4 phases=4 linecode=LC8 length=59.023056 units=m
! reduced_from=line0,line1,line2,line3,line4,line5,line6,line7,line8,line9,line10,line11,line12,line13,line14,line15,line16,line17,line18,line19,line20,line21,line22,line23,line24,line25,line26,line27,line28,line29,line30,line31,line32,line33,line34,line35,line36,line37,line38,line39,line40,line41,line42,line43,line44,line45,line46,line47,line48,line49,line50,line51,line52,line53,line54,line55,line56,line57
! eliminated_buses=1,2,3,4,5,6,7,8,9,10,11,12,13,14,15,16,17,18,19,20,21,22,23,24,25,26,27,28,29,30,31,32,33,34,35,36,37,38,39,40,41,42,43,44,45,46,47,48,49,50,51,52,53,54,55,56,57

New Line._virtual_line58_line61 bus1=58.1.2.3.4 bus2=62.1.2.3.4 phases=4 linecode=LC8 length=8.5059 units=m
! reduced_from=line58,line61
! eliminated_buses=59

New Line._virtual_line59_line62_line66_line70_line74_line79_line83_line87_line91_line94_line97_line101_line104_line107_line110_line114_line118_line123 bus1=58.1.2.3.4 bus2=124.1.2.3.4 phases=4 linecode=LC2 length=17.58086 units=m
! reduced_from=line59,line62,line66,line70,line74,line79,line83,line87,line91,line94,line97,line101,line104,line107,line110,line114,line118,line123
! eliminated_buses=60,63,67,71,75,80,84,88,92,95,98,102,105,108,111,115,119

New Line._virtual_line60_line63_line67_line71_line75_line80_line84_line88 bus1=58.1.2.3.4 bus2=89.1.2.3.4 phases=4 linecode=LC2 length=12.48673 units=m
! reduced_from=line60,line63,line67,line71,line75,line80,line84,line88
! eliminated_buses=61,64,68,72,76,81,85

New Line._virtual_line64_line68_line72_line76_line81_line85_line89_line92_line95 bus1=62.1.2.3.4 bus2=96.1.2.3.4 phases=4 linecode=LC9 length=25.40055 units=m
! reduced_from=line64,line68,line72,line76,line81,line85,line89,line92,line95
! eliminated_buses=65,69,73,77,82,86,90,93

New Line._virtual_line65_line69_line73_line78_line82_line86_line90_line93_line96_line100_line103_line106_line109_line113_line117_line122_line128_line134_line140 bus1=62.1.2.3.4 bus2=141.1.2.3.4 phases=4 linecode=LC8 length=21.06711 units=m
! reduced_from=line65,line69,line73,line78,line82,line86,line90,line93,line96,line100,line103,line106,line109,line113,line117,line122,line128,line134,line140
! eliminated_buses=66,70,74,79,83,87,91,94,97,101,104,107,110,114,118,123,129,135

New Line._virtual_line99_line102_line105_line108 bus1=96.1.2.3.4 bus2=109.1.2.3.4 phases=4 linecode=LC9 length=9.2111 units=m
! reduced_from=line99,line102,line105,line108
! eliminated_buses=100,103,106

New Line._virtual_line111_line115 bus1=109.1.2.3.4 bus2=116.1.2.3.4 phases=4 linecode=LC9 length=4.4363 units=m
! reduced_from=line111,line115
! eliminated_buses=112

New Line._virtual_line112_line116_line121_line127_line133_line139_line145 bus1=109.1.2.3.4 bus2=146.1.2.3.4 phases=4 linecode=LC1 length=11.25298 units=m
! reduced_from=line112,line116,line121,line127,line133,line139,line145
! eliminated_buses=113,117,122,128,134,140

New Line._virtual_line119_line124 bus1=125.1.2.3.4 bus2=116.1.2.3.4 phases=4 linecode=LC9 length=6.7642 units=m
! reduced_from=line119,line124
! eliminated_buses=120

New Line._virtual_line120_line126_line132_line138_line144_line151_line157_line165_line175 bus1=176.1.2.3.4 bus2=116.1.2.3.4 phases=4 linecode=LC1 length=8.27091 units=m
! reduced_from=line120,line126,line132,line138,line144,line151,line157,line165,line175
! eliminated_buses=121,127,133,139,145,152,158,166

New Line._virtual_line129_line135_line141_line148_line154 bus1=125.1.2.3.4 bus2=155.1.2.3.4 phases=4 linecode=LC9 length=10.2776 units=m
! reduced_from=line129,line135,line141,line148,line154
! eliminated_buses=130,136,142,149

New Line._virtual_line130_line136_line142_line149_line155_line164_line174_line185 bus1=125.1.2.3.4 bus2=186.1.2.3.4 phases=4 linecode=LC1 length=8.9893 units=m
! reduced_from=line130,line136,line142,line149,line155,line164,line174,line185
! eliminated_buses=131,137,143,150,156,165,175

New Line._virtual_line146_line152_line158_line166_line176_line186_line194_line203_line212_line221 bus1=222.1.2.3.4 bus2=141.1.2.3.4 phases=4 linecode=LC2 length=19.67177 units=m
! reduced_from=line146,line152,line158,line166,line176,line186,line194,line203,line212,line221
! eliminated_buses=147,153,159,167,177,187,195,204,213

New Line._virtual_line147_line153_line160 bus1=161.1.2.3.4 bus2=141.1.2.3.4 phases=4 linecode=LC8 length=35.085 units=m
! reduced_from=line147,line153,line160
! eliminated_buses=148,154

New Line._virtual_line162_line172_line183_line192_line201_line210_line219_line227_line233_line237_line241_line245_line249_line253_line257_line262_line268_line275_line283_line292_line301_line309_line315 bus1=316.1.2.3.4 bus2=155.1.2.3.4 phases=4 linecode=LC2 length=19.864461 units=m
! reduced_from=line162,line172,line183,line192,line201,line210,line219,line227,line233,line237,line241,line245,line249,line253,line257,line262,line268,line275,line283,line292,line301,line309,line315
! eliminated_buses=163,173,184,193,202,211,220,228,234,238,242,246,250,254,258,263,269,276,284,293,302,310

New Line._virtual_line163_line173_line184_line193_line202_line211_line220_line228_line234_line238_line242_line246_line250_line254_line258_line263_line269_line276_line284_line293_line302 bus1=303.1.2.3.4 bus2=155.1.2.3.4 phases=4 linecode=LC2 length=25.10704 units=m
! reduced_from=line163,line173,line184,line193,line202,line211,line220,line228,line234,line238,line242,line246,line250,line254,line258,line263,line269,line276,line284,line293,line302
! eliminated_buses=164,174,185,194,203,212,221,229,235,239,243,247,251,255,259,264,270,277,285,294

New Line._virtual_line168_line178_line188_line196_line205_line214 bus1=161.1.2.3.4 bus2=215.1.2.3.4 phases=4 linecode=LC2 length=7.31566 units=m
! reduced_from=line168,line178,line188,line196,line205,line214
! eliminated_buses=169,179,189,197,206

New Line._virtual_line170_line181_line190_line199_line208_line217_line225_line231_line236_line240_line244_line248_line252_line256_line261 bus1=262.1.2.3.4 bus2=162.1.2.3.4 phases=4 linecode=LC9 length=18.12973 units=m
! reduced_from=line170,line181,line190,line199,line208,line217,line225,line231,line236,line240,line244,line248,line252,line256,line261
! eliminated_buses=171,182,191,200,209,218,226,232,237,241,245,249,253,257

New Line._virtual_line171_line182_line191_line200_line209_line218_line226_line232 bus1=162.1.2.3.4 bus2=233.1.2.3.4 phases=4 linecode=LC1 length=7.98515 units=m
! reduced_from=line171,line182,line191,line200,line209,line218,line226,line232
! eliminated_buses=172,183,192,201,210,219,227

New Line._virtual_line180_line189_line198_line207_line216_line224_line230_line235_line239_line243_line247_line251_line255_line260_line265_line271_line278_line286_line295_line303_line310_line316_line321_line325_line328_line330_line333 bus1=334.1.2.3.4 bus2=170.1.2.3.4 phases=4 linecode=LC8 length=48.00334 units=m
! reduced_from=line180,line189,line198,line207,line216,line224,line230,line235,line239,line243,line247,line251,line255,line260,line265,line271,line278,line286,line295,line303,line310,line316,line321,line325,line328,line330,line333
! eliminated_buses=181,190,199,208,217,225,231,236,240,244,248,252,256,261,266,272,279,287,296,304,311,317,322,326,329,331

New Line._virtual_line266_line272 bus1=273.1.2.3.4 bus2=262.1.2.3.4 phases=4 linecode=LC9 length=7.3822 units=m
! reduced_from=line266,line272
! eliminated_buses=267

New Line._virtual_line267_line274_line282_line291_line300_line308 bus1=262.1.2.3.4 bus2=309.1.2.3.4 phases=4 linecode=LC1 length=5.79287 units=m
! reduced_from=line267,line274,line282,line291,line300,line308
! eliminated_buses=268,275,283,292,301

New Line._virtual_line280_line289_line298_line306_line313_line319 bus1=273.1.2.3.4 bus2=320.1.2.3.4 phases=4 linecode=LC1 length=6.48267 units=m
! reduced_from=line280,line289,line298,line306,line313,line319
! eliminated_buses=281,290,299,307,314

New Line._virtual_line287_line296_line304_line311_line317_line322_line326_line329_line331_line334_line338_line344_line351_line358_line366_line375_line384_line392 bus1=393.1.2.3.4 bus2=280.1.2.3.4 phases=4 linecode=LC9 length=36.59219 units=m
! reduced_from=line287,line296,line304,line311,line317,line322,line326,line329,line331,line334,line338,line344,line351,line358,line366,line375,line384,line392
! eliminated_buses=288,297,305,312,318,323,327,330,332,335,339,345,352,359,367,376,385

New Line._virtual_line288_line297_line305_line312_line318_line323 bus1=280.1.2.3.4 bus2=324.1.2.3.4 phases=4 linecode=LC1 length=7.99567 units=m
! reduced_from=line288,line297,line305,line312,line318,line323
! eliminated_buses=289,298,306,313,319

New Line._virtual_line336_line341_line347_line354 bus1=334.1.2.3.4 bus2=355.1.2.3.4 phases=4 linecode=LC2 length=8.06746 units=m
! reduced_from=line336,line341,line347,line354
! eliminated_buses=337,342,348

New Line._virtual_line342_line348_line355_line363_line372_line382_line390 bus1=391.1.2.3.4 bus2=338.1.2.3.4 phases=4 linecode=LC2 length=12.72699 units=m
! reduced_from=line342,line348,line355,line363,line372,line382,line390
! eliminated_buses=343,349,356,364,373,383

New Line._virtual_line349_line356_line364_line373_line383_line391_line399_line406_line413_line420_line429_line438 bus1=344.1.2.3.4 bus2=439.1.2.3.4 phases=4 linecode=LC2 length=16.48883 units=m
! reduced_from=line349,line356,line364,line373,line383,line391,line399,line406,line413,line420,line429,line438
! eliminated_buses=350,357,365,374,384,392,400,407,414,421,430

New Line._virtual_line380_line389_line396_line405_line412_line419_line428_line437_line446_line456_line465 bus1=466.1.2.3.4 bus2=372.1.2.3.4 phases=4 linecode=LC6 length=8.87904 units=m
! reduced_from=line380,line389,line396,line405,line412,line419,line428,line437,line446,line456,line465
! eliminated_buses=381,390,397,406,413,420,429,438,447,457

New Line._virtual_line400_line407_line414 bus1=393.1.2.3.4 bus2=415.1.2.3.4 phases=4 linecode=LC9 length=1.38508 units=m
! reduced_from=line400,line407,line414
! eliminated_buses=401,408

New Line._virtual_line401_line408_line415_line424_line433_line442_line452_line461_line470_line480_line491_line503_line515_line527_line538_line550_line562 bus1=563.1.2.3.4 bus2=393.1.2.3.4 phases=4 linecode=LC1 length=10.54547 units=m
! reduced_from=line401,line408,line415,line424,line433,line442,line452,line461,line470,line480,line491,line503,line515,line527,line538,line550,line562
! eliminated_buses=402,409,416,425,434,443,453,462,471,481,492,504,516,528,539,551

New Line._virtual_line402_line409_line416_line425_line434_line443_line453_line462_line471_line481_line492_line504_line516_line528_line539_line551_line563 bus1=393.1.2.3.4 bus2=564.1.2.3.4 phases=4 linecode=LC1 length=13.48702 units=m
! reduced_from=line402,line409,line416,line425,line434,line443,line453,line462,line471,line481,line492,line504,line516,line528,line539,line551,line563
! eliminated_buses=403,410,417,426,435,444,454,463,472,482,493,505,517,529,540,552

New Line._virtual_line421_line430_line439 bus1=440.1.2.3.4 bus2=415.1.2.3.4 phases=4 linecode=LC9 length=1.34453 units=m
! reduced_from=line421,line430,line439
! eliminated_buses=422,431

New Line._virtual_line422_line431_line440_line450_line459_line468_line478_line489_line501_line513_line525_line536_line548_line560_line573_line583_line594_line605 bus1=606.1.2.3.4 bus2=415.1.2.3.4 phases=4 linecode=LC1 length=7.87948 units=m
! reduced_from=line422,line431,line440,line450,line459,line468,line478,line489,line501,line513,line525,line536,line548,line560,line573,line583,line594,line605
! eliminated_buses=423,432,441,451,460,469,479,490,502,514,526,537,549,561,574,584,595

New Line._virtual_line448_line457_line466_line476_line487_line499_line511_line523_line534_line546_line558_line571_line582_line593_line604_line614 bus1=440.1.2.3.4 bus2=615.1.2.3.4 phases=4 linecode=LC1 length=15.91178 units=m
! reduced_from=line448,line457,line466,line476,line487,line499,line511,line523,line534,line546,line558,line571,line582,line593,line604,line614
! eliminated_buses=449,458,467,477,488,500,512,524,535,547,559,572,583,594,605

New Line._virtual_line449_line458_line467_line477_line488_line500_line512_line524_line535_line547_line559_line572 bus1=573.1.2.3.4 bus2=440.1.2.3.4 phases=4 linecode=LC1 length=16.84129 units=m
! reduced_from=line449,line458,line467,line477,line488,line500,line512,line524,line535,line547,line559,line572
! eliminated_buses=450,459,468,478,489,501,513,525,536,548,560

New Line._virtual_line485_line496_line507_line519_line529_line540_line552_line564_line575_line585_line596 bus1=476.1.2.3.4 bus2=597.1.2.3.4 phases=4 linecode=LC2 length=15.72058 units=m
! reduced_from=line485,line496,line507,line519,line529,line540,line552,line564,line575,line585,line596
! eliminated_buses=486,497,508,520,530,541,553,565,576,586

New Line._virtual_line486_line498 bus1=499.1.2.3.4 bus2=476.1.2.3.4 phases=4 linecode=LC8 length=11.6432 units=m
! reduced_from=line486,line498
! eliminated_buses=487

New Line._virtual_line509_line521_line531_line542_line554_line566_line577_line588_line599_line609_line620_line628_line636_line646_line656 bus1=657.1.2.3.4 bus2=499.1.2.3.4 phases=4 linecode=LC2 length=12.659699 units=m
! reduced_from=line509,line521,line531,line542,line554,line566,line577,line588,line599,line609,line620,line628,line636,line646,line656
! eliminated_buses=510,522,532,543,555,567,578,589,600,610,621,629,637,647

New Line._virtual_line510_line522 bus1=499.1.2.3.4 bus2=523.1.2.3.4 phases=4 linecode=LC8 length=14.3107 units=m
! reduced_from=line510,line522
! eliminated_buses=511

New Line._virtual_line532_line543_line555_line567_line578_line589_line600_line610_line621_line629 bus1=523.1.2.3.4 bus2=630.1.2.3.4 phases=4 linecode=LC2 length=12.19621 units=m
! reduced_from=line532,line543,line555,line567,line578,line589,line600,line610,line621,line629
! eliminated_buses=533,544,556,568,579,590,601,611,622

New Line._virtual_line544_line556 bus1=534.1.2.3.4 bus2=557.1.2.3.4 phases=4 linecode=LC8 length=14.9783 units=m
! reduced_from=line544,line556
! eliminated_buses=545

New Line._virtual_line545_line557_line570_line581_line592_line603_line613_line624_line633_line643_line653_line662_line672 bus1=534.1.2.3.4 bus2=673.1.2.3.4 phases=4 linecode=LC2 length=12.104632 units=m
! reduced_from=line545,line557,line570,line581,line592,line603,line613,line624,line633,line643,line653,line662,line672
! eliminated_buses=546,558,571,582,593,604,614,625,634,644,654,663

New Line._virtual_line568_line579_line590_line601_line611_line622_line630_line639_line648_line657_line667_line676_line691_line700_line708_line717_line727_line736 bus1=557.1.2.3.4 bus2=737.1.2.3.4 phases=4 linecode=LC2 length=11.213784 units=m
! reduced_from=line568,line579,line590,line601,line611,line622,line630,line639,line648,line657,line667,line676,line691,line700,line708,line717,line727,line736
! eliminated_buses=569,580,591,602,612,623,631,640,649,658,668,677,692,701,709,718,728

New Line._virtual_line569_line580_line591_line602_line612_line623 bus1=557.1.2.3.4 bus2=624.1.2.3.4 phases=4 linecode=LC8 length=15.00439 units=m
! reduced_from=line569,line580,line591,line602,line612,line623
! eliminated_buses=570,581,592,603,613

New Line._virtual_line632_line642_line652_line661_line671_line681_line696_line705_line714 bus1=715.1.2.3.4 bus2=624.1.2.3.4 phases=4 linecode=LC2 length=10.98487 units=m
! reduced_from=line632,line642,line652,line661,line671,line681,line696,line705,line714
! eliminated_buses=633,643,653,662,672,682,697,706

New Line._virtual_line637_line647 bus1=648.1.2.3.4 bus2=630.1.2.3.4 phases=4 linecode=LC2 length=5.9834 units=m
! reduced_from=line637,line647
! eliminated_buses=638

New Line._virtual_line640_line649_line658_line668_line677_line692_line701_line709_line718_line728_line737_line747 bus1=748.1.2.3.4 bus2=632.1.2.3.4 phases=4 linecode=LC2 length=10.82707 units=m
! reduced_from=line640,line649,line658,line668,line677,line692,line701,line709,line718,line728,line737,line747
! eliminated_buses=641,650,659,669,678,693,702,710,719,729,738

New Line._virtual_line641_line651_line660_line670 bus1=632.1.2.3.4 bus2=671.1.2.3.4 phases=4 linecode=LC8 length=15.037242 units=m
! reduced_from=line641,line651,line660,line670
! eliminated_buses=642,652,661

New Line._virtual_line665_line675 bus1=657.1.2.3.4 bus2=676.1.2.3.4 phases=4 linecode=LC2 length=5.8779 units=m
! reduced_from=line665,line675
! eliminated_buses=666

New Line._virtual_line679_line694_line703_line711_line720_line730_line739_line749_line759_line767 bus1=671.1.2.3.4 bus2=768.1.2.3.4 phases=4 linecode=LC2 length=10.612524 units=m
! reduced_from=line679,line694,line703,line711,line720,line730,line739,line749,line759,line767
! eliminated_buses=680,695,704,712,721,731,740,750,760

New Line._virtual_line680_line695_line704 bus1=671.1.2.3.4 bus2=705.1.2.3.4 phases=4 linecode=LC8 length=15.214 units=m
! reduced_from=line680,line695,line704
! eliminated_buses=681,696

New Line._virtual_line682_line697 bus1=698.1.2.3.4 bus2=673.1.2.3.4 phases=4 linecode=LC2 length=6.3621 units=m
! reduced_from=line682,line697
! eliminated_buses=683

New Line._virtual_line712_line721_line731_line740_line750_line760_line768_line775_line781_line785 bus1=786.1.2.3.4 bus2=705.1.2.3.4 phases=4 linecode=LC2 length=13.48625 units=m
! reduced_from=line712,line721,line731,line740,line750,line760,line768,line775,line781,line785
! eliminated_buses=713,722,732,741,751,761,769,776,782

New Line._virtual_line713_line722_line732_line741_line751_line761_line769_line776_line782_line786 bus1=787.1.2.3.4 bus2=705.1.2.3.4 phases=4 linecode=LC8 length=19.58082 units=m
! reduced_from=line713,line722,line732,line741,line751,line761,line769,line776,line782,line786
! eliminated_buses=714,723,733,742,752,762,770,777,783

New Line._virtual_line723_line733 bus1=734.1.2.3.4 bus2=715.1.2.3.4 phases=4 linecode=LC2 length=6.012 units=m
! reduced_from=line723,line733
! eliminated_buses=724

New Line._virtual_line745_line755 bus1=756.1.2.3.4 bus2=737.1.2.3.4 phases=4 linecode=LC2 length=6.1565 units=m
! reduced_from=line745,line755
! eliminated_buses=746

New Line._virtual_line756_line765 bus1=748.1.2.3.4 bus2=766.1.2.3.4 phases=4 linecode=LC2 length=5.7079 units=m
! reduced_from=line756,line765
! eliminated_buses=757

New Line._virtual_line773_line780 bus1=768.1.2.3.4 bus2=781.1.2.3.4 phases=4 linecode=LC2 length=6.4282 units=m
! reduced_from=line773,line780
! eliminated_buses=774

New Line._virtual_line789_line794_line798_line802_line807_line812_line817_line822_line828_line834_line840_line846_line852_line858_line865_line872_line880_line889_line898_line907_line917_line926_line933_line940_line949_line958_line965_line971_line977_line985_line994_line1002_line1009_line1016_line1024_line1033_line1042_line1052_line1062_line1073_line1084_line1095_line1105_line1114_line1122_line1130_line1141_line1151_line1159_line1166_line1172_line1177_line1182_line1187_line1192_line1197_line1201_line1205_line1209 bus1=1210.1.2.3.4 bus2=787.1.2.3.4 phases=4 linecode=LC8 length=157.52435 units=m
! reduced_from=line789,line794,line798,line802,line807,line812,line817,line822,line828,line834,line840,line846,line852,line858,line865,line872,line880,line889,line898,line907,line917,line926,line933,line940,line949,line958,line965,line971,line977,line985,line994,line1002,line1009,line1016,line1024,line1033,line1042,line1052,line1062,line1073,line1084,line1095,line1105,line1114,line1122,line1130,line1141,line1151,line1159,line1166,line1172,line1177,line1182,line1187,line1192,line1197,line1201,line1205,line1209
! eliminated_buses=790,795,799,803,808,813,818,823,829,835,841,847,853,859,866,873,881,890,899,908,918,927,934,941,950,959,966,972,978,986,995,1003,1010,1017,1025,1034,1043,1053,1063,1074,1085,1096,1106,1115,1123,1131,1142,1152,1160,1167,1173,1178,1183,1188,1193,1198,1202,1206

New Line._virtual_line790_line795 bus1=787.1.2.3.4 bus2=796.1.2.3.4 phases=4 linecode=LC8 length=6.51522 units=m
! reduced_from=line790,line795
! eliminated_buses=791

New Line._virtual_line804_line809_line814 bus1=815.1.2.3.4 bus2=800.1.2.3.4 phases=4 linecode=LC4 length=8.85004 units=m
! reduced_from=line804,line809,line814
! eliminated_buses=805,810

New Line._virtual_line805_line810_line815_line821_line827_line833_line839_line845_line851_line857_line864_line871_line879_line887 bus1=800.1.2.3.4 bus2=888.1.2.3.4 phases=4 linecode=LC2 length=13.40139 units=m
! reduced_from=line805,line810,line815,line821,line827,line833,line839,line845,line851,line857,line864,line871,line879,line887
! eliminated_buses=806,811,816,822,828,834,840,846,852,858,865,872,880

New Line._virtual_line819_line824_line830_line836_line841_line847_line853_line859_line866_line873_line881_line890_line899_line908_line918_line927_line934_line941_line950_line959_line966_line972 bus1=973.1.2.3.4 bus2=815.1.2.3.4 phases=4 linecode=LC3 length=9.331191 units=m
! reduced_from=line819,line824,line830,line836,line841,line847,line853,line859,line866,line873,line881,line890,line899,line908,line918,line927,line934,line941,line950,line959,line966,line972
! eliminated_buses=820,825,831,837,842,848,854,860,867,874,882,891,900,909,919,928,935,942,951,960,967

New Line._virtual_line825_line831_line837_line842_line848_line854_line860_line867_line874_line882_line891_line900 bus1=901.1.2.3.4 bus2=821.1.2.3.4 phases=4 linecode=LC2 length=9.421167 units=m
! reduced_from=line825,line831,line837,line842,line848,line854,line860,line867,line874,line882,line891,line900
! eliminated_buses=826,832,838,843,849,855,861,868,875,883,892

New Line._virtual_line826_line832_line838 bus1=821.1.2.3.4 bus2=839.1.2.3.4 phases=4 linecode=LC4 length=14.311404 units=m
! reduced_from=line826,line832,line838
! eliminated_buses=827,833

New Line._virtual_line843_line849_line855_line861_line868_line875_line883_line892_line901_line911_line920_line928_line935 bus1=936.1.2.3.4 bus2=839.1.2.3.4 phases=4 linecode=LC2 length=9.174669 units=m
! reduced_from=line843,line849,line855,line861,line868,line875,line883,line892,line901,line911,line920,line928,line935
! eliminated_buses=844,850,856,862,869,876,884,893,902,912,921,929

New Line._virtual_line844_line850_line856 bus1=839.1.2.3.4 bus2=857.1.2.3.4 phases=4 linecode=LC4 length=13.9283 units=m
! reduced_from=line844,line850,line856
! eliminated_buses=845,851

New Line._virtual_line862_line869_line876_line884_line893_line902_line912_line921_line929_line936_line944 bus1=857.1.2.3.4 bus2=945.1.2.3.4 phases=4 linecode=LC2 length=9.12391 units=m
! reduced_from=line862,line869,line876,line884,line893,line902,line912,line921,line929,line936,line944
! eliminated_buses=863,870,877,885,894,903,913,922,930,937

New Line._virtual_line863_line870 bus1=857.1.2.3.4 bus2=871.1.2.3.4 phases=4 linecode=LC4 length=14.263 units=m
! reduced_from=line863,line870
! eliminated_buses=864

New Line._virtual_line877_line885_line894_line903_line913_line922_line930_line937_line945_line954_line961_line967_line973_line980 bus1=871.1.2.3.4 bus2=981.1.2.3.4 phases=4 linecode=LC2 length=9.467709 units=m
! reduced_from=line877,line885,line894,line903,line913,line922,line930,line937,line945,line954,line961,line967,line973,line980
! eliminated_buses=878,886,895,904,914,923,931,938,946,955,962,968,974

New Line._virtual_line878_line886 bus1=871.1.2.3.4 bus2=887.1.2.3.4 phases=4 linecode=LC4 length=14.184 units=m
! reduced_from=line878,line886
! eliminated_buses=879

New Line._virtual_line895_line904_line914_line923_line931_line938_line946_line955_line962_line968_line974 bus1=887.1.2.3.4 bus2=975.1.2.3.4 phases=4 linecode=LC2 length=10.05904 units=m
! reduced_from=line895,line904,line914,line923,line931,line938,line946,line955,line962,line968,line974
! eliminated_buses=896,905,915,924,932,939,947,956,963,969

New Line._virtual_line896_line905_line915_line924_line932_line939 bus1=887.1.2.3.4 bus2=940.1.2.3.4 phases=4 linecode=LC4 length=26.069 units=m
! reduced_from=line896,line905,line915,line924,line932,line939
! eliminated_buses=897,906,916,925,933

New Line._virtual_line909_line919 bus1=901.1.2.3.4 bus2=920.1.2.3.4 phases=4 linecode=LC2 length=5.9288 units=m
! reduced_from=line909,line919
! eliminated_buses=910

New Line._virtual_line942_line951 bus1=936.1.2.3.4 bus2=952.1.2.3.4 phases=4 linecode=LC2 length=5.4506 units=m
! reduced_from=line942,line951
! eliminated_buses=943

New Line._virtual_line947_line956_line963_line969_line975_line983 bus1=984.1.2.3.4 bus2=940.1.2.3.4 phases=4 linecode=LC4 length=23.1439 units=m
! reduced_from=line947,line956,line963,line969,line975,line983
! eliminated_buses=948,957,964,970,976

New Line._virtual_line948_line957_line964_line970_line976_line984_line993_line1001_line1008_line1015_line1023_line1032_line1041_line1051_line1061_line1072_line1083_line1094 bus1=940.1.2.3.4 bus2=1095.1.2.3.4 phases=4 linecode=LC2 length=23.98099 units=m
! reduced_from=line948,line957,line964,line970,line976,line984,line993,line1001,line1008,line1015,line1023,line1032,line1041,line1051,line1061,line1072,line1083,line1094
! eliminated_buses=949,958,965,971,977,985,994,1002,1009,1016,1024,1033,1042,1052,1062,1073,1084

New Line._virtual_line952_line960 bus1=945.1.2.3.4 bus2=961.1.2.3.4 phases=4 linecode=LC2 length=4.8617 units=m
! reduced_from=line952,line960
! eliminated_buses=953

New Line._virtual_line978_line986_line995_line1003_line1010_line1017_line1025_line1034_line1043_line1053_line1063_line1074_line1085_line1096_line1106_line1115_line1123_line1131_line1142_line1152 bus1=973.1.2.3.4 bus2=1153.1.2.3.4 phases=4 linecode=LC2 length=13.178157 units=m
! reduced_from=line978,line986,line995,line1003,line1010,line1017,line1025,line1034,line1043,line1053,line1063,line1074,line1085,line1096,line1106,line1115,line1123,line1131,line1142,line1152
! eliminated_buses=979,987,996,1004,1011,1018,1026,1035,1044,1054,1064,1075,1086,1097,1107,1116,1124,1132,1143

New Line._virtual_line979_line987 bus1=988.1.2.3.4 bus2=973.1.2.3.4 phases=4 linecode=LC3 length=9.8806 units=m
! reduced_from=line979,line987
! eliminated_buses=980

New Line._virtual_line981_line990 bus1=991.1.2.3.4 bus2=975.1.2.3.4 phases=4 linecode=LC2 length=9.7919 units=m
! reduced_from=line981,line990
! eliminated_buses=982

New Line._virtual_line988_line998 bus1=999.1.2.3.4 bus2=981.1.2.3.4 phases=4 linecode=LC2 length=5.5627 units=m
! reduced_from=line988,line998
! eliminated_buses=989

New Line._virtual_line991_line999 bus1=984.1.2.3.4 bus2=1000.1.2.3.4 phases=4 linecode=LC5 length=20.0623 units=m
! reduced_from=line991,line999
! eliminated_buses=992

New Line._virtual_line992_line1000_line1007_line1014_line1022_line1031_line1040_line1050_line1060_line1071_line1082_line1093_line1104_line1113_line1121_line1129 bus1=1130.1.2.3.4 bus2=984.1.2.3.4 phases=4 linecode=LC6 length=9.002694 units=m
! reduced_from=line992,line1000,line1007,line1014,line1022,line1031,line1040,line1050,line1060,line1071,line1082,line1093,line1104,line1113,line1121,line1129
! eliminated_buses=993,1001,1008,1015,1023,1032,1041,1051,1061,1072,1083,1094,1105,1114,1122

New Line._virtual_line996_line1004_line1011_line1018 bus1=1019.1.2.3.4 bus2=988.1.2.3.4 phases=4 linecode=LC3 length=17.09694 units=m
! reduced_from=line996,line1004,line1011,line1018
! eliminated_buses=997,1005,1012

New Line._virtual_line997_line1005_line1012_line1020_line1029_line1038_line1048_line1058_line1069_line1080_line1091 bus1=988.1.2.3.4 bus2=1092.1.2.3.4 phases=4 linecode=LC2 length=10.006597 units=m
! reduced_from=line997,line1005,line1012,line1020,line1029,line1038,line1048,line1058,line1069,line1080,line1091
! eliminated_buses=998,1006,1013,1021,1030,1039,1049,1059,1070,1081

New Line._virtual_line1006_line1013_line1021_line1030_line1039_line1049_line1059_line1070_line1081_line1092_line1103_line1112_line1120_line1128 bus1=1129.1.2.3.4 bus2=1000.1.2.3.4 phases=4 linecode=LC6 length=10.67084 units=m
! reduced_from=line1006,line1013,line1021,line1030,line1039,line1049,line1059,line1070,line1081,line1092,line1103,line1112,line1120,line1128
! eliminated_buses=1007,1014,1022,1031,1040,1050,1060,1071,1082,1093,1104,1113,1121

New Line._virtual_line1026_line1035 bus1=1019.1.2.3.4 bus2=1036.1.2.3.4 phases=4 linecode=LC3 length=14.2601 units=m
! reduced_from=line1026,line1035
! eliminated_buses=1027

New Line._virtual_line1027_line1036_line1046_line1056_line1067_line1078_line1089_line1100_line1110_line1119_line1127_line1135 bus1=1019.1.2.3.4 bus2=1136.1.2.3.4 phases=4 linecode=LC2 length=10.03273 units=m
! reduced_from=line1027,line1036,line1046,line1056,line1067,line1078,line1089,line1100,line1110,line1119,line1127,line1135
! eliminated_buses=1028,1037,1047,1057,1068,1079,1090,1101,1111,1120,1128

New Line._virtual_line1044_line1054 bus1=1055.1.2.3.4 bus2=1036.1.2.3.4 phases=4 linecode=LC3 length=8.6069 units=m
! reduced_from=line1044,line1054
! eliminated_buses=1045

New Line._virtual_line1045_line1055_line1066_line1077_line1088_line1099_line1109_line1118_line1126_line1134_line1146_line1155 bus1=1036.1.2.3.4 bus2=1156.1.2.3.4 phases=4 linecode=LC2 length=10.13899 units=m
! reduced_from=line1045,line1055,line1066,line1077,line1088,line1099,line1109,line1118,line1126,line1134,line1146,line1155
! eliminated_buses=1046,1056,1067,1078,1089,1100,1110,1119,1127,1135,1147

New Line._virtual_line1065_line1076_line1087_line1098_line1108_line1117_line1125_line1133_line1145_line1154_line1161_line1168_line1174_line1179_line1184_line1189_line1194 bus1=1055.1.2.3.4 bus2=1195.1.2.3.4 phases=4 linecode=LC2 length=13.78792 units=m
! reduced_from=line1065,line1076,line1087,line1098,line1108,line1117,line1125,line1133,line1145,line1154,line1161,line1168,line1174,line1179,line1184,line1189,line1194
! eliminated_buses=1066,1077,1088,1099,1109,1118,1126,1134,1146,1155,1162,1169,1175,1180,1185,1190

New Line._virtual_line1075_line1086_line1097_line1107_line1116_line1124_line1132 bus1=1133.1.2.3.4 bus2=1065.1.2.3.4 phases=4 linecode=LC6 length=19.02328 units=m
! reduced_from=line1075,line1086,line1097,line1107,line1116,line1124,line1132
! eliminated_buses=1076,1087,1098,1108,1117,1125

New Line._virtual_line1101_line1111 bus1=1112.1.2.3.4 bus2=1092.1.2.3.4 phases=4 linecode=LC2 length=5.8795 units=m
! reduced_from=line1101,line1111
! eliminated_buses=1102

New Line._virtual_line1136_line1149_line1157_line1164_line1170_line1175_line1180_line1185_line1190_line1195_line1199_line1203_line1207_line1211_line1216_line1220_line1225_line1230_line1235_line1239_line1243_line1247 bus1=1129.1.2.3.4 bus2=1248.1.2.3.4 phases=4 linecode=LC6 length=25.01737 units=m
! reduced_from=line1136,line1149,line1157,line1164,line1170,line1175,line1180,line1185,line1190,line1195,line1199,line1203,line1207,line1211,line1216,line1220,line1225,line1230,line1235,line1239,line1243,line1247
! eliminated_buses=1137,1150,1158,1165,1171,1176,1181,1186,1191,1196,1200,1204,1208,1212,1217,1221,1226,1231,1236,1240,1244

New Line._virtual_line1139_line1150_line1158_line1165_line1171_line1176_line1181_line1186_line1191_line1196_line1200_line1204_line1208_line1212_line1217_line1221_line1226_line1231_line1236_line1240_line1244_line1248_line1251_line1254 bus1=1255.1.2.3.4 bus2=1130.1.2.3.4 phases=4 linecode=LC6 length=23.625701 units=m
! reduced_from=line1139,line1150,line1158,line1165,line1171,line1176,line1181,line1186,line1191,line1196,line1200,line1204,line1208,line1212,line1217,line1221,line1226,line1231,line1236,line1240,line1244,line1248,line1251,line1254
! eliminated_buses=1140,1151,1159,1166,1172,1177,1182,1187,1192,1197,1201,1205,1209,1213,1218,1222,1227,1232,1237,1241,1245,1249,1252

New Line._virtual_line1143_line1153_line1160_line1167_line1173_line1178_line1183_line1188_line1193_line1198_line1202_line1206_line1210_line1215_line1219_line1224_line1229_line1234 bus1=1133.1.2.3.4 bus2=1235.1.2.3.4 phases=4 linecode=LC6 length=26.47747 units=m
! reduced_from=line1143,line1153,line1160,line1167,line1173,line1178,line1183,line1188,line1193,line1198,line1202,line1206,line1210,line1215,line1219,line1224,line1229,line1234
! eliminated_buses=1144,1154,1161,1168,1174,1179,1184,1189,1194,1199,1203,1207,1211,1216,1220,1225,1230

New Line._virtual_line1147_line1156 bus1=1157.1.2.3.4 bus2=1136.1.2.3.4 phases=4 linecode=LC2 length=8.1151 units=m
! reduced_from=line1147,line1156
! eliminated_buses=1148

New Line._virtual_line1162_line1169 bus1=1170.1.2.3.4 bus2=1156.1.2.3.4 phases=4 linecode=LC2 length=8.6387 units=m
! reduced_from=line1162,line1169
! eliminated_buses=1163

New Line._virtual_line1214_line1218 bus1=1210.1.2.3.4 bus2=1219.1.2.3.4 phases=4 linecode=LC4 length=23.1846 units=m
! reduced_from=line1214,line1218
! eliminated_buses=1215

New Line._virtual_line1222_line1227_line1232_line1237_line1241_line1245_line1249_line1252_line1255 bus1=1256.1.2.3.4 bus2=1219.1.2.3.4 phases=4 linecode=LC4 length=13.09915 units=m
! reduced_from=line1222,line1227,line1232,line1237,line1241,line1245,line1249,line1252,line1255
! eliminated_buses=1223,1228,1233,1238,1242,1246,1250,1253

New Line._virtual_line1223_line1228_line1233_line1238_line1242_line1246_line1250_line1253_line1256_line1259_line1263 bus1=1264.1.2.3.4 bus2=1219.1.2.3.4 phases=4 linecode=LC6 length=11.8012 units=m
! reduced_from=line1223,line1228,line1233,line1238,line1242,line1246,line1250,line1253,line1256,line1259,line1263
! eliminated_buses=1224,1229,1234,1239,1243,1247,1251,1254,1257,1260

New Line._virtual_line1257_line1260 bus1=1256.1.2.3.4 bus2=1261.1.2.3.4 phases=4 linecode=LC4 length=3.24656 units=m
! reduced_from=line1257,line1260
! eliminated_buses=1258

New Line._virtual_line1258_line1262_line1267_line1273_line1279_line1286_line1294_line1302_line1310_line1318_line1326_line1333_line1339_line1345_line1350_line1354_line1359 bus1=1256.1.2.3.4 bus2=1360.1.2.3.4 phases=4 linecode=LC6 length=23.5046 units=m
! reduced_from=line1258,line1262,line1267,line1273,line1279,line1286,line1294,line1302,line1310,line1318,line1326,line1333,line1339,line1345,line1350,line1354,line1359
! eliminated_buses=1259,1263,1268,1274,1280,1287,1295,1303,1311,1319,1327,1334,1340,1346,1351,1355

New Line._virtual_line1264_line1270 bus1=1261.1.2.3.4 bus2=1271.1.2.3.4 phases=4 linecode=LC4 length=14.3798 units=m
! reduced_from=line1264,line1270
! eliminated_buses=1265

New Line._virtual_line1265_line1271_line1277_line1284_line1292_line1300_line1308_line1316_line1324_line1332_line1338_line1344_line1349_line1353_line1358 bus1=1261.1.2.3.4 bus2=1359.1.2.3.4 phases=4 linecode=LC3 length=8.758746 units=m
! reduced_from=line1265,line1271,line1277,line1284,line1292,line1300,line1308,line1316,line1324,line1332,line1338,line1344,line1349,line1353,line1358
! eliminated_buses=1266,1272,1278,1285,1293,1301,1309,1317,1325,1333,1339,1345,1350,1354

New Line._virtual_line1268_line1274_line1280_line1287_line1295_line1303_line1311_line1319_line1327_line1334_line1340_line1346_line1351_line1355_line1360_line1364_line1368_line1373_line1380_line1388_line1397 bus1=1264.1.2.3.4 bus2=1398.1.2.3.4 phases=4 linecode=LC6 length=24.34073 units=m
! reduced_from=line1268,line1274,line1280,line1287,line1295,line1303,line1311,line1319,line1327,line1334,line1340,line1346,line1351,line1355,line1360,line1364,line1368,line1373,line1380,line1388,line1397
! eliminated_buses=1269,1275,1281,1288,1296,1304,1312,1320,1328,1335,1341,1347,1352,1356,1361,1365,1369,1374,1381,1389

New Line._virtual_line1276_line1283_line1291_line1299_line1307_line1315_line1323_line1331_line1337_line1343 bus1=1344.1.2.3.4 bus2=1271.1.2.3.4 phases=4 linecode=LC6 length=11.19071 units=m
! reduced_from=line1276,line1283,line1291,line1299,line1307,line1315,line1323,line1331,line1337,line1343
! eliminated_buses=1277,1284,1292,1300,1308,1316,1324,1332,1338

New Line._virtual_line1282_line1290_line1298_line1306_line1314_line1322_line1330_line1336_line1342_line1348 bus1=1276.1.2.3.4 bus2=1349.1.2.3.4 phases=4 linecode=LC6 length=13.8744 units=m
! reduced_from=line1282,line1290,line1298,line1306,line1314,line1322,line1330,line1336,line1342,line1348
! eliminated_buses=1283,1291,1299,1307,1315,1323,1331,1337,1343

New Line._virtual_line1288_line1296_line1304_line1312_line1320_line1328_line1335_line1341_line1347_line1352_line1356_line1361_line1365_line1369 bus1=1282.1.2.3.4 bus2=1370.1.2.3.4 phases=4 linecode=LC3 length=19.86138 units=m
! reduced_from=line1288,line1296,line1304,line1312,line1320,line1328,line1335,line1341,line1347,line1352,line1356,line1361,line1365,line1369
! eliminated_buses=1289,1297,1305,1313,1321,1329,1336,1342,1348,1353,1357,1362,1366

New Line._virtual_line1362_line1366 bus1=1359.1.2.3.4 bus2=1367.1.2.3.4 phases=4 linecode=LC3 length=13.0977 units=m
! reduced_from=line1362,line1366
! eliminated_buses=1363

New Line._virtual_line1363_line1367_line1372_line1379_line1387_line1396_line1406_line1416_line1427_line1438_line1450_line1461_line1471_line1481_line1492_line1503_line1513_line1522_line1530_line1537_line1543_line1548_line1554_line1559_line1563 bus1=1564.1.2.3.4 bus2=1359.1.2.3.4 phases=4 linecode=LC2 length=10.23856 units=m
! reduced_from=line1363,line1367,line1372,line1379,line1387,line1396,line1406,line1416,line1427,line1438,line1450,line1461,line1471,line1481,line1492,line1503,line1513,line1522,line1530,line1537,line1543,line1548,line1554,line1559,line1563
! eliminated_buses=1364,1368,1373,1380,1388,1397,1407,1417,1428,1439,1451,1462,1472,1482,1493,1504,1514,1523,1531,1538,1544,1549,1555,1560

New Line._virtual_line1371_line1378_line1386_line1395_line1405_line1415_line1426 bus1=1427.1.2.3.4 bus2=1367.1.2.3.4 phases=4 linecode=LC2 length=9.10408 units=m
! reduced_from=line1371,line1378,line1386,line1395,line1405,line1415,line1426
! eliminated_buses=1372,1379,1387,1396,1406,1416

New Line._virtual_line1374_line1381_line1389_line1398_line1407_line1417_line1428_line1439 bus1=1440.1.2.3.4 bus2=1370.1.2.3.4 phases=4 linecode=LC6 length=13.31984 units=m
! reduced_from=line1374,line1381,line1389,line1398,line1407,line1417,line1428,line1439
! eliminated_buses=1375,1382,1390,1399,1408,1418,1429

New Line._virtual_line1375_line1382_line1390 bus1=1370.1.2.3.4 bus2=1391.1.2.3.4 phases=4 linecode=LC3 length=10.2832 units=m
! reduced_from=line1375,line1382,line1390
! eliminated_buses=1376,1383

New Line._virtual_line1377_line1385_line1394_line1404_line1414_line1425_line1435_line1448_line1460_line1470 bus1=1471.1.2.3.4 bus2=1371.1.2.3.4 phases=4 linecode=LC6 length=14.53529 units=m
! reduced_from=line1377,line1385,line1394,line1404,line1414,line1425,line1435,line1448,line1460,line1470
! eliminated_buses=1378,1386,1395,1405,1415,1426,1436,1449,1461

New Line._virtual_line1383_line1391_line1401 bus1=1402.1.2.3.4 bus2=1377.1.2.3.4 phases=4 linecode=LC3 length=16.05107 units=m
! reduced_from=line1383,line1391,line1401
! eliminated_buses=1384,1392

New Line._virtual_line1384_line1393_line1403_line1413_line1424_line1434_line1447_line1459_line1469_line1480 bus1=1377.1.2.3.4 bus2=1481.1.2.3.4 phases=4 linecode=LC6 length=12.98262 units=m
! reduced_from=line1384,line1393,line1403,line1413,line1424,line1434,line1447,line1459,line1469,line1480
! eliminated_buses=1385,1394,1404,1414,1425,1435,1448,1460,1470

New Line._virtual_line1399_line1408_line1418_line1429_line1440_line1451_line1462_line1472 bus1=1473.1.2.3.4 bus2=1391.1.2.3.4 phases=4 linecode=LC2 length=11.41936 units=m
! reduced_from=line1399,line1408,line1418,line1429,line1440,line1451,line1462,line1472
! eliminated_buses=1400,1409,1419,1430,1441,1452,1463

New Line._virtual_line1400_line1409_line1420_line1430 bus1=1391.1.2.3.4 bus2=1431.1.2.3.4 phases=4 linecode=LC3 length=16.32669 units=m
! reduced_from=line1400,line1409,line1420,line1430
! eliminated_buses=1401,1410,1421

New Line._virtual_line1410_line1421 bus1=1402.1.2.3.4 bus2=1422.1.2.3.4 phases=4 linecode=LC3 length=9.7612 units=m
! reduced_from=line1410,line1421
! eliminated_buses=1411

New Line._virtual_line1411_line1422_line1433_line1446_line1458_line1468_line1479_line1491 bus1=1492.1.2.3.4 bus2=1402.1.2.3.4 phases=4 linecode=LC2 length=10.17243 units=m
! reduced_from=line1411,line1422,line1433,line1446,line1458,line1468,line1479,line1491
! eliminated_buses=1412,1423,1434,1447,1459,1469,1480

New Line._virtual_line1432_line1445_line1457_line1467_line1478_line1490_line1500_line1511_line1521 bus1=1422.1.2.3.4 bus2=1522.1.2.3.4 phases=4 linecode=LC6 length=14.07476 units=m
! reduced_from=line1432,line1445,line1457,line1467,line1478,line1490,line1500,line1511,line1521
! eliminated_buses=1433,1446,1458,1468,1479,1491,1501,1512

New Line._virtual_line1436_line1449 bus1=1450.1.2.3.4 bus2=1427.1.2.3.4 phases=4 linecode=LC2 length=5.4837 units=m
! reduced_from=line1436,line1449
! eliminated_buses=1437

New Line._virtual_line1441_line1452_line1463_line1473_line1484_line1494_line1504_line1514_line1523 bus1=1524.1.2.3.4 bus2=1431.1.2.3.4 phases=4 linecode=LC2 length=10.33214 units=m
! reduced_from=line1441,line1452,line1463,line1473,line1484,line1494,line1504,line1514,line1523
! eliminated_buses=1442,1453,1464,1474,1485,1495,1505,1515

New Line._virtual_line1442_line1453_line1464_line1474 bus1=1475.1.2.3.4 bus2=1431.1.2.3.4 phases=4 linecode=LC3 length=14.8383 units=m
! reduced_from=line1442,line1453,line1464,line1474
! eliminated_buses=1443,1454,1465

New Line._virtual_line1443_line1454_line1465 bus1=1432.1.2.3.4 bus2=1466.1.2.3.4 phases=4 linecode=LC3 length=13.929 units=m
! reduced_from=line1443,line1454,line1465
! eliminated_buses=1444,1455

New Line._virtual_line1444_line1456_line1466_line1477_line1489_line1499_line1510_line1520_line1529 bus1=1432.1.2.3.4 bus2=1530.1.2.3.4 phases=4 linecode=LC6 length=12.46471 units=m
! reduced_from=line1444,line1456,line1466,line1477,line1489,line1499,line1510,line1520,line1529
! eliminated_buses=1445,1457,1467,1478,1490,1500,1511,1521

New Line._virtual_line1475_line1487_line1497_line1508_line1518 bus1=1466.1.2.3.4 bus2=1519.1.2.3.4 phases=4 linecode=LC3 length=6.888169 units=m
! reduced_from=line1475,line1487,line1497,line1508,line1518
! eliminated_buses=1476,1488,1498,1509

New Line._virtual_line1476_line1488_line1498_line1509_line1519 bus1=1466.1.2.3.4 bus2=1520.1.2.3.4 phases=4 linecode=LC2 length=10.69948 units=m
! reduced_from=line1476,line1488,line1498,line1509,line1519
! eliminated_buses=1477,1489,1499,1510

New Line._virtual_line1482_line1493 bus1=1494.1.2.3.4 bus2=1473.1.2.3.4 phases=4 linecode=LC2 length=9.3797 units=m
! reduced_from=line1482,line1493
! eliminated_buses=1483

New Line._virtual_line1485_line1495_line1505_line1515_line1524_line1533_line1539_line1544 bus1=1545.1.2.3.4 bus2=1475.1.2.3.4 phases=4 linecode=LC2 length=11.33467 units=m
! reduced_from=line1485,line1495,line1505,line1515,line1524,line1533,line1539,line1544
! eliminated_buses=1486,1496,1506,1516,1525,1534,1540

New Line._virtual_line1486_line1496_line1507_line1517_line1525_line1534_line1540_line1545_line1551 bus1=1552.1.2.3.4 bus2=1475.1.2.3.4 phases=4 linecode=LC3 length=18.71763 units=m
! reduced_from=line1486,line1496,line1507,line1517,line1525,line1534,line1540,line1545,line1551
! eliminated_buses=1487,1497,1508,1518,1526,1535,1541,1546

New Line._virtual_line1501_line1512 bus1=1513.1.2.3.4 bus2=1492.1.2.3.4 phases=4 linecode=LC2 length=7.4135 units=m
! reduced_from=line1501,line1512
! eliminated_buses=1502

New Line._virtual_line1526_line1535_line1542_line1547_line1553 bus1=1519.1.2.3.4 bus2=1554.1.2.3.4 phases=4 linecode=LC6 length=12.85896 units=m
! reduced_from=line1526,line1535,line1542,line1547,line1553
! eliminated_buses=1527,1536,1543,1548

New Line._virtual_line1527_line1536 bus1=1537.1.2.3.4 bus2=1520.1.2.3.4 phases=4 linecode=LC2 length=5.2114 units=m
! reduced_from=line1527,line1536
! eliminated_buses=1528

New Line._virtual_line1531_line1538 bus1=1539.1.2.3.4 bus2=1524.1.2.3.4 phases=4 linecode=LC2 length=8.1722 units=m
! reduced_from=line1531,line1538
! eliminated_buses=1532

New Line._virtual_line1549_line1555 bus1=1556.1.2.3.4 bus2=1545.1.2.3.4 phases=4 linecode=LC2 length=7.4682 units=m
! reduced_from=line1549,line1555
! eliminated_buses=1550

New Line._virtual_line1556_line1560_line1564_line1569_line1573_line1577_line1582 bus1=1583.1.2.3.4 bus2=1552.1.2.3.4 phases=4 linecode=LC2 length=11.17113 units=m
! reduced_from=line1556,line1560,line1564,line1569,line1573,line1577,line1582
! eliminated_buses=1557,1561,1565,1570,1574,1578

New Line._virtual_line1557_line1561_line1565 bus1=1566.1.2.3.4 bus2=1552.1.2.3.4 phases=4 linecode=LC3 length=10.1808 units=m
! reduced_from=line1557,line1561,line1565
! eliminated_buses=1558,1562

New Line._virtual_line1570_line1574_line1578_line1583_line1589_line1594_line1598_line1602_line1605 bus1=1606.1.2.3.4 bus2=1566.1.2.3.4 phases=4 linecode=LC6 length=15.80754 units=m
! reduced_from=line1570,line1574,line1578,line1583,line1589,line1594,line1598,line1602,line1605
! eliminated_buses=1571,1575,1579,1584,1590,1595,1599,1603

New Line._virtual_line1571_line1575 bus1=1576.1.2.3.4 bus2=1566.1.2.3.4 phases=4 linecode=LC3 length=5.3288 units=m
! reduced_from=line1571,line1575
! eliminated_buses=1572

New Line._virtual_line1579_line1584_line1590_line1595_line1599_line1603_line1606_line1609_line1613_line1617_line1622_line1626_line1630_line1635 bus1=1636.1.2.3.4 bus2=1576.1.2.3.4 phases=4 linecode=LC6 length=13.92233 units=m
! reduced_from=line1579,line1584,line1590,line1595,line1599,line1603,line1606,line1609,line1613,line1617,line1622,line1626,line1630,line1635
! eliminated_buses=1580,1585,1591,1596,1600,1604,1607,1610,1614,1618,1623,1627,1631

New Line._virtual_line1580_line1585_line1591_line1597_line1601_line1604 bus1=1605.1.2.3.4 bus2=1576.1.2.3.4 phases=4 linecode=LC3 length=14.318 units=m
! reduced_from=line1580,line1585,line1591,line1597,line1601,line1604
! eliminated_buses=1581,1586,1592,1598,1602

New Line._virtual_line1587_line1593 bus1=1594.1.2.3.4 bus2=1583.1.2.3.4 phases=4 linecode=LC2 length=10.4809 units=m
! reduced_from=line1587,line1593
! eliminated_buses=1588

New Line._virtual_line1607_line1610_line1614_line1618_line1623_line1627_line1631_line1636_line1641_line1646_line1651_line1656_line1661 bus1=1605.1.2.3.4 bus2=1662.1.2.3.4 phases=4 linecode=LC2 length=13.676981 units=m
! reduced_from=line1607,line1610,line1614,line1618,line1623,line1627,line1631,line1636,line1641,line1646,line1651,line1656,line1661
! eliminated_buses=1608,1611,1615,1619,1624,1628,1632,1637,1642,1647,1652,1657

New Line._virtual_line1608_line1612_line1616 bus1=1617.1.2.3.4 bus2=1605.1.2.3.4 phases=4 linecode=LC3 length=6.3025 units=m
! reduced_from=line1608,line1612,line1616
! eliminated_buses=1609,1613

New Line._virtual_line1620_line1624_line1628_line1632_line1637_line1642_line1647_line1652_line1657_line1662_line1668_line1673_line1676_line1678_line1679 bus1=1680.1.2.3.4 bus2=1617.1.2.3.4 phases=4 linecode=LC6 length=15.207727 units=m
! reduced_from=line1620,line1624,line1628,line1632,line1637,line1642,line1647,line1652,line1657,line1662,line1668,line1673,line1676,line1678,line1679
! eliminated_buses=1621,1625,1629,1633,1638,1643,1648,1653,1658,1663,1669,1674,1677,1679

New Line._virtual_line1621_line1625_line1629 bus1=1630.1.2.3.4 bus2=1617.1.2.3.4 phases=4 linecode=LC3 length=7.0984 units=m
! reduced_from=line1621,line1625,line1629
! eliminated_buses=1622,1626

New Line._virtual_line1633_line1638_line1643_line1648_line1653_line1658_line1663_line1669_line1674_line1677 bus1=1630.1.2.3.4 bus2=1678.1.2.3.4 phases=4 linecode=LC6 length=14.91421 units=m
! reduced_from=line1633,line1638,line1643,line1648,line1653,line1658,line1663,line1669,line1674,line1677
! eliminated_buses=1634,1639,1644,1649,1654,1659,1664,1670,1675

New Line._virtual_line1639_line1644_line1649_line1654_line1659_line1664_line1670_line1675 bus1=1676.1.2.3.4 bus2=1635.1.2.3.4 phases=4 linecode=LC6 length=13.04505 units=m
! reduced_from=line1639,line1644,line1649,line1654,line1659,line1664,line1670,line1675
! eliminated_buses=1640,1645,1650,1655,1660,1665,1671

New Line._virtual_line1666_line1672 bus1=1673.1.2.3.4 bus2=1662.1.2.3.4 phases=4 linecode=LC2 length=9.0945 units=m
! reduced_from=line1666,line1672
! eliminated_buses=1667

New Line.LINE98 bus1=96.1.2.3.4 bus2=99.1.2.3.4 phases=4 linecode=LC1 length=10.5367 units=m

New Line.LINE161 bus1=155.1.2.3.4 bus2=162.1.2.3.4 phases=4 linecode=LC9 length=0.82071 units=m

New Line.LINE169 bus1=161.1.2.3.4 bus2=170.1.2.3.4 phases=4 linecode=LC8 length=12.0679 units=m

New Line.LINE179 bus1=170.1.2.3.4 bus2=180.1.2.3.4 phases=4 linecode=LC1 length=10.5131 units=m

New Line.LINE223 bus1=215.1.2.3.4 bus2=224.1.2.3.4 phases=4 linecode=LC1 length=7.3334 units=m

New Line.LINE229 bus1=222.1.2.3.4 bus2=230.1.2.3.4 phases=4 linecode=LC1 length=5.6589 units=m

New Line.LINE279 bus1=273.1.2.3.4 bus2=280.1.2.3.4 phases=4 linecode=LC9 length=4.35 units=m

New Line.LINE337 bus1=334.1.2.3.4 bus2=338.1.2.3.4 phases=4 linecode=LC8 length=14.5694 units=m

New Line.LINE343 bus1=338.1.2.3.4 bus2=344.1.2.3.4 phases=4 linecode=LC8 length=8.8737 units=m

New Line.LINE361 bus1=355.1.2.3.4 bus2=362.1.2.3.4 phases=4 linecode=LC2 length=1.9182 units=m

New Line.LINE362 bus1=355.1.2.3.4 bus2=363.1.2.3.4 phases=4 linecode=LC2 length=5.3212 units=m

New Line.LINE369 bus1=362.1.2.3.4 bus2=370.1.2.3.4 phases=4 linecode=LC2 length=5.5593 units=m

New Line.LINE370 bus1=362.1.2.3.4 bus2=371.1.2.3.4 phases=4 linecode=LC2 length=6.3114 units=m

New Line.LINE371 bus1=363.1.2.3.4 bus2=372.1.2.3.4 phases=4 linecode=LC2 length=4.4776 units=m

New Line.LINE381 bus1=372.1.2.3.4 bus2=382.1.2.3.4 phases=4 linecode=LC2 length=3.661 units=m

New Line.LINE397 bus1=391.1.2.3.4 bus2=398.1.2.3.4 phases=4 linecode=LC2 length=3.5802 units=m

New Line.LINE398 bus1=391.1.2.3.4 bus2=399.1.2.3.4 phases=4 linecode=LC2 length=2.4071 units=m

New Line.LINE475 bus1=466.1.2.3.4 bus2=476.1.2.3.4 phases=4 linecode=LC8 length=7.8832 units=m

New Line.LINE533 bus1=523.1.2.3.4 bus2=534.1.2.3.4 phases=4 linecode=LC8 length=14.6275 units=m

New Line.LINE615 bus1=606.1.2.3.4 bus2=616.1.2.3.4 phases=4 linecode=LC1 length=5.6903 units=m

New Line.LINE616 bus1=606.1.2.3.4 bus2=617.1.2.3.4 phases=4 linecode=LC1 length=5.0565 units=m

New Line.LINE625 bus1=617.1.2.3.4 bus2=626.1.2.3.4 phases=4 linecode=LC1 length=5.5778 units=m

New Line.LINE631 bus1=624.1.2.3.4 bus2=632.1.2.3.4 phases=4 linecode=LC8 length=13.7591 units=m

New Line.LINE638 bus1=630.1.2.3.4 bus2=639.1.2.3.4 phases=4 linecode=LC2 length=1.5748 units=m

New Line.LINE666 bus1=657.1.2.3.4 bus2=667.1.2.3.4 phases=4 linecode=LC2 length=3.2043 units=m

New Line.LINE683 bus1=673.1.2.3.4 bus2=684.1.2.3.4 phases=4 linecode=LC2 length=3.3497 units=m

New Line.LINE684 bus1=673.1.2.3.4 bus2=685.1.2.3.4 phases=4 linecode=LC2 length=4.3142 units=m

New Line.LINE685 bus1=673.1.2.3.4 bus2=686.1.2.3.4 phases=4 linecode=LC2 length=4.3142 units=m

New Line.LINE686 bus1=673.1.2.3.4 bus2=687.1.2.3.4 phases=4 linecode=LC2 length=4.3142 units=m

New Line.LINE687 bus1=673.1.2.3.4 bus2=688.1.2.3.4 phases=4 linecode=LC2 length=4.3142 units=m

New Line.LINE688 bus1=673.1.2.3.4 bus2=689.1.2.3.4 phases=4 linecode=LC2 length=4.3142 units=m

New Line.LINE724 bus1=715.1.2.3.4 bus2=725.1.2.3.4 phases=4 linecode=LC2 length=3.601 units=m

New Line.LINE746 bus1=737.1.2.3.4 bus2=747.1.2.3.4 phases=4 linecode=LC2 length=3.4306 units=m

New Line.LINE757 bus1=748.1.2.3.4 bus2=758.1.2.3.4 phases=4 linecode=LC2 length=3.0601 units=m

New Line.LINE774 bus1=768.1.2.3.4 bus2=775.1.2.3.4 phases=4 linecode=LC2 length=3.1532 units=m

New Line.LINE799 bus1=796.1.2.3.4 bus2=800.1.2.3.4 phases=4 linecode=LC4 length=7.5986 units=m

New Line.LINE820 bus1=815.1.2.3.4 bus2=821.1.2.3.4 phases=4 linecode=LC4 length=5.188 units=m

New Line.LINE910 bus1=901.1.2.3.4 bus2=911.1.2.3.4 phases=4 linecode=LC2 length=2.7342 units=m

New Line.LINE943 bus1=936.1.2.3.4 bus2=944.1.2.3.4 phases=4 linecode=LC2 length=3.9919 units=m

New Line.LINE953 bus1=945.1.2.3.4 bus2=954.1.2.3.4 phases=4 linecode=LC2 length=3.2705 units=m

New Line.LINE982 bus1=975.1.2.3.4 bus2=983.1.2.3.4 phases=4 linecode=LC2 length=3.3208 units=m

New Line.LINE989 bus1=981.1.2.3.4 bus2=990.1.2.3.4 phases=4 linecode=LC2 length=3.4377 units=m

New Line.LINE1064 bus1=1055.1.2.3.4 bus2=1065.1.2.3.4 phases=4 linecode=LC3 length=1.1173 units=m

New Line.LINE1102 bus1=1092.1.2.3.4 bus2=1103.1.2.3.4 phases=4 linecode=LC2 length=3.9839 units=m

New Line.LINE1137 bus1=1129.1.2.3.4 bus2=1138.1.2.3.4 phases=4 linecode=LC2 length=3.9028 units=m

New Line.LINE1138 bus1=1129.1.2.3.4 bus2=1139.1.2.3.4 phases=4 linecode=LC2 length=3.9028 units=m

New Line.LINE1140 bus1=1130.1.2.3.4 bus2=1141.1.2.3.4 phases=4 linecode=LC6 length=2.9445 units=m

New Line.LINE1144 bus1=1133.1.2.3.4 bus2=1145.1.2.3.4 phases=4 linecode=LC2 length=2.4165 units=m

New Line.LINE1148 bus1=1136.1.2.3.4 bus2=1149.1.2.3.4 phases=4 linecode=LC2 length=3.5847 units=m

New Line.LINE1163 bus1=1156.1.2.3.4 bus2=1164.1.2.3.4 phases=4 linecode=LC2 length=1.5788 units=m

New Line.LINE1269 bus1=1264.1.2.3.4 bus2=1270.1.2.3.4 phases=4 linecode=LC2 length=4.302 units=m

New Line.LINE1275 bus1=1271.1.2.3.4 bus2=1276.1.2.3.4 phases=4 linecode=LC4 length=11.0951 units=m

New Line.LINE1281 bus1=1276.1.2.3.4 bus2=1282.1.2.3.4 phases=4 linecode=LC4 length=3.2897 units=m

New Line.LINE1370 bus1=1367.1.2.3.4 bus2=1371.1.2.3.4 phases=4 linecode=LC3 length=13.9434 units=m

New Line.LINE1376 bus1=1371.1.2.3.4 bus2=1377.1.2.3.4 phases=4 linecode=LC3 length=5.8612 units=m

New Line.LINE1431 bus1=1422.1.2.3.4 bus2=1432.1.2.3.4 phases=4 linecode=LC3 length=4.5819 units=m

New Line.LINE1437 bus1=1427.1.2.3.4 bus2=1438.1.2.3.4 phases=4 linecode=LC2 length=3.7793 units=m

New Line.LINE1483 bus1=1473.1.2.3.4 bus2=1484.1.2.3.4 phases=4 linecode=LC2 length=3.6936 units=m

New Line.LINE1502 bus1=1492.1.2.3.4 bus2=1503.1.2.3.4 phases=4 linecode=LC2 length=2.9587 units=m

New Line.LINE1528 bus1=1520.1.2.3.4 bus2=1529.1.2.3.4 phases=4 linecode=LC2 length=1.5786 units=m

New Line.LINE1532 bus1=1524.1.2.3.4 bus2=1533.1.2.3.4 phases=4 linecode=LC2 length=3.9733 units=m

New Line.LINE1550 bus1=1545.1.2.3.4 bus2=1551.1.2.3.4 phases=4 linecode=LC2 length=3.8855 units=m

New Line.LINE1567 bus1=1564.1.2.3.4 bus2=1568.1.2.3.4 phases=4 linecode=LC2 length=3.3721 units=m

New Line.LINE1568 bus1=1564.1.2.3.4 bus2=1569.1.2.3.4 phases=4 linecode=LC2 length=3.3721 units=m

New Line.LINE1588 bus1=1583.1.2.3.4 bus2=1589.1.2.3.4 phases=4 linecode=LC2 length=2.1731 units=m

New Line.LINE1634 bus1=1630.1.2.3.4 bus2=1635.1.2.3.4 phases=4 linecode=LC3 length=6.9731 units=m

New Line.LINE1667 bus1=1662.1.2.3.4 bus2=1668.1.2.3.4 phases=4 linecode=LC2 length=4.5956 units=m
