! Reduced enabled lines.

New Line._virtual_line0_line1_line2_line3_line4_line5_line6_line7_line8_line9_line10_line11_line12_line13_line14_line15_line16_line17_line18_line19_line20_line21_line22_line23_line24_line25_line26_line27_line28_line29_line30_line31_line32_line33_line34_line35_line36_line37_line38_line39_line40_line41_line42_line43_line44_line45_line46_line47_line48_line49_line50_line51_line52_line53_line54_line55_line56_line57_line58 bus1=59.1.2.3.4 bus2=sourcebus.1.2.3.4 phases=4 linecode=LC8 length=146.779261 units=m
! reduced_from=line0,line1,line2,line3,line4,line5,line6,line7,line8,line9,line10,line11,line12,line13,line14,line15,line16,line17,line18,line19,line20,line21,line22,line23,line24,line25,line26,line27,line28,line29,line30,line31,line32,line33,line34,line35,line36,line37,line38,line39,line40,line41,line42,line43,line44,line45,line46,line47,line48,line49,line50,line51,line52,line53,line54,line55,line56,line57,line58
! eliminated_buses=1,2,3,4,5,6,7,8,9,10,11,12,13,14,15,16,17,18,19,20,21,22,23,24,25,26,27,28,29,30,31,32,33,34,35,36,37,38,39,40,41,42,43,44,45,46,47,48,49,50,51,52,53,54,55,56,57,58

New Line._virtual_line60_line62_line65_line68_line71_line74 bus1=75.1.2.3.4 bus2=59.1.2.3.4 phases=4 linecode=LC4 length=30.368211 units=m
! reduced_from=line60,line62,line65,line68,line71,line74
! eliminated_buses=61,63,66,69,72

New Line._virtual_line78_line82 bus1=83.1.2.3.4 bus2=75.1.2.3.4 phases=4 linecode=LC4 length=13.3075 units=m
! reduced_from=line78,line82
! eliminated_buses=79

New Line._virtual_line79_line84_line89_line95_line102_line109_line116 bus1=117.1.2.3.4 bus2=75.1.2.3.4 phases=4 linecode=LC2 length=9.74923 units=m
! reduced_from=line79,line84,line89,line95,line102,line109,line116
! eliminated_buses=80,85,90,96,103,110

New Line._virtual_line87_line93_line100_line108_line115_line122_line131 bus1=132.1.2.3.4 bus2=83.1.2.3.4 phases=4 linecode=LC2 length=8.938922 units=m
! reduced_from=line87,line93,line100,line108,line115,line122,line131
! eliminated_buses=88,94,101,109,116,123

New Line._virtual_line92_line99_line107_line114_line121_line130_line139 bus1=87.1.2.3.4 bus2=140.1.2.3.4 phases=4 linecode=LC2 length=9.45326 units=m
! reduced_from=line92,line99,line107,line114,line121,line130,line139
! eliminated_buses=93,100,108,115,122,131

New Line._virtual_line98_line106_line113_line120_line129 bus1=130.1.2.3.4 bus2=92.1.2.3.4 phases=4 linecode=LC2 length=9.35815 units=m
! reduced_from=line98,line106,line113,line120,line129
! eliminated_buses=99,107,114,121

New Line._virtual_line105_line112_line119_line128_line136_line147 bus1=148.1.2.3.4 bus2=98.1.2.3.4 phases=4 linecode=LC2 length=9.42254 units=m
! reduced_from=line105,line112,line119,line128,line136,line147
! eliminated_buses=106,113,120,129,137

New Line._virtual_line111_line118_line127_line135_line146_line156_line165 bus1=166.1.2.3.4 bus2=105.1.2.3.4 phases=4 linecode=LC2 length=9.2692 units=m
! reduced_from=line111,line118,line127,line135,line146,line156,line165
! eliminated_buses=112,119,128,136,147,157

New Line._virtual_line117_line125 bus1=111.1.2.3.4 bus2=126.1.2.3.4 phases=4 linecode=LC5 length=9.6901 units=m
! reduced_from=line117,line125
! eliminated_buses=118

New Line._virtual_line137_line148 bus1=130.1.2.3.4 bus2=149.1.2.3.4 phases=4 linecode=LC2 length=7.98 units=m
! reduced_from=line137,line148
! eliminated_buses=138

New Line._virtual_line140_line151_line160 bus1=132.1.2.3.4 bus2=161.1.2.3.4 phases=4 linecode=LC2 length=7.88492 units=m
! reduced_from=line140,line151,line160
! eliminated_buses=141,152

New Line._virtual_line142_line152 bus1=133.1.2.3.4 bus2=153.1.2.3.4 phases=4 linecode=LC4 length=15.41671 units=m
! reduced_from=line142,line152
! eliminated_buses=143

New Line._virtual_line143_line154_line164_line170_line176_line182_line187 bus1=133.1.2.3.4 bus2=188.1.2.3.4 phases=4 linecode=LC2 length=9.6011 units=m
! reduced_from=line143,line154,line164,line170,line176,line182,line187
! eliminated_buses=144,155,165,171,177,183

New Line._virtual_line149_line159 bus1=160.1.2.3.4 bus2=140.1.2.3.4 phases=4 linecode=LC2 length=7.0563 units=m
! reduced_from=line149,line159
! eliminated_buses=150

New Line._virtual_line157_line166 bus1=148.1.2.3.4 bus2=167.1.2.3.4 phases=4 linecode=LC2 length=7.295 units=m
! reduced_from=line157,line166
! eliminated_buses=158

New Line._virtual_line161_line167_line173 bus1=174.1.2.3.4 bus2=153.1.2.3.4 phases=4 linecode=LC4 length=14.5389 units=m
! reduced_from=line161,line167,line173
! eliminated_buses=162,168

New Line._virtual_line162_line169_line175_line181_line186_line191_line198_line204_line210 bus1=153.1.2.3.4 bus2=211.1.2.3.4 phases=4 linecode=LC2 length=9.89936 units=m
! reduced_from=line162,line169,line175,line181,line186,line191,line198,line204,line210
! eliminated_buses=163,170,176,182,187,192,199,205

New Line._virtual_line171_line177 bus1=178.1.2.3.4 bus2=166.1.2.3.4 phases=4 linecode=LC2 length=7.5137 units=m
! reduced_from=line171,line177
! eliminated_buses=172

New Line._virtual_line178_line183_line188 bus1=174.1.2.3.4 bus2=189.1.2.3.4 phases=4 linecode=LC4 length=14.5519 units=m
! reduced_from=line178,line183,line188
! eliminated_buses=179,184

New Line._virtual_line179_line185_line190_line197_line203_line209_line214_line220_line226 bus1=174.1.2.3.4 bus2=227.1.2.3.4 phases=4 linecode=LC2 length=9.51872 units=m
! reduced_from=line179,line185,line190,line197,line203,line209,line214,line220,line226
! eliminated_buses=180,186,191,198,204,210,215,221

New Line._virtual_line192_line199 bus1=200.1.2.3.4 bus2=188.1.2.3.4 phases=4 linecode=LC2 length=6.7272 units=m
! reduced_from=line192,line199
! eliminated_buses=193

New Line._virtual_line194_line200 bus1=189.1.2.3.4 bus2=201.1.2.3.4 phases=4 linecode=LC4 length=16.9462 units=m
! reduced_from=line194,line200
! eliminated_buses=195

New Line._virtual_line195_line202_line208_line213_line219_line225_line230_line236 bus1=237.1.2.3.4 bus2=189.1.2.3.4 phases=4 linecode=LC2 length=10.11362 units=m
! reduced_from=line195,line202,line208,line213,line219,line225,line230,line236
! eliminated_buses=196,203,209,214,220,226,231

New Line._virtual_line205_line211_line217_line222_line227_line233 bus1=234.1.2.3.4 bus2=201.1.2.3.4 phases=4 linecode=LC4 length=9.11594 units=m
! reduced_from=line205,line211,line217,line222,line227,line233
! eliminated_buses=206,212,218,223,228

New Line._virtual_line206_line212_line218_line224_line229_line235_line241_line248_line254_line259_line263_line267 bus1=201.1.2.3.4 bus2=268.1.2.3.4 phases=4 linecode=LC2 length=14.63701 units=m
! reduced_from=line206,line212,line218,line224,line229,line235,line241,line248,line254,line259,line263,line267
! eliminated_buses=207,213,219,225,230,236,242,249,255,260,264

New Line._virtual_line216_line221 bus1=222.1.2.3.4 bus2=211.1.2.3.4 phases=4 linecode=LC2 length=7.6886 units=m
! reduced_from=line216,line221
! eliminated_buses=217

New Line._virtual_line232_line237 bus1=227.1.2.3.4 bus2=238.1.2.3.4 phases=4 linecode=LC2 length=6.6519 units=m
! reduced_from=line232,line237
! eliminated_buses=233

New Line._virtual_line238_line244_line250_line256_line260_line264_line268_line271_line274_line276_line278_line280_line282_line284_line286 bus1=234.1.2.3.4 bus2=287.1.2.3.4 phases=4 linecode=LC4 length=25.94048 units=m
! reduced_from=line238,line244,line250,line256,line260,line264,line268,line271,line274,line276,line278,line280,line282,line284,line286
! eliminated_buses=239,245,251,257,261,265,269,272,275,277,279,281,283,285

New Line._virtual_line243_line249_line255 bus1=237.1.2.3.4 bus2=256.1.2.3.4 phases=4 linecode=LC2 length=7.9819 units=m
! reduced_from=line243,line249,line255
! eliminated_buses=244,250

New Line._virtual_line246_line252_line258_line262_line266_line270_line273 bus1=274.1.2.3.4 bus2=240.1.2.3.4 phases=4 linecode=LC6 length=13.66588 units=m
! reduced_from=line246,line252,line258,line262,line266,line270,line273
! eliminated_buses=247,253,259,263,267,271

New Line._virtual_line289_line292_line295_line298_line300_line302_line303_line304_line305_line306_line307 bus1=287.1.2.3.4 bus2=308.1.2.3.4 phases=4 linecode=LC2 length=12.75813 units=m
! reduced_from=line289,line292,line295,line298,line300,line302,line303,line304,line305,line306,line307
! eliminated_buses=290,293,296,299,301,303,304,305,306,307

New Line.LINE86 bus1=83.1.2.3.4 bus2=87.1.2.3.4 phases=4 linecode=LC4 length=14.452 units=m

New Line.LINE91 bus1=87.1.2.3.4 bus2=92.1.2.3.4 phases=4 linecode=LC4 length=14.6349 units=m

New Line.LINE97 bus1=92.1.2.3.4 bus2=98.1.2.3.4 phases=4 linecode=LC4 length=14.5333 units=m

New Line.LINE104 bus1=98.1.2.3.4 bus2=105.1.2.3.4 phases=4 linecode=LC4 length=14.4196 units=m

New Line.LINE110 bus1=105.1.2.3.4 bus2=111.1.2.3.4 phases=4 linecode=LC4 length=1.1575 units=m

New Line.LINE123 bus1=117.1.2.3.4 bus2=124.1.2.3.4 phases=4 linecode=LC2 length=7.8629 units=m

New Line.LINE124 bus1=117.1.2.3.4 bus2=125.1.2.3.4 phases=4 linecode=LC2 length=3.9826 units=m

New Line.LINE132 bus1=126.1.2.3.4 bus2=133.1.2.3.4 phases=4 linecode=LC4 length=3.1459 units=m

New Line.LINE138 bus1=130.1.2.3.4 bus2=139.1.2.3.4 phases=4 linecode=LC2 length=3.3159 units=m

New Line.LINE141 bus1=132.1.2.3.4 bus2=142.1.2.3.4 phases=4 linecode=LC2 length=3.3282 units=m

New Line.LINE150 bus1=140.1.2.3.4 bus2=151.1.2.3.4 phases=4 linecode=LC2 length=3.0585 units=m

New Line.LINE158 bus1=148.1.2.3.4 bus2=159.1.2.3.4 phases=4 linecode=LC2 length=2.6348 units=m

New Line.LINE172 bus1=166.1.2.3.4 bus2=173.1.2.3.4 phases=4 linecode=LC2 length=3.6858 units=m

New Line.LINE193 bus1=188.1.2.3.4 bus2=194.1.2.3.4 phases=4 linecode=LC2 length=3.3358 units=m

New Line.LINE215 bus1=211.1.2.3.4 bus2=216.1.2.3.4 phases=4 linecode=LC2 length=2.7485 units=m

New Line.LINE231 bus1=227.1.2.3.4 bus2=232.1.2.3.4 phases=4 linecode=LC2 length=1.7456 units=m

New Line.LINE239 bus1=234.1.2.3.4 bus2=240.1.2.3.4 phases=4 linecode=LC4 length=1.5791 units=m

New Line.LINE242 bus1=237.1.2.3.4 bus2=243.1.2.3.4 phases=4 linecode=LC2 length=1.9755 units=m
