! Reduced enabled lines.

New Line._virtual_line0_line1_line2_line3_line4_line5_line6_line7_line8_line9_line10_line11_line12_line13_line14_line15_line16_line17_line18_line19_line20_line21_line22_line23_line24_line25_line27_line28_line29_line30_line31_line32_line33_line34_line35_line36_line37_line38_line39_line40_line41_line42_line43_line44_line45_line46_line47_line48_line49_line50_line51 bus1=sourcebus.1.2.3.4 bus2=52.1.2.3.4 phases=4 linecode=LC8 length=45.423424 units=m
! reduced_from=line0,line1,line2,line3,line4,line5,line6,line7,line8,line9,line10,line11,line12,line13,line14,line15,line16,line17,line18,line19,line20,line21,line22,line23,line24,line25,line27,line28,line29,line30,line31,line32,line33,line34,line35,line36,line37,line38,line39,line40,line41,line42,line43,line44,line45,line46,line47,line48,line49,line50,line51
! eliminated_buses=1,2,3,4,5,6,7,8,9,10,11,12,13,14,15,16,17,18,19,20,21,22,23,24,25,26,28,29,30,31,32,33,34,35,36,37,38,39,40,41,42,43,44,45,46,47,48,49,50,51

New Line.LINE52 bus1=52.1.2.3.4 bus2=53.1.2.3.4 phases=4 linecode=LC1 length=8.4067 units=m

New Line.LINE53 bus1=52.1.2.3.4 bus2=54.1.2.3.4 phases=4 linecode=LC1 length=7.6046 units=m

New Line.LINE54 bus1=52.1.2.3.4 bus2=55.1.2.3.4 phases=4 linecode=LC1 length=8.4067 units=m

New Line.LINE55 bus1=52.1.2.3.4 bus2=56.1.2.3.4 phases=4 linecode=LC1 length=7.6046 units=m

New Line.LINE56 bus1=52.1.2.3.4 bus2=57.1.2.3.4 phases=4 linecode=LC1 length=8.4067 units=m

New Line.LINE57 bus1=52.1.2.3.4 bus2=58.1.2.3.4 phases=4 linecode=LC1 length=8.4067 units=m

New Line.LINE58 bus1=52.1.2.3.4 bus2=59.1.2.3.4 phases=4 linecode=LC1 length=8.4067 units=m

New Line.LINE59 bus1=52.1.2.3.4 bus2=60.1.2.3.4 phases=4 linecode=LC1 length=7.6046 units=m

New Line.LINE60 bus1=52.1.2.3.4 bus2=61.1.2.3.4 phases=4 linecode=LC1 length=8.4067 units=m

New Line.LINE61 bus1=52.1.2.3.4 bus2=62.1.2.3.4 phases=4 linecode=LC1 length=7.6046 units=m

New Line.LINE62 bus1=52.1.2.3.4 bus2=63.1.2.3.4 phases=4 linecode=LC1 length=8.4067 units=m

New Line.LINE63 bus1=52.1.2.3.4 bus2=64.1.2.3.4 phases=4 linecode=LC1 length=8.4067 units=m

New Line.LINE64 bus1=52.1.2.3.4 bus2=65.1.2.3.4 phases=4 linecode=LC1 length=8.4067 units=m

New Line.LINE65 bus1=52.1.2.3.4 bus2=66.1.2.3.4 phases=4 linecode=LC1 length=8.4067 units=m

New Line.LINE66 bus1=52.1.2.3.4 bus2=67.1.2.3.4 phases=4 linecode=LC1 length=8.4067 units=m

New Line.LINE67 bus1=52.1.2.3.4 bus2=68.1.2.3.4 phases=4 linecode=LC1 length=8.4067 units=m

New Line.LINE68 bus1=52.1.2.3.4 bus2=69.1.2.3.4 phases=4 linecode=LC1 length=7.6046 units=m

New Line.LINE69 bus1=52.1.2.3.4 bus2=70.1.2.3.4 phases=4 linecode=LC1 length=8.4067 units=m

New Line.LINE70 bus1=52.1.2.3.4 bus2=71.1.2.3.4 phases=4 linecode=LC1 length=7.6046 units=m

New Line.LINE71 bus1=52.1.2.3.4 bus2=72.1.2.3.4 phases=4 linecode=LC1 length=8.4067 units=m

New Line.LINE72 bus1=52.1.2.3.4 bus2=73.1.2.3.4 phases=4 linecode=LC1 length=8.4067 units=m

New Line.LINE73 bus1=52.1.2.3.4 bus2=74.1.2.3.4 phases=4 linecode=LC1 length=8.4067 units=m

New Line.LINE74 bus1=52.1.2.3.4 bus2=75.1.2.3.4 phases=4 linecode=LC1 length=7.6046 units=m

New Line.LINE75 bus1=52.1.2.3.4 bus2=76.1.2.3.4 phases=4 linecode=LC1 length=8.4067 units=m

New Line.LINE76 bus1=52.1.2.3.4 bus2=77.1.2.3.4 phases=4 linecode=LC1 length=7.6046 units=m
