! Reduced enabled lines.

New Line._virtual_line0_line1_line2_line3_line4_line5_line6_line7_line8_line9_line10_line11_line12_line13_line14_line15_line16_line17_line18_line19_line20_line21_line22_line23_line24_line25_line27_line29_line31_line33_line35_line37_line38_line39_line40_line41_line42_line43_line44_line45_line47_line50 bus1=51.1.2.3.4 bus2=sourcebus.1.2.3.4 phases=4 linecode=LC8 length=72.144909 units=m
! reduced_from=line0,line1,line2,line3,line4,line5,line6,line7,line8,line9,line10,line11,line12,line13,line14,line15,line16,line17,line18,line19,line20,line21,line22,line23,line24,line25,line27,line29,line31,line33,line35,line37,line38,line39,line40,line41,line42,line43,line44,line45,line47,line50
! eliminated_buses=1,2,3,4,5,6,7,8,9,10,11,12,13,14,15,16,17,18,19,20,21,22,23,24,25,26,28,30,32,34,36,38,39,40,41,42,43,44,45,46,48

New Line._virtual_line53_line57_line62 bus1=51.1.2.3.4 bus2=63.1.2.3.4 phases=4 linecode=LC8 length=8.937 units=m
! reduced_from=line53,line57,line62
! eliminated_buses=54,58

New Line._virtual_line54_line58_line63_line69_line75_line80_line84_line87_line90_line95 bus1=51.1.2.3.4 bus2=96.1.2.3.4 phases=4 linecode=LC9 length=18.19146 units=m
! reduced_from=line54,line58,line63,line69,line75,line80,line84,line87,line90,line95
! eliminated_buses=55,59,64,70,76,81,85,88,91

New Line._virtual_line67_line73_line78_line82_line85_line88 bus1=63.1.2.3.4 bus2=89.1.2.3.4 phases=4 linecode=LC9 length=11.640497 units=m
! reduced_from=line67,line73,line78,line82,line85,line88
! eliminated_buses=68,74,79,83,86

New Line._virtual_line92_line98_line105_line114_line125_line136_line147_line157_line167_line177_line186_line195_line205_line215_line223_line231_line241_line250 bus1=89.1.2.3.4 bus2=251.1.2.3.4 phases=4 linecode=LC2 length=17.404453 units=m
! reduced_from=line92,line98,line105,line114,line125,line136,line147,line157,line167,line177,line186,line195,line205,line215,line223,line231,line241,line250
! eliminated_buses=93,99,106,115,126,137,148,158,168,178,187,196,206,216,224,232,242

New Line._virtual_line93_line99 bus1=89.1.2.3.4 bus2=100.1.2.3.4 phases=4 linecode=LC9 length=9.3706 units=m
! reduced_from=line93,line99
! eliminated_buses=94

New Line._virtual_line101_line110_line121_line132_line143_line154_line164_line174_line184_line193_line202_line212_line220_line228 bus1=229.1.2.3.4 bus2=96.1.2.3.4 phases=4 linecode=LC9 length=26.73195 units=m
! reduced_from=line101,line110,line121,line132,line143,line154,line164,line174,line184,line193,line202,line212,line220,line228
! eliminated_buses=102,111,122,133,144,155,165,175,185,194,203,213,221

New Line._virtual_line102_line111_line122_line133_line144_line155_line165_line175_line185_line194_line203_line213_line221_line229_line239_line248_line257_line264_line270 bus1=96.1.2.3.4 bus2=271.1.2.3.4 phases=4 linecode=LC9 length=33.22314 units=m
! reduced_from=line102,line111,line122,line133,line144,line155,line165,line175,line185,line194,line203,line213,line221,line229,line239,line248,line257,line264,line270
! eliminated_buses=103,112,123,134,145,156,166,176,186,195,204,214,222,230,240,249,258,265

New Line._virtual_line106_line115_line126_line137_line148_line158_line168_line178_line187_line196_line206_line216_line224_line232_line242_line251_line258_line265 bus1=100.1.2.3.4 bus2=266.1.2.3.4 phases=4 linecode=LC2 length=11.006234 units=m
! reduced_from=line106,line115,line126,line137,line148,line158,line168,line178,line187,line196,line206,line216,line224,line232,line242,line251,line258,line265
! eliminated_buses=107,116,127,138,149,159,169,179,188,197,207,217,225,233,243,252,259

New Line._virtual_line107_line116_line127_line138_line149_line159_line169_line179_line188_line197_line207 bus1=100.1.2.3.4 bus2=208.1.2.3.4 phases=4 linecode=LC2 length=14.494812 units=m
! reduced_from=line107,line116,line127,line138,line149,line159,line169,line179,line188,line197,line207
! eliminated_buses=108,117,128,139,150,160,170,180,189,198

New Line._virtual_line117_line128_line139_line150_line160_line170_line180_line189_line198_line208_line217_line225 bus1=109.1.2.3.4 bus2=226.1.2.3.4 phases=4 linecode=LC2 length=11.008749 units=m
! reduced_from=line117,line128,line139,line150,line160,line170,line180,line189,line198,line208,line217,line225
! eliminated_buses=118,129,140,151,161,171,181,190,199,209,218

New Line._virtual_line118_line129_line140_line151_line161_line171_line181_line190_line199_line209_line218_line226_line233_line243_line252_line259 bus1=260.1.2.3.4 bus2=109.1.2.3.4 phases=4 linecode=LC2 length=14.652459 units=m
! reduced_from=line118,line129,line140,line151,line161,line171,line181,line190,line199,line209,line218,line226,line233,line243,line252,line259
! eliminated_buses=119,130,141,152,162,172,182,191,200,210,219,227,234,244,253

New Line._virtual_line119_line130_line141_line152_line162_line172_line182_line191_line200_line210_line219_line227_line234 bus1=109.1.2.3.4 bus2=235.1.2.3.4 phases=4 linecode=LC2 length=22.555479 units=m
! reduced_from=line119,line130,line141,line152,line162,line172,line182,line191,line200,line210,line219,line227,line234
! eliminated_buses=120,131,142,153,163,173,183,192,201,211,220,228

New Line._virtual_line235_line244_line253_line260_line266_line271_line278_line285_line292_line300_line308_line315_line322 bus1=323.1.2.3.4 bus2=229.1.2.3.4 phases=4 linecode=LC9 length=32.281437 units=m
! reduced_from=line235,line244,line253,line260,line266,line271,line278,line285,line292,line300,line308,line315,line322
! eliminated_buses=236,245,254,261,267,272,279,286,293,301,309,316

New Line._virtual_line236_line245_line254_line261_line267_line272_line279_line286_line294_line302_line310_line317_line324_line333_line340 bus1=229.1.2.3.4 bus2=341.1.2.3.4 phases=4 linecode=LC6 length=16.93277 units=m
! reduced_from=line236,line245,line254,line261,line267,line272,line279,line286,line294,line302,line310,line317,line324,line333,line340
! eliminated_buses=237,246,255,262,268,273,280,287,295,303,311,318,325,334

New Line._virtual_line237_line246_line255_line262_line268_line273_line280_line287_line295 bus1=296.1.2.3.4 bus2=229.1.2.3.4 phases=4 linecode=LC6 length=4.56716 units=m
! reduced_from=line237,line246,line255,line262,line268,line273,line280,line287,line295
! eliminated_buses=238,247,256,263,269,274,281,288

New Line._virtual_line238_line247_line256_line263_line269_line274_line281_line288_line296_line305_line312_line319_line326_line335_line342_line351_line359 bus1=360.1.2.3.4 bus2=229.1.2.3.4 phases=4 linecode=LC6 length=9.76538 units=m
! reduced_from=line238,line247,line256,line263,line269,line274,line281,line288,line296,line305,line312,line319,line326,line335,line342,line351,line359
! eliminated_buses=239,248,257,264,270,275,282,289,297,306,313,320,327,336,343,352

New Line._virtual_line275_line282_line289_line297_line306_line313_line320 bus1=321.1.2.3.4 bus2=271.1.2.3.4 phases=4 linecode=LC6 length=3.54064 units=m
! reduced_from=line275,line282,line289,line297,line306,line313,line320
! eliminated_buses=276,283,290,298,307,314

New Line._virtual_line276_line283_line290_line298_line307_line314_line321_line329_line337_line344_line353_line361 bus1=271.1.2.3.4 bus2=362.1.2.3.4 phases=4 linecode=LC6 length=9.05646 units=m
! reduced_from=line276,line283,line290,line298,line307,line314,line321,line329,line337,line344,line353,line361
! eliminated_buses=277,284,291,299,308,315,322,330,338,345,354

New Line._virtual_line303_line311_line318_line325_line334_line341_line349_line357_line365_line374_line381_line389 bus1=390.1.2.3.4 bus2=296.1.2.3.4 phases=4 linecode=LC6 length=8.70193 units=m
! reduced_from=line303,line311,line318,line325,line334,line341,line349,line357,line365,line374,line381,line389
! eliminated_buses=304,312,319,326,335,342,350,358,366,375,382

New Line._virtual_line327_line336_line343_line352_line360_line369_line377_line384_line392_line401_line408 bus1=409.1.2.3.4 bus2=321.1.2.3.4 phases=4 linecode=LC6 length=12.18186 units=m
! reduced_from=line327,line336,line343,line352,line360,line369,line377,line384,line392,line401,line408
! eliminated_buses=328,337,344,353,361,370,378,385,393,402

New Line._virtual_line330_line338_line345_line354_line362_line372_line379_line386_line394_line403_line410_line418_line425 bus1=426.1.2.3.4 bus2=323.1.2.3.4 phases=4 linecode=LC6 length=9.37595 units=m
! reduced_from=line330,line338,line345,line354,line362,line372,line379,line386,line394,line403,line410,line418,line425
! eliminated_buses=331,339,346,355,363,373,380,387,395,404,411,419

New Line._virtual_line347_line356_line364_line373_line380_line388_line396_line405_line412_line420_line427_line436_line443_line451_line459 bus1=460.1.2.3.4 bus2=341.1.2.3.4 phases=4 linecode=LC6 length=8.73399 units=m
! reduced_from=line347,line356,line364,line373,line380,line388,line396,line405,line412,line420,line427,line436,line443,line451,line459
! eliminated_buses=348,357,365,374,381,389,397,406,413,421,428,437,444,452

New Line._virtual_line367_line376_line383_line391_line400_line407_line414_line422_line429_line438_line445_line453_line461_line470_line478_line486 bus1=487.1.2.3.4 bus2=360.1.2.3.4 phases=4 linecode=LC6 length=9.9183 units=m
! reduced_from=line367,line376,line383,line391,line400,line407,line414,line422,line429,line438,line445,line453,line461,line470,line478,line486
! eliminated_buses=368,377,384,392,401,408,415,423,430,439,446,454,462,471,479

New Line._virtual_line370_line378_line385_line393_line402_line409_line417_line424 bus1=425.1.2.3.4 bus2=362.1.2.3.4 phases=4 linecode=LC6 length=8.02844 units=m
! reduced_from=line370,line378,line385,line393,line402,line409,line417,line424
! eliminated_buses=371,379,386,394,403,410,418

New Line._virtual_line397_line406_line413_line421_line428_line437_line444_line452_line460_line469_line477_line485 bus1=486.1.2.3.4 bus2=390.1.2.3.4 phases=4 linecode=LC6 length=13.98449 units=m
! reduced_from=line397,line406,line413,line421,line428,line437,line444,line452,line460,line469,line477,line485
! eliminated_buses=398,407,414,422,429,438,445,453,461,470,478

New Line._virtual_line415_line423_line430_line439_line446_line454_line462_line471_line479_line487 bus1=409.1.2.3.4 bus2=488.1.2.3.4 phases=4 linecode=LC6 length=4.71497 units=m
! reduced_from=line415,line423,line430,line439,line446,line454,line462,line471,line479,line487
! eliminated_buses=416,424,431,440,447,455,463,472,480

New Line._virtual_line431_line440_line447_line455_line463_line472_line480_line488_line498_line506 bus1=507.1.2.3.4 bus2=425.1.2.3.4 phases=4 linecode=LC6 length=14.48022 units=m
! reduced_from=line431,line440,line447,line455,line463,line472,line480,line488,line498,line506
! eliminated_buses=432,441,448,456,464,473,481,489,499

New Line._virtual_line433_line441_line448_line456_line464_line473_line481_line489_line499_line507_line514 bus1=426.1.2.3.4 bus2=515.1.2.3.4 phases=4 linecode=LC6 length=8.93215 units=m
! reduced_from=line433,line441,line448,line456,line464,line473,line481,line489,line499,line507,line514
! eliminated_buses=434,442,449,457,465,474,482,490,500,508

New Line._virtual_line467_line476_line484_line492_line502_line510_line517_line525_line532_line539_line545_line551_line557_line563_line569_line574 bus1=575.1.2.3.4 bus2=460.1.2.3.4 phases=4 linecode=LC6 length=14.7237 units=m
! reduced_from=line467,line476,line484,line492,line502,line510,line517,line525,line532,line539,line545,line551,line557,line563,line569,line574
! eliminated_buses=468,477,485,493,503,511,518,526,533,540,546,552,558,564,570

New Line._virtual_line493_line503_line511_line518_line526_line533_line540_line546_line552_line558_line564_line570 bus1=487.1.2.3.4 bus2=571.1.2.3.4 phases=4 linecode=LC6 length=15.4451 units=m
! reduced_from=line493,line503,line511,line518,line526,line533,line540,line546,line552,line558,line564,line570
! eliminated_buses=494,504,512,519,527,534,541,547,553,559,565

New Line._virtual_line495_line504_line512_line519_line527_line534_line541_line547_line553_line559_line565_line571_line575_line578 bus1=488.1.2.3.4 bus2=579.1.2.3.4 phases=4 linecode=LC6 length=14.19596 units=m
! reduced_from=line495,line504,line512,line519,line527,line534,line541,line547,line553,line559,line565,line571,line575,line578
! eliminated_buses=496,505,513,520,528,535,542,548,554,560,566,572,576

New Line._virtual_line521_line529_line536_line543_line549_line555_line561_line567_line573_line577_line580_line582 bus1=515.1.2.3.4 bus2=583.1.2.3.4 phases=4 linecode=LC6 length=10.3246 units=m
! reduced_from=line521,line529,line536,line543,line549,line555,line561,line567,line573,line577,line580,line582
! eliminated_buses=522,530,537,544,550,556,562,568,574,578,581

New Line._virtual_line583_line585_line586_line587_line588_line589_line590_line592_line594_line596_line598_line600_line602 bus1=583.1.2.3.4 bus2=603.1.2.3.4 phases=4 linecode=LC6 length=10.7199 units=m
! reduced_from=line583,line585,line586,line587,line588,line589,line590,line592,line594,line596,line598,line600,line602
! eliminated_buses=584,586,587,588,589,590,591,593,595,597,599,601

New Line.LINE108 bus1=100.1.2.3.4 bus2=109.1.2.3.4 phases=4 linecode=LC9 length=1.1464 units=m

New Line.LINE304 bus1=296.1.2.3.4 bus2=305.1.2.3.4 phases=4 linecode=LC6 length=5.9117 units=m

New Line.LINE328 bus1=321.1.2.3.4 bus2=329.1.2.3.4 phases=4 linecode=LC6 length=5.2976 units=m

New Line.LINE348 bus1=341.1.2.3.4 bus2=349.1.2.3.4 phases=4 linecode=LC6 length=6.3751 units=m

New Line.LINE368 bus1=360.1.2.3.4 bus2=369.1.2.3.4 phases=4 linecode=LC6 length=6.6414 units=m

New Line.LINE371 bus1=362.1.2.3.4 bus2=372.1.2.3.4 phases=4 linecode=LC1 length=6.2921 units=m

New Line.LINE398 bus1=390.1.2.3.4 bus2=399.1.2.3.4 phases=4 linecode=LC6 length=6.3972 units=m

New Line.LINE416 bus1=409.1.2.3.4 bus2=417.1.2.3.4 phases=4 linecode=LC6 length=3.0093 units=m

New Line.LINE432 bus1=425.1.2.3.4 bus2=433.1.2.3.4 phases=4 linecode=LC1 length=6.4309 units=m

New Line.LINE434 bus1=426.1.2.3.4 bus2=435.1.2.3.4 phases=4 linecode=LC6 length=3.1795 units=m

New Line.LINE468 bus1=460.1.2.3.4 bus2=469.1.2.3.4 phases=4 linecode=LC6 length=6.6312 units=m

New Line.LINE494 bus1=487.1.2.3.4 bus2=495.1.2.3.4 phases=4 linecode=LC6 length=6.3296 units=m

New Line.LINE496 bus1=488.1.2.3.4 bus2=497.1.2.3.4 phases=4 linecode=LC6 length=3.6142 units=m

New Line.LINE522 bus1=515.1.2.3.4 bus2=523.1.2.3.4 phases=4 linecode=LC6 length=3.0035 units=m

New Line.LINE584 bus1=583.1.2.3.4 bus2=585.1.2.3.4 phases=4 linecode=LC6 length=2.5096 units=m
