! Reduced enabled lines.

New Line._virtual_line0_line1_line2_line3_line4_line5_line6_line7_line8_line9_line10_line11_line12_line13_line14_line15_line16_line17_line18_line19_line20_line21_line22_line23_line24_line25_line26_line27_line28_line30_line32_line34_line36_line38_line40_line42_line44_line46_line48_line50_line52_line54_line56_line57_line58_line59_line60 bus1=61.1.2.3.4 bus2=sourcebus.1.2.3.4 phases=4 linecode=LC8 length=60.536378 units=m
! reduced_from=line0,line1,line2,line3,line4,line5,line6,line7,line8,line9,line10,line11,line12,line13,line14,line15,line16,line17,line18,line19,line20,line21,line22,line23,line24,line25,line26,line27,line28,line30,line32,line34,line36,line38,line40,line42,line44,line46,line48,line50,line52,line54,line56,line57,line58,line59,line60
! eliminated_buses=1,2,3,4,5,6,7,8,9,10,11,12,13,14,15,16,17,18,19,20,21,22,23,24,25,26,27,28,29,31,33,35,37,39,41,43,45,47,49,51,53,55,57,58,59,60

New Line._virtual_line61_line63_line65_line67_line69_line71_line73_line75_line77_line79_line81_line83_line85_line87_line89_line91_line95_line100_line107_line114_line121_line128_line135_line142_line151_line160_line172_line185_line198_line212_line223 bus1=61.1.2.3.4 bus2=224.1.2.3.4 phases=4 linecode=LC8 length=106.323399 units=m
! reduced_from=line61,line63,line65,line67,line69,line71,line73,line75,line77,line79,line81,line83,line85,line87,line89,line91,line95,line100,line107,line114,line121,line128,line135,line142,line151,line160,line172,line185,line198,line212,line223
! eliminated_buses=62,64,66,68,70,72,74,76,78,80,82,84,86,88,90,92,96,101,108,115,122,129,136,143,152,161,173,186,199,213

New Line._virtual_line62_line64_line66_line68_line70_line72_line74_line76_line78_line80_line82_line84_line86_line88_line90 bus1=91.1.2.3.4 bus2=61.1.2.3.4 phases=4 linecode=LC9 length=25.21913 units=m
! reduced_from=line62,line64,line66,line68,line70,line72,line74,line76,line78,line80,line82,line84,line86,line88,line90
! eliminated_buses=63,65,67,69,71,73,75,77,79,81,83,85,87,89

New Line._virtual_line92_line96_line101_line108_line115_line122_line129_line136_line143_line153_line163_line175 bus1=176.1.2.3.4 bus2=91.1.2.3.4 phases=4 linecode=LC6 length=8.79986 units=m
! reduced_from=line92,line96,line101,line108,line115,line122,line129,line136,line143,line153,line163,line175
! eliminated_buses=93,97,102,109,116,123,130,137,144,154,164

New Line._virtual_line94_line99_line106_line113_line120_line127_line134_line141_line150_line159_line171_line184_line197 bus1=91.1.2.3.4 bus2=198.1.2.3.4 phases=4 linecode=LC6 length=11.69366 units=m
! reduced_from=line94,line99,line106,line113,line120,line127,line134,line141,line150,line159,line171,line184,line197
! eliminated_buses=95,100,107,114,121,128,135,142,151,160,172,185

New Line._virtual_line98_line105_line112_line119_line126_line133_line140_line149_line158 bus1=159.1.2.3.4 bus2=94.1.2.3.4 phases=4 linecode=LC9 length=22.54978 units=m
! reduced_from=line98,line105,line112,line119,line126,line133,line140,line149,line158
! eliminated_buses=99,106,113,120,127,134,141,150

New Line._virtual_line102_line109_line116_line123_line130_line137 bus1=98.1.2.3.4 bus2=138.1.2.3.4 phases=4 linecode=LC9 length=29.81138 units=m
! reduced_from=line102,line109,line116,line123,line130,line137
! eliminated_buses=103,110,117,124,131

New Line._virtual_line103_line110_line117_line124_line131_line138_line146_line155_line165 bus1=166.1.2.3.4 bus2=98.1.2.3.4 phases=4 linecode=LC6 length=6.8608 units=m
! reduced_from=line103,line110,line117,line124,line131,line138,line146,line155,line165
! eliminated_buses=104,111,118,125,132,139,147,156

New Line._virtual_line104_line111_line118_line125_line132_line139_line147_line156_line166_line179_line192 bus1=193.1.2.3.4 bus2=98.1.2.3.4 phases=4 linecode=LC6 length=8.418036 units=m
! reduced_from=line104,line111,line118,line125,line132,line139,line147,line156,line166,line179,line192
! eliminated_buses=105,112,119,126,133,140,148,157,167,180

New Line._virtual_line144_line154_line164_line176_line190_line202_line216_line227 bus1=228.1.2.3.4 bus2=138.1.2.3.4 phases=4 linecode=LC6 length=5.77462 units=m
! reduced_from=line144,line154,line164,line176,line190,line202,line216,line227
! eliminated_buses=145,155,165,177,191,203,217

New Line._virtual_line168_line181_line194_line207_line219_line230 bus1=231.1.2.3.4 bus2=159.1.2.3.4 phases=4 linecode=LC9 length=19.6767 units=m
! reduced_from=line168,line181,line194,line207,line219,line230
! eliminated_buses=169,182,195,208,220

New Line._virtual_line169_line182_line195_line208_line220_line231_line246_line259_line272_line286_line302 bus1=159.1.2.3.4 bus2=303.1.2.3.4 phases=4 linecode=LC6 length=4.38109 units=m
! reduced_from=line169,line182,line195,line208,line220,line231,line246,line259,line272,line286,line302
! eliminated_buses=170,183,196,209,221,232,247,260,273,287

New Line._virtual_line170_line183_line196_line209_line221_line232_line247_line260_line274_line288_line304_line320 bus1=159.1.2.3.4 bus2=321.1.2.3.4 phases=4 linecode=LC6 length=13.1699 units=m
! reduced_from=line170,line183,line196,line209,line221,line232,line247,line260,line274,line288,line304,line320
! eliminated_buses=171,184,197,210,222,233,248,261,275,289,305

New Line._virtual_line177_line191_line203_line217_line228_line241_line254_line267_line281_line296_line312_line354_line369_line385 bus1=166.1.2.3.4 bus2=386.1.2.3.4 phases=4 linecode=LC6 length=8.239 units=m
! reduced_from=line177,line191,line203,line217,line228,line241,line254,line267,line281,line296,line312,line354,line369,line385
! eliminated_buses=178,192,204,218,229,242,255,268,282,297,313,355,370

New Line._virtual_line188_line201_line215_line226_line238_line252_line265_line279_line293_line309_line351_line366 bus1=367.1.2.3.4 bus2=176.1.2.3.4 phases=4 linecode=LC6 length=12.301329 units=m
! reduced_from=line188,line201,line215,line226,line238,line252,line265,line279,line293,line309,line351,line366
! eliminated_buses=189,202,216,227,239,253,266,280,294,310,352

New Line._virtual_line204_line218_line229_line242_line255_line268_line282_line297_line313_line355_line370_line386_line403_line419_line434_line449_line464_line478_line491_line506 bus1=193.1.2.3.4 bus2=507.1.2.3.4 phases=4 linecode=LC6 length=13.52452 units=m
! reduced_from=line204,line218,line229,line242,line255,line268,line282,line297,line313,line355,line370,line386,line403,line419,line434,line449,line464,line478,line491,line506
! eliminated_buses=205,219,230,243,256,269,283,298,314,356,371,387,404,420,435,450,465,479,492

New Line._virtual_line210_line222_line233_line248_line261_line275_line289_line305 bus1=306.1.2.3.4 bus2=198.1.2.3.4 phases=4 linecode=LC6 length=8.29017 units=m
! reduced_from=line210,line222,line233,line248,line261,line275,line289,line305
! eliminated_buses=211,223,234,249,262,276,290

New Line._virtual_line234_line249_line262_line276_line290_line306 bus1=307.1.2.3.4 bus2=224.1.2.3.4 phases=4 linecode=LC1 length=4.00054 units=m
! reduced_from=line234,line249,line262,line276,line290,line306
! eliminated_buses=235,250,263,277,291

New Line._virtual_line239_line253_line266_line280_line294_line310_line352_line367_line383_line399_line416_line431_line446_line461_line476_line489 bus1=228.1.2.3.4 bus2=490.1.2.3.4 phases=4 linecode=LC6 length=13.95591 units=m
! reduced_from=line239,line253,line266,line280,line294,line310,line352,line367,line383,line399,line416,line431,line446,line461,line476,line489
! eliminated_buses=240,254,267,281,295,311,353,368,384,400,417,432,447,462,477

New Line._virtual_line243_line256_line269_line283_line298_line314_line356_line371_line387_line404_line420_line435_line450_line465_line479 bus1=480.1.2.3.4 bus2=231.1.2.3.4 phases=4 linecode=LC9 length=25.96469 units=m
! reduced_from=line243,line256,line269,line283,line298,line314,line356,line371,line387,line404,line420,line435,line450,line465,line479
! eliminated_buses=244,257,270,284,299,315,357,372,388,405,421,436,451,466

New Line._virtual_line244_line257_line270_line284_line299_line315_line357_line372_line388_line405_line421_line436_line451_line466_line480_line495 bus1=231.1.2.3.4 bus2=496.1.2.3.4 phases=4 linecode=LC6 length=9.62265 units=m
! reduced_from=line244,line257,line270,line284,line299,line315,line357,line372,line388,line405,line421,line436,line451,line466,line480,line495
! eliminated_buses=245,258,271,285,300,316,358,373,389,406,422,437,452,467,481

New Line._virtual_line245_line258_line271_line285 bus1=231.1.2.3.4 bus2=286.1.2.3.4 phases=4 linecode=LC6 length=5.3549 units=m
! reduced_from=line245,line258,line271,line285
! eliminated_buses=246,259,272

New Line._virtual_line300_line316_line358_line373_line389_line406_line422_line437_line452_line467_line481_line496 bus1=497.1.2.3.4 bus2=286.1.2.3.4 phases=4 linecode=LC6 length=8.48792 units=m
! reduced_from=line300,line316,line358,line373,line389,line406,line422,line437,line452,line467,line481,line496
! eliminated_buses=301,317,359,374,390,407,423,438,453,468,482

New Line._virtual_line317_line359_line374_line390_line407_line423_line438_line453_line468_line482_line497_line514 bus1=303.1.2.3.4 bus2=515.1.2.3.4 phases=4 linecode=LC6 length=8.5006 units=m
! reduced_from=line317,line359,line374,line390,line407,line423,line438,line453,line468,line482,line497,line514
! eliminated_buses=318,360,375,391,408,424,439,454,469,483,498

New Line._virtual_line321_line363_line377_line393_line410_line425_line440_line455_line470 bus1=306.1.2.3.4 bus2=471.1.2.3.4 phases=4 linecode=LC6 length=14.31862 units=m
! reduced_from=line321,line363,line377,line393,line410,line425,line440,line455,line470
! eliminated_buses=322,364,378,394,411,426,441,456

New Line._virtual_line361_line376_line392_line409_line424_line439_line454_line469_line483 bus1=321.1.2.3.4 bus2=484.1.2.3.4 phases=4 linecode=LC6 length=8.64488 units=m
! reduced_from=line361,line376,line392,line409,line424,line439,line454,line469,line483
! eliminated_buses=362,377,393,410,425,440,455,470

New Line._virtual_line380_line397_line414_line429_line444_line459_line474_line487_line503_line519_line536_line550_line564_line578 bus1=579.1.2.3.4 bus2=367.1.2.3.4 phases=4 linecode=LC6 length=15.28539 units=m
! reduced_from=line380,line397,line414,line429,line444,line459,line474,line487,line503,line519,line536,line550,line564,line578
! eliminated_buses=381,398,415,430,445,460,475,488,504,520,537,551,565

New Line._virtual_line401_line418_line433_line448_line463_line477_line490_line505_line521_line538_line552_line566_line580_line593_line605 bus1=386.1.2.3.4 bus2=606.1.2.3.4 phases=4 linecode=LC6 length=8.65937 units=m
! reduced_from=line401,line418,line433,line448,line463,line477,line490,line505,line521,line538,line552,line566,line580,line593,line605
! eliminated_buses=402,419,434,449,464,478,491,506,522,539,553,567,581,594

New Line._virtual_line493_line508_line526_line541_line555_line569_line583_line596_line608_line620_line631_line643_line655_line666_line676 bus1=480.1.2.3.4 bus2=677.1.2.3.4 phases=4 linecode=LC6 length=6.93123 units=m
! reduced_from=line493,line508,line526,line541,line555,line569,line583,line596,line608,line620,line631,line643,line655,line666,line676
! eliminated_buses=494,509,527,542,556,570,584,597,609,621,632,644,656,667

New Line._virtual_line494_line509_line527_line542_line556_line570_line584_line597_line609_line621_line632_line644_line656_line667_line677_line687_line694_line701_line708_line714_line719_line724_line729_line734_line739_line744_line749_line754_line760_line764_line768_line772_line776_line780_line782_line784 bus1=785.1.2.3.4 bus2=480.1.2.3.4 phases=4 linecode=LC6 length=11.441538 units=m
! reduced_from=line494,line509,line527,line542,line556,line570,line584,line597,line609,line621,line632,line644,line656,line667,line677,line687,line694,line701,line708,line714,line719,line724,line729,line734,line739,line744,line749,line754,line760,line764,line768,line772,line776,line780,line782,line784
! eliminated_buses=495,510,528,543,557,571,585,598,610,622,633,645,657,668,678,688,695,702,709,715,720,725,730,735,740,745,750,755,761,765,769,773,777,781,783

New Line._virtual_line498_line515_line532_line546_line560_line574_line588_line601 bus1=602.1.2.3.4 bus2=484.1.2.3.4 phases=4 linecode=LC6 length=15.21114 units=m
! reduced_from=line498,line515,line532,line546,line560,line574,line588,line601
! eliminated_buses=499,516,533,547,561,575,589

New Line._virtual_line510_line528_line543_line557_line571_line585_line598_line610_line622_line633_line645 bus1=646.1.2.3.4 bus2=496.1.2.3.4 phases=4 linecode=LC6 length=19.17708 units=m
! reduced_from=line510,line528,line543,line557,line571,line585,line598,line610,line622,line633,line645
! eliminated_buses=511,529,544,558,572,586,599,611,623,634

New Line._virtual_line512_line529_line544_line558_line572_line586_line599_line611_line623_line635_line647_line658 bus1=497.1.2.3.4 bus2=659.1.2.3.4 phases=4 linecode=LC6 length=15.25323 units=m
! reduced_from=line512,line529,line544,line558,line572,line586,line599,line611,line623,line635,line647,line658
! eliminated_buses=513,530,545,559,573,587,600,612,624,636,648

New Line._virtual_line522_line539_line553_line567_line581_line594_line606_line618_line629_line641_line653_line664_line674_line683 bus1=507.1.2.3.4 bus2=684.1.2.3.4 phases=4 linecode=LC6 length=11.553666 units=m
! reduced_from=line522,line539,line553,line567,line581,line594,line606,line618,line629,line641,line653,line664,line674,line683
! eliminated_buses=523,540,554,568,582,595,607,619,630,642,654,665,675

New Line._virtual_line530_line545_line559_line573_line587_line600_line612_line624_line636_line648_line659_line669 bus1=670.1.2.3.4 bus2=515.1.2.3.4 phases=4 linecode=LC6 length=16.10492 units=m
! reduced_from=line530,line545,line559,line573,line587,line600,line612,line624,line636,line648,line659,line669
! eliminated_buses=531,546,560,574,588,601,613,625,637,649,660

New Line._virtual_line616_line628_line640_line652_line663_line673_line682_line692_line699_line706_line712_line717_line722_line727_line732_line737_line742_line747_line752_line757 bus1=758.1.2.3.4 bus2=606.1.2.3.4 phases=4 linecode=LC6 length=11.790535 units=m
! reduced_from=line616,line628,line640,line652,line663,line673,line682,line692,line699,line706,line712,line717,line722,line727,line732,line737,line742,line747,line752,line757
! eliminated_buses=617,629,641,653,664,674,683,693,700,707,713,718,723,728,733,738,743,748,753

New Line._virtual_line685_line693_line700_line707_line713_line718_line723_line728_line733_line738_line743_line748_line753 bus1=677.1.2.3.4 bus2=754.1.2.3.4 phases=4 linecode=LC6 length=8.47765 units=m
! reduced_from=line685,line693,line700,line707,line713,line718,line723,line728,line733,line738,line743,line748,line753
! eliminated_buses=686,694,701,708,714,719,724,729,734,739,744,749

New Line._virtual_line758_line763_line767_line771_line775_line779_line781_line783_line785_line788_line790 bus1=791.1.2.3.4 bus2=754.1.2.3.4 phases=4 linecode=LC6 length=8.67463 units=m
! reduced_from=line758,line763,line767,line771,line775,line779,line781,line783,line785,line788,line790
! eliminated_buses=759,764,768,772,776,780,782,784,786,789

New Line._virtual_line786_line789_line791_line794_line796_line798_line800_line802_line804_line806_line808_line810_line812_line814_line816_line817 bus1=818.1.2.3.4 bus2=785.1.2.3.4 phases=4 linecode=LC6 length=8.97624 units=m
! reduced_from=line786,line789,line791,line794,line796,line798,line800,line802,line804,line806,line808,line810,line812,line814,line816,line817
! eliminated_buses=787,790,792,795,797,799,801,803,805,807,809,811,813,815,817

New Line._virtual_line792_line795_line797_line799_line801_line803_line805_line807_line809_line811_line813_line815 bus1=791.1.2.3.4 bus2=816.1.2.3.4 phases=4 linecode=LC6 length=13.2399 units=m
! reduced_from=line792,line795,line797,line799,line801,line803,line805,line807,line809,line811,line813,line815
! eliminated_buses=793,796,798,800,802,804,806,808,810,812,814

New Line._virtual_line818_line820_line821_line822_line823_line824_line825_line826_line827_line828_line829_line830_line831_line832_line833 bus1=818.1.2.3.4 bus2=834.1.2.3.4 phases=4 linecode=LC6 length=12.28733 units=m
! reduced_from=line818,line820,line821,line822,line823,line824,line825,line826,line827,line828,line829,line830,line831,line832,line833
! eliminated_buses=819,821,822,823,824,825,826,827,828,829,830,831,832,833

New Line.LINE93 bus1=91.1.2.3.4 bus2=94.1.2.3.4 phases=4 linecode=LC9 length=8.2443 units=m

New Line.LINE97 bus1=94.1.2.3.4 bus2=98.1.2.3.4 phases=4 linecode=LC9 length=7.7017 units=m

New Line.LINE178 bus1=166.1.2.3.4 bus2=179.1.2.3.4 phases=4 linecode=LC6 length=3.0659 units=m

New Line.LINE189 bus1=176.1.2.3.4 bus2=190.1.2.3.4 phases=4 linecode=LC6 length=3.4279 units=m

New Line.LINE205 bus1=193.1.2.3.4 bus2=206.1.2.3.4 phases=4 linecode=LC6 length=3.4978 units=m

New Line.LINE211 bus1=198.1.2.3.4 bus2=212.1.2.3.4 phases=4 linecode=LC6 length=6.7407 units=m

New Line.LINE240 bus1=228.1.2.3.4 bus2=241.1.2.3.4 phases=4 linecode=LC6 length=2.07 units=m

New Line.LINE301 bus1=286.1.2.3.4 bus2=302.1.2.3.4 phases=4 linecode=LC6 length=7.6693 units=m

New Line.LINE318 bus1=303.1.2.3.4 bus2=319.1.2.3.4 phases=4 linecode=LC6 length=7.4316 units=m

New Line.LINE322 bus1=306.1.2.3.4 bus2=323.1.2.3.4 phases=4 linecode=LC6 length=6.9087 units=m

New Line.LINE323 bus1=307.1.2.3.4 bus2=324.1.2.3.4 phases=4 linecode=LC1 length=3.051 units=m

New Line.LINE324 bus1=307.1.2.3.4 bus2=325.1.2.3.4 phases=4 linecode=LC1 length=3.051 units=m

New Line.LINE325 bus1=307.1.2.3.4 bus2=326.1.2.3.4 phases=4 linecode=LC1 length=3.051 units=m

New Line.LINE326 bus1=307.1.2.3.4 bus2=327.1.2.3.4 phases=4 linecode=LC1 length=3.051 units=m

New Line.LINE327 bus1=307.1.2.3.4 bus2=328.1.2.3.4 phases=4 linecode=LC1 length=3.051 units=m

New Line.LINE328 bus1=307.1.2.3.4 bus2=329.1.2.3.4 phases=4 linecode=LC1 length=3.051 units=m

New Line.LINE329 bus1=307.1.2.3.4 bus2=330.1.2.3.4 phases=4 linecode=LC1 length=3.051 units=m

New Line.LINE330 bus1=307.1.2.3.4 bus2=331.1.2.3.4 phases=4 linecode=LC1 length=3.051 units=m

New Line.LINE331 bus1=307.1.2.3.4 bus2=332.1.2.3.4 phases=4 linecode=LC1 length=3.051 units=m

New Line.LINE332 bus1=307.1.2.3.4 bus2=333.1.2.3.4 phases=4 linecode=LC1 length=3.051 units=m

New Line.LINE333 bus1=307.1.2.3.4 bus2=334.1.2.3.4 phases=4 linecode=LC1 length=3.051 units=m

New Line.LINE334 bus1=307.1.2.3.4 bus2=335.1.2.3.4 phases=4 linecode=LC1 length=3.051 units=m

New Line.LINE335 bus1=307.1.2.3.4 bus2=336.1.2.3.4 phases=4 linecode=LC1 length=3.051 units=m

New Line.LINE336 bus1=307.1.2.3.4 bus2=337.1.2.3.4 phases=4 linecode=LC1 length=3.051 units=m

New Line.LINE337 bus1=307.1.2.3.4 bus2=338.1.2.3.4 phases=4 linecode=LC1 length=3.051 units=m

New Line.LINE338 bus1=307.1.2.3.4 bus2=339.1.2.3.4 phases=4 linecode=LC1 length=3.051 units=m

New Line.LINE339 bus1=307.1.2.3.4 bus2=340.1.2.3.4 phases=4 linecode=LC1 length=3.051 units=m

New Line.LINE340 bus1=307.1.2.3.4 bus2=341.1.2.3.4 phases=4 linecode=LC1 length=3.051 units=m

New Line.LINE341 bus1=307.1.2.3.4 bus2=342.1.2.3.4 phases=4 linecode=LC1 length=3.051 units=m

New Line.LINE342 bus1=307.1.2.3.4 bus2=343.1.2.3.4 phases=4 linecode=LC1 length=7.3215 units=m

New Line.LINE343 bus1=307.1.2.3.4 bus2=344.1.2.3.4 phases=4 linecode=LC1 length=7.3215 units=m

New Line.LINE344 bus1=307.1.2.3.4 bus2=345.1.2.3.4 phases=4 linecode=LC1 length=7.3215 units=m

New Line.LINE345 bus1=307.1.2.3.4 bus2=346.1.2.3.4 phases=4 linecode=LC1 length=7.3215 units=m

New Line.LINE346 bus1=307.1.2.3.4 bus2=347.1.2.3.4 phases=4 linecode=LC1 length=7.3215 units=m

New Line.LINE347 bus1=307.1.2.3.4 bus2=348.1.2.3.4 phases=4 linecode=LC1 length=7.3215 units=m

New Line.LINE348 bus1=307.1.2.3.4 bus2=349.1.2.3.4 phases=4 linecode=LC1 length=7.3215 units=m

New Line.LINE362 bus1=321.1.2.3.4 bus2=363.1.2.3.4 phases=4 linecode=LC6 length=6.4376 units=m

New Line.LINE381 bus1=367.1.2.3.4 bus2=382.1.2.3.4 phases=4 linecode=LC6 length=2.994 units=m

New Line.LINE402 bus1=386.1.2.3.4 bus2=403.1.2.3.4 phases=4 linecode=LC6 length=4.6716 units=m

New Line.LINE499 bus1=484.1.2.3.4 bus2=500.1.2.3.4 phases=4 linecode=LC6 length=6.5983 units=m

New Line.LINE511 bus1=496.1.2.3.4 bus2=512.1.2.3.4 phases=4 linecode=LC6 length=4.6677 units=m

New Line.LINE513 bus1=497.1.2.3.4 bus2=514.1.2.3.4 phases=4 linecode=LC6 length=7.4448 units=m

New Line.LINE523 bus1=507.1.2.3.4 bus2=524.1.2.3.4 phases=4 linecode=LC6 length=2.9051 units=m

New Line.LINE531 bus1=515.1.2.3.4 bus2=532.1.2.3.4 phases=4 linecode=LC1 length=8.1464 units=m

New Line.LINE617 bus1=606.1.2.3.4 bus2=618.1.2.3.4 phases=4 linecode=LC6 length=4.0277 units=m

New Line.LINE686 bus1=677.1.2.3.4 bus2=687.1.2.3.4 phases=4 linecode=LC6 length=3.1729 units=m

New Line.LINE759 bus1=754.1.2.3.4 bus2=760.1.2.3.4 phases=4 linecode=LC6 length=3.8281 units=m

New Line.LINE787 bus1=785.1.2.3.4 bus2=788.1.2.3.4 phases=4 linecode=LC6 length=4.4269 units=m

New Line.LINE793 bus1=791.1.2.3.4 bus2=794.1.2.3.4 phases=4 linecode=LC6 length=4.5273 units=m

New Line.LINE819 bus1=818.1.2.3.4 bus2=820.1.2.3.4 phases=4 linecode=LC6 length=3.5689 units=m
