! Reduced enabled lines.

New Line._virtual_line0_line1_line2_line3_line4_line5_line6_line7_line8_line9_line10_line11_line12_line13_line14_line15_line16_line17_line18_line19_line20_line21_line22_line23_line24_line25_line26_line27_line28_line29_line30_line31_line32_line33_line34_line35_line36_line37_line38_line39_line40_line41_line42_line43_line44 bus1=sourcebus.1.2.3.4 bus2=45.1.2.3.4 phases=4 linecode=LC5 length=26.751904 units=m
! reduced_from=line0,line1,line2,line3,line4,line5,line6,line7,line8,line9,line10,line11,line12,line13,line14,line15,line16,line17,line18,line19,line20,line21,line22,line23,line24,line25,line26,line27,line28,line29,line30,line31,line32,line33,line34,line35,line36,line37,line38,line39,line40,line41,line42,line43,line44
! eliminated_buses=1,2,3,4,5,6,7,8,9,10,11,12,13,14,15,16,17,18,19,20,21,22,23,24,25,26,27,28,29,30,31,32,33,34,35,36,37,38,39,40,41,42,43,44

New Line._virtual_line45_line47_line49_line51_line53_line55_line57_line59_line61_line63_line65_line67_line69_line71_line73_line75_line77_line79_line81 bus1=82.1.2.3.4 bus2=45.1.2.3.4 phases=4 linecode=LC8 length=27.20099 units=m
! reduced_from=line45,line47,line49,line51,line53,line55,line57,line59,line61,line63,line65,line67,line69,line71,line73,line75,line77,line79,line81
! eliminated_buses=46,48,50,52,54,56,58,60,62,64,66,68,70,72,74,76,78,80

New Line._virtual_line83_line86_line89_line92_line95_line98_line101_line104_line107_line110_line113_line116_line119_line121_line123_line125 bus1=82.1.2.3.4 bus2=126.1.2.3.4 phases=4 linecode=LC3 length=26.61282 units=m
! reduced_from=line83,line86,line89,line92,line95,line98,line101,line104,line107,line110,line113,line116,line119,line121,line123,line125
! eliminated_buses=84,87,90,93,96,99,102,105,108,111,114,117,120,122,124

New Line._virtual_line84_line87_line90_line93_line96_line99_line102_line105_line108_line111_line114_line117_line120_line122_line124_line126 bus1=82.1.2.3.4 bus2=127.1.2.3.4 phases=4 linecode=LC8 length=34.564597 units=m
! reduced_from=line84,line87,line90,line93,line96,line99,line102,line105,line108,line111,line114,line117,line120,line122,line124,line126
! eliminated_buses=85,88,91,94,97,100,103,106,109,112,115,118,121,123,125

New Line._virtual_line128_line132_line136_line141_line147_line153_line160_line167 bus1=168.1.2.3.4 bus2=126.1.2.3.4 phases=4 linecode=LC6 length=10.456747 units=m
! reduced_from=line128,line132,line136,line141,line147,line153,line160,line167
! eliminated_buses=129,133,137,142,148,154,161

New Line._virtual_line129_line133_line137_line142_line148_line154_line161_line169_line177 bus1=127.1.2.3.4 bus2=178.1.2.3.4 phases=4 linecode=LC4 length=15.71721 units=m
! reduced_from=line129,line133,line137,line142,line148,line154,line161,line169,line177
! eliminated_buses=130,134,138,143,149,155,162,170

New Line._virtual_line130_line134_line138 bus1=139.1.2.3.4 bus2=128.1.2.3.4 phases=4 linecode=LC3 length=8.2786 units=m
! reduced_from=line130,line134,line138
! eliminated_buses=131,135

New Line._virtual_line131_line135_line140_line146_line152_line159_line166_line174_line182_line191_line199 bus1=128.1.2.3.4 bus2=200.1.2.3.4 phases=4 linecode=LC6 length=11.027781 units=m
! reduced_from=line131,line135,line140,line146,line152,line159,line166,line174,line182,line191,line199
! eliminated_buses=132,136,141,147,153,160,167,175,183,192

New Line._virtual_line143_line149 bus1=139.1.2.3.4 bus2=150.1.2.3.4 phases=4 linecode=LC3 length=6.6341 units=m
! reduced_from=line143,line149
! eliminated_buses=144

New Line._virtual_line144_line150_line157_line164_line172_line180_line189 bus1=139.1.2.3.4 bus2=190.1.2.3.4 phases=4 linecode=LC6 length=10.7035 units=m
! reduced_from=line144,line150,line157,line164,line172,line180,line189
! eliminated_buses=145,151,158,165,173,181

New Line._virtual_line156_line163_line171_line179_line188_line197_line204_line210 bus1=150.1.2.3.4 bus2=211.1.2.3.4 phases=4 linecode=LC2 length=11.61304 units=m
! reduced_from=line156,line163,line171,line179,line188,line197,line204,line210
! eliminated_buses=157,164,172,180,189,198,205

New Line._virtual_line185_line194_line202_line208_line214_line218_line222_line226_line231 bus1=232.1.2.3.4 bus2=178.1.2.3.4 phases=4 linecode=LC3 length=6.08777 units=m
! reduced_from=line185,line194,line202,line208,line214,line218,line222,line226,line231
! eliminated_buses=186,195,203,209,215,219,223,227

New Line._virtual_line186_line195_line203_line209_line215_line219_line223 bus1=224.1.2.3.4 bus2=178.1.2.3.4 phases=4 linecode=LC4 length=12.3228 units=m
! reduced_from=line186,line195,line203,line209,line215,line219,line223
! eliminated_buses=187,196,204,210,216,220

New Line._virtual_line227_line232_line239_line247_line258_line271_line287_line303_line318 bus1=224.1.2.3.4 bus2=319.1.2.3.4 phases=4 linecode=LC6 length=10.63153 units=m
! reduced_from=line227,line232,line239,line247,line258,line271,line287,line303,line318
! eliminated_buses=228,233,240,248,259,272,288,304

New Line._virtual_line228_line233_line240_line248_line259_line272_line288_line304_line319_line333_line346 bus1=224.1.2.3.4 bus2=347.1.2.3.4 phases=4 linecode=LC6 length=10.72715 units=m
! reduced_from=line228,line233,line240,line248,line259,line272,line288,line304,line319,line333,line346
! eliminated_buses=229,234,241,249,260,273,289,305,320,334

New Line._virtual_line229_line235 bus1=224.1.2.3.4 bus2=236.1.2.3.4 phases=4 linecode=LC4 length=13.4499 units=m
! reduced_from=line229,line235
! eliminated_buses=230

New Line._virtual_line237_line245_line254_line266_line281_line297 bus1=232.1.2.3.4 bus2=298.1.2.3.4 phases=4 linecode=LC6 length=8.74621 units=m
! reduced_from=line237,line245,line254,line266,line281,line297
! eliminated_buses=238,246,255,267,282

New Line._virtual_line238_line246 bus1=232.1.2.3.4 bus2=247.1.2.3.4 phases=4 linecode=LC3 length=9.4015 units=m
! reduced_from=line238,line246
! eliminated_buses=239

New Line._virtual_line242_line250_line261_line274_line290_line306 bus1=236.1.2.3.4 bus2=307.1.2.3.4 phases=4 linecode=LC6 length=7.75242 units=m
! reduced_from=line242,line250,line261,line274,line290,line306
! eliminated_buses=243,251,262,275,291

New Line._virtual_line251_line262_line275_line291_line307_line321_line335_line348 bus1=349.1.2.3.4 bus2=244.1.2.3.4 phases=4 linecode=LC3 length=10.35467 units=m
! reduced_from=line251,line262,line275,line291,line307,line321,line335,line348
! eliminated_buses=252,263,276,292,308,322,336

New Line._virtual_line252_line264 bus1=265.1.2.3.4 bus2=244.1.2.3.4 phases=4 linecode=LC4 length=7.6371 units=m
! reduced_from=line252,line264
! eliminated_buses=253

New Line._virtual_line255_line267_line282_line298_line313_line328 bus1=329.1.2.3.4 bus2=247.1.2.3.4 phases=4 linecode=LC6 length=7.0566 units=m
! reduced_from=line255,line267,line282,line298,line313,line328
! eliminated_buses=256,268,283,299,314

New Line._virtual_line256_line268_line283_line299_line314_line329_line342_line354_line366_line377_line388 bus1=389.1.2.3.4 bus2=247.1.2.3.4 phases=4 linecode=LC6 length=10.46093 units=m
! reduced_from=line256,line268,line283,line299,line314,line329,line342,line354,line366,line377,line388
! eliminated_buses=257,269,284,300,315,330,343,355,367,378

New Line._virtual_line269_line284_line300_line315_line330_line343_line355 bus1=258.1.2.3.4 bus2=356.1.2.3.4 phases=4 linecode=LC6 length=7.70086 units=m
! reduced_from=line269,line284,line300,line315,line330,line343,line355
! eliminated_buses=270,285,301,316,331,344

New Line._virtual_line270_line286 bus1=258.1.2.3.4 bus2=287.1.2.3.4 phases=4 linecode=LC3 length=11.2611 units=m
! reduced_from=line270,line286
! eliminated_buses=271

New Line._virtual_line277_line293_line309_line323_line337_line349_line361 bus1=362.1.2.3.4 bus2=265.1.2.3.4 phases=4 linecode=LC6 length=7.49422 units=m
! reduced_from=line277,line293,line309,line323,line337,line349,line361
! eliminated_buses=278,294,310,324,338,350

New Line._virtual_line278_line294_line310_line324_line338_line350_line362_line373_line384 bus1=385.1.2.3.4 bus2=265.1.2.3.4 phases=4 linecode=LC6 length=8.5761 units=m
! reduced_from=line278,line294,line310,line324,line338,line350,line362,line373,line384
! eliminated_buses=279,295,311,325,339,351,363,374

New Line._virtual_line295_line311 bus1=312.1.2.3.4 bus2=280.1.2.3.4 phases=4 linecode=LC3 length=6.7822 units=m
! reduced_from=line295,line311
! eliminated_buses=296

New Line._virtual_line302_line317_line332_line345_line357_line368_line379_line391_line403 bus1=404.1.2.3.4 bus2=287.1.2.3.4 phases=4 linecode=LC6 length=8.92208 units=m
! reduced_from=line302,line317,line332,line345,line357,line368,line379,line391,line403
! eliminated_buses=303,318,333,346,358,369,380,392

New Line._virtual_line326_line341_line353_line365_line376_line387_line400_line413_line422_line431_line439_line445_line451_line456_line460_line464_line468_line471_line475 bus1=312.1.2.3.4 bus2=476.1.2.3.4 phases=4 linecode=LC3 length=28.76738 units=m
! reduced_from=line326,line341,line353,line365,line376,line387,line400,line413,line422,line431,line439,line445,line451,line456,line460,line464,line468,line471,line475
! eliminated_buses=327,342,354,366,377,388,401,414,423,432,440,446,452,457,461,465,469,472

New Line._virtual_line340_line352_line364_line375_line386_line399_line412_line421_line430_line438 bus1=326.1.2.3.4 bus2=439.1.2.3.4 phases=4 linecode=LC6 length=8.36008 units=m
! reduced_from=line340,line352,line364,line375,line386,line399,line412,line421,line430,line438
! eliminated_buses=341,353,365,376,387,400,413,422,431

New Line._virtual_line351_line363_line374_line385_line398_line411 bus1=412.1.2.3.4 bus2=340.1.2.3.4 phases=4 linecode=LC6 length=10.53972 units=m
! reduced_from=line351,line363,line374,line385,line398,line411
! eliminated_buses=352,364,375,386,399

New Line._virtual_line359_line370_line381_line393_line405_line416_line425 bus1=349.1.2.3.4 bus2=426.1.2.3.4 phases=4 linecode=LC6 length=14.72976 units=m
! reduced_from=line359,line370,line381,line393,line405,line416,line425
! eliminated_buses=360,371,382,394,406,417

New Line._virtual_line371_line382_line394_line406_line417_line426_line434 bus1=435.1.2.3.4 bus2=361.1.2.3.4 phases=4 linecode=LC6 length=15.48297 units=m
! reduced_from=line371,line382,line394,line406,line417,line426,line434
! eliminated_buses=372,383,395,407,418,427

New Line._virtual_line372_line383 bus1=361.1.2.3.4 bus2=384.1.2.3.4 phases=4 linecode=LC3 length=7.378 units=m
! reduced_from=line372,line383
! eliminated_buses=373

New Line._virtual_line395_line407_line418_line427_line435_line442_line448 bus1=449.1.2.3.4 bus2=384.1.2.3.4 phases=4 linecode=LC6 length=14.66769 units=m
! reduced_from=line395,line407,line418,line427,line435,line442,line448
! eliminated_buses=396,408,419,428,436,443

New Line._virtual_line396_line408_line419_line428_line436_line443_line449_line454_line459_line463_line467_line470_line473_line477 bus1=384.1.2.3.4 bus2=478.1.2.3.4 phases=4 linecode=LC6 length=18.51472 units=m
! reduced_from=line396,line408,line419,line428,line436,line443,line449,line454,line459,line463,line467,line470,line473,line477
! eliminated_buses=397,409,420,429,437,444,450,455,460,464,468,471,474

New Line._virtual_line480_line485_line490_line495_line499_line503_line507_line511_line514_line516 bus1=476.1.2.3.4 bus2=517.1.2.3.4 phases=4 linecode=LC6 length=9.414407 units=m
! reduced_from=line480,line485,line490,line495,line499,line503,line507,line511,line514,line516
! eliminated_buses=481,486,491,496,500,504,508,512,515

New Line._virtual_line481_line486_line491_line496_line500_line504_line508_line512 bus1=476.1.2.3.4 bus2=513.1.2.3.4 phases=4 linecode=LC6 length=10.95769 units=m
! reduced_from=line481,line486,line491,line496,line500,line504,line508,line512
! eliminated_buses=482,487,492,497,501,505,509

New Line._virtual_line484_line489_line494_line498_line502_line506_line510 bus1=511.1.2.3.4 bus2=480.1.2.3.4 phases=4 linecode=LC6 length=10.24532 units=m
! reduced_from=line484,line489,line494,line498,line502,line506,line510
! eliminated_buses=485,490,495,499,503,507

New Line.LINE127 bus1=126.1.2.3.4 bus2=128.1.2.3.4 phases=4 linecode=LC3 length=11.9382 units=m

New Line.LINE243 bus1=236.1.2.3.4 bus2=244.1.2.3.4 phases=4 linecode=LC4 length=0.43757 units=m

New Line.LINE257 bus1=247.1.2.3.4 bus2=258.1.2.3.4 phases=4 linecode=LC3 length=7.0614 units=m

New Line.LINE279 bus1=265.1.2.3.4 bus2=280.1.2.3.4 phases=4 linecode=LC4 length=5.0217 units=m

New Line.LINE325 bus1=312.1.2.3.4 bus2=326.1.2.3.4 phases=4 linecode=LC3 length=3.0273 units=m

New Line.LINE339 bus1=326.1.2.3.4 bus2=340.1.2.3.4 phases=4 linecode=LC3 length=4.7158 units=m

New Line.LINE360 bus1=349.1.2.3.4 bus2=361.1.2.3.4 phases=4 linecode=LC3 length=8.1374 units=m

New Line.LINE479 bus1=476.1.2.3.4 bus2=480.1.2.3.4 phases=4 linecode=LC3 length=8.2827 units=m
