! Reduced enabled lines.

New Line._virtual_line0_line1_line2_line3_line4_line5_line6_line7_line8_line9_line10_line11_line12_line13_line14_line15_line16_line17_line18_line19_line20_line21_line22_line23_line24_line25_line26_line27_line28_line29_line30_line31_line32_line33_line34_line35_line36_line37_line38_line39_line40_line41_line42_line43_line44_line45_line46 bus1=47.1.2.3.4 bus2=sourcebus.1.2.3.4 phases=4 linecode=LC4 length=36.481026 units=m
! reduced_from=line0,line1,line2,line3,line4,line5,line6,line7,line8,line9,line10,line11,line12,line13,line14,line15,line16,line17,line18,line19,line20,line21,line22,line23,line24,line25,line26,line27,line28,line29,line30,line31,line32,line33,line34,line35,line36,line37,line38,line39,line40,line41,line42,line43,line44,line45,line46
! eliminated_buses=1,2,3,4,5,6,7,8,9,10,11,12,13,14,15,16,17,18,19,20,21,22,23,24,25,26,27,28,29,30,31,32,33,34,35,36,37,38,39,40,41,42,43,44,45,46

New Line._virtual_line47_line49_line52_line55_line59_line63_line68_line73_line79_line85 bus1=47.1.2.3.4 bus2=86.1.2.3.4 phases=4 linecode=LC4 length=7.26162 units=m
! reduced_from=line47,line49,line52,line55,line59,line63,line68,line73,line79,line85
! eliminated_buses=48,50,53,56,60,64,69,74,80

New Line._virtual_line48_line51_line54 bus1=47.1.2.3.4 bus2=55.1.2.3.4 phases=4 linecode=LC4 length=5.96267 units=m
! reduced_from=line48,line51,line54
! eliminated_buses=49,52

New Line._virtual_line57_line61_line65_line70_line75_line81_line87_line95_line104 bus1=105.1.2.3.4 bus2=55.1.2.3.4 phases=4 linecode=LC6 length=8.05878 units=m
! reduced_from=line57,line61,line65,line70,line75,line81,line87,line95,line104
! eliminated_buses=58,62,66,71,76,82,88,96

New Line._virtual_line58_line62 bus1=63.1.2.3.4 bus2=55.1.2.3.4 phases=4 linecode=LC4 length=9.7403 units=m
! reduced_from=line58,line62
! eliminated_buses=59

New Line._virtual_line66_line71_line76_line82_line88_line96_line105_line114 bus1=115.1.2.3.4 bus2=63.1.2.3.4 phases=4 linecode=LC6 length=7.20916 units=m
! reduced_from=line66,line71,line76,line82,line88,line96,line105,line114
! eliminated_buses=67,72,77,83,89,97,106

New Line._virtual_line77_line83_line90_line98 bus1=99.1.2.3.4 bus2=73.1.2.3.4 phases=4 linecode=LC3 length=13.4739 units=m
! reduced_from=line77,line83,line90,line98
! eliminated_buses=78,84,91

New Line._virtual_line78_line84_line91_line99_line109_line119_line129_line140_line151 bus1=152.1.2.3.4 bus2=73.1.2.3.4 phases=4 linecode=LC6 length=6.49736 units=m
! reduced_from=line78,line84,line91,line99,line109,line119,line129,line140,line151
! eliminated_buses=79,85,92,100,110,120,130,141

New Line._virtual_line92_line100_line110_line120_line130_line141_line152_line162_line174 bus1=175.1.2.3.4 bus2=86.1.2.3.4 phases=4 linecode=LC1 length=10.12097 units=m
! reduced_from=line92,line100,line110,line120,line130,line141,line152,line162,line174
! eliminated_buses=93,101,111,121,131,142,153,163

New Line._virtual_line101_line111_line121_line131_line142_line153 bus1=154.1.2.3.4 bus2=94.1.2.3.4 phases=4 linecode=LC1 length=6.9739 units=m
! reduced_from=line101,line111,line121,line131,line142,line153
! eliminated_buses=102,112,122,132,143

New Line._virtual_line102_line112_line122_line132_line143_line154 bus1=155.1.2.3.4 bus2=94.1.2.3.4 phases=4 linecode=LC4 length=8.76515 units=m
! reduced_from=line102,line112,line122,line132,line143,line154
! eliminated_buses=103,113,123,133,144

New Line._virtual_line107_line116_line125_line135_line146_line157_line169_line180 bus1=181.1.2.3.4 bus2=99.1.2.3.4 phases=4 linecode=LC6 length=11.22434 units=m
! reduced_from=line107,line116,line125,line135,line146,line157,line169,line180
! eliminated_buses=108,117,126,136,147,158,170

New Line._virtual_line108_line118 bus1=99.1.2.3.4 bus2=119.1.2.3.4 phases=4 linecode=LC3 length=6.386 units=m
! reduced_from=line108,line118
! eliminated_buses=109

New Line._virtual_line127_line137_line148_line159_line171_line182_line191_line199_line207_line217_line227_line238_line250_line261_line271_line281_line290_line297 bus1=298.1.2.3.4 bus2=119.1.2.3.4 phases=4 linecode=LC6 length=11.64827 units=m
! reduced_from=line127,line137,line148,line159,line171,line182,line191,line199,line207,line217,line227,line238,line250,line261,line271,line281,line290,line297
! eliminated_buses=128,138,149,160,172,183,192,200,208,218,228,239,251,262,272,282,291

New Line._virtual_line128_line139_line150 bus1=119.1.2.3.4 bus2=151.1.2.3.4 phases=4 linecode=LC3 length=9.3445 units=m
! reduced_from=line128,line139,line150
! eliminated_buses=129,140

New Line._virtual_line161_line173_line184_line193_line201_line209_line219_line229_line240_line252 bus1=253.1.2.3.4 bus2=151.1.2.3.4 phases=4 linecode=LC6 length=12.12745 units=m
! reduced_from=line161,line173,line184,line193,line201,line209,line219,line229,line240,line252
! eliminated_buses=162,174,185,194,202,210,220,230,241

New Line._virtual_line165_line175_line185_line194_line202 bus1=203.1.2.3.4 bus2=155.1.2.3.4 phases=4 linecode=LC3 length=19.36874 units=m
! reduced_from=line165,line175,line185,line194,line202
! eliminated_buses=166,176,186,195

New Line._virtual_line166_line177 bus1=155.1.2.3.4 bus2=178.1.2.3.4 phases=4 linecode=LC3 length=4.1727 units=m
! reduced_from=line166,line177
! eliminated_buses=167

New Line._virtual_line187_line196_line204_line213_line223_line233_line244_line255_line265_line275 bus1=276.1.2.3.4 bus2=178.1.2.3.4 phases=4 linecode=LC6 length=10.399112 units=m
! reduced_from=line187,line196,line204,line213,line223,line233,line244,line255,line265,line275
! eliminated_buses=188,197,205,214,224,234,245,256,266

New Line._virtual_line188_line197 bus1=178.1.2.3.4 bus2=198.1.2.3.4 phases=4 linecode=LC3 length=5.05756 units=m
! reduced_from=line188,line197
! eliminated_buses=189

New Line._virtual_line210_line220_line230_line241_line253_line263 bus1=264.1.2.3.4 bus2=203.1.2.3.4 phases=4 linecode=LC2 length=2.099237 units=m
! reduced_from=line210,line220,line230,line241,line253,line263
! eliminated_buses=211,221,231,242,254

New Line._virtual_line211_line221_line231_line242_line254_line264_line274_line284_line292_line298_line302_line306_line309_line311_line313 bus1=314.1.2.3.4 bus2=203.1.2.3.4 phases=4 linecode=LC3 length=14.129729 units=m
! reduced_from=line211,line221,line231,line242,line254,line264,line274,line284,line292,line298,line302,line306,line309,line311,line313
! eliminated_buses=212,222,232,243,255,265,275,285,293,299,303,307,310,312

New Line._virtual_line214_line224_line234_line245_line256_line266_line276_line285_line293_line299_line303_line307_line310_line312_line314_line317 bus1=318.1.2.3.4 bus2=206.1.2.3.4 phases=4 linecode=LC6 length=9.511983 units=m
! reduced_from=line214,line224,line234,line245,line256,line266,line276,line285,line293,line299,line303,line307,line310,line312,line314,line317
! eliminated_buses=215,225,235,246,257,267,277,286,294,300,304,308,311,313,315

New Line._virtual_line215_line225 bus1=226.1.2.3.4 bus2=206.1.2.3.4 phases=4 linecode=LC3 length=5.7489 units=m
! reduced_from=line215,line225
! eliminated_buses=216

New Line._virtual_line236_line248_line259_line269_line279_line288_line295_line300_line304 bus1=226.1.2.3.4 bus2=305.1.2.3.4 phases=4 linecode=LC6 length=8.048043 units=m
! reduced_from=line236,line248,line259,line269,line279,line288,line295,line300,line304
! eliminated_buses=237,249,260,270,280,289,296,301

New Line._virtual_line247_line258_line268_line278_line287_line294 bus1=295.1.2.3.4 bus2=236.1.2.3.4 phases=4 linecode=LC6 length=9.21143 units=m
! reduced_from=line247,line258,line268,line278,line287,line294
! eliminated_buses=248,259,269,279,288

New Line._virtual_line316_line320_line323_line327_line332_line337_line342_line347_line352_line357_line362_line365_line368_line371 bus1=372.1.2.3.4 bus2=314.1.2.3.4 phases=4 linecode=LC6 length=10.584699 units=m
! reduced_from=line316,line320,line323,line327,line332,line337,line342,line347,line352,line357,line362,line365,line368,line371
! eliminated_buses=317,321,324,328,333,338,343,348,353,358,363,366,369

New Line._virtual_line318_line321 bus1=322.1.2.3.4 bus2=316.1.2.3.4 phases=4 linecode=LC3 length=6.7665 units=m
! reduced_from=line318,line321
! eliminated_buses=319

New Line._virtual_line319_line322_line326_line331_line336_line341_line346_line351_line356_line361 bus1=316.1.2.3.4 bus2=362.1.2.3.4 phases=4 linecode=LC6 length=8.10045 units=m
! reduced_from=line319,line322,line326,line331,line336,line341,line346,line351,line356,line361
! eliminated_buses=320,323,327,332,337,342,347,352,357

New Line._virtual_line324_line328_line333_line338_line343_line348_line353_line358 bus1=359.1.2.3.4 bus2=322.1.2.3.4 phases=4 linecode=LC6 length=5.97614 units=m
! reduced_from=line324,line328,line333,line338,line343,line348,line353,line358
! eliminated_buses=325,329,334,339,344,349,354

New Line._virtual_line325_line330 bus1=331.1.2.3.4 bus2=322.1.2.3.4 phases=4 linecode=LC3 length=2.9011 units=m
! reduced_from=line325,line330
! eliminated_buses=326

New Line._virtual_line335_line340_line345_line350_line355_line360_line364_line367_line370_line373_line375 bus1=376.1.2.3.4 bus2=331.1.2.3.4 phases=4 linecode=LC6 length=11.97782 units=m
! reduced_from=line335,line340,line345,line350,line355,line360,line364,line367,line370,line373,line375
! eliminated_buses=336,341,346,351,356,361,365,368,371,374

New Line.LINE67 bus1=63.1.2.3.4 bus2=68.1.2.3.4 phases=4 linecode=LC4 length=5.0597 units=m

New Line.LINE72 bus1=68.1.2.3.4 bus2=73.1.2.3.4 phases=4 linecode=LC3 length=3.5928 units=m

New Line.LINE93 bus1=86.1.2.3.4 bus2=94.1.2.3.4 phases=4 linecode=LC4 length=6.0211 units=m

New Line.LINE163 bus1=154.1.2.3.4 bus2=164.1.2.3.4 phases=4 linecode=LC1 length=3.1042 units=m

New Line.LINE164 bus1=154.1.2.3.4 bus2=165.1.2.3.4 phases=4 linecode=LC1 length=6.6597 units=m

New Line.LINE205 bus1=198.1.2.3.4 bus2=206.1.2.3.4 phases=4 linecode=LC9 length=4.0056 units=m

New Line.LINE235 bus1=226.1.2.3.4 bus2=236.1.2.3.4 phases=4 linecode=LC3 length=0.82381 units=m

New Line.LINE315 bus1=314.1.2.3.4 bus2=316.1.2.3.4 phases=4 linecode=LC3 length=7.2077 units=m
