! Reduced enabled lines.

New Line._virtual_line0_line1_line2_line3_line4_line5_line6_line7_line8_line9_line10_line11_line12_line13_line14_line15_line16_line17_line18_line19_line20_line21_line22_line23_line24_line25_line26_line27_line28_line29_line30_line31_line32_line33_line34_line35_line36_line37_line38_line39_line40_line41_line42_line43_line44_line45_line46_line47_line48_line49_line50_line51_line52_line53 bus1=sourcebus.1.2.3.4 bus2=54.1.2.3.4 phases=4 linecode=LC4 length=73.103849 units=m
! reduced_from=line0,line1,line2,line3,line4,line5,line6,line7,line8,line9,line10,line11,line12,line13,line14,line15,line16,line17,line18,line19,line20,line21,line22,line23,line24,line25,line26,line27,line28,line29,line30,line31,line32,line33,line34,line35,line36,line37,line38,line39,line40,line41,line42,line43,line44,line45,line46,line47,line48,line49,line50,line51,line52,line53
! eliminated_buses=1,2,3,4,5,6,7,8,9,10,11,12,13,14,15,16,17,18,19,20,21,22,23,24,25,26,27,28,29,30,31,32,33,34,35,36,37,38,39,40,41,42,43,44,45,46,47,48,49,50,51,52,53

New Line._virtual_line54_line56_line58_line60_line63 bus1=64.1.2.3.4 bus2=54.1.2.3.4 phases=4 linecode=LC4 length=24.7119 units=m
! reduced_from=line54,line56,line58,line60,line63
! eliminated_buses=55,57,59,61

New Line._virtual_line55_line57_line59_line62_line65_line69_line73_line77_line81_line85_line89_line93_line98_line102_line106_line110_line114_line119_line124_line129_line134_line139_line145_line151_line156_line161_line166_line171_line178 bus1=54.1.2.3.4 bus2=179.1.2.3.4 phases=4 linecode=LC6 length=19.771898 units=m
! reduced_from=line55,line57,line59,line62,line65,line69,line73,line77,line81,line85,line89,line93,line98,line102,line106,line110,line114,line119,line124,line129,line134,line139,line145,line151,line156,line161,line166,line171,line178
! eliminated_buses=56,58,60,63,66,70,74,78,82,86,90,94,99,103,107,111,115,120,125,130,135,140,146,152,157,162,167,172

New Line._virtual_line66_line70 bus1=64.1.2.3.4 bus2=71.1.2.3.4 phases=4 linecode=LC4 length=6.333 units=m
! reduced_from=line66,line70
! eliminated_buses=67

New Line._virtual_line67_line71_line75_line79_line83_line87_line91_line96_line101_line105_line109_line113_line118_line123_line128_line133_line138_line144_line150_line155_line160_line165_line170 bus1=171.1.2.3.4 bus2=64.1.2.3.4 phases=4 linecode=LC6 length=16.010792 units=m
! reduced_from=line67,line71,line75,line79,line83,line87,line91,line96,line101,line105,line109,line113,line118,line123,line128,line133,line138,line144,line150,line155,line160,line165,line170
! eliminated_buses=68,72,76,80,84,88,92,97,102,106,110,114,119,124,129,134,139,145,151,156,161,166

New Line._virtual_line74_line78_line82_line86_line90 bus1=71.1.2.3.4 bus2=91.1.2.3.4 phases=4 linecode=LC5 length=18.5234 units=m
! reduced_from=line74,line78,line82,line86,line90
! eliminated_buses=75,79,83,87

New Line._virtual_line94_line99_line103_line107_line111 bus1=112.1.2.3.4 bus2=91.1.2.3.4 phases=4 linecode=LC5 length=25.203 units=m
! reduced_from=line94,line99,line103,line107,line111
! eliminated_buses=95,100,104,108

New Line._virtual_line95_line100_line104_line108_line112_line117_line122_line127_line132_line137 bus1=91.1.2.3.4 bus2=138.1.2.3.4 phases=4 linecode=LC6 length=13.70194 units=m
! reduced_from=line95,line100,line104,line108,line112,line117,line122,line127,line132,line137
! eliminated_buses=96,101,105,109,113,118,123,128,133

New Line._virtual_line115_line120_line125_line130_line135_line140_line146_line152_line157_line162_line167 bus1=112.1.2.3.4 bus2=168.1.2.3.4 phases=4 linecode=LC6 length=13.33547 units=m
! reduced_from=line115,line120,line125,line130,line135,line140,line146,line152,line157,line162,line167
! eliminated_buses=116,121,126,131,136,141,147,153,158,163

New Line._virtual_line116_line121_line126_line131_line136_line141 bus1=142.1.2.3.4 bus2=112.1.2.3.4 phases=4 linecode=LC5 length=28.8743 units=m
! reduced_from=line116,line121,line126,line131,line136,line141
! eliminated_buses=117,122,127,132,137

New Line._virtual_line142_line149 bus1=138.1.2.3.4 bus2=150.1.2.3.4 phases=4 linecode=LC6 length=8.2104 units=m
! reduced_from=line142,line149
! eliminated_buses=143

New Line._virtual_line147_line153_line158_line163_line168_line174_line180_line186_line189 bus1=190.1.2.3.4 bus2=142.1.2.3.4 phases=4 linecode=LC6 length=11.68737 units=m
! reduced_from=line147,line153,line158,line163,line168,line174,line180,line186,line189
! eliminated_buses=148,154,159,164,169,175,181,187

New Line._virtual_line148_line154_line159_line164_line169_line175_line181_line187_line190_line193 bus1=194.1.2.3.4 bus2=142.1.2.3.4 phases=4 linecode=LC5 length=24.6448 units=m
! reduced_from=line148,line154,line159,line164,line169,line175,line181,line187,line190,line193
! eliminated_buses=149,155,160,165,170,176,182,188,191

New Line._virtual_line172_line179_line185 bus1=168.1.2.3.4 bus2=186.1.2.3.4 phases=4 linecode=LC6 length=9.3151 units=m
! reduced_from=line172,line179,line185
! eliminated_buses=173,180

New Line._virtual_line176_line182 bus1=171.1.2.3.4 bus2=183.1.2.3.4 phases=4 linecode=LC6 length=5.264 units=m
! reduced_from=line176,line182
! eliminated_buses=177

New Line._virtual_line183_line188 bus1=179.1.2.3.4 bus2=189.1.2.3.4 phases=4 linecode=LC6 length=9.038 units=m
! reduced_from=line183,line188
! eliminated_buses=184

New Line._virtual_line191_line194_line198_line202_line206_line210_line215 bus1=216.1.2.3.4 bus2=190.1.2.3.4 phases=4 linecode=LC6 length=8.83869 units=m
! reduced_from=line191,line194,line198,line202,line206,line210,line215
! eliminated_buses=192,195,199,203,207,211

New Line._virtual_line192_line195_line199_line203_line207_line211_line216 bus1=217.1.2.3.4 bus2=190.1.2.3.4 phases=4 linecode=LC6 length=12.26516 units=m
! reduced_from=line192,line195,line199,line203,line207,line211,line216
! eliminated_buses=193,196,200,204,208,212

New Line._virtual_line196_line200_line204_line208_line212_line217_line220_line223_line226_line229_line232_line235_line238 bus1=194.1.2.3.4 bus2=239.1.2.3.4 phases=4 linecode=LC6 length=26.87142 units=m
! reduced_from=line196,line200,line204,line208,line212,line217,line220,line223,line226,line229,line232,line235,line238
! eliminated_buses=197,201,205,209,213,218,221,224,227,230,233,236

New Line._virtual_line197_line201_line205_line209 bus1=194.1.2.3.4 bus2=210.1.2.3.4 phases=4 linecode=LC5 length=11.29031 units=m
! reduced_from=line197,line201,line205,line209
! eliminated_buses=198,202,206

New Line._virtual_line214_line219_line222_line225_line228_line231_line234_line237_line240_line241_line242_line243_line244_line245_line246_line247 bus1=210.1.2.3.4 bus2=248.1.2.3.4 phases=4 linecode=LC6 length=12.90218 units=m
! reduced_from=line214,line219,line222,line225,line228,line231,line234,line237,line240,line241,line242,line243,line244,line245,line246,line247
! eliminated_buses=215,220,223,226,229,232,235,238,241,242,243,244,245,246,247

New Line._virtual_line248_line250 bus1=251.1.2.3.4 bus2=248.1.2.3.4 phases=4 linecode=LC6 length=8.5389 units=m
! reduced_from=line248,line250
! eliminated_buses=249

New Line.LINE143 bus1=138.1.2.3.4 bus2=144.1.2.3.4 phases=4 linecode=LC6 length=3.4704 units=m

New Line.LINE173 bus1=168.1.2.3.4 bus2=174.1.2.3.4 phases=4 linecode=LC6 length=6.6174 units=m

New Line.LINE177 bus1=171.1.2.3.4 bus2=178.1.2.3.4 phases=4 linecode=LC6 length=4.3457 units=m

New Line.LINE184 bus1=179.1.2.3.4 bus2=185.1.2.3.4 phases=4 linecode=LC6 length=4.1486 units=m

New Line.LINE249 bus1=248.1.2.3.4 bus2=250.1.2.3.4 phases=4 linecode=LC6 length=6.2956 units=m
