! Reduced enabled lines.

New Line._virtual_line0_line1_line2_line3_line4_line5_line6_line7_line8_line9_line10_line11_line12_line13_line14_line15_line16_line17_line18_line19_line20_line21_line22_line23_line24_line25_line26_line27_line28_line29_line30_line31_line32_line33_line34_line35_line36_line37_line38_line39_line40_line41_line42_line43_line44_line45_line46_line47_line48_line49_line50_line51_line52_line53_line54_line55_line56_line57_line58_line59_line60_line61 bus1=sourcebus.1.2.3.4 bus2=62.1.2.3.4 phases=4 linecode=LC4 length=116.475377 units=m
! reduced_from=line0,line1,line2,line3,line4,line5,line6,line7,line8,line9,line10,line11,line12,line13,line14,line15,line16,line17,line18,line19,line20,line21,line22,line23,line24,line25,line26,line27,line28,line29,line30,line31,line32,line33,line34,line35,line36,line37,line38,line39,line40,line41,line42,line43,line44,line45,line46,line47,line48,line49,line50,line51,line52,line53,line54,line55,line56,line57,line58,line59,line60,line61
! eliminated_buses=1,2,3,4,5,6,7,8,9,10,11,12,13,14,15,16,17,18,19,20,21,22,23,24,25,26,27,28,29,30,31,32,33,34,35,36,37,38,39,40,41,42,43,44,45,46,47,48,49,50,51,52,53,54,55,56,57,58,59,60,61

New Line._virtual_line62_line63_line64_line65_line66_line67_line68_line69_line70_line71_line72_line73_line74_line75_line76_line77_line79_line81 bus1=82.1.2.3.4 bus2=62.1.2.3.4 phases=4 linecode=LC5 length=87.18328 units=m
! reduced_from=line62,line63,line64,line65,line66,line67,line68,line69,line70,line71,line72,line73,line74,line75,line76,line77,line79,line81
! eliminated_buses=63,64,65,66,67,68,69,70,71,72,73,74,75,76,77,78,80

New Line._virtual_line83_line86_line89 bus1=82.1.2.3.4 bus2=90.1.2.3.4 phases=4 linecode=LC5 length=1.94823 units=m
! reduced_from=line83,line86,line89
! eliminated_buses=84,87

New Line._virtual_line84_line87_line90_line94_line98 bus1=82.1.2.3.4 bus2=99.1.2.3.4 phases=4 linecode=LC4 length=2.37359 units=m
! reduced_from=line84,line87,line90,line94,line98
! eliminated_buses=85,88,91,95

New Line._virtual_line92_line96_line100_line105_line111_line118_line125_line132_line139_line146 bus1=90.1.2.3.4 bus2=147.1.2.3.4 phases=4 linecode=LC5 length=11.18462 units=m
! reduced_from=line92,line96,line100,line105,line111,line118,line125,line132,line139,line146
! eliminated_buses=93,97,101,106,112,119,126,133,140

New Line._virtual_line93_line97_line101_line106_line112_line119_line126_line133_line140_line147_line154_line162_line171_line180_line188_line196_line203_line208_line214_line220_line227_line234_line239_line243_line247_line252_line257_line261_line265_line269_line273_line279_line286_line292_line299 bus1=300.1.2.3.4 bus2=90.1.2.3.4 phases=4 linecode=LC5 length=50.91217 units=m
! reduced_from=line93,line97,line101,line106,line112,line119,line126,line133,line140,line147,line154,line162,line171,line180,line188,line196,line203,line208,line214,line220,line227,line234,line239,line243,line247,line252,line257,line261,line265,line269,line273,line279,line286,line292,line299
! eliminated_buses=94,98,102,107,113,120,127,134,141,148,155,163,172,181,189,197,204,209,215,221,228,235,240,244,248,253,258,262,266,270,274,280,287,293

New Line._virtual_line102_line107 bus1=99.1.2.3.4 bus2=108.1.2.3.4 phases=4 linecode=LC4 length=5.6604 units=m
! reduced_from=line102,line107
! eliminated_buses=103

New Line._virtual_line108_line115 bus1=116.1.2.3.4 bus2=104.1.2.3.4 phases=4 linecode=LC6 length=18.0338 units=m
! reduced_from=line108,line115
! eliminated_buses=109

New Line._virtual_line109_line116_line123_line130 bus1=104.1.2.3.4 bus2=131.1.2.3.4 phases=4 linecode=LC4 length=28.2514 units=m
! reduced_from=line109,line116,line123,line130
! eliminated_buses=110,117,124

New Line._virtual_line113_line120_line127 bus1=128.1.2.3.4 bus2=108.1.2.3.4 phases=4 linecode=LC6 length=17.8419 units=m
! reduced_from=line113,line120,line127
! eliminated_buses=114,121

New Line._virtual_line114_line122_line129_line135_line142_line149_line156_line164_line173_line181_line189_line197 bus1=198.1.2.3.4 bus2=108.1.2.3.4 phases=4 linecode=LC4 length=34.5425 units=m
! reduced_from=line114,line122,line129,line135,line142,line149,line156,line164,line173,line181,line189,line197
! eliminated_buses=115,123,130,136,143,150,157,165,174,182,190

New Line._virtual_line136_line143 bus1=144.1.2.3.4 bus2=131.1.2.3.4 phases=4 linecode=LC4 length=17.2571 units=m
! reduced_from=line136,line143
! eliminated_buses=137

New Line._virtual_line152_line160_line168_line176_line186 bus1=187.1.2.3.4 bus2=147.1.2.3.4 phases=4 linecode=LC4 length=26.1559 units=m
! reduced_from=line152,line160,line168,line176,line186
! eliminated_buses=153,161,169,177

New Line._virtual_line153_line161 bus1=147.1.2.3.4 bus2=162.1.2.3.4 phases=4 linecode=LC4 length=7.6036 units=m
! reduced_from=line153,line161
! eliminated_buses=154

New Line._virtual_line157_line165 bus1=151.1.2.3.4 bus2=166.1.2.3.4 phases=4 linecode=LC6 length=18.9117 units=m
! reduced_from=line157,line165
! eliminated_buses=158

New Line._virtual_line158_line166_line174 bus1=151.1.2.3.4 bus2=175.1.2.3.4 phases=4 linecode=LC4 length=30.2425 units=m
! reduced_from=line158,line166,line174
! eliminated_buses=159,167

New Line._virtual_line169_line178 bus1=179.1.2.3.4 bus2=162.1.2.3.4 phases=4 linecode=LC4 length=22.7789 units=m
! reduced_from=line169,line178
! eliminated_buses=170

New Line._virtual_line170_line179_line187 bus1=188.1.2.3.4 bus2=162.1.2.3.4 phases=4 linecode=LC4 length=17.7031 units=m
! reduced_from=line170,line179,line187
! eliminated_buses=171,180

New Line._virtual_line183_line191 bus1=192.1.2.3.4 bus2=175.1.2.3.4 phases=4 linecode=LC4 length=18.4858 units=m
! reduced_from=line183,line191
! eliminated_buses=184

New Line._virtual_line184_line192_line198_line204_line209_line215 bus1=175.1.2.3.4 bus2=216.1.2.3.4 phases=4 linecode=LC4 length=14.9637 units=m
! reduced_from=line184,line192,line198,line204,line209,line215
! eliminated_buses=185,193,199,205,210

New Line._virtual_line194_line200 bus1=201.1.2.3.4 bus2=188.1.2.3.4 phases=4 linecode=LC4 length=20.8376 units=m
! reduced_from=line194,line200
! eliminated_buses=195

New Line._virtual_line195_line202_line207 bus1=208.1.2.3.4 bus2=188.1.2.3.4 phases=4 linecode=LC4 length=24.9827 units=m
! reduced_from=line195,line202,line207
! eliminated_buses=196,203

New Line._virtual_line212_line218 bus1=208.1.2.3.4 bus2=219.1.2.3.4 phases=4 linecode=LC4 length=17.3729 units=m
! reduced_from=line212,line218
! eliminated_buses=213

New Line._virtual_line213_line219 bus1=208.1.2.3.4 bus2=220.1.2.3.4 phases=4 linecode=LC4 length=18.1269 units=m
! reduced_from=line213,line219
! eliminated_buses=214

New Line._virtual_line221_line228 bus1=229.1.2.3.4 bus2=216.1.2.3.4 phases=4 linecode=LC4 length=17.4784 units=m
! reduced_from=line221,line228
! eliminated_buses=222

New Line._virtual_line222_line229_line235_line240_line244_line248_line253 bus1=216.1.2.3.4 bus2=254.1.2.3.4 phases=4 linecode=LC4 length=17.9162 units=m
! reduced_from=line222,line229,line235,line240,line244,line248,line253
! eliminated_buses=223,230,236,241,245,249

New Line._virtual_line226_line233_line238_line242_line246 bus1=220.1.2.3.4 bus2=247.1.2.3.4 phases=4 linecode=LC4 length=17.5102 units=m
! reduced_from=line226,line233,line238,line242,line246
! eliminated_buses=227,234,239,243

New Line._virtual_line250_line255 bus1=256.1.2.3.4 bus2=247.1.2.3.4 phases=4 linecode=LC4 length=19.1565 units=m
! reduced_from=line250,line255
! eliminated_buses=251

New Line._virtual_line251_line256_line260_line264_line268_line272_line278_line285_line291_line298_line306 bus1=307.1.2.3.4 bus2=247.1.2.3.4 phases=4 linecode=LC4 length=14.9174 units=m
! reduced_from=line251,line256,line260,line264,line268,line272,line278,line285,line291,line298,line306
! eliminated_buses=252,257,261,265,269,273,279,286,292,299

New Line._virtual_line258_line262 bus1=263.1.2.3.4 bus2=254.1.2.3.4 phases=4 linecode=LC4 length=16.2077 units=m
! reduced_from=line258,line262
! eliminated_buses=259

New Line._virtual_line259_line263 bus1=264.1.2.3.4 bus2=254.1.2.3.4 phases=4 linecode=LC4 length=18.2244 units=m
! reduced_from=line259,line263
! eliminated_buses=260

New Line._virtual_line266_line270_line274_line280_line287_line293_line300_line310_line320 bus1=264.1.2.3.4 bus2=321.1.2.3.4 phases=4 linecode=LC4 length=19.34934 units=m
! reduced_from=line266,line270,line274,line280,line287,line293,line300,line310,line320
! eliminated_buses=267,271,275,281,288,294,301,311

New Line._virtual_line267_line271 bus1=272.1.2.3.4 bus2=264.1.2.3.4 phases=4 linecode=LC4 length=26.2697 units=m
! reduced_from=line267,line271
! eliminated_buses=268

New Line._virtual_line275_line281 bus1=282.1.2.3.4 bus2=272.1.2.3.4 phases=4 linecode=LC4 length=18.2869 units=m
! reduced_from=line275,line281
! eliminated_buses=276

New Line._virtual_line276_line283_line289 bus1=290.1.2.3.4 bus2=272.1.2.3.4 phases=4 linecode=LC4 length=12.7106 units=m
! reduced_from=line276,line283,line289
! eliminated_buses=277,284

New Line._virtual_line295_line302 bus1=290.1.2.3.4 bus2=303.1.2.3.4 phases=4 linecode=LC4 length=14.8094 units=m
! reduced_from=line295,line302
! eliminated_buses=296

New Line._virtual_line296_line303_line312 bus1=290.1.2.3.4 bus2=313.1.2.3.4 phases=4 linecode=LC4 length=29.872 units=m
! reduced_from=line296,line303,line312
! eliminated_buses=297,304

New Line._virtual_line307_line317 bus1=300.1.2.3.4 bus2=318.1.2.3.4 phases=4 linecode=LC4 length=4.5518 units=m
! reduced_from=line307,line317
! eliminated_buses=308

New Line._virtual_line308_line318_line328_line339_line349_line358_line370_line383 bus1=300.1.2.3.4 bus2=384.1.2.3.4 phases=4 linecode=LC4 length=35.9179 units=m
! reduced_from=line308,line318,line328,line339,line349,line358,line370,line383
! eliminated_buses=309,319,329,340,350,359,371

New Line._virtual_line309_line319_line329_line340_line350_line360_line372_line385_line396_line407_line421_line432_line443_line454_line465_line475_line485_line494_line500_line505_line510_line515_line519_line523_line526_line529 bus1=530.1.2.3.4 bus2=300.1.2.3.4 phases=4 linecode=LC5 length=54.31047 units=m
! reduced_from=line309,line319,line329,line340,line350,line360,line372,line385,line396,line407,line421,line432,line443,line454,line465,line475,line485,line494,line500,line505,line510,line515,line519,line523,line526,line529
! eliminated_buses=310,320,330,341,351,361,373,386,397,408,422,433,444,455,466,476,486,495,501,506,511,516,520,524,527

New Line._virtual_line315_line324_line333_line343_line352_line362_line374_line387_line398_line409_line423_line434_line445_line456_line467_line477_line487_line495_line501_line506_line511_line516_line520 bus1=307.1.2.3.4 bus2=521.1.2.3.4 phases=4 linecode=LC4 length=24.087052 units=m
! reduced_from=line315,line324,line333,line343,line352,line362,line374,line387,line398,line409,line423,line434,line445,line456,line467,line477,line487,line495,line501,line506,line511,line516,line520
! eliminated_buses=316,325,334,344,353,363,375,388,399,410,424,435,446,457,468,478,488,496,502,507,512,517

New Line._virtual_line316_line325_line334_line344_line353 bus1=307.1.2.3.4 bus2=354.1.2.3.4 phases=4 linecode=LC4 length=16.2982 units=m
! reduced_from=line316,line325,line334,line344,line353
! eliminated_buses=317,326,335,345

New Line._virtual_line327_line337_line347 bus1=318.1.2.3.4 bus2=348.1.2.3.4 phases=4 linecode=LC6 length=22.3796 units=m
! reduced_from=line327,line337,line347
! eliminated_buses=328,338

New Line._virtual_line335_line345_line354 bus1=327.1.2.3.4 bus2=355.1.2.3.4 phases=4 linecode=LC4 length=17.6756 units=m
! reduced_from=line335,line345,line354
! eliminated_buses=336,346

New Line._virtual_line336_line346_line356_line368_line381_line393_line404_line417_line429_line440 bus1=327.1.2.3.4 bus2=441.1.2.3.4 phases=4 linecode=LC4 length=28.31363 units=m
! reduced_from=line336,line346,line356,line368,line381,line393,line404,line417,line429,line440
! eliminated_buses=337,347,357,369,382,394,405,418,430

New Line._virtual_line363_line375 bus1=354.1.2.3.4 bus2=376.1.2.3.4 phases=4 linecode=LC4 length=21.4153 units=m
! reduced_from=line363,line375
! eliminated_buses=364

New Line._virtual_line364_line376 bus1=377.1.2.3.4 bus2=354.1.2.3.4 phases=4 linecode=LC4 length=5.82764 units=m
! reduced_from=line364,line376
! eliminated_buses=365

New Line._virtual_line366_line379 bus1=355.1.2.3.4 bus2=380.1.2.3.4 phases=4 linecode=LC4 length=30.8878 units=m
! reduced_from=line366,line379
! eliminated_buses=367

New Line._virtual_line377_line390 bus1=366.1.2.3.4 bus2=391.1.2.3.4 phases=4 linecode=LC4 length=12.8323 units=m
! reduced_from=line377,line390
! eliminated_buses=378

New Line._virtual_line378_line391 bus1=392.1.2.3.4 bus2=366.1.2.3.4 phases=4 linecode=LC4 length=20.1907 units=m
! reduced_from=line378,line391
! eliminated_buses=379

New Line._virtual_line388_line399_line410_line424_line435_line446_line457_line468_line478 bus1=377.1.2.3.4 bus2=479.1.2.3.4 phases=4 linecode=LC4 length=19.80078 units=m
! reduced_from=line388,line399,line410,line424,line435,line446,line457,line468,line478
! eliminated_buses=389,400,411,425,436,447,458,469

New Line._virtual_line389_line400_line412_line426 bus1=377.1.2.3.4 bus2=427.1.2.3.4 phases=4 linecode=LC4 length=14.088 units=m
! reduced_from=line389,line400,line412,line426
! eliminated_buses=390,401,413

New Line._virtual_line401_line414_line427 bus1=428.1.2.3.4 bus2=391.1.2.3.4 phases=4 linecode=LC4 length=33.9792 units=m
! reduced_from=line401,line414,line427
! eliminated_buses=402,415

New Line._virtual_line402_line415 bus1=416.1.2.3.4 bus2=391.1.2.3.4 phases=4 linecode=LC4 length=22.6591 units=m
! reduced_from=line402,line415
! eliminated_buses=403

New Line._virtual_line437_line448_line459_line470_line480_line489_line496_line502_line507_line512_line517_line521_line524_line527_line530_line533_line535 bus1=427.1.2.3.4 bus2=536.1.2.3.4 phases=4 linecode=LC4 length=23.450918 units=m
! reduced_from=line437,line448,line459,line470,line480,line489,line496,line502,line507,line512,line517,line521,line524,line527,line530,line533,line535
! eliminated_buses=438,449,460,471,481,490,497,503,508,513,518,522,525,528,531,534

New Line._virtual_line449_line460_line471 bus1=472.1.2.3.4 bus2=439.1.2.3.4 phases=4 linecode=LC4 length=18.9311 units=m
! reduced_from=line449,line460,line471
! eliminated_buses=450,461

New Line._virtual_line450_line461_line472 bus1=473.1.2.3.4 bus2=439.1.2.3.4 phases=4 linecode=LC4 length=17.9228 units=m
! reduced_from=line450,line461,line472
! eliminated_buses=451,462

New Line._virtual_line481_line490 bus1=491.1.2.3.4 bus2=473.1.2.3.4 phases=4 linecode=LC4 length=17.938 units=m
! reduced_from=line481,line490
! eliminated_buses=482

New Line._virtual_line482_line491_line497 bus1=473.1.2.3.4 bus2=498.1.2.3.4 phases=4 linecode=LC4 length=32.1101 units=m
! reduced_from=line482,line491,line497
! eliminated_buses=483,492

New Line._virtual_line532_line534_line536_line537_line538_line539_line540_line542_line544 bus1=545.1.2.3.4 bus2=530.1.2.3.4 phases=4 linecode=LC4 length=53.10898 units=m
! reduced_from=line532,line534,line536,line537,line538,line539,line540,line542,line544
! eliminated_buses=533,535,537,538,539,540,541,543

New Line._virtual_line546_line550_line554_line558_line562_line567 bus1=568.1.2.3.4 bus2=545.1.2.3.4 phases=4 linecode=LC4 length=31.594 units=m
! reduced_from=line546,line550,line554,line558,line562,line567
! eliminated_buses=547,551,555,559,563

New Line._virtual_line547_line552_line556_line560_line565_line570_line578_line585_line592_line599 bus1=545.1.2.3.4 bus2=600.1.2.3.4 phases=4 linecode=LC2 length=6.99249 units=m
! reduced_from=line547,line552,line556,line560,line565,line570,line578,line585,line592,line599
! eliminated_buses=548,553,557,561,566,571,579,586,593

New Line._virtual_line572_line579_line586_line593_line600_line608 bus1=609.1.2.3.4 bus2=568.1.2.3.4 phases=4 linecode=LC6 length=21.79429 units=m
! reduced_from=line572,line579,line586,line593,line600,line608
! eliminated_buses=573,580,587,594,601

New Line._virtual_line573_line581_line588_line595_line602_line610_line621_line630_line640_line648_line656_line662_line669_line678_line688_line697_line707_line717_line726_line735_line744_line753_line762_line772 bus1=568.1.2.3.4 bus2=773.1.2.3.4 phases=4 linecode=LC6 length=31.60932 units=m
! reduced_from=line573,line581,line588,line595,line602,line610,line621,line630,line640,line648,line656,line662,line669,line678,line688,line697,line707,line717,line726,line735,line744,line753,line762,line772
! eliminated_buses=574,582,589,596,603,611,622,631,641,649,657,663,670,679,689,698,708,718,727,736,745,754,763

New Line._virtual_line574_line583_line590_line597_line604_line612_line623_line632_line642_line650_line658 bus1=659.1.2.3.4 bus2=568.1.2.3.4 phases=4 linecode=LC4 length=13.289437 units=m
! reduced_from=line574,line583,line590,line597,line604,line612,line623,line632,line642,line650,line658
! eliminated_buses=575,584,591,598,605,613,624,633,643,651

New Line._virtual_line614_line625_line634 bus1=607.1.2.3.4 bus2=635.1.2.3.4 phases=4 linecode=LC2 length=17.5443 units=m
! reduced_from=line614,line625,line634
! eliminated_buses=615,626

New Line._virtual_line615_line626 bus1=627.1.2.3.4 bus2=607.1.2.3.4 phases=4 linecode=LC4 length=27.3574 units=m
! reduced_from=line615,line626
! eliminated_buses=616

New Line._virtual_line618_line627_line636_line645_line654 bus1=609.1.2.3.4 bus2=655.1.2.3.4 phases=4 linecode=LC4 length=28.77356 units=m
! reduced_from=line618,line627,line636,line645,line654
! eliminated_buses=619,628,637,646

New Line._virtual_line619_line629_line639_line647_line655_line661_line668_line677_line687_line696_line706_line716 bus1=717.1.2.3.4 bus2=609.1.2.3.4 phases=4 linecode=LC6 length=28.43783 units=m
! reduced_from=line619,line629,line639,line647,line655,line661,line668,line677,line687,line696,line706,line716
! eliminated_buses=620,630,640,648,656,662,669,678,688,697,707

New Line._virtual_line644_line653 bus1=654.1.2.3.4 bus2=635.1.2.3.4 phases=4 linecode=LC4 length=21.0562 units=m
! reduced_from=line644,line653
! eliminated_buses=645

New Line._virtual_line651_line659 bus1=660.1.2.3.4 bus2=644.1.2.3.4 phases=4 linecode=LC2 length=12.4051 units=m
! reduced_from=line651,line659
! eliminated_buses=652

New Line._virtual_line652_line660 bus1=644.1.2.3.4 bus2=661.1.2.3.4 phases=4 linecode=LC4 length=29.6098 units=m
! reduced_from=line652,line660
! eliminated_buses=653

New Line._virtual_line665_line673_line683_line693_line703_line713_line723_line732_line741_line750_line759_line769_line778 bus1=659.1.2.3.4 bus2=779.1.2.3.4 phases=4 linecode=LC6 length=30.69754 units=m
! reduced_from=line665,line673,line683,line693,line703,line713,line723,line732,line741,line750,line759,line769,line778
! eliminated_buses=666,674,684,694,704,714,724,733,742,751,760,770

New Line._virtual_line666_line675_line685_line694_line704_line714_line724_line733_line742_line751_line760_line770_line779_line783_line787_line793_line799_line804_line809_line813_line817_line821_line826_line830_line834_line838_line842_line846_line850_line855_line860_line865_line870_line875_line880_line885_line890_line895 bus1=896.1.2.3.4 bus2=660.1.2.3.4 phases=4 linecode=LC2 length=48.343306 units=m
! reduced_from=line666,line675,line685,line694,line704,line714,line724,line733,line742,line751,line760,line770,line779,line783,line787,line793,line799,line804,line809,line813,line817,line821,line826,line830,line834,line838,line842,line846,line850,line855,line860,line865,line870,line875,line880,line885,line890,line895
! eliminated_buses=667,676,686,695,705,715,725,734,743,752,761,771,780,784,788,794,800,805,810,814,818,822,827,831,835,839,843,847,851,856,861,866,871,876,881,886,891

New Line._virtual_line667_line676 bus1=677.1.2.3.4 bus2=660.1.2.3.4 phases=4 linecode=LC4 length=20.9532 units=m
! reduced_from=line667,line676
! eliminated_buses=668

New Line._virtual_line671_line680_line690_line699_line709_line719_line728_line737_line746_line755_line764_line773_line780_line784_line789_line795_line801_line806_line811_line815_line819_line823_line828_line832_line836_line840_line844_line848 bus1=849.1.2.3.4 bus2=665.1.2.3.4 phases=4 linecode=LC9 length=41.38622 units=m
! reduced_from=line671,line680,line690,line699,line709,line719,line728,line737,line746,line755,line764,line773,line780,line784,line789,line795,line801,line806,line811,line815,line819,line823,line828,line832,line836,line840,line844,line848
! eliminated_buses=672,681,691,700,710,720,729,738,747,756,765,774,781,785,790,796,802,807,812,816,820,824,829,833,837,841,845

New Line._virtual_line681_line691_line700_line710_line720_line729_line738_line747_line756_line765_line774 bus1=775.1.2.3.4 bus2=673.1.2.3.4 phases=4 linecode=LC6 length=20.10525 units=m
! reduced_from=line681,line691,line700,line710,line720,line729,line738,line747,line756,line765,line774
! eliminated_buses=682,692,701,711,721,730,739,748,757,766

New Line._virtual_line682_line692 bus1=693.1.2.3.4 bus2=673.1.2.3.4 phases=4 linecode=LC4 length=13.47029 units=m
! reduced_from=line682,line692
! eliminated_buses=683

New Line._virtual_line702_line712_line722_line731_line740_line749_line758_line767_line776_line781_line785_line790_line796_line802_line807 bus1=808.1.2.3.4 bus2=693.1.2.3.4 phases=4 linecode=LC6 length=40.03819 units=m
! reduced_from=line702,line712,line722,line731,line740,line749,line758,line767,line776,line781,line785,line790,line796,line802,line807
! eliminated_buses=703,713,723,732,741,750,759,768,777,782,786,791,797,803

New Line._virtual_line852_line857_line862_line867_line872_line877_line882_line887_line892_line897_line898_line899_line900_line901_line902_line903 bus1=904.1.2.3.4 bus2=849.1.2.3.4 phases=4 linecode=LC9 length=22.97393 units=m
! reduced_from=line852,line857,line862,line867,line872,line877,line882,line887,line892,line897,line898,line899,line900,line901,line902,line903
! eliminated_buses=853,858,863,868,873,878,883,888,893,898,899,900,901,902,903

New Line._virtual_line853_line858_line863_line868_line873_line878_line883_line888_line893 bus1=849.1.2.3.4 bus2=894.1.2.3.4 phases=4 linecode=LC1 length=57.91492 units=m
! reduced_from=line853,line858,line863,line868,line873,line878,line883,line888,line893
! eliminated_buses=854,859,864,869,874,879,884,889

New Line._virtual_line854_line859_line864_line869_line874_line879_line884_line889_line894 bus1=895.1.2.3.4 bus2=849.1.2.3.4 phases=4 linecode=LC1 length=13.19045 units=m
! reduced_from=line854,line859,line864,line869,line874,line879,line884,line889,line894
! eliminated_buses=855,860,865,870,875,880,885,890

New Line._virtual_line904_line907_line910_line912_line914_line916_line918_line920_line922_line924_line926_line928_line930_line932_line934_line936_line938_line940_line942_line944_line946_line948 bus1=949.1.2.3.4 bus2=904.1.2.3.4 phases=4 linecode=LC1 length=21.67613 units=m
! reduced_from=line904,line907,line910,line912,line914,line916,line918,line920,line922,line924,line926,line928,line930,line932,line934,line936,line938,line940,line942,line944,line946,line948
! eliminated_buses=905,908,911,913,915,917,919,921,923,925,927,929,931,933,935,937,939,941,943,945,947

New Line.LINE103 bus1=99.1.2.3.4 bus2=104.1.2.3.4 phases=4 linecode=LC4 length=5.4623 units=m

New Line.LINE137 bus1=131.1.2.3.4 bus2=138.1.2.3.4 phases=4 linecode=LC4 length=3.2449 units=m

New Line.LINE144 bus1=138.1.2.3.4 bus2=145.1.2.3.4 phases=4 linecode=LC9 length=2.7681 units=m

New Line.LINE150 bus1=145.1.2.3.4 bus2=151.1.2.3.4 phases=4 linecode=LC4 length=2.3053 units=m

New Line.LINE225 bus1=220.1.2.3.4 bus2=226.1.2.3.4 phases=4 linecode=LC4 length=17.009 units=m

New Line.LINE326 bus1=318.1.2.3.4 bus2=327.1.2.3.4 phases=4 linecode=LC4 length=4.8863 units=m

New Line.LINE365 bus1=355.1.2.3.4 bus2=366.1.2.3.4 phases=4 linecode=LC4 length=3.7356 units=m

New Line.LINE438 bus1=427.1.2.3.4 bus2=439.1.2.3.4 phases=4 linecode=LC4 length=11.9049 units=m

New Line.LINE606 bus1=600.1.2.3.4 bus2=607.1.2.3.4 phases=4 linecode=LC2 length=1.7083 units=m

New Line.LINE607 bus1=600.1.2.3.4 bus2=608.1.2.3.4 phases=4 linecode=LC4 length=16.2643 units=m

New Line.LINE616 bus1=608.1.2.3.4 bus2=617.1.2.3.4 phases=4 linecode=LC4 length=6.3531 units=m

New Line.LINE617 bus1=608.1.2.3.4 bus2=618.1.2.3.4 phases=4 linecode=LC4 length=6.3531 units=m

New Line.LINE643 bus1=635.1.2.3.4 bus2=644.1.2.3.4 phases=4 linecode=LC2 length=2.4407 units=m

New Line.LINE664 bus1=659.1.2.3.4 bus2=665.1.2.3.4 phases=4 linecode=LC4 length=4.7181 units=m

New Line.LINE672 bus1=665.1.2.3.4 bus2=673.1.2.3.4 phases=4 linecode=LC4 length=9.1032 units=m
