! Reduced enabled lines.

New Line._virtual_line0_line1_line2_line3_line4_line5_line6_line7_line8_line9_line10_line11_line12_line13_line14_line15_line16_line17_line18_line19_line20_line21_line22_line23_line24_line25_line26_line27_line28_line29_line30_line32_line34_line36_line38_line40_line42_line44_line46_line48_line50_line52_line54_line56_line58_line60_line62_line64_line66_line68_line70_line72 bus1=73.1.2.3.4 bus2=sourcebus.1.2.3.4 phases=4 linecode=LC4 length=77.401942 units=m
! reduced_from=line0,line1,line2,line3,line4,line5,line6,line7,line8,line9,line10,line11,line12,line13,line14,line15,line16,line17,line18,line19,line20,line21,line22,line23,line24,line25,line26,line27,line28,line29,line30,line32,line34,line36,line38,line40,line42,line44,line46,line48,line50,line52,line54,line56,line58,line60,line62,line64,line66,line68,line70,line72
! eliminated_buses=1,2,3,4,5,6,7,8,9,10,11,12,13,14,15,16,17,18,19,20,21,22,23,24,25,26,27,28,29,30,31,33,35,37,39,41,43,45,47,49,51,53,55,57,59,61,63,65,67,69,71

New Line._virtual_line74_line77_line80_line83_line87_line91 bus1=92.1.2.3.4 bus2=73.1.2.3.4 phases=4 linecode=LC4 length=9.044904 units=m
! reduced_from=line74,line77,line80,line83,line87,line91
! eliminated_buses=75,78,81,84,88

New Line._virtual_line75_line78_line81 bus1=73.1.2.3.4 bus2=82.1.2.3.4 phases=4 linecode=LC4 length=15.5345 units=m
! reduced_from=line75,line78,line81
! eliminated_buses=76,79

New Line._virtual_line84_line88_line92_line97_line103_line109_line115_line121_line128_line136_line144_line152_line160_line169_line178_line188 bus1=189.1.2.3.4 bus2=82.1.2.3.4 phases=4 linecode=LC6 length=15.13093 units=m
! reduced_from=line84,line88,line92,line97,line103,line109,line115,line121,line128,line136,line144,line152,line160,line169,line178,line188
! eliminated_buses=85,89,93,98,104,110,116,122,129,137,145,153,161,170,179

New Line._virtual_line85_line89_line93 bus1=82.1.2.3.4 bus2=94.1.2.3.4 phases=4 linecode=LC4 length=11.8991 units=m
! reduced_from=line85,line89,line93
! eliminated_buses=86,90

New Line._virtual_line96_line102_line108_line114_line120_line127_line135_line143_line151_line159_line168_line177_line187_line196_line207 bus1=208.1.2.3.4 bus2=92.1.2.3.4 phases=4 linecode=LC6 length=15.69314 units=m
! reduced_from=line96,line102,line108,line114,line120,line127,line135,line143,line151,line159,line168,line177,line187,line196,line207
! eliminated_buses=97,103,109,115,121,128,136,144,152,160,169,178,188,197

New Line._virtual_line98_line104_line110_line116 bus1=94.1.2.3.4 bus2=117.1.2.3.4 phases=4 linecode=LC4 length=29.2802 units=m
! reduced_from=line98,line104,line110,line116
! eliminated_buses=99,105,111

New Line._virtual_line99_line105_line111_line117_line124_line132_line140_line148_line156_line165_line174_line184_line193_line204_line214_line223_line231 bus1=232.1.2.3.4 bus2=94.1.2.3.4 phases=4 linecode=LC6 length=20.34396 units=m
! reduced_from=line99,line105,line111,line117,line124,line132,line140,line148,line156,line165,line174,line184,line193,line204,line214,line223,line231
! eliminated_buses=100,106,112,118,125,133,141,149,157,166,175,185,194,205,215,224

New Line._virtual_line122_line129_line137_line145_line153_line161_line170 bus1=171.1.2.3.4 bus2=117.1.2.3.4 phases=4 linecode=LC6 length=11.53562 units=m
! reduced_from=line122,line129,line137,line145,line153,line161,line170
! eliminated_buses=123,130,138,146,154,162

New Line._virtual_line123_line130_line138_line146_line154 bus1=117.1.2.3.4 bus2=155.1.2.3.4 phases=4 linecode=LC4 length=27.2337 units=m
! reduced_from=line123,line130,line138,line146,line154
! eliminated_buses=124,131,139,147

New Line._virtual_line162_line171_line181_line190_line201_line211_line220_line228 bus1=229.1.2.3.4 bus2=155.1.2.3.4 phases=4 linecode=LC4 length=24.8133 units=m
! reduced_from=line162,line171,line181,line190,line201,line211,line220,line228
! eliminated_buses=163,172,182,191,202,212,221

New Line._virtual_line163_line172_line182_line191_line202_line212_line221_line229_line236_line242_line248_line253 bus1=254.1.2.3.4 bus2=155.1.2.3.4 phases=4 linecode=LC6 length=14.261254 units=m
! reduced_from=line163,line172,line182,line191,line202,line212,line221,line229,line236,line242,line248,line253
! eliminated_buses=164,173,183,192,203,213,222,230,237,243,249

New Line._virtual_line179_line189_line199_line209_line218_line226_line232_line238_line244_line250_line254_line259_line264_line268_line273 bus1=171.1.2.3.4 bus2=274.1.2.3.4 phases=4 linecode=LC6 length=11.82581 units=m
! reduced_from=line179,line189,line199,line209,line218,line226,line232,line238,line244,line250,line254,line259,line264,line268,line273
! eliminated_buses=180,190,200,210,219,227,233,239,245,251,255,260,265,269

New Line._virtual_line197_line208 bus1=189.1.2.3.4 bus2=209.1.2.3.4 phases=4 linecode=LC6 length=8.893 units=m
! reduced_from=line197,line208
! eliminated_buses=198

New Line._virtual_line216_line225 bus1=226.1.2.3.4 bus2=208.1.2.3.4 phases=4 linecode=LC6 length=7.9866 units=m
! reduced_from=line216,line225
! eliminated_buses=217

New Line._virtual_line234_line240_line246_line251_line255_line261_line266 bus1=267.1.2.3.4 bus2=229.1.2.3.4 phases=4 linecode=LC4 length=24.7751 units=m
! reduced_from=line234,line240,line246,line251,line255,line261,line266
! eliminated_buses=235,241,247,252,256,262

New Line._virtual_line235_line241_line247_line252_line256_line262_line267_line272_line278_line284_line290_line295_line300 bus1=229.1.2.3.4 bus2=301.1.2.3.4 phases=4 linecode=LC6 length=13.480509 units=m
! reduced_from=line235,line241,line247,line252,line256,line262,line267,line272,line278,line284,line290,line295,line300
! eliminated_buses=236,242,248,253,257,263,268,273,279,285,291,296

New Line._virtual_line257_line263 bus1=264.1.2.3.4 bus2=254.1.2.3.4 phases=4 linecode=LC6 length=5.7181 units=m
! reduced_from=line257,line263
! eliminated_buses=258

New Line._virtual_line271_line277_line283_line289_line294_line299_line304_line310_line315_line320_line325_line330_line335_line340_line345_line351_line357_line363_line369_line375_line382_line389_line396_line404_line411 bus1=267.1.2.3.4 bus2=412.1.2.3.4 phases=4 linecode=LC6 length=19.920726 units=m
! reduced_from=line271,line277,line283,line289,line294,line299,line304,line310,line315,line320,line325,line330,line335,line340,line345,line351,line357,line363,line369,line375,line382,line389,line396,line404,line411
! eliminated_buses=272,278,284,290,295,300,305,311,316,321,326,331,336,341,346,352,358,364,370,376,383,390,397,405

New Line._virtual_line275_line280_line286_line291_line296_line301_line307_line312_line316_line321_line326_line331_line336_line341_line346_line352_line358_line364_line370 bus1=371.1.2.3.4 bus2=271.1.2.3.4 phases=4 linecode=LC4 length=62.2693 units=m
! reduced_from=line275,line280,line286,line291,line296,line301,line307,line312,line316,line321,line326,line331,line336,line341,line346,line352,line358,line364,line370
! eliminated_buses=276,281,287,292,297,302,308,313,317,322,327,332,337,342,347,353,359,365

New Line._virtual_line276_line282_line288_line293_line298_line303_line309_line314_line319_line324_line329_line334_line339_line344_line350_line356_line362_line368_line374_line381_line388_line395_line403 bus1=404.1.2.3.4 bus2=271.1.2.3.4 phases=4 linecode=LC6 length=20.129309 units=m
! reduced_from=line276,line282,line288,line293,line298,line303,line309,line314,line319,line324,line329,line334,line339,line344,line350,line356,line362,line368,line374,line381,line388,line395,line403
! eliminated_buses=277,283,289,294,299,304,310,315,320,325,330,335,340,345,351,357,363,369,375,382,389,396

New Line._virtual_line305_line311 bus1=301.1.2.3.4 bus2=312.1.2.3.4 phases=4 linecode=LC6 length=9.8756 units=m
! reduced_from=line305,line311
! eliminated_buses=306

New Line._virtual_line376_line383_line390 bus1=371.1.2.3.4 bus2=391.1.2.3.4 phases=4 linecode=LC4 length=8.1633 units=m
! reduced_from=line376,line383,line390
! eliminated_buses=377,384

New Line._virtual_line377_line385_line392_line400_line408_line415_line422_line427_line432_line437_line442_line447_line452_line458_line464_line470_line476_line483_line491_line500_line509_line520_line529_line538 bus1=539.1.2.3.4 bus2=371.1.2.3.4 phases=4 linecode=LC6 length=24.46388 units=m
! reduced_from=line377,line385,line392,line400,line408,line415,line422,line427,line432,line437,line442,line447,line452,line458,line464,line470,line476,line483,line491,line500,line509,line520,line529,line538
! eliminated_buses=378,386,393,401,409,416,423,428,433,438,443,448,453,459,465,471,477,484,492,501,510,521,530

New Line._virtual_line397_line405_line412 bus1=413.1.2.3.4 bus2=391.1.2.3.4 phases=4 linecode=LC4 length=12.2033 units=m
! reduced_from=line397,line405,line412
! eliminated_buses=398,406

New Line._virtual_line398_line407_line414_line421_line426_line431_line436_line441_line446 bus1=391.1.2.3.4 bus2=447.1.2.3.4 phases=4 linecode=LC6 length=21.7058 units=m
! reduced_from=line398,line407,line414,line421,line426,line431,line436,line441,line446
! eliminated_buses=399,408,415,422,427,432,437,442

New Line._virtual_line418_line423_line428_line433_line438_line443 bus1=413.1.2.3.4 bus2=444.1.2.3.4 phases=4 linecode=LC4 length=28.9009 units=m
! reduced_from=line418,line423,line428,line433,line438,line443
! eliminated_buses=419,424,429,434,439

New Line._virtual_line419_line425_line430_line435_line440_line445_line451_line457_line463_line469_line475_line482_line490_line499_line508_line519 bus1=413.1.2.3.4 bus2=520.1.2.3.4 phases=4 linecode=LC6 length=18.89813 units=m
! reduced_from=line419,line425,line430,line435,line440,line445,line451,line457,line463,line469,line475,line482,line490,line499,line508,line519
! eliminated_buses=420,426,431,436,441,446,452,458,464,470,476,483,491,500,509

New Line._virtual_line448_line453_line459_line465_line471 bus1=472.1.2.3.4 bus2=444.1.2.3.4 phases=4 linecode=LC4 length=25.5824 units=m
! reduced_from=line448,line453,line459,line465,line471
! eliminated_buses=449,454,460,466

New Line._virtual_line449_line456_line462_line468_line474_line481_line489_line498_line507_line518_line528_line537_line546_line554 bus1=555.1.2.3.4 bus2=444.1.2.3.4 phases=4 linecode=LC6 length=14.12928 units=m
! reduced_from=line449,line456,line462,line468,line474,line481,line489,line498,line507,line518,line528,line537,line546,line554
! eliminated_buses=450,457,463,469,475,482,490,499,508,519,529,538,547

New Line._virtual_line478_line487_line496_line505_line516_line526_line535_line544_line552_line560_line569_line577_line584 bus1=472.1.2.3.4 bus2=585.1.2.3.4 phases=4 linecode=LC6 length=23.072064 units=m
! reduced_from=line478,line487,line496,line505,line516,line526,line535,line544,line552,line560,line569,line577,line584
! eliminated_buses=479,488,497,506,517,527,536,545,553,561,570,578

New Line._virtual_line485_line495_line504_line515_line525_line534_line543_line551_line559_line568_line576_line583_line591_line598_line605 bus1=606.1.2.3.4 bus2=478.1.2.3.4 phases=4 linecode=LC6 length=19.24683 units=m
! reduced_from=line485,line495,line504,line515,line525,line534,line543,line551,line559,line568,line576,line583,line591,line598,line605
! eliminated_buses=486,496,505,516,526,535,544,552,560,569,577,584,592,599

New Line._virtual_line492_line501_line510_line521_line530_line539_line547_line555_line564_line572_line579 bus1=580.1.2.3.4 bus2=485.1.2.3.4 phases=4 linecode=LC4 length=24.96062 units=m
! reduced_from=line492,line501,line510,line521,line530,line539,line547,line555,line564,line572,line579
! eliminated_buses=493,502,511,522,531,540,548,556,565,573

New Line._virtual_line493_line503_line514_line524_line533_line542_line550_line558_line567_line575_line582_line590_line597_line604_line612_line619_line626_line633_line640_line647_line654 bus1=485.1.2.3.4 bus2=655.1.2.3.4 phases=4 linecode=LC6 length=15.300439 units=m
! reduced_from=line493,line503,line514,line524,line533,line542,line550,line558,line567,line575,line582,line590,line597,line604,line612,line619,line626,line633,line640,line647,line654
! eliminated_buses=494,504,515,525,534,543,551,559,568,576,583,591,598,605,613,620,627,634,641,648

New Line._virtual_line562_line571 bus1=555.1.2.3.4 bus2=572.1.2.3.4 phases=4 linecode=LC6 length=10.5618 units=m
! reduced_from=line562,line571
! eliminated_buses=563

New Line._virtual_line586_line593_line600 bus1=580.1.2.3.4 bus2=601.1.2.3.4 phases=4 linecode=LC4 length=2.42671 units=m
! reduced_from=line586,line593,line600
! eliminated_buses=587,594

New Line._virtual_line587_line595_line602_line610_line617_line624_line631_line638_line645_line652_line659_line667_line674_line680_line686_line691_line696_line701 bus1=702.1.2.3.4 bus2=580.1.2.3.4 phases=4 linecode=LC6 length=23.972927 units=m
! reduced_from=line587,line595,line602,line610,line617,line624,line631,line638,line645,line652,line659,line667,line674,line680,line686,line691,line696,line701
! eliminated_buses=588,596,603,611,618,625,632,639,646,653,660,668,675,681,687,692,697

New Line._virtual_line607_line614_line621_line628_line635_line642_line649_line656_line664_line671_line677_line682 bus1=683.1.2.3.4 bus2=601.1.2.3.4 phases=4 linecode=LC4 length=8.53448 units=m
! reduced_from=line607,line614,line621,line628,line635,line642,line649,line656,line664,line671,line677,line682
! eliminated_buses=608,615,622,629,636,643,650,657,665,672,678

New Line._virtual_line608_line616_line623_line630_line637_line644_line651_line658_line666_line673_line679_line685_line690_line695_line700_line705_line709 bus1=601.1.2.3.4 bus2=710.1.2.3.4 phases=4 linecode=LC6 length=20.388788 units=m
! reduced_from=line608,line616,line623,line630,line637,line644,line651,line658,line666,line673,line679,line685,line690,line695,line700,line705,line709
! eliminated_buses=609,617,624,631,638,645,652,659,667,674,680,686,691,696,701,706

New Line._virtual_line662_line669 bus1=655.1.2.3.4 bus2=670.1.2.3.4 phases=4 linecode=LC6 length=10.3537 units=m
! reduced_from=line662,line669
! eliminated_buses=663

New Line._virtual_line688_line693_line698_line703_line707_line711_line714_line717 bus1=718.1.2.3.4 bus2=683.1.2.3.4 phases=4 linecode=LC6 length=9.87133 units=m
! reduced_from=line688,line693,line698,line703,line707,line711,line714,line717
! eliminated_buses=689,694,699,704,708,712,715

New Line._virtual_line720_line724_line728_line732_line736_line740_line744_line748_line752_line756_line760_line763_line766_line769_line772_line774_line776 bus1=718.1.2.3.4 bus2=777.1.2.3.4 phases=4 linecode=LC6 length=19.732985 units=m
! reduced_from=line720,line724,line728,line732,line736,line740,line744,line748,line752,line756,line760,line763,line766,line769,line772,line774,line776
! eliminated_buses=721,725,729,733,737,741,745,749,753,757,761,764,767,770,773,775

New Line._virtual_line721_line725_line729_line733_line737_line741_line745_line749_line753_line757_line761_line764_line767_line770_line773_line775_line777_line778 bus1=718.1.2.3.4 bus2=779.1.2.3.4 phases=4 linecode=LC6 length=20.494149 units=m
! reduced_from=line721,line725,line729,line733,line737,line741,line745,line749,line753,line757,line761,line764,line767,line770,line773,line775,line777,line778
! eliminated_buses=722,726,730,734,738,742,746,750,754,758,762,765,768,771,774,776,778

New Line.LINE180 bus1=171.1.2.3.4 bus2=181.1.2.3.4 phases=4 linecode=LC6 length=8.8088 units=m

New Line.LINE198 bus1=189.1.2.3.4 bus2=199.1.2.3.4 phases=4 linecode=LC6 length=5.4216 units=m

New Line.LINE217 bus1=208.1.2.3.4 bus2=218.1.2.3.4 phases=4 linecode=LC6 length=5.4241 units=m

New Line.LINE258 bus1=254.1.2.3.4 bus2=259.1.2.3.4 phases=4 linecode=LC6 length=6.5318 units=m

New Line.LINE270 bus1=267.1.2.3.4 bus2=271.1.2.3.4 phases=4 linecode=LC4 length=2.0701 units=m

New Line.LINE306 bus1=301.1.2.3.4 bus2=307.1.2.3.4 phases=4 linecode=LC6 length=6.2769 units=m

New Line.LINE477 bus1=472.1.2.3.4 bus2=478.1.2.3.4 phases=4 linecode=LC4 length=14.4685 units=m

New Line.LINE484 bus1=478.1.2.3.4 bus2=485.1.2.3.4 phases=4 linecode=LC4 length=13.1378 units=m

New Line.LINE563 bus1=555.1.2.3.4 bus2=564.1.2.3.4 phases=4 linecode=LC6 length=3.9864 units=m

New Line.LINE661 bus1=655.1.2.3.4 bus2=662.1.2.3.4 phases=4 linecode=LC6 length=4.6472 units=m
