! Reduced enabled lines.

New Line._virtual_line0_line1_line2_line3_line4_line5_line6_line7_line8_line9_line10_line11_line12_line13_line14_line15_line16_line17_line18_line19_line20_line21_line22_line23_line24_line25_line26_line27_line28_line29_line30_line31_line32_line33_line34_line35_line36_line37_line38_line39_line40_line41_line42_line43_line44_line45_line46_line47_line48 bus1=49.1.2.3.4 bus2=sourcebus.1.2.3.4 phases=4 linecode=LC4 length=66.750646 units=m
! reduced_from=line0,line1,line2,line3,line4,line5,line6,line7,line8,line9,line10,line11,line12,line13,line14,line15,line16,line17,line18,line19,line20,line21,line22,line23,line24,line25,line26,line27,line28,line29,line30,line31,line32,line33,line34,line35,line36,line37,line38,line39,line40,line41,line42,line43,line44,line45,line46,line47,line48
! eliminated_buses=1,2,3,4,5,6,7,8,9,10,11,12,13,14,15,16,17,18,19,20,21,22,23,24,25,26,27,28,29,30,31,32,33,34,35,36,37,38,39,40,41,42,43,44,45,46,47,48

New Line._virtual_line49_line51_line54_line57_line61_line66_line71_line77_line84_line92_line100_line109_line119_line128_line138_line149_line159_line170_line181_line194_line204_line212_line221_line229 bus1=230.1.2.3.4 bus2=49.1.2.3.4 phases=4 linecode=LC6 length=15.65182 units=m
! reduced_from=line49,line51,line54,line57,line61,line66,line71,line77,line84,line92,line100,line109,line119,line128,line138,line149,line159,line170,line181,line194,line204,line212,line221,line229
! eliminated_buses=50,52,55,58,62,67,72,78,85,93,101,110,120,129,139,150,160,171,182,195,205,213,222

New Line._virtual_line52_line55_line58_line62_line67_line72_line78_line85_line93_line101_line110_line120_line129_line139_line150_line160_line171_line182_line195_line205_line213_line222_line230_line239_line247 bus1=248.1.2.3.4 bus2=51.1.2.3.4 phases=4 linecode=LC6 length=19.6744 units=m
! reduced_from=line52,line55,line58,line62,line67,line72,line78,line85,line93,line101,line110,line120,line129,line139,line150,line160,line171,line182,line195,line205,line213,line222,line230,line239,line247
! eliminated_buses=53,56,59,63,68,73,79,86,94,102,111,121,130,140,151,161,172,183,196,206,214,223,231,240

New Line._virtual_line53_line56_line60 bus1=61.1.2.3.4 bus2=51.1.2.3.4 phases=4 linecode=LC4 length=23.2911 units=m
! reduced_from=line53,line56,line60
! eliminated_buses=54,57

New Line._virtual_line64_line69_line74_line80_line87_line95_line103_line112_line121_line130_line140_line151_line161_line172 bus1=61.1.2.3.4 bus2=173.1.2.3.4 phases=4 linecode=LC6 length=16.382326 units=m
! reduced_from=line64,line69,line74,line80,line87,line95,line103,line112,line121,line130,line140,line151,line161,line172
! eliminated_buses=65,70,75,81,88,96,104,113,122,131,141,152,162

New Line._virtual_line65_line70 bus1=61.1.2.3.4 bus2=71.1.2.3.4 phases=4 linecode=LC4 length=26.0882 units=m
! reduced_from=line65,line70
! eliminated_buses=66

New Line._virtual_line76_line83_line91_line99_line108_line118_line127_line137_line148_line158_line169_line180_line193 bus1=71.1.2.3.4 bus2=194.1.2.3.4 phases=4 linecode=LC6 length=20.69638 units=m
! reduced_from=line76,line83,line91,line99,line108,line118,line127,line137,line148,line158,line169,line180,line193
! eliminated_buses=77,84,92,100,109,119,128,138,149,159,170,181

New Line._virtual_line81_line88_line96_line104_line113_line122_line131_line141_line152_line162_line173 bus1=76.1.2.3.4 bus2=174.1.2.3.4 phases=4 linecode=LC6 length=12.74189 units=m
! reduced_from=line81,line88,line96,line104,line113,line122,line131,line141,line152,line162,line173
! eliminated_buses=82,89,97,105,114,123,132,142,153,163

New Line._virtual_line82_line90_line98_line107 bus1=108.1.2.3.4 bus2=76.1.2.3.4 phases=4 linecode=LC4 length=25.7914 units=m
! reduced_from=line82,line90,line98,line107
! eliminated_buses=83,91,99

New Line._virtual_line116_line125 bus1=126.1.2.3.4 bus2=108.1.2.3.4 phases=4 linecode=LC4 length=11.8629 units=m
! reduced_from=line116,line125
! eliminated_buses=117

New Line._virtual_line117_line126_line136_line147_line157_line168_line179_line192_line203_line211_line220 bus1=108.1.2.3.4 bus2=221.1.2.3.4 phases=4 linecode=LC6 length=21.40906 units=m
! reduced_from=line117,line126,line136,line147,line157,line168,line179,line192,line203,line211,line220
! eliminated_buses=118,127,137,148,158,169,180,193,204,212

New Line._virtual_line134_line144_line154_line164_line175_line188_line199_line207_line215_line224_line232_line241_line249_line256_line262_line267_line271_line276_line281_line284_line288_line292 bus1=126.1.2.3.4 bus2=293.1.2.3.4 phases=4 linecode=LC4 length=19.5324 units=m
! reduced_from=line134,line144,line154,line164,line175,line188,line199,line207,line215,line224,line232,line241,line249,line256,line262,line267,line271,line276,line281,line284,line288,line292
! eliminated_buses=135,145,155,165,176,189,200,208,216,225,233,242,250,257,263,268,272,277,282,285,289

New Line._virtual_line145_line155 bus1=156.1.2.3.4 bus2=136.1.2.3.4 phases=4 linecode=LC3 length=26.2956 units=m
! reduced_from=line145,line155
! eliminated_buses=146

New Line._virtual_line146_line156_line167_line178_line191_line202_line210_line219_line228_line236_line245 bus1=136.1.2.3.4 bus2=246.1.2.3.4 phases=4 linecode=LC6 length=11.45229 units=m
! reduced_from=line146,line156,line167,line178,line191,line202,line210,line219,line228,line236,line245
! eliminated_buses=147,157,168,179,192,203,211,220,229,237

New Line._virtual_line165_line176_line189_line200_line208_line217_line226_line234_line243_line251_line258_line264_line269_line273 bus1=274.1.2.3.4 bus2=156.1.2.3.4 phases=4 linecode=LC3 length=21.497738 units=m
! reduced_from=line165,line176,line189,line200,line208,line217,line226,line234,line243,line251,line258,line264,line269,line273
! eliminated_buses=166,177,190,201,209,218,227,235,244,252,259,265,270

New Line._virtual_line166_line177_line190_line201_line209_line218_line227_line235_line244_line252_line259_line265_line270 bus1=156.1.2.3.4 bus2=271.1.2.3.4 phases=4 linecode=LC6 length=16.22177 units=m
! reduced_from=line166,line177,line190,line201,line209,line218,line227,line235,line244,line252,line259,line265,line270
! eliminated_buses=167,178,191,202,210,219,228,236,245,253,260,266

New Line._virtual_line183_line196 bus1=173.1.2.3.4 bus2=197.1.2.3.4 phases=4 linecode=LC6 length=10.8929 units=m
! reduced_from=line183,line196
! eliminated_buses=184

New Line._virtual_line185_line197 bus1=198.1.2.3.4 bus2=174.1.2.3.4 phases=4 linecode=LC6 length=9.4943 units=m
! reduced_from=line185,line197
! eliminated_buses=186

New Line._virtual_line237_line246 bus1=247.1.2.3.4 bus2=230.1.2.3.4 phases=4 linecode=LC6 length=10.2401 units=m
! reduced_from=line237,line246
! eliminated_buses=238

New Line._virtual_line253_line260 bus1=261.1.2.3.4 bus2=246.1.2.3.4 phases=4 linecode=LC6 length=8.7202 units=m
! reduced_from=line253,line260
! eliminated_buses=254

New Line._virtual_line274_line280 bus1=281.1.2.3.4 bus2=271.1.2.3.4 phases=4 linecode=LC6 length=6.425 units=m
! reduced_from=line274,line280
! eliminated_buses=275

New Line._virtual_line278_line282_line285_line289_line293_line298_line304_line312_line320_line328 bus1=274.1.2.3.4 bus2=329.1.2.3.4 phases=4 linecode=LC3 length=8.3969 units=m
! reduced_from=line278,line282,line285,line289,line293,line298,line304,line312,line320,line328
! eliminated_buses=279,283,286,290,294,299,305,313,321

New Line._virtual_line279_line283_line286_line290_line294_line299_line306_line314_line322_line330_line339_line348_line357_line365_line373_line382_line391_line400_line410_line420_line430_line440_line447_line454_line460_line465 bus1=274.1.2.3.4 bus2=466.1.2.3.4 phases=4 linecode=LC6 length=19.916008 units=m
! reduced_from=line279,line283,line286,line290,line294,line299,line306,line314,line322,line330,line339,line348,line357,line365,line373,line382,line391,line400,line410,line420,line430,line440,line447,line454,line460,line465
! eliminated_buses=280,284,287,291,295,300,307,315,323,331,340,349,358,366,374,383,392,401,411,421,431,441,448,455,461

New Line._virtual_line296_line302 bus1=303.1.2.3.4 bus2=293.1.2.3.4 phases=4 linecode=LC4 length=18.2372 units=m
! reduced_from=line296,line302
! eliminated_buses=297

New Line._virtual_line297_line303_line311_line319_line327_line335_line344_line353_line360_line368_line376_line385_line394_line403_line413_line424 bus1=293.1.2.3.4 bus2=425.1.2.3.4 phases=4 linecode=LC6 length=12.81416 units=m
! reduced_from=line297,line303,line311,line319,line327,line335,line344,line353,line360,line368,line376,line385,line394,line403,line413,line424
! eliminated_buses=298,304,312,320,328,336,345,354,361,369,377,386,395,404,414

New Line._virtual_line309_line317_line325_line333_line342_line351_line358_line366_line374_line383_line392_line401_line411_line421_line431_line441_line448_line455_line461_line466_line470_line474_line478_line482 bus1=483.1.2.3.4 bus2=303.1.2.3.4 phases=4 linecode=LC4 length=29.91555 units=m
! reduced_from=line309,line317,line325,line333,line342,line351,line358,line366,line374,line383,line392,line401,line411,line421,line431,line441,line448,line455,line461,line466,line470,line474,line478,line482
! eliminated_buses=310,318,326,334,343,352,359,367,375,384,393,402,412,422,432,442,449,456,462,467,471,475,479

New Line._virtual_line310_line318_line326_line334_line343_line352_line359_line367_line375_line384_line393_line402_line412 bus1=303.1.2.3.4 bus2=413.1.2.3.4 phases=4 linecode=LC6 length=13.06669 units=m
! reduced_from=line310,line318,line326,line334,line343,line352,line359,line367,line375,line384,line393,line402,line412
! eliminated_buses=311,319,327,335,344,353,360,368,376,385,394,403

New Line._virtual_line336_line345_line354_line362_line370 bus1=371.1.2.3.4 bus2=329.1.2.3.4 phases=4 linecode=LC3 length=11.888808 units=m
! reduced_from=line336,line345,line354,line362,line370
! eliminated_buses=337,346,355,363

New Line._virtual_line337_line346_line355_line363_line371_line380_line389_line398_line408_line418_line428_line438_line446 bus1=329.1.2.3.4 bus2=447.1.2.3.4 phases=4 linecode=LC6 length=16.01161 units=m
! reduced_from=line337,line346,line355,line363,line371,line380,line389,line398,line408,line418,line428,line438,line446
! eliminated_buses=338,347,356,364,372,381,390,399,409,419,429,439

New Line._virtual_line378_line387_line396_line405_line414_line425_line435_line443_line449_line456_line462_line467_line471_line475_line479_line483_line488_line492 bus1=493.1.2.3.4 bus2=371.1.2.3.4 phases=4 linecode=LC6 length=18.73706 units=m
! reduced_from=line378,line387,line396,line405,line414,line425,line435,line443,line449,line456,line462,line467,line471,line475,line479,line483,line488,line492
! eliminated_buses=379,388,397,406,415,426,436,444,450,457,463,468,472,476,480,484,489

New Line._virtual_line379_line388_line397 bus1=371.1.2.3.4 bus2=398.1.2.3.4 phases=4 linecode=LC3 length=9.7326 units=m
! reduced_from=line379,line388,line397
! eliminated_buses=380,389

New Line._virtual_line407_line417_line427_line437_line445_line451_line458_line464_line469_line473_line477_line481_line485_line489_line493_line496_line500 bus1=398.1.2.3.4 bus2=501.1.2.3.4 phases=4 linecode=LC6 length=33.18237 units=m
! reduced_from=line407,line417,line427,line437,line445,line451,line458,line464,line469,line473,line477,line481,line485,line489,line493,line496,line500
! eliminated_buses=408,418,428,438,446,452,459,465,470,474,478,482,486,490,494,497

New Line._virtual_line422_line432 bus1=413.1.2.3.4 bus2=433.1.2.3.4 phases=4 linecode=LC6 length=10.0762 units=m
! reduced_from=line422,line432
! eliminated_buses=423

New Line._virtual_line433_line442 bus1=425.1.2.3.4 bus2=443.1.2.3.4 phases=4 linecode=LC6 length=9.2431 units=m
! reduced_from=line433,line442
! eliminated_buses=434

New Line._virtual_line452_line459 bus1=447.1.2.3.4 bus2=460.1.2.3.4 phases=4 linecode=LC6 length=8.671 units=m
! reduced_from=line452,line459
! eliminated_buses=453

New Line._virtual_line486_line490_line494_line497_line501_line504_line508_line512_line517_line524_line531_line539_line545_line551_line557_line563_line568_line573_line578_line583_line588_line592_line596_line600_line603 bus1=483.1.2.3.4 bus2=604.1.2.3.4 phases=4 linecode=LC6 length=19.92237 units=m
! reduced_from=line486,line490,line494,line497,line501,line504,line508,line512,line517,line524,line531,line539,line545,line551,line557,line563,line568,line573,line578,line583,line588,line592,line596,line600,line603
! eliminated_buses=487,491,495,498,502,505,509,513,518,525,532,540,546,552,558,564,569,574,579,584,589,593,597,601

New Line._virtual_line487_line491 bus1=492.1.2.3.4 bus2=483.1.2.3.4 phases=4 linecode=LC4 length=5.3819 units=m
! reduced_from=line487,line491
! eliminated_buses=488

New Line._virtual_line498_line502 bus1=503.1.2.3.4 bus2=496.1.2.3.4 phases=4 linecode=LC3 length=25.1043 units=m
! reduced_from=line498,line502
! eliminated_buses=499

New Line._virtual_line499_line503_line507_line511_line516 bus1=517.1.2.3.4 bus2=496.1.2.3.4 phases=4 linecode=LC6 length=9.48814 units=m
! reduced_from=line499,line503,line507,line511,line516
! eliminated_buses=500,504,508,512

New Line._virtual_line505_line509_line513_line518 bus1=503.1.2.3.4 bus2=519.1.2.3.4 phases=4 linecode=LC2 length=8.24476 units=m
! reduced_from=line505,line509,line513,line518
! eliminated_buses=506,510,514

New Line._virtual_line506_line510 bus1=511.1.2.3.4 bus2=503.1.2.3.4 phases=4 linecode=LC3 length=11.9677 units=m
! reduced_from=line506,line510
! eliminated_buses=507

New Line._virtual_line514_line519_line527 bus1=511.1.2.3.4 bus2=528.1.2.3.4 phases=4 linecode=LC3 length=21.83765 units=m
! reduced_from=line514,line519,line527
! eliminated_buses=515,520

New Line._virtual_line515_line521_line529_line537_line544_line550_line556_line562_line567_line572_line577_line582_line587_line591_line595_line599_line602_line605_line607_line609_line611_line613_line615_line616_line617_line618 bus1=619.1.2.3.4 bus2=511.1.2.3.4 phases=4 linecode=LC2 length=17.299775 units=m
! reduced_from=line515,line521,line529,line537,line544,line550,line556,line562,line567,line572,line577,line582,line587,line591,line595,line599,line602,line605,line607,line609,line611,line613,line615,line616,line617,line618
! eliminated_buses=516,522,530,538,545,551,557,563,568,573,578,583,588,592,596,600,603,606,608,610,612,614,616,617,618

New Line._virtual_line522_line530_line538 bus1=517.1.2.3.4 bus2=539.1.2.3.4 phases=4 linecode=LC6 length=10.252 units=m
! reduced_from=line522,line530,line538
! eliminated_buses=523,531

New Line._virtual_line525_line532_line540_line546_line552_line558_line564_line569_line574_line579_line584_line589_line593_line597_line601_line604_line606_line608_line610_line612_line614 bus1=615.1.2.3.4 bus2=519.1.2.3.4 phases=4 linecode=LC2 length=7.740362 units=m
! reduced_from=line525,line532,line540,line546,line552,line558,line564,line569,line574,line579,line584,line589,line593,line597,line601,line604,line606,line608,line610,line612,line614
! eliminated_buses=526,533,541,547,553,559,565,570,575,580,585,590,594,598,602,605,607,609,611,613

New Line._virtual_line526_line533_line541_line547_line553_line559 bus1=519.1.2.3.4 bus2=560.1.2.3.4 phases=4 linecode=LC6 length=12.409736 units=m
! reduced_from=line526,line533,line541,line547,line553,line559
! eliminated_buses=527,534,542,548,554

New Line._virtual_line535_line542_line548_line554_line560_line565_line570_line575_line580_line585 bus1=528.1.2.3.4 bus2=586.1.2.3.4 phases=4 linecode=LC6 length=15.88545 units=m
! reduced_from=line535,line542,line548,line554,line560,line565,line570,line575,line580,line585
! eliminated_buses=536,543,549,555,561,566,571,576,581

New Line.LINE50 bus1=49.1.2.3.4 bus2=51.1.2.3.4 phases=4 linecode=LC4 length=9.0454 units=m

New Line.LINE75 bus1=71.1.2.3.4 bus2=76.1.2.3.4 phases=4 linecode=LC4 length=12.639 units=m

New Line.LINE135 bus1=126.1.2.3.4 bus2=136.1.2.3.4 phases=4 linecode=LC3 length=1.4878 units=m

New Line.LINE184 bus1=173.1.2.3.4 bus2=185.1.2.3.4 phases=4 linecode=LC6 length=3.2073 units=m

New Line.LINE186 bus1=174.1.2.3.4 bus2=187.1.2.3.4 phases=4 linecode=LC6 length=5.2635 units=m

New Line.LINE238 bus1=230.1.2.3.4 bus2=239.1.2.3.4 phases=4 linecode=LC6 length=3.3782 units=m

New Line.LINE254 bus1=246.1.2.3.4 bus2=255.1.2.3.4 phases=4 linecode=LC6 length=5.9557 units=m

New Line.LINE275 bus1=271.1.2.3.4 bus2=276.1.2.3.4 phases=4 linecode=LC6 length=5.2074 units=m

New Line.LINE423 bus1=413.1.2.3.4 bus2=424.1.2.3.4 phases=4 linecode=LC6 length=5.0662 units=m

New Line.LINE434 bus1=425.1.2.3.4 bus2=435.1.2.3.4 phases=4 linecode=LC6 length=2.3107 units=m

New Line.LINE453 bus1=447.1.2.3.4 bus2=454.1.2.3.4 phases=4 linecode=LC6 length=5.4775 units=m

New Line.LINE495 bus1=492.1.2.3.4 bus2=496.1.2.3.4 phases=4 linecode=LC3 length=10.1976 units=m

New Line.LINE523 bus1=517.1.2.3.4 bus2=524.1.2.3.4 phases=4 linecode=LC6 length=6.9929 units=m
