! Reduced enabled lines.

New Line._virtual_line0_line1_line2_line3_line4_line5_line6_line7_line8_line9_line10_line11_line12_line13_line14_line15_line16_line17_line18_line19_line20_line21_line22_line23_line24_line25_line26_line27_line28_line29_line30_line31_line32_line33_line34_line35_line36_line37 bus1=sourcebus.1.2.3.4 bus2=38.1.2.3.4 phases=4 linecode=LC5 length=57.032775 units=m
! reduced_from=line0,line1,line2,line3,line4,line5,line6,line7,line8,line9,line10,line11,line12,line13,line14,line15,line16,line17,line18,line19,line20,line21,line22,line23,line24,line25,line26,line27,line28,line29,line30,line31,line32,line33,line34,line35,line36,line37
! eliminated_buses=1,2,3,4,5,6,7,8,9,10,11,12,13,14,15,16,17,18,19,20,21,22,23,24,25,26,27,28,29,30,31,32,33,34,35,36,37

New Line._virtual_line38_line40_line42_line45_line48_line51_line54_line57_line61_line64_line68_line73_line78 bus1=79.1.2.3.4 bus2=38.1.2.3.4 phases=4 linecode=LC6 length=15.85073 units=m
! reduced_from=line38,line40,line42,line45,line48,line51,line54,line57,line61,line64,line68,line73,line78
! eliminated_buses=39,41,43,46,49,52,55,58,62,65,69,74

New Line._virtual_line39_line41_line44_line47_line50_line53_line56 bus1=38.1.2.3.4 bus2=57.1.2.3.4 phases=4 linecode=LC5 length=30.81637 units=m
! reduced_from=line39,line41,line44,line47,line50,line53,line56
! eliminated_buses=40,42,45,48,51,54

New Line._virtual_line59_line62_line65_line69_line74_line79_line85 bus1=57.1.2.3.4 bus2=86.1.2.3.4 phases=4 linecode=LC6 length=16.24419 units=m
! reduced_from=line59,line62,line65,line69,line74,line79,line85
! eliminated_buses=60,63,66,70,75,80

New Line._virtual_line60_line63_line67 bus1=57.1.2.3.4 bus2=68.1.2.3.4 phases=4 linecode=LC5 length=12.5471 units=m
! reduced_from=line60,line63,line67
! eliminated_buses=61,64

New Line._virtual_line72_line77_line82_line89_line94_line99_line105_line111_line117_line122_line126_line130_line133 bus1=68.1.2.3.4 bus2=134.1.2.3.4 phases=4 linecode=LC6 length=10.69722 units=m
! reduced_from=line72,line77,line82,line89,line94,line99,line105,line111,line117,line122,line126,line130,line133
! eliminated_buses=73,78,83,90,95,100,106,112,118,123,127,131

New Line._virtual_line76_line81_line88_line93 bus1=94.1.2.3.4 bus2=72.1.2.3.4 phases=4 linecode=LC4 length=21.989 units=m
! reduced_from=line76,line81,line88,line93
! eliminated_buses=77,82,89

New Line._virtual_line83_line90 bus1=91.1.2.3.4 bus2=79.1.2.3.4 phases=4 linecode=LC6 length=9.2367 units=m
! reduced_from=line83,line90
! eliminated_buses=84

New Line._virtual_line98_line104_line110_line116_line121_line125_line129 bus1=130.1.2.3.4 bus2=94.1.2.3.4 phases=4 linecode=LC6 length=14.9462 units=m
! reduced_from=line98,line104,line110,line116,line121,line125,line129
! eliminated_buses=99,105,111,117,122,126

New Line._virtual_line102_line108_line114_line119_line123_line127_line131_line134_line138_line141_line144_line147_line150_line153_line156_line159_line162_line165_line168_line171 bus1=98.1.2.3.4 bus2=172.1.2.3.4 phases=4 linecode=LC4 length=41.72199 units=m
! reduced_from=line102,line108,line114,line119,line123,line127,line131,line134,line138,line141,line144,line147,line150,line153,line156,line159,line162,line165,line168,line171
! eliminated_buses=103,109,115,120,124,128,132,135,139,142,145,148,151,154,157,160,163,166,169

New Line._virtual_line103_line109_line115_line120_line124_line128_line132_line135_line139_line142_line145_line148_line151_line154_line157_line160_line163_line166_line170_line173_line177 bus1=178.1.2.3.4 bus2=98.1.2.3.4 phases=4 linecode=LC6 length=22.01235 units=m
! reduced_from=line103,line109,line115,line120,line124,line128,line132,line135,line139,line142,line145,line148,line151,line154,line157,line160,line163,line166,line170,line173,line177
! eliminated_buses=104,110,116,121,125,129,133,136,140,143,146,149,152,155,158,161,164,167,171,174

New Line._virtual_line136_line140_line143_line146_line149_line152_line155_line158_line161_line164_line167 bus1=168.1.2.3.4 bus2=134.1.2.3.4 phases=4 linecode=LC6 length=11.15194 units=m
! reduced_from=line136,line140,line143,line146,line149,line152,line155,line158,line161,line164,line167
! eliminated_buses=137,141,144,147,150,153,156,159,162,165

New Line._virtual_line174_line178_line181_line184 bus1=172.1.2.3.4 bus2=185.1.2.3.4 phases=4 linecode=LC4 length=5.83035 units=m
! reduced_from=line174,line178,line181,line184
! eliminated_buses=175,179,182

New Line._virtual_line175_line179_line182_line185_line189_line192_line195 bus1=172.1.2.3.4 bus2=196.1.2.3.4 phases=4 linecode=LC6 length=18.9191 units=m
! reduced_from=line175,line179,line182,line185,line189,line192,line195
! eliminated_buses=176,180,183,186,190,193

New Line._virtual_line187_line190_line193_line196_line199_line203_line208_line213_line219_line226_line234_line242 bus1=243.1.2.3.4 bus2=185.1.2.3.4 phases=4 linecode=LC3 length=17.39052 units=m
! reduced_from=line187,line190,line193,line196,line199,line203,line208,line213,line219,line226,line234,line242
! eliminated_buses=188,191,194,197,200,204,209,214,220,227,235

New Line._virtual_line191_line194 bus1=189.1.2.3.4 bus2=195.1.2.3.4 phases=4 linecode=LC3 length=18.8818 units=m
! reduced_from=line191,line194
! eliminated_buses=192

New Line._virtual_line197_line200 bus1=195.1.2.3.4 bus2=201.1.2.3.4 phases=4 linecode=LC3 length=26.2644 units=m
! reduced_from=line197,line200
! eliminated_buses=198

New Line._virtual_line198_line202_line207_line212_line218_line225_line233_line241_line249 bus1=250.1.2.3.4 bus2=195.1.2.3.4 phases=4 linecode=LC6 length=14.73296 units=m
! reduced_from=line198,line202,line207,line212,line218,line225,line233,line241,line249
! eliminated_buses=199,203,208,213,219,226,234,242

New Line._virtual_line204_line209 bus1=201.1.2.3.4 bus2=210.1.2.3.4 phases=4 linecode=LC3 length=25.4041 units=m
! reduced_from=line204,line209
! eliminated_buses=205

New Line._virtual_line206_line211_line217_line224_line232_line240_line248_line259_line272 bus1=201.1.2.3.4 bus2=273.1.2.3.4 phases=4 linecode=LC6 length=14.73608 units=m
! reduced_from=line206,line211,line217,line224,line232,line240,line248,line259,line272
! eliminated_buses=207,212,218,225,233,241,249,260

New Line._virtual_line216_line223_line231_line239_line247_line258_line271_line283_line296_line308 bus1=309.1.2.3.4 bus2=210.1.2.3.4 phases=4 linecode=LC6 length=19.96717 units=m
! reduced_from=line216,line223,line231,line239,line247,line258,line271,line283,line296,line308
! eliminated_buses=217,224,232,240,248,259,272,284,297

New Line._virtual_line220_line227_line235_line243 bus1=215.1.2.3.4 bus2=244.1.2.3.4 phases=4 linecode=LC3 length=28.927 units=m
! reduced_from=line220,line227,line235,line243
! eliminated_buses=221,228,236

New Line._virtual_line222_line230_line238_line246 bus1=215.1.2.3.4 bus2=247.1.2.3.4 phases=4 linecode=LC6 length=9.90065 units=m
! reduced_from=line222,line230,line238,line246
! eliminated_buses=223,231,239

New Line._virtual_line251_line264_line277_line290_line302_line313_line323_line335_line348_line362_line375_line388 bus1=389.1.2.3.4 bus2=243.1.2.3.4 phases=4 linecode=LC6 length=17.13656 units=m
! reduced_from=line251,line264,line277,line290,line302,line313,line323,line335,line348,line362,line375,line388
! eliminated_buses=252,265,278,291,303,314,324,336,349,363,376

New Line._virtual_line252_line265_line278_line291_line303_line314 bus1=315.1.2.3.4 bus2=244.1.2.3.4 phases=4 linecode=LC6 length=13.10172 units=m
! reduced_from=line252,line265,line278,line291,line303,line314
! eliminated_buses=253,266,279,292,304

New Line._virtual_line256_line270_line282_line295_line307_line318_line329_line340_line354_line367_line380 bus1=381.1.2.3.4 bus2=247.1.2.3.4 phases=4 linecode=LC6 length=17.03772 units=m
! reduced_from=line256,line270,line282,line295,line307,line318,line329,line340,line354,line367,line380
! eliminated_buses=257,271,283,296,308,319,330,341,355,368

New Line._virtual_line260_line273 bus1=250.1.2.3.4 bus2=274.1.2.3.4 phases=4 linecode=LC6 length=9.238 units=m
! reduced_from=line260,line273
! eliminated_buses=261

New Line._virtual_line262_line274_line286_line298_line309_line319 bus1=320.1.2.3.4 bus2=251.1.2.3.4 phases=4 linecode=LC3 length=26.07999 units=m
! reduced_from=line262,line274,line286,line298,line309,line319
! eliminated_buses=263,275,287,299,310

New Line._virtual_line263_line276_line289_line301_line312_line322_line334 bus1=251.1.2.3.4 bus2=335.1.2.3.4 phases=4 linecode=LC6 length=14.11382 units=m
! reduced_from=line263,line276,line289,line301,line312,line322,line334
! eliminated_buses=264,277,290,302,313,323

New Line._virtual_line266_line279_line292_line304_line315_line326_line337 bus1=254.1.2.3.4 bus2=338.1.2.3.4 phases=4 linecode=LC6 length=16.98562 units=m
! reduced_from=line266,line279,line292,line304,line315,line326,line337
! eliminated_buses=267,280,293,305,316,327

New Line._virtual_line267_line280_line293_line305_line316_line327_line338_line352_line365_line378_line391_line404_line415_line426 bus1=427.1.2.3.4 bus2=254.1.2.3.4 phases=4 linecode=LC3 length=16.73496 units=m
! reduced_from=line267,line280,line293,line305,line316,line327,line338,line352,line365,line378,line391,line404,line415,line426
! eliminated_buses=268,281,294,306,317,328,339,353,366,379,392,405,416

New Line._virtual_line284_line297 bus1=273.1.2.3.4 bus2=298.1.2.3.4 phases=4 linecode=LC6 length=10.4008 units=m
! reduced_from=line284,line297
! eliminated_buses=285

New Line._virtual_line325_line336_line349_line363_line376_line389_line402_line413_line424_line436 bus1=437.1.2.3.4 bus2=315.1.2.3.4 phases=4 linecode=LC6 length=20.46257 units=m
! reduced_from=line325,line336,line349,line363,line376,line389,line402,line413,line424,line436
! eliminated_buses=326,337,350,364,377,390,403,414,425

New Line._virtual_line332_line344_line359_line373_line386_line400_line411_line422_line434_line445 bus1=320.1.2.3.4 bus2=446.1.2.3.4 phases=4 linecode=LC6 length=21.56863 units=m
! reduced_from=line332,line344,line359,line373,line386,line400,line411,line422,line434,line445
! eliminated_buses=333,345,360,374,387,401,412,423,435

New Line._virtual_line343_line358_line372_line385_line399 bus1=400.1.2.3.4 bus2=331.1.2.3.4 phases=4 linecode=LC6 length=14.72644 units=m
! reduced_from=line343,line358,line372,line385,line399
! eliminated_buses=344,359,373,386

New Line._virtual_line346_line361 bus1=335.1.2.3.4 bus2=362.1.2.3.4 phases=4 linecode=LC6 length=8.4728 units=m
! reduced_from=line346,line361
! eliminated_buses=347

New Line._virtual_line351_line364_line377_line390_line403_line414_line425_line437_line447_line456 bus1=457.1.2.3.4 bus2=338.1.2.3.4 phases=4 linecode=LC6 length=19.45189 units=m
! reduced_from=line351,line364,line377,line390,line403,line414,line425,line437,line447,line456
! eliminated_buses=352,365,378,391,404,415,426,438,448

New Line._virtual_line357_line371_line384_line398_line410_line421_line433 bus1=342.1.2.3.4 bus2=434.1.2.3.4 phases=4 linecode=LC6 length=15.36836 units=m
! reduced_from=line357,line371,line384,line398,line410,line421,line433
! eliminated_buses=358,372,385,399,411,422

New Line._virtual_line370_line383_line397_line409_line420 bus1=356.1.2.3.4 bus2=421.1.2.3.4 phases=4 linecode=LC6 length=11.85485 units=m
! reduced_from=line370,line383,line397,line409,line420
! eliminated_buses=371,384,398,410

New Line._virtual_line381_line393_line406_line417_line428_line441_line451_line460_line469_line477 bus1=369.1.2.3.4 bus2=478.1.2.3.4 phases=4 linecode=LC3 length=24.1602 units=m
! reduced_from=line381,line393,line406,line417,line428,line441,line451,line460,line469,line477
! eliminated_buses=382,394,407,418,429,442,452,461,470

New Line._virtual_line396_line408_line419_line430_line443_line453 bus1=454.1.2.3.4 bus2=383.1.2.3.4 phases=4 linecode=LC6 length=14.47158 units=m
! reduced_from=line396,line408,line419,line430,line443,line453
! eliminated_buses=397,409,420,431,444

New Line._virtual_line431_line444_line454_line464_line472_line480_line489_line498_line507_line515 bus1=516.1.2.3.4 bus2=421.1.2.3.4 phases=4 linecode=LC6 length=18.17066 units=m
! reduced_from=line431,line444,line454,line464,line472,line480,line489,line498,line507,line515
! eliminated_buses=432,445,455,465,473,481,490,499,508

New Line._virtual_line438_line448_line457_line466_line474_line482_line491_line500_line508_line516_line523 bus1=427.1.2.3.4 bus2=524.1.2.3.4 phases=4 linecode=LC6 length=27.92664 units=m
! reduced_from=line438,line448,line457,line466,line474,line482,line491,line500,line508,line516,line523
! eliminated_buses=439,449,458,467,475,483,492,501,509,517

New Line._virtual_line439_line449_line458_line467_line475_line483_line492_line501 bus1=427.1.2.3.4 bus2=502.1.2.3.4 phases=4 linecode=LC3 length=5.69307 units=m
! reduced_from=line439,line449,line458,line467,line475,line483,line492,line501
! eliminated_buses=440,450,459,468,476,484,493

New Line._virtual_line463_line471_line479_line488_line497_line506_line514_line522_line529_line535_line541 bus1=454.1.2.3.4 bus2=542.1.2.3.4 phases=4 linecode=LC6 length=21.21691 units=m
! reduced_from=line463,line471,line479,line488,line497,line506,line514,line522,line529,line535,line541
! eliminated_buses=464,472,480,489,498,507,515,523,530,536

New Line._virtual_line485_line494_line503_line511_line519_line526_line532_line538_line546_line551_line556_line562_line567_line572_line577_line581_line585_line589_line591_line593_line595_line597_line599 bus1=600.1.2.3.4 bus2=478.1.2.3.4 phases=4 linecode=LC6 length=22.752552 units=m
! reduced_from=line485,line494,line503,line511,line519,line526,line532,line538,line546,line551,line556,line562,line567,line572,line577,line581,line585,line589,line591,line593,line595,line597,line599
! eliminated_buses=486,495,504,512,520,527,533,539,547,552,557,563,568,573,578,582,586,590,592,594,596,598

New Line._virtual_line486_line495_line504_line512_line520_line527 bus1=478.1.2.3.4 bus2=528.1.2.3.4 phases=4 linecode=LC3 length=10.13265 units=m
! reduced_from=line486,line495,line504,line512,line520,line527
! eliminated_buses=487,496,505,513,521

New Line._virtual_line510_line518_line525_line531_line537 bus1=502.1.2.3.4 bus2=538.1.2.3.4 phases=4 linecode=LC6 length=10.45496 units=m
! reduced_from=line510,line518,line525,line531,line537
! eliminated_buses=511,519,526,532

New Line._virtual_line533_line539_line547_line552_line557_line563_line568_line573 bus1=574.1.2.3.4 bus2=528.1.2.3.4 phases=4 linecode=LC6 length=20.66765 units=m
! reduced_from=line533,line539,line547,line552,line557,line563,line568,line573
! eliminated_buses=534,540,548,553,558,564,569

New Line._virtual_line534_line540_line548_line553 bus1=528.1.2.3.4 bus2=554.1.2.3.4 phases=4 linecode=LC6 length=14.89248 units=m
! reduced_from=line534,line540,line548,line553
! eliminated_buses=535,541,549

New Line._virtual_line545_line550_line555_line561_line566_line571_line576_line580_line584_line588 bus1=589.1.2.3.4 bus2=538.1.2.3.4 phases=4 linecode=LC6 length=22.53522 units=m
! reduced_from=line545,line550,line555,line561,line566,line571,line576,line580,line584,line588
! eliminated_buses=546,551,556,562,567,572,577,581,585

New Line._virtual_line559_line564_line569_line574_line578_line582_line586_line590_line592_line594_line596_line598_line600 bus1=601.1.2.3.4 bus2=554.1.2.3.4 phases=4 linecode=LC6 length=19.845994 units=m
! reduced_from=line559,line564,line569,line574,line578,line582,line586,line590,line592,line594,line596,line598,line600
! eliminated_buses=560,565,570,575,579,583,587,591,593,595,597,599

New Line.LINE71 bus1=68.1.2.3.4 bus2=72.1.2.3.4 phases=4 linecode=LC5 length=1.4268 units=m

New Line.LINE84 bus1=79.1.2.3.4 bus2=85.1.2.3.4 phases=4 linecode=LC6 length=2.6866 units=m

New Line.LINE97 bus1=94.1.2.3.4 bus2=98.1.2.3.4 phases=4 linecode=LC4 length=0.88088 units=m

New Line.LINE137 bus1=134.1.2.3.4 bus2=138.1.2.3.4 phases=4 linecode=LC6 length=6.5877 units=m

New Line.LINE188 bus1=185.1.2.3.4 bus2=189.1.2.3.4 phases=4 linecode=LC4 length=0.84866 units=m

New Line.LINE214 bus1=210.1.2.3.4 bus2=215.1.2.3.4 phases=4 linecode=LC3 length=3.3796 units=m

New Line.LINE250 bus1=243.1.2.3.4 bus2=251.1.2.3.4 phases=4 linecode=LC3 length=24.5096 units=m

New Line.LINE253 bus1=244.1.2.3.4 bus2=254.1.2.3.4 phases=4 linecode=LC3 length=12.0471 units=m

New Line.LINE257 bus1=247.1.2.3.4 bus2=258.1.2.3.4 phases=4 linecode=LC6 length=8.241 units=m

New Line.LINE261 bus1=250.1.2.3.4 bus2=262.1.2.3.4 phases=4 linecode=LC6 length=6.9619 units=m

New Line.LINE285 bus1=273.1.2.3.4 bus2=286.1.2.3.4 phases=4 linecode=LC6 length=8.3919 units=m

New Line.LINE324 bus1=315.1.2.3.4 bus2=325.1.2.3.4 phases=4 linecode=LC6 length=10.6003 units=m

New Line.LINE330 bus1=320.1.2.3.4 bus2=331.1.2.3.4 phases=4 linecode=LC3 length=6.2524 units=m

New Line.LINE341 bus1=331.1.2.3.4 bus2=342.1.2.3.4 phases=4 linecode=LC3 length=7.7578 units=m

New Line.LINE347 bus1=335.1.2.3.4 bus2=348.1.2.3.4 phases=4 linecode=LC6 length=7.1102 units=m

New Line.LINE350 bus1=338.1.2.3.4 bus2=351.1.2.3.4 phases=4 linecode=LC6 length=8.9278 units=m

New Line.LINE355 bus1=342.1.2.3.4 bus2=356.1.2.3.4 phases=4 linecode=LC3 length=10.6538 units=m

New Line.LINE368 bus1=356.1.2.3.4 bus2=369.1.2.3.4 phases=4 linecode=LC3 length=14.0715 units=m

New Line.LINE382 bus1=369.1.2.3.4 bus2=383.1.2.3.4 phases=4 linecode=LC3 length=12.9034 units=m

New Line.LINE432 bus1=421.1.2.3.4 bus2=433.1.2.3.4 phases=4 linecode=LC6 length=6.3079 units=m

New Line.LINE462 bus1=454.1.2.3.4 bus2=463.1.2.3.4 phases=4 linecode=LC6 length=7.6646 units=m

New Line.LINE543 bus1=538.1.2.3.4 bus2=544.1.2.3.4 phases=4 linecode=LC6 length=10.3272 units=m

New Line.LINE544 bus1=538.1.2.3.4 bus2=545.1.2.3.4 phases=4 linecode=LC6 length=10.3272 units=m

New Line.LINE558 bus1=554.1.2.3.4 bus2=559.1.2.3.4 phases=4 linecode=LC6 length=8.9266 units=m
