! Reduced enabled lines.

New Line._virtual_line0_line1_line2_line3_line4_line5_line6_line7_line8_line9_line10_line11_line12_line13_line14_line15_line16_line17_line18_line19_line20_line21_line22_line23_line24_line25_line26_line27_line28_line29_line30_line31_line32_line33_line34_line35_line36_line37_line38_line39_line40 bus1=sourcebus.1.2.3.4 bus2=41.1.2.3.4 phases=4 linecode=LC8 length=52.157387 units=m
! reduced_from=line0,line1,line2,line3,line4,line5,line6,line7,line8,line9,line10,line11,line12,line13,line14,line15,line16,line17,line18,line19,line20,line21,line22,line23,line24,line25,line26,line27,line28,line29,line30,line31,line32,line33,line34,line35,line36,line37,line38,line39,line40
! eliminated_buses=1,2,3,4,5,6,7,8,9,10,11,12,13,14,15,16,17,18,19,20,21,22,23,24,25,26,27,28,29,30,31,32,33,34,35,36,37,38,39,40

New Line._virtual_line41_line42_line43_line44_line45 bus1=41.1.2.3.4 bus2=46.1.2.3.4 phases=4 linecode=LC5 length=7.64586 units=m
! reduced_from=line41,line42,line43,line44,line45
! eliminated_buses=42,43,44,45

New Line._virtual_line46_line48 bus1=46.1.2.3.4 bus2=49.1.2.3.4 phases=4 linecode=LC3 length=7.1394 units=m
! reduced_from=line46,line48
! eliminated_buses=47

New Line._virtual_line47_line49_line52_line55_line58_line61_line64_line67_line70_line73 bus1=46.1.2.3.4 bus2=74.1.2.3.4 phases=4 linecode=LC3 length=9.49422 units=m
! reduced_from=line47,line49,line52,line55,line58,line61,line64,line67,line70,line73
! eliminated_buses=48,50,53,56,59,62,65,68,71

New Line._virtual_line50_line53_line56_line59_line62_line65_line68_line71 bus1=49.1.2.3.4 bus2=72.1.2.3.4 phases=4 linecode=LC5 length=12.01766 units=m
! reduced_from=line50,line53,line56,line59,line62,line65,line68,line71
! eliminated_buses=51,54,57,60,63,66,69

New Line._virtual_line51_line54_line57_line60_line63_line66_line69_line72_line76_line81_line87_line93_line100 bus1=101.1.2.3.4 bus2=49.1.2.3.4 phases=4 linecode=LC5 length=19.14555 units=m
! reduced_from=line51,line54,line57,line60,line63,line66,line69,line72,line76,line81,line87,line93,line100
! eliminated_buses=52,55,58,61,64,67,70,73,77,82,88,94

New Line._virtual_line74_line79_line85_line91_line98_line105_line112_line120_line130_line141_line154_line169_line182 bus1=72.1.2.3.4 bus2=183.1.2.3.4 phases=4 linecode=LC2 length=12.844 units=m
! reduced_from=line74,line79,line85,line91,line98,line105,line112,line120,line130,line141,line154,line169,line182
! eliminated_buses=75,80,86,92,99,106,113,121,131,142,155,170

New Line._virtual_line75_line80_line86_line92_line99_line106 bus1=72.1.2.3.4 bus2=107.1.2.3.4 phases=4 linecode=LC3 length=28.70625 units=m
! reduced_from=line75,line80,line86,line92,line99,line106
! eliminated_buses=76,81,87,93,100

New Line._virtual_line77_line82_line88 bus1=74.1.2.3.4 bus2=89.1.2.3.4 phases=4 linecode=LC3 length=14.9876 units=m
! reduced_from=line77,line82,line88
! eliminated_buses=78,83

New Line._virtual_line78_line84_line90_line97_line104 bus1=74.1.2.3.4 bus2=105.1.2.3.4 phases=4 linecode=LC6 length=15.16874 units=m
! reduced_from=line78,line84,line90,line97,line104
! eliminated_buses=79,85,91,98

New Line._virtual_line94_line101_line109_line117_line128_line139 bus1=89.1.2.3.4 bus2=140.1.2.3.4 phases=4 linecode=LC3 length=12.57898 units=m
! reduced_from=line94,line101,line109,line117,line128,line139
! eliminated_buses=95,102,110,118,129

New Line._virtual_line95_line102_line110_line118_line129_line140_line153_line168_line181_line195 bus1=89.1.2.3.4 bus2=196.1.2.3.4 phases=4 linecode=LC6 length=14.55344 units=m
! reduced_from=line95,line102,line110,line118,line129,line140,line153,line168,line181,line195
! eliminated_buses=96,103,111,119,130,141,154,169,182

New Line._virtual_line108_line116_line127_line138_line150_line165_line177_line191_line205 bus1=101.1.2.3.4 bus2=206.1.2.3.4 phases=4 linecode=LC2 length=12.70195 units=m
! reduced_from=line108,line116,line127,line138,line150,line165,line177,line191,line205
! eliminated_buses=109,117,128,139,151,166,178,192

New Line._virtual_line113_line122 bus1=123.1.2.3.4 bus2=107.1.2.3.4 phases=4 linecode=LC2 length=19.1843 units=m
! reduced_from=line113,line122
! eliminated_buses=114

New Line._virtual_line114_line124 bus1=107.1.2.3.4 bus2=125.1.2.3.4 phases=4 linecode=LC3 length=17.5936 units=m
! reduced_from=line114,line124
! eliminated_buses=115

New Line._virtual_line115_line126 bus1=127.1.2.3.4 bus2=108.1.2.3.4 phases=4 linecode=LC3 length=5.2683 units=m
! reduced_from=line115,line126
! eliminated_buses=116

New Line._virtual_line134_line145 bus1=125.1.2.3.4 bus2=146.1.2.3.4 phases=4 linecode=LC2 length=6.64151 units=m
! reduced_from=line134,line145
! eliminated_buses=135

New Line._virtual_line136_line147 bus1=148.1.2.3.4 bus2=127.1.2.3.4 phases=4 linecode=LC2 length=13.4879 units=m
! reduced_from=line136,line147
! eliminated_buses=137

New Line._virtual_line143_line156_line171 bus1=134.1.2.3.4 bus2=172.1.2.3.4 phases=4 linecode=LC3 length=18.1429 units=m
! reduced_from=line143,line156,line171
! eliminated_buses=144,157

New Line._virtual_line149_line164_line176_line190_line204_line214_line224_line234_line245 bus1=246.1.2.3.4 bus2=138.1.2.3.4 phases=4 linecode=LC3 length=9.76621 units=m
! reduced_from=line149,line164,line176,line190,line204,line214,line224,line234,line245
! eliminated_buses=150,165,177,191,205,215,225,235

New Line._virtual_line151_line166_line178_line192_line206_line215_line225_line235_line246_line260_line272_line285_line299 bus1=300.1.2.3.4 bus2=140.1.2.3.4 phases=4 linecode=LC6 length=14.9154 units=m
! reduced_from=line151,line166,line178,line192,line206,line215,line225,line235,line246,line260,line272,line285,line299
! eliminated_buses=152,167,179,193,207,216,226,236,247,261,273,286

New Line._virtual_line152_line167 bus1=168.1.2.3.4 bus2=140.1.2.3.4 phases=4 linecode=LC3 length=1.54603 units=m
! reduced_from=line152,line167
! eliminated_buses=153

New Line._virtual_line157_line172_line186_line202 bus1=145.1.2.3.4 bus2=203.1.2.3.4 phases=4 linecode=LC2 length=16.1343 units=m
! reduced_from=line157,line172,line186,line202
! eliminated_buses=158,173,187

New Line._virtual_line159_line173_line187 bus1=188.1.2.3.4 bus2=146.1.2.3.4 phases=4 linecode=LC2 length=15.5501 units=m
! reduced_from=line159,line173,line187
! eliminated_buses=160,174

New Line._virtual_line162_line175_line189 bus1=149.1.2.3.4 bus2=190.1.2.3.4 phases=4 linecode=LC2 length=9.49266 units=m
! reduced_from=line162,line175,line189
! eliminated_buses=163,176

New Line._virtual_line179_line193_line207_line216_line226_line236_line247_line261_line273_line286_line300_line312_line325_line339_line355 bus1=168.1.2.3.4 bus2=356.1.2.3.4 phases=4 linecode=LC6 length=11.40249 units=m
! reduced_from=line179,line193,line207,line216,line226,line236,line247,line261,line273,line286,line300,line312,line325,line339,line355
! eliminated_buses=180,194,208,217,227,237,248,262,274,287,301,313,326,340

New Line._virtual_line180_line194_line208_line217_line227_line237_line248_line262 bus1=168.1.2.3.4 bus2=263.1.2.3.4 phases=4 linecode=LC3 length=7.66634 units=m
! reduced_from=line180,line194,line208,line217,line227,line237,line248,line262
! eliminated_buses=181,195,209,218,228,238,249

New Line._virtual_line184_line199 bus1=172.1.2.3.4 bus2=200.1.2.3.4 phases=4 linecode=LC3 length=12.4544 units=m
! reduced_from=line184,line199
! eliminated_buses=185

New Line._virtual_line185_line201 bus1=202.1.2.3.4 bus2=172.1.2.3.4 phases=4 linecode=LC2 length=21.331 units=m
! reduced_from=line185,line201
! eliminated_buses=186

New Line._virtual_line211_line221_line232_line243 bus1=200.1.2.3.4 bus2=244.1.2.3.4 phases=4 linecode=LC2 length=7.21249 units=m
! reduced_from=line211,line221,line232,line243
! eliminated_buses=212,222,233

New Line._virtual_line220_line231_line242_line254_line267 bus1=211.1.2.3.4 bus2=268.1.2.3.4 phases=4 linecode=LC2 length=17.48331 units=m
! reduced_from=line220,line231,line242,line254,line267
! eliminated_buses=221,232,243,255

New Line._virtual_line229_line239_line250_line264_line277_line290_line304 bus1=220.1.2.3.4 bus2=305.1.2.3.4 phases=4 linecode=LC2 length=13.2814 units=m
! reduced_from=line229,line239,line250,line264,line277,line290,line304
! eliminated_buses=230,240,251,265,278,291

New Line._virtual_line230_line240_line251_line265_line278 bus1=220.1.2.3.4 bus2=279.1.2.3.4 phases=4 linecode=LC3 length=17.88394 units=m
! reduced_from=line230,line240,line251,line265,line278
! eliminated_buses=231,241,252,266

New Line._virtual_line255_line268_line280_line294_line308_line321_line334_line349_line364_line378_line393_line408_line421_line432_line445_line460 bus1=461.1.2.3.4 bus2=244.1.2.3.4 phases=4 linecode=LC2 length=12.494845 units=m
! reduced_from=line255,line268,line280,line294,line308,line321,line334,line349,line364,line378,line393,line408,line421,line432,line445,line460
! eliminated_buses=256,269,281,295,309,322,335,350,365,379,394,409,422,433,446

New Line._virtual_line258_line270_line282_line296_line309_line322_line335_line350 bus1=246.1.2.3.4 bus2=351.1.2.3.4 phases=4 linecode=LC2 length=17.30643 units=m
! reduced_from=line258,line270,line282,line296,line309,line322,line335,line350
! eliminated_buses=259,271,283,297,310,323,336

New Line._virtual_line259_line271_line284_line298_line311_line324 bus1=246.1.2.3.4 bus2=325.1.2.3.4 phases=4 linecode=LC3 length=13.84056 units=m
! reduced_from=line259,line271,line284,line298,line311,line324
! eliminated_buses=260,272,285,299,312

New Line._virtual_line274_line287_line301_line313_line326_line340_line356_line370_line385_line399_line415_line427_line440_line455_line468_line481_line492 bus1=263.1.2.3.4 bus2=493.1.2.3.4 phases=4 linecode=LC6 length=12.10046 units=m
! reduced_from=line274,line287,line301,line313,line326,line340,line356,line370,line385,line399,line415,line427,line440,line455,line468,line481,line492
! eliminated_buses=275,288,302,314,327,341,357,371,386,400,416,428,441,456,469,482

New Line._virtual_line275_line288_line302_line314_line327 bus1=328.1.2.3.4 bus2=263.1.2.3.4 phases=4 linecode=LC3 length=4.05674 units=m
! reduced_from=line275,line288,line302,line314,line327
! eliminated_buses=276,289,303,315

New Line._virtual_line291_line305_line318_line330_line345_line361_line375 bus1=376.1.2.3.4 bus2=279.1.2.3.4 phases=4 linecode=LC2 length=13.60247 units=m
! reduced_from=line291,line305,line318,line330,line345,line361,line375
! eliminated_buses=292,306,319,331,346,362

New Line._virtual_line292_line306_line319 bus1=279.1.2.3.4 bus2=320.1.2.3.4 phases=4 linecode=LC3 length=18.0027 units=m
! reduced_from=line292,line306,line319
! eliminated_buses=293,307

New Line._virtual_line316_line329 bus1=330.1.2.3.4 bus2=305.1.2.3.4 phases=4 linecode=LC2 length=7.1581 units=m
! reduced_from=line316,line329
! eliminated_buses=317

New Line._virtual_line331_line346_line362_line376_line391 bus1=320.1.2.3.4 bus2=392.1.2.3.4 phases=4 linecode=LC2 length=12.93762 units=m
! reduced_from=line331,line346,line362,line376,line391
! eliminated_buses=332,347,363,377

New Line._virtual_line337_line352_line366_line380_line395_line410_line423_line434 bus1=435.1.2.3.4 bus2=325.1.2.3.4 phases=4 linecode=LC2 length=11.28697 units=m
! reduced_from=line337,line352,line366,line380,line395,line410,line423,line434
! eliminated_buses=338,353,367,381,396,411,424

New Line._virtual_line342_line358_line372_line387_line401_line417_line429_line442_line457_line470 bus1=328.1.2.3.4 bus2=471.1.2.3.4 phases=4 linecode=LC6 length=10.50838 units=m
! reduced_from=line342,line358,line372,line387,line401,line417,line429,line442,line457,line470
! eliminated_buses=343,359,373,388,402,418,430,443,458

New Line._virtual_line343_line359_line373_line388 bus1=328.1.2.3.4 bus2=389.1.2.3.4 phases=4 linecode=LC3 length=2.77599 units=m
! reduced_from=line343,line359,line373,line388
! eliminated_buses=344,360,374

New Line._virtual_line353_line367 bus1=368.1.2.3.4 bus2=339.1.2.3.4 phases=4 linecode=LC2 length=16.8877 units=m
! reduced_from=line353,line367
! eliminated_buses=354

New Line._virtual_line369_line384_line398 bus1=355.1.2.3.4 bus2=399.1.2.3.4 phases=4 linecode=LC3 length=17.959 units=m
! reduced_from=line369,line384,line398
! eliminated_buses=370,385

New Line._virtual_line381_line396_line411 bus1=412.1.2.3.4 bus2=369.1.2.3.4 phases=4 linecode=LC2 length=11.6128 units=m
! reduced_from=line381,line396,line411
! eliminated_buses=382,397

New Line._virtual_line389_line404 bus1=376.1.2.3.4 bus2=405.1.2.3.4 phases=4 linecode=LC2 length=6.6841 units=m
! reduced_from=line389,line404
! eliminated_buses=390

New Line._virtual_line402_line418_line430_line443_line458_line471_line483_line494_line505_line518_line529_line539_line548_line556_line564_line572_line580_line589_line596_line603 bus1=604.1.2.3.4 bus2=389.1.2.3.4 phases=4 linecode=LC6 length=19.5844 units=m
! reduced_from=line402,line418,line430,line443,line458,line471,line483,line494,line505,line518,line529,line539,line548,line556,line564,line572,line580,line589,line596,line603
! eliminated_buses=403,419,431,444,459,472,484,495,506,519,530,540,549,557,565,573,581,590,597

New Line._virtual_line403_line419_line431_line444_line459_line472_line484_line495_line506_line519_line530_line540_line549_line557_line565_line573 bus1=574.1.2.3.4 bus2=389.1.2.3.4 phases=4 linecode=LC3 length=9.84197 units=m
! reduced_from=line403,line419,line431,line444,line459,line472,line484,line495,line506,line519,line530,line540,line549,line557,line565,line573
! eliminated_buses=404,420,432,445,460,473,485,496,507,520,531,541,550,558,566

New Line._virtual_line405_line420 bus1=421.1.2.3.4 bus2=392.1.2.3.4 phases=4 linecode=LC2 length=7.8231 units=m
! reduced_from=line405,line420
! eliminated_buses=406

New Line._virtual_line413_line425 bus1=399.1.2.3.4 bus2=426.1.2.3.4 phases=4 linecode=LC2 length=7.738753 units=m
! reduced_from=line413,line425
! eliminated_buses=414

New Line._virtual_line414_line426 bus1=427.1.2.3.4 bus2=399.1.2.3.4 phases=4 linecode=LC3 length=16.2404 units=m
! reduced_from=line414,line426
! eliminated_buses=415

New Line._virtual_line436_line450_line463_line474_line485_line496_line507_line520_line531_line541_line550_line558_line566_line574_line583_line591_line598 bus1=599.1.2.3.4 bus2=426.1.2.3.4 phases=4 linecode=LC2 length=15.189014 units=m
! reduced_from=line436,line450,line463,line474,line485,line496,line507,line520,line531,line541,line550,line558,line566,line574,line583,line591,line598
! eliminated_buses=437,451,464,475,486,497,508,521,532,542,551,559,567,575,584,592

New Line._virtual_line439_line454 bus1=427.1.2.3.4 bus2=455.1.2.3.4 phases=4 linecode=LC3 length=18.3264 units=m
! reduced_from=line439,line454
! eliminated_buses=440

New Line._virtual_line447_line461 bus1=462.1.2.3.4 bus2=435.1.2.3.4 phases=4 linecode=LC2 length=8.9461 units=m
! reduced_from=line447,line461
! eliminated_buses=448

New Line._virtual_line451_line464_line475_line486_line497_line508_line521_line532_line542_line551_line559_line567_line575_line584_line592_line599 bus1=439.1.2.3.4 bus2=600.1.2.3.4 phases=4 linecode=LC2 length=15.505099 units=m
! reduced_from=line451,line464,line475,line486,line497,line508,line521,line532,line542,line551,line559,line567,line575,line584,line592,line599
! eliminated_buses=452,465,476,487,498,509,522,533,543,552,560,568,576,585,593

New Line._virtual_line477_line488_line499_line510_line523_line534_line544_line553_line561_line569_line577_line586 bus1=467.1.2.3.4 bus2=587.1.2.3.4 phases=4 linecode=LC2 length=15.18578 units=m
! reduced_from=line477,line488,line499,line510,line523,line534,line544,line553,line561,line569,line577,line586
! eliminated_buses=478,489,500,511,524,535,545,554,562,570,578

New Line._virtual_line479_line489_line500 bus1=468.1.2.3.4 bus2=501.1.2.3.4 phases=4 linecode=LC2 length=9.303257 units=m
! reduced_from=line479,line489,line500
! eliminated_buses=480,490

New Line._virtual_line490_line501_line513_line525_line536_line546 bus1=481.1.2.3.4 bus2=547.1.2.3.4 phases=4 linecode=LC2 length=18.0679 units=m
! reduced_from=line490,line501,line513,line525,line536,line546
! eliminated_buses=491,502,514,526,537

New Line._virtual_line511_line524_line535_line545_line554_line562_line570_line578_line587_line594_line601_line606_line609_line611_line613_line615 bus1=501.1.2.3.4 bus2=616.1.2.3.4 phases=4 linecode=LC2 length=14.236115 units=m
! reduced_from=line511,line524,line535,line545,line554,line562,line570,line578,line587,line594,line601,line606,line609,line611,line613,line615
! eliminated_buses=512,525,536,546,555,563,571,579,588,595,602,607,610,612,614

New Line._virtual_line514_line526_line537 bus1=503.1.2.3.4 bus2=538.1.2.3.4 phases=4 linecode=LC2 length=14.4958 units=m
! reduced_from=line514,line526,line537
! eliminated_buses=515,527

New Line._virtual_line582_line590_line597_line604 bus1=605.1.2.3.4 bus2=574.1.2.3.4 phases=4 linecode=LC6 length=10.66611 units=m
! reduced_from=line582,line590,line597,line604
! eliminated_buses=583,591,598

New Line.LINE107 bus1=101.1.2.3.4 bus2=108.1.2.3.4 phases=4 linecode=LC5 length=1.6759 units=m

New Line.LINE133 bus1=125.1.2.3.4 bus2=134.1.2.3.4 phases=4 linecode=LC3 length=9.2771 units=m

New Line.LINE137 bus1=127.1.2.3.4 bus2=138.1.2.3.4 phases=4 linecode=LC3 length=12.0727 units=m

New Line.LINE144 bus1=134.1.2.3.4 bus2=145.1.2.3.4 phases=4 linecode=LC2 length=6.6602 units=m

New Line.LINE148 bus1=138.1.2.3.4 bus2=149.1.2.3.4 phases=4 linecode=LC2 length=6.6948 units=m

New Line.LINE158 bus1=145.1.2.3.4 bus2=159.1.2.3.4 phases=4 linecode=LC2 length=12.56 units=m

New Line.LINE160 bus1=146.1.2.3.4 bus2=161.1.2.3.4 phases=4 linecode=LC1 length=12.4843 units=m

New Line.LINE163 bus1=149.1.2.3.4 bus2=164.1.2.3.4 phases=4 linecode=LC2 length=9.5477 units=m

New Line.LINE196 bus1=183.1.2.3.4 bus2=197.1.2.3.4 phases=4 linecode=LC2 length=6.0629 units=m

New Line.LINE197 bus1=183.1.2.3.4 bus2=198.1.2.3.4 phases=4 linecode=LC2 length=6.0629 units=m

New Line.LINE210 bus1=200.1.2.3.4 bus2=211.1.2.3.4 phases=4 linecode=LC3 length=9.8794 units=m

New Line.LINE219 bus1=211.1.2.3.4 bus2=220.1.2.3.4 phases=4 linecode=LC3 length=16.694 units=m

New Line.LINE256 bus1=244.1.2.3.4 bus2=257.1.2.3.4 phases=4 linecode=LC2 length=8.7962 units=m

New Line.LINE317 bus1=305.1.2.3.4 bus2=318.1.2.3.4 phases=4 linecode=LC2 length=5.8871 units=m

New Line.LINE338 bus1=325.1.2.3.4 bus2=339.1.2.3.4 phases=4 linecode=LC3 length=15.2902 units=m

New Line.LINE354 bus1=339.1.2.3.4 bus2=355.1.2.3.4 phases=4 linecode=LC3 length=8.0013 units=m

New Line.LINE368 bus1=355.1.2.3.4 bus2=369.1.2.3.4 phases=4 linecode=LC2 length=7.1888 units=m

New Line.LINE382 bus1=369.1.2.3.4 bus2=383.1.2.3.4 phases=4 linecode=LC2 length=8.8511 units=m

New Line.LINE390 bus1=376.1.2.3.4 bus2=391.1.2.3.4 phases=4 linecode=LC2 length=5.7659 units=m

New Line.LINE406 bus1=392.1.2.3.4 bus2=407.1.2.3.4 phases=4 linecode=LC2 length=5.5579 units=m

New Line.LINE437 bus1=426.1.2.3.4 bus2=438.1.2.3.4 phases=4 linecode=LC2 length=8.2849 units=m

New Line.LINE438 bus1=427.1.2.3.4 bus2=439.1.2.3.4 phases=4 linecode=LC2 length=8.0301 units=m

New Line.LINE448 bus1=435.1.2.3.4 bus2=449.1.2.3.4 phases=4 linecode=LC2 length=5.8807 units=m

New Line.LINE452 bus1=439.1.2.3.4 bus2=453.1.2.3.4 phases=4 linecode=LC2 length=7.6619 units=m

New Line.LINE466 bus1=455.1.2.3.4 bus2=467.1.2.3.4 phases=4 linecode=LC2 length=8.1421 units=m

New Line.LINE467 bus1=455.1.2.3.4 bus2=468.1.2.3.4 phases=4 linecode=LC3 length=20.6885 units=m

New Line.LINE478 bus1=467.1.2.3.4 bus2=479.1.2.3.4 phases=4 linecode=LC2 length=9.1255 units=m

New Line.LINE480 bus1=468.1.2.3.4 bus2=481.1.2.3.4 phases=4 linecode=LC3 length=21.5513 units=m

New Line.LINE491 bus1=481.1.2.3.4 bus2=492.1.2.3.4 phases=4 linecode=LC3 length=7.7928 units=m

New Line.LINE502 bus1=492.1.2.3.4 bus2=503.1.2.3.4 phases=4 linecode=LC2 length=10.2423 units=m

New Line.LINE512 bus1=501.1.2.3.4 bus2=513.1.2.3.4 phases=4 linecode=LC2 length=7.25 units=m

New Line.LINE515 bus1=503.1.2.3.4 bus2=516.1.2.3.4 phases=4 linecode=LC2 length=5.2585 units=m
