! Reduced enabled lines.

New Line._virtual_line0_line1_line2_line3_line4_line5_line6_line7_line8_line9_line10_line11_line12_line13_line14_line15_line16_line17_line18_line19_line20_line21_line22_line23_line24_line25_line26_line27_line28_line29_line30_line31_line32_line33_line34_line35 bus1=sourcebus.1.2.3.4 bus2=36.1.2.3.4 phases=4 linecode=LC5 length=35.612669 units=m
! reduced_from=line0,line1,line2,line3,line4,line5,line6,line7,line8,line9,line10,line11,line12,line13,line14,line15,line16,line17,line18,line19,line20,line21,line22,line23,line24,line25,line26,line27,line28,line29,line30,line31,line32,line33,line34,line35
! eliminated_buses=1,2,3,4,5,6,7,8,9,10,11,12,13,14,15,16,17,18,19,20,21,22,23,24,25,26,27,28,29,30,31,32,33,34,35

New Line._virtual_line36_line37_line38_line39_line40_line41_line42_line43_line44_line45_line46_line47_line48_line49_line50_line51_line52_line53_line54_line55 bus1=56.1.2.3.4 bus2=36.1.2.3.4 phases=4 linecode=LC8 length=30.51296 units=m
! reduced_from=line36,line37,line38,line39,line40,line41,line42,line43,line44,line45,line46,line47,line48,line49,line50,line51,line52,line53,line54,line55
! eliminated_buses=37,38,39,40,41,42,43,44,45,46,47,48,49,50,51,52,53,54,55

New Line.LINE56 bus1=56.1.2.3.4 bus2=57.1.2.3.4 phases=4 linecode=LC1 length=20.1692 units=m

New Line.LINE57 bus1=56.1.2.3.4 bus2=58.1.2.3.4 phases=4 linecode=LC1 length=20.1692 units=m
