! Reduced enabled lines.

New Line._virtual_line0_line1_line2_line3_line4_line5_line6_line7_line8_line9_line10_line11_line12_line13_line14_line15_line16_line17_line18_line19_line20_line21_line22_line23_line24_line25_line26_line27_line28_line29_line30_line31_line32_line33_line34_line35_line36_line37_line38_line39_line40_line41_line42_line43_line44_line45_line46_line47_line48_line49 bus1=50.1.2.3.4 bus2=sourcebus.1.2.3.4 phases=4 linecode=LC5 length=111.050042 units=m
! reduced_from=line0,line1,line2,line3,line4,line5,line6,line7,line8,line9,line10,line11,line12,line13,line14,line15,line16,line17,line18,line19,line20,line21,line22,line23,line24,line25,line26,line27,line28,line29,line30,line31,line32,line33,line34,line35,line36,line37,line38,line39,line40,line41,line42,line43,line44,line45,line46,line47,line48,line49
! eliminated_buses=1,2,3,4,5,6,7,8,9,10,11,12,13,14,15,16,17,18,19,20,21,22,23,24,25,26,27,28,29,30,31,32,33,34,35,36,37,38,39,40,41,42,43,44,45,46,47,48,49

New Line._virtual_line50_line53_line57_line62_line68_line73_line78_line84_line90_line96 bus1=97.1.2.3.4 bus2=50.1.2.3.4 phases=4 linecode=LC5 length=54.2349 units=m
! reduced_from=line50,line53,line57,line62,line68,line73,line78,line84,line90,line96
! eliminated_buses=51,54,58,63,69,74,79,85,91

New Line._virtual_line52_line56 bus1=50.1.2.3.4 bus2=57.1.2.3.4 phases=4 linecode=LC3 length=9.8519 units=m
! reduced_from=line52,line56
! eliminated_buses=53

New Line._virtual_line60_line65 bus1=66.1.2.3.4 bus2=57.1.2.3.4 phases=4 linecode=LC1 length=10.0942 units=m
! reduced_from=line60,line65
! eliminated_buses=61

New Line._virtual_line66_line71 bus1=72.1.2.3.4 bus2=62.1.2.3.4 phases=4 linecode=LC1 length=10.4436 units=m
! reduced_from=line66,line71
! eliminated_buses=67

New Line._virtual_line67_line72 bus1=73.1.2.3.4 bus2=62.1.2.3.4 phases=4 linecode=LC3 length=13.5419 units=m
! reduced_from=line67,line72
! eliminated_buses=68

New Line._virtual_line76_line81 bus1=73.1.2.3.4 bus2=82.1.2.3.4 phases=4 linecode=LC1 length=10.43 units=m
! reduced_from=line76,line81
! eliminated_buses=77

New Line._virtual_line82_line87 bus1=88.1.2.3.4 bus2=78.1.2.3.4 phases=4 linecode=LC1 length=12.0519 units=m
! reduced_from=line82,line87
! eliminated_buses=83

New Line._virtual_line88_line93 bus1=94.1.2.3.4 bus2=84.1.2.3.4 phases=4 linecode=LC1 length=10.2163 units=m
! reduced_from=line88,line93
! eliminated_buses=89

New Line._virtual_line94_line99 bus1=100.1.2.3.4 bus2=90.1.2.3.4 phases=4 linecode=LC1 length=11.2469 units=m
! reduced_from=line94,line99
! eliminated_buses=95

New Line._virtual_line95_line101 bus1=102.1.2.3.4 bus2=90.1.2.3.4 phases=4 linecode=LC3 length=15.3769 units=m
! reduced_from=line95,line101
! eliminated_buses=96

New Line._virtual_line102_line108_line115_line121_line126_line132_line138_line143_line147_line151_line156_line162_line168_line173_line177_line182 bus1=97.1.2.3.4 bus2=183.1.2.3.4 phases=4 linecode=LC5 length=9.66462 units=m
! reduced_from=line102,line108,line115,line121,line126,line132,line138,line143,line147,line151,line156,line162,line168,line173,line177,line182
! eliminated_buses=103,109,116,122,127,133,139,144,148,152,157,163,169,174,178

New Line._virtual_line103_line109_line116_line122_line127_line133_line139_line144_line148 bus1=149.1.2.3.4 bus2=97.1.2.3.4 phases=4 linecode=LC5 length=7.99058 units=m
! reduced_from=line103,line109,line116,line122,line127,line133,line139,line144,line148
! eliminated_buses=104,110,117,123,128,134,140,145

New Line._virtual_line106_line112 bus1=113.1.2.3.4 bus2=102.1.2.3.4 phases=4 linecode=LC1 length=10.6042 units=m
! reduced_from=line106,line112
! eliminated_buses=107

New Line._virtual_line113_line119 bus1=108.1.2.3.4 bus2=120.1.2.3.4 phases=4 linecode=LC1 length=10.1531 units=m
! reduced_from=line113,line119
! eliminated_buses=114

New Line._virtual_line114_line120_line125 bus1=108.1.2.3.4 bus2=126.1.2.3.4 phases=4 linecode=LC3 length=15.1571 units=m
! reduced_from=line114,line120,line125
! eliminated_buses=115,121

New Line._virtual_line130_line136 bus1=126.1.2.3.4 bus2=137.1.2.3.4 phases=4 linecode=LC1 length=11.4588 units=m
! reduced_from=line130,line136
! eliminated_buses=131

New Line._virtual_line137_line142_line146_line150_line155_line161_line167_line172_line176_line181_line186_line191_line198_line204_line210_line217_line224_line232_line240_line248 bus1=132.1.2.3.4 bus2=249.1.2.3.4 phases=4 linecode=LC1 length=21.46832 units=m
! reduced_from=line137,line142,line146,line150,line155,line161,line167,line172,line176,line181,line186,line191,line198,line204,line210,line217,line224,line232,line240,line248
! eliminated_buses=138,143,147,151,156,162,168,173,177,182,187,192,199,205,211,218,225,233,241

New Line._virtual_line152_line157_line163_line169_line174_line178_line183_line189_line195_line200_line206_line213_line221_line228_line236_line244 bus1=245.1.2.3.4 bus2=149.1.2.3.4 phases=4 linecode=LC3 length=9.483263 units=m
! reduced_from=line152,line157,line163,line169,line174,line178,line183,line189,line195,line200,line206,line213,line221,line228,line236,line244
! eliminated_buses=153,158,164,170,175,179,184,190,196,201,207,214,222,229,237

New Line._virtual_line158_line164_line170_line175 bus1=154.1.2.3.4 bus2=176.1.2.3.4 phases=4 linecode=LC4 length=5.71786 units=m
! reduced_from=line158,line164,line170,line175
! eliminated_buses=159,165,171

New Line._virtual_line159_line165 bus1=154.1.2.3.4 bus2=166.1.2.3.4 phases=4 linecode=LC1 length=12.0987 units=m
! reduced_from=line159,line165
! eliminated_buses=160

New Line._virtual_line179_line184 bus1=176.1.2.3.4 bus2=185.1.2.3.4 phases=4 linecode=LC1 length=11.9972 units=m
! reduced_from=line179,line184
! eliminated_buses=180

New Line._virtual_line180_line185_line190 bus1=176.1.2.3.4 bus2=191.1.2.3.4 phases=4 linecode=LC4 length=7.63562 units=m
! reduced_from=line180,line185,line190
! eliminated_buses=181,186

New Line._virtual_line188_line194_line199_line205_line212_line219_line226_line234_line242 bus1=183.1.2.3.4 bus2=243.1.2.3.4 phases=4 linecode=LC5 length=20.1048 units=m
! reduced_from=line188,line194,line199,line205,line212,line219,line226,line234,line242
! eliminated_buses=189,195,200,206,213,220,227,235

New Line._virtual_line196_line201 bus1=191.1.2.3.4 bus2=202.1.2.3.4 phases=4 linecode=LC1 length=13.3544 units=m
! reduced_from=line196,line201
! eliminated_buses=197

New Line._virtual_line202_line207_line214 bus1=198.1.2.3.4 bus2=215.1.2.3.4 phases=4 linecode=LC2 length=14.4093 units=m
! reduced_from=line202,line207,line214
! eliminated_buses=203,208

New Line._virtual_line203_line209_line216_line223_line231 bus1=232.1.2.3.4 bus2=198.1.2.3.4 phases=4 linecode=LC4 length=8.25284 units=m
! reduced_from=line203,line209,line216,line223,line231
! eliminated_buses=204,210,217,224

New Line._virtual_line238_line246 bus1=232.1.2.3.4 bus2=247.1.2.3.4 phases=4 linecode=LC1 length=14.8853 units=m
! reduced_from=line238,line246
! eliminated_buses=239

New Line._virtual_line239_line247 bus1=248.1.2.3.4 bus2=232.1.2.3.4 phases=4 linecode=LC4 length=7.0943 units=m
! reduced_from=line239,line247
! eliminated_buses=240

New Line._virtual_line251_line261_line268_line274_line281 bus1=282.1.2.3.4 bus2=243.1.2.3.4 phases=4 linecode=LC5 length=7.65807 units=m
! reduced_from=line251,line261,line268,line274,line281
! eliminated_buses=252,262,269,275

New Line._virtual_line253_line262_line269_line275_line282_line289_line297_line305_line313_line323_line336_line351_line368_line388_line406_line423_line437_line451_line462_line473_line487_line500_line513_line528_line541_line559_line577_line597_line619_line640_line661_line685_line707_line727_line747_line767_line786_line804 bus1=245.1.2.3.4 bus2=805.1.2.3.4 phases=4 linecode=LC3 length=88.18193 units=m
! reduced_from=line253,line262,line269,line275,line282,line289,line297,line305,line313,line323,line336,line351,line368,line388,line406,line423,line437,line451,line462,line473,line487,line500,line513,line528,line541,line559,line577,line597,line619,line640,line661,line685,line707,line727,line747,line767,line786,line804
! eliminated_buses=254,263,270,276,283,290,298,306,314,324,337,352,369,389,407,424,438,452,463,474,488,501,514,529,542,560,578,598,620,641,662,686,708,728,748,768,787

New Line._virtual_line254_line263_line270_line276_line283_line290_line298_line306_line314_line324_line337_line352_line369_line389_line407_line424_line438_line452_line463_line474_line488_line501_line514_line529_line542_line560_line578_line598_line620_line641_line662_line686 bus1=245.1.2.3.4 bus2=687.1.2.3.4 phases=4 linecode=LC1 length=22.505291 units=m
! reduced_from=line254,line263,line270,line276,line283,line290,line298,line306,line314,line324,line337,line352,line369,line389,line407,line424,line438,line452,line463,line474,line488,line501,line514,line529,line542,line560,line578,line598,line620,line641,line662,line686
! eliminated_buses=255,264,271,277,284,291,299,307,315,325,338,353,370,390,408,425,439,453,464,475,489,502,515,530,543,561,579,599,621,642,663

New Line._virtual_line256_line265 bus1=248.1.2.3.4 bus2=266.1.2.3.4 phases=4 linecode=LC1 length=15.9301 units=m
! reduced_from=line256,line265
! eliminated_buses=257

New Line._virtual_line257_line266_line272 bus1=273.1.2.3.4 bus2=248.1.2.3.4 phases=4 linecode=LC4 length=9.13246 units=m
! reduced_from=line257,line266,line272
! eliminated_buses=258,267

New Line._virtual_line278_line285 bus1=286.1.2.3.4 bus2=273.1.2.3.4 phases=4 linecode=LC1 length=27.5827 units=m
! reduced_from=line278,line285
! eliminated_buses=279

New Line._virtual_line279_line286 bus1=273.1.2.3.4 bus2=287.1.2.3.4 phases=4 linecode=LC4 length=1.09088 units=m
! reduced_from=line279,line286
! eliminated_buses=280

New Line._virtual_line288_line296_line303_line311 bus1=282.1.2.3.4 bus2=312.1.2.3.4 phases=4 linecode=LC5 length=19.5775 units=m
! reduced_from=line288,line296,line303,line311
! eliminated_buses=289,297,304

New Line._virtual_line292_line300_line307_line315_line325_line338 bus1=287.1.2.3.4 bus2=339.1.2.3.4 phases=4 linecode=LC6 length=16.0449 units=m
! reduced_from=line292,line300,line307,line315,line325,line338
! eliminated_buses=293,301,308,316,326

New Line._virtual_line302_line310_line319_line331_line347_line364_line384 bus1=294.1.2.3.4 bus2=385.1.2.3.4 phases=4 linecode=LC4 length=10.08121 units=m
! reduced_from=line302,line310,line319,line331,line347,line364,line384
! eliminated_buses=303,311,320,332,348,365

New Line._virtual_line308_line316 bus1=302.1.2.3.4 bus2=317.1.2.3.4 phases=4 linecode=LC4 length=12.7422 units=m
! reduced_from=line308,line316
! eliminated_buses=309

New Line._virtual_line309_line318_line330_line346_line363 bus1=364.1.2.3.4 bus2=302.1.2.3.4 phases=4 linecode=LC6 length=13.01445 units=m
! reduced_from=line309,line318,line330,line346,line363
! eliminated_buses=310,319,331,347

New Line._virtual_line320_line332_line348_line365 bus1=312.1.2.3.4 bus2=366.1.2.3.4 phases=4 linecode=LC5 length=5.6678 units=m
! reduced_from=line320,line332,line348,line365
! eliminated_buses=321,333,349

New Line._virtual_line326_line339_line353_line370_line391 bus1=392.1.2.3.4 bus2=317.1.2.3.4 phases=4 linecode=LC6 length=16.97493 units=m
! reduced_from=line326,line339,line353,line370,line391
! eliminated_buses=327,340,354,371

New Line._virtual_line355_line373 bus1=374.1.2.3.4 bus2=342.1.2.3.4 phases=4 linecode=LC4 length=18.7218 units=m
! reduced_from=line355,line373
! eliminated_buses=356

New Line._virtual_line358_line381 bus1=382.1.2.3.4 bus2=344.1.2.3.4 phases=4 linecode=LC1 length=19.7254 units=m
! reduced_from=line358,line381
! eliminated_buses=359

New Line._virtual_line379_line399 bus1=358.1.2.3.4 bus2=400.1.2.3.4 phases=4 linecode=LC1 length=18.8738 units=m
! reduced_from=line379,line399
! eliminated_buses=380

New Line._virtual_line382_line400_line415_line431_line447_line458_line469 bus1=470.1.2.3.4 bus2=364.1.2.3.4 phases=4 linecode=LC6 length=11.23207 units=m
! reduced_from=line382,line400,line415,line431,line447,line458,line469
! eliminated_buses=383,401,416,432,448,459

New Line._virtual_line385_line403 bus1=404.1.2.3.4 bus2=366.1.2.3.4 phases=4 linecode=LC1 length=7.8477 units=m
! reduced_from=line385,line403
! eliminated_buses=386

New Line._virtual_line386_line404_line421_line435_line450 bus1=366.1.2.3.4 bus2=451.1.2.3.4 phases=4 linecode=LC5 length=19.9195 units=m
! reduced_from=line386,line404,line421,line435,line450
! eliminated_buses=387,405,422,436

New Line._virtual_line396_line414_line430_line446_line457 bus1=374.1.2.3.4 bus2=458.1.2.3.4 phases=4 linecode=LC2 length=7.78217 units=m
! reduced_from=line396,line414,line430,line446,line457
! eliminated_buses=397,415,431,447

New Line._virtual_line401_line416 bus1=385.1.2.3.4 bus2=417.1.2.3.4 phases=4 linecode=LC1 length=18.5522 units=m
! reduced_from=line401,line416
! eliminated_buses=402

New Line._virtual_line417_line432 bus1=433.1.2.3.4 bus2=403.1.2.3.4 phases=4 linecode=LC1 length=18.9368 units=m
! reduced_from=line417,line432
! eliminated_buses=418

New Line._virtual_line433_line448 bus1=419.1.2.3.4 bus2=449.1.2.3.4 phases=4 linecode=LC1 length=19.0682 units=m
! reduced_from=line433,line448
! eliminated_buses=434

New Line._virtual_line434_line449_line459_line470_line482_line496_line510_line524_line537 bus1=419.1.2.3.4 bus2=538.1.2.3.4 phases=4 linecode=LC4 length=16.655712 units=m
! reduced_from=line434,line449,line459,line470,line482,line496,line510,line524,line537
! eliminated_buses=435,450,460,471,483,497,511,525

New Line._virtual_line460_line471 bus1=451.1.2.3.4 bus2=472.1.2.3.4 phases=4 linecode=LC1 length=7.8121 units=m
! reduced_from=line460,line471
! eliminated_buses=461

New Line._virtual_line461_line472 bus1=473.1.2.3.4 bus2=451.1.2.3.4 phases=4 linecode=LC5 length=5.7902 units=m
! reduced_from=line461,line472
! eliminated_buses=462

New Line._virtual_line467_line478_line492 bus1=458.1.2.3.4 bus2=493.1.2.3.4 phases=4 linecode=LC2 length=16.39477 units=m
! reduced_from=line467,line478,line492
! eliminated_buses=468,479

New Line._virtual_line468_line481_line495_line509_line523_line536 bus1=458.1.2.3.4 bus2=537.1.2.3.4 phases=4 linecode=LC1 length=15.42817 units=m
! reduced_from=line468,line481,line495,line509,line523,line536
! eliminated_buses=469,482,496,510,524

New Line._virtual_line486_line499_line512_line527_line540 bus1=541.1.2.3.4 bus2=473.1.2.3.4 phases=4 linecode=LC5 length=20.99283 units=m
! reduced_from=line486,line499,line512,line527,line540
! eliminated_buses=487,500,513,528

New Line._virtual_line505_line518_line532 bus1=533.1.2.3.4 bus2=493.1.2.3.4 phases=4 linecode=LC1 length=10.40788 units=m
! reduced_from=line505,line518,line532
! eliminated_buses=506,519

New Line._virtual_line506_line520_line534 bus1=535.1.2.3.4 bus2=493.1.2.3.4 phases=4 linecode=LC2 length=13.5666 units=m
! reduced_from=line506,line520,line534
! eliminated_buses=507,521

New Line._virtual_line545_line563_line581_line601_line623 bus1=624.1.2.3.4 bus2=533.1.2.3.4 phases=4 linecode=LC1 length=12.45044 units=m
! reduced_from=line545,line563,line581,line601,line623
! eliminated_buses=546,564,582,602

New Line._virtual_line548_line565_line583_line603_line625_line645_line666_line690_line711_line731_line751_line771 bus1=535.1.2.3.4 bus2=772.1.2.3.4 phases=4 linecode=LC1 length=20.66727 units=m
! reduced_from=line548,line565,line583,line603,line625,line645,line666,line690,line711,line731,line751,line771
! eliminated_buses=549,566,584,604,626,646,667,691,712,732,752

New Line._virtual_line549_line566_line584_line604_line626_line646_line667_line691_line712 bus1=535.1.2.3.4 bus2=713.1.2.3.4 phases=4 linecode=LC1 length=21.05448 units=m
! reduced_from=line549,line566,line584,line604,line626,line646,line667,line691,line712
! eliminated_buses=550,567,585,605,627,647,668,692

New Line._virtual_line550_line567_line586 bus1=587.1.2.3.4 bus2=535.1.2.3.4 phases=4 linecode=LC2 length=6.6669 units=m
! reduced_from=line550,line567,line586
! eliminated_buses=551,568

New Line._virtual_line552_line569 bus1=538.1.2.3.4 bus2=570.1.2.3.4 phases=4 linecode=LC1 length=12.9 units=m
! reduced_from=line552,line569
! eliminated_buses=553

New Line._virtual_line556_line574_line592 bus1=541.1.2.3.4 bus2=593.1.2.3.4 phases=4 linecode=LC1 length=15.6901 units=m
! reduced_from=line556,line574,line592
! eliminated_buses=557,575

New Line._virtual_line557_line576 bus1=541.1.2.3.4 bus2=577.1.2.3.4 phases=4 linecode=LC5 length=3.09926 units=m
! reduced_from=line557,line576
! eliminated_buses=558

New Line._virtual_line570_line588 bus1=589.1.2.3.4 bus2=554.1.2.3.4 phases=4 linecode=LC1 length=16.1141 units=m
! reduced_from=line570,line588
! eliminated_buses=571

New Line._virtual_line594_line617_line638_line659_line683_line705_line725_line745_line765_line784_line802_line820_line841_line858_line874_line892_line913_line932_line954 bus1=955.1.2.3.4 bus2=577.1.2.3.4 phases=4 linecode=LC5 length=10.177249 units=m
! reduced_from=line594,line617,line638,line659,line683,line705,line725,line745,line765,line784,line802,line820,line841,line858,line874,line892,line913,line932,line954
! eliminated_buses=595,618,639,660,684,706,726,746,766,785,803,821,842,859,875,893,914,933

New Line._virtual_line606_line627_line647_line668_line692 bus1=693.1.2.3.4 bus2=587.1.2.3.4 phases=4 linecode=LC1 length=11.08684 units=m
! reduced_from=line606,line627,line647,line668,line692
! eliminated_buses=607,628,648,669

New Line._virtual_line607_line628_line648 bus1=649.1.2.3.4 bus2=587.1.2.3.4 phases=4 linecode=LC2 length=12.1822 units=m
! reduced_from=line607,line628,line648
! eliminated_buses=608,629

New Line._virtual_line613_line634_line654 bus1=594.1.2.3.4 bus2=655.1.2.3.4 phases=4 linecode=LC5 length=20.3724 units=m
! reduced_from=line613,line634,line654
! eliminated_buses=614,635

New Line._virtual_line614_line636_line658 bus1=594.1.2.3.4 bus2=659.1.2.3.4 phases=4 linecode=LC1 length=16.5659 units=m
! reduced_from=line614,line636,line658
! eliminated_buses=615,637

New Line._virtual_line669_line693 bus1=649.1.2.3.4 bus2=694.1.2.3.4 phases=4 linecode=LC1 length=16.7397 units=m
! reduced_from=line669,line693
! eliminated_buses=670

New Line._virtual_line670_line694_line714_line733_line753_line773_line790_line807_line826_line847_line864_line880_line899_line921_line941_line961 bus1=649.1.2.3.4 bus2=962.1.2.3.4 phases=4 linecode=LC2 length=32.75169 units=m
! reduced_from=line670,line694,line714,line733,line753,line773,line790,line807,line826,line847,line864,line880,line899,line921,line941,line961
! eliminated_buses=671,695,715,734,754,774,791,808,827,848,865,881,900,922,942

New Line._virtual_line676_line698 bus1=699.1.2.3.4 bus2=655.1.2.3.4 phases=4 linecode=LC5 length=5.7526 units=m
! reduced_from=line676,line698
! eliminated_buses=677

New Line._virtual_line677_line700_line721 bus1=722.1.2.3.4 bus2=655.1.2.3.4 phases=4 linecode=LC1 length=12.7578 units=m
! reduced_from=line677,line700,line721
! eliminated_buses=678,701

New Line._virtual_line717_line736_line756 bus1=757.1.2.3.4 bus2=699.1.2.3.4 phases=4 linecode=LC5 length=20.0757 units=m
! reduced_from=line717,line736,line756
! eliminated_buses=718,737

New Line._virtual_line718_line739 bus1=699.1.2.3.4 bus2=740.1.2.3.4 phases=4 linecode=LC1 length=15.9062 units=m
! reduced_from=line718,line739
! eliminated_buses=719

New Line._virtual_line776_line796 bus1=757.1.2.3.4 bus2=797.1.2.3.4 phases=4 linecode=LC1 length=14.0122 units=m
! reduced_from=line776,line796
! eliminated_buses=777

New Line._virtual_line792_line809 bus1=810.1.2.3.4 bus2=776.1.2.3.4 phases=4 linecode=LC5 length=10.9223 units=m
! reduced_from=line792,line809
! eliminated_buses=793

New Line._virtual_line793_line812 bus1=776.1.2.3.4 bus2=813.1.2.3.4 phases=4 linecode=LC1 length=15.8093 units=m
! reduced_from=line793,line812
! eliminated_buses=794

New Line._virtual_line822_line843_line860_line876_line894_line916 bus1=917.1.2.3.4 bus2=805.1.2.3.4 phases=4 linecode=LC1 length=30.73516 units=m
! reduced_from=line822,line843,line860,line876,line894,line916
! eliminated_buses=823,844,861,877,895

New Line._virtual_line828_line849 bus1=850.1.2.3.4 bus2=810.1.2.3.4 phases=4 linecode=LC5 length=9.7985 units=m
! reduced_from=line828,line849
! eliminated_buses=829

New Line._virtual_line829_line851 bus1=852.1.2.3.4 bus2=810.1.2.3.4 phases=4 linecode=LC1 length=19.1085 units=m
! reduced_from=line829,line851
! eliminated_buses=830

New Line._virtual_line866_line883 bus1=850.1.2.3.4 bus2=884.1.2.3.4 phases=4 linecode=LC1 length=11.2629 units=m
! reduced_from=line866,line883
! eliminated_buses=867

New Line._virtual_line884_line903 bus1=904.1.2.3.4 bus2=868.1.2.3.4 phases=4 linecode=LC1 length=19.0218 units=m
! reduced_from=line884,line903
! eliminated_buses=885

New Line._virtual_line904_line925 bus1=926.1.2.3.4 bus2=886.1.2.3.4 phases=4 linecode=LC5 length=3.4686 units=m
! reduced_from=line904,line925
! eliminated_buses=905

New Line._virtual_line905_line928 bus1=929.1.2.3.4 bus2=886.1.2.3.4 phases=4 linecode=LC1 length=15.4026 units=m
! reduced_from=line905,line928
! eliminated_buses=906

New Line._virtual_line945_line965 bus1=926.1.2.3.4 bus2=966.1.2.3.4 phases=4 linecode=LC1 length=19.3478 units=m
! reduced_from=line945,line965
! eliminated_buses=946

New Line._virtual_line967_line988 bus1=947.1.2.3.4 bus2=989.1.2.3.4 phases=4 linecode=LC1 length=20.5141 units=m
! reduced_from=line967,line988
! eliminated_buses=968

New Line._virtual_line974_line994 bus1=955.1.2.3.4 bus2=995.1.2.3.4 phases=4 linecode=LC1 length=17.895 units=m
! reduced_from=line974,line994
! eliminated_buses=975

New Line._virtual_line980_line1003_line1022_line1039_line1052 bus1=962.1.2.3.4 bus2=1053.1.2.3.4 phases=4 linecode=LC1 length=10.7338 units=m
! reduced_from=line980,line1003,line1022,line1039,line1052
! eliminated_buses=981,1004,1023,1040

New Line._virtual_line981_line1004_line1023_line1041_line1054 bus1=1055.1.2.3.4 bus2=962.1.2.3.4 phases=4 linecode=LC2 length=18.53454 units=m
! reduced_from=line981,line1004,line1023,line1041,line1054
! eliminated_buses=982,1005,1024,1042

New Line._virtual_line986_line1009 bus1=1010.1.2.3.4 bus2=967.1.2.3.4 phases=4 linecode=LC1 length=19.5755 units=m
! reduced_from=line986,line1009
! eliminated_buses=987

New Line._virtual_line996_line1017 bus1=1018.1.2.3.4 bus2=976.1.2.3.4 phases=4 linecode=LC1 length=11.0754 units=m
! reduced_from=line996,line1017
! eliminated_buses=997

New Line._virtual_line999_line1018 bus1=1019.1.2.3.4 bus2=977.1.2.3.4 phases=4 linecode=LC1 length=14.2477 units=m
! reduced_from=line999,line1018
! eliminated_buses=1000

New Line._virtual_line1007_line1026 bus1=986.1.2.3.4 bus2=1027.1.2.3.4 phases=4 linecode=LC1 length=13.4156 units=m
! reduced_from=line1007,line1026
! eliminated_buses=1008

New Line._virtual_line1015_line1032 bus1=996.1.2.3.4 bus2=1033.1.2.3.4 phases=4 linecode=LC5 length=10.7356 units=m
! reduced_from=line1015,line1032
! eliminated_buses=1016

New Line._virtual_line1035_line1048 bus1=1049.1.2.3.4 bus2=1017.1.2.3.4 phases=4 linecode=LC1 length=10.8368 units=m
! reduced_from=line1035,line1048
! eliminated_buses=1036

New Line._virtual_line1060_line1075 bus1=1076.1.2.3.4 bus2=1048.1.2.3.4 phases=4 linecode=LC1 length=11.9967 units=m
! reduced_from=line1060,line1075
! eliminated_buses=1061

New Line._virtual_line1063_line1078_line1093 bus1=1094.1.2.3.4 bus2=1053.1.2.3.4 phases=4 linecode=LC1 length=9.1293 units=m
! reduced_from=line1063,line1078,line1093
! eliminated_buses=1064,1079

New Line._virtual_line1066_line1080_line1095_line1108_line1120 bus1=1055.1.2.3.4 bus2=1121.1.2.3.4 phases=4 linecode=LC1 length=13.02249 units=m
! reduced_from=line1066,line1080,line1095,line1108,line1120
! eliminated_buses=1067,1081,1096,1109

New Line._virtual_line1067_line1082_line1097_line1110_line1122 bus1=1055.1.2.3.4 bus2=1123.1.2.3.4 phases=4 linecode=LC2 length=11.89389 units=m
! reduced_from=line1067,line1082,line1097,line1110,line1122
! eliminated_buses=1068,1083,1098,1111

New Line._virtual_line1071_line1089 bus1=1058.1.2.3.4 bus2=1090.1.2.3.4 phases=4 linecode=LC1 length=12.2394 units=m
! reduced_from=line1071,line1089
! eliminated_buses=1072

New Line._virtual_line1074_line1090 bus1=1091.1.2.3.4 bus2=1059.1.2.3.4 phases=4 linecode=LC1 length=12.5277 units=m
! reduced_from=line1074,line1090
! eliminated_buses=1075

New Line._virtual_line1085_line1100 bus1=1071.1.2.3.4 bus2=1101.1.2.3.4 phases=4 linecode=LC1 length=11.0433 units=m
! reduced_from=line1085,line1100
! eliminated_buses=1086

New Line._virtual_line1087_line1101 bus1=1102.1.2.3.4 bus2=1071.1.2.3.4 phases=4 linecode=LC5 length=7.7956 units=m
! reduced_from=line1087,line1101
! eliminated_buses=1088

New Line._virtual_line1112_line1123 bus1=1102.1.2.3.4 bus2=1124.1.2.3.4 phases=4 linecode=LC1 length=12.6801 units=m
! reduced_from=line1112,line1123
! eliminated_buses=1113

New Line._virtual_line1128_line1136_line1145 bus1=1121.1.2.3.4 bus2=1146.1.2.3.4 phases=4 linecode=LC1 length=10.9928 units=m
! reduced_from=line1128,line1136,line1145
! eliminated_buses=1129,1137

New Line._virtual_line1132_line1139_line1148_line1157_line1166_line1176 bus1=1177.1.2.3.4 bus2=1123.1.2.3.4 phases=4 linecode=LC1 length=17.081974 units=m
! reduced_from=line1132,line1139,line1148,line1157,line1166,line1176
! eliminated_buses=1133,1140,1149,1158,1167

New Line.LINE61 bus1=57.1.2.3.4 bus2=62.1.2.3.4 phases=4 linecode=LC3 length=6.1177 units=m

New Line.LINE77 bus1=73.1.2.3.4 bus2=78.1.2.3.4 phases=4 linecode=LC3 length=7.5502 units=m

New Line.LINE83 bus1=78.1.2.3.4 bus2=84.1.2.3.4 phases=4 linecode=LC3 length=16.2692 units=m

New Line.LINE89 bus1=84.1.2.3.4 bus2=90.1.2.3.4 phases=4 linecode=LC3 length=6.1448 units=m

New Line.LINE107 bus1=102.1.2.3.4 bus2=108.1.2.3.4 phases=4 linecode=LC3 length=5.8575 units=m

New Line.LINE131 bus1=126.1.2.3.4 bus2=132.1.2.3.4 phases=4 linecode=LC3 length=1.1513 units=m

New Line.LINE153 bus1=149.1.2.3.4 bus2=154.1.2.3.4 phases=4 linecode=LC4 length=1.3676 units=m

New Line.LINE187 bus1=183.1.2.3.4 bus2=188.1.2.3.4 phases=4 linecode=LC1 length=8.2053 units=m

New Line.LINE192 bus1=188.1.2.3.4 bus2=193.1.2.3.4 phases=4 linecode=LC1 length=8.1589 units=m

New Line.LINE193 bus1=188.1.2.3.4 bus2=194.1.2.3.4 phases=4 linecode=LC1 length=8.1589 units=m

New Line.LINE197 bus1=191.1.2.3.4 bus2=198.1.2.3.4 phases=4 linecode=LC4 length=6.3951 units=m

New Line.LINE250 bus1=243.1.2.3.4 bus2=251.1.2.3.4 phases=4 linecode=LC1 length=6.9689 units=m

New Line.LINE259 bus1=251.1.2.3.4 bus2=260.1.2.3.4 phases=4 linecode=LC1 length=5.1899 units=m

New Line.LINE260 bus1=251.1.2.3.4 bus2=261.1.2.3.4 phases=4 linecode=LC1 length=5.1899 units=m

New Line.LINE287 bus1=282.1.2.3.4 bus2=288.1.2.3.4 phases=4 linecode=LC1 length=7.9193 units=m

New Line.LINE293 bus1=287.1.2.3.4 bus2=294.1.2.3.4 phases=4 linecode=LC4 length=1.6608 units=m

New Line.LINE294 bus1=288.1.2.3.4 bus2=295.1.2.3.4 phases=4 linecode=LC1 length=4.5573 units=m

New Line.LINE295 bus1=288.1.2.3.4 bus2=296.1.2.3.4 phases=4 linecode=LC1 length=4.5573 units=m

New Line.LINE301 bus1=294.1.2.3.4 bus2=302.1.2.3.4 phases=4 linecode=LC4 length=14.2463 units=m

New Line.LINE321 bus1=312.1.2.3.4 bus2=322.1.2.3.4 phases=4 linecode=LC1 length=7.1523 units=m

New Line.LINE328 bus1=317.1.2.3.4 bus2=329.1.2.3.4 phases=4 linecode=LC4 length=9.8644 units=m

New Line.LINE329 bus1=317.1.2.3.4 bus2=330.1.2.3.4 phases=4 linecode=LC4 length=9.1374 units=m

New Line.LINE333 bus1=322.1.2.3.4 bus2=334.1.2.3.4 phases=4 linecode=LC1 length=5.1932 units=m

New Line.LINE334 bus1=322.1.2.3.4 bus2=335.1.2.3.4 phases=4 linecode=LC1 length=5.1932 units=m

New Line.LINE341 bus1=329.1.2.3.4 bus2=342.1.2.3.4 phases=4 linecode=LC4 length=13.9843 units=m

New Line.LINE343 bus1=329.1.2.3.4 bus2=344.1.2.3.4 phases=4 linecode=LC4 length=5.5476 units=m

New Line.LINE344 bus1=330.1.2.3.4 bus2=345.1.2.3.4 phases=4 linecode=LC1 length=12.2451 units=m

New Line.LINE356 bus1=342.1.2.3.4 bus2=357.1.2.3.4 phases=4 linecode=LC4 length=3.3622 units=m

New Line.LINE357 bus1=342.1.2.3.4 bus2=358.1.2.3.4 phases=4 linecode=LC4 length=2.2563 units=m

New Line.LINE361 bus1=345.1.2.3.4 bus2=362.1.2.3.4 phases=4 linecode=LC1 length=7.005 units=m

New Line.LINE362 bus1=345.1.2.3.4 bus2=363.1.2.3.4 phases=4 linecode=LC1 length=7.005 units=m

New Line.LINE377 bus1=357.1.2.3.4 bus2=378.1.2.3.4 phases=4 linecode=LC1 length=11.8508 units=m

New Line.LINE383 bus1=364.1.2.3.4 bus2=384.1.2.3.4 phases=4 linecode=LC6 length=4.2383 units=m

New Line.LINE397 bus1=378.1.2.3.4 bus2=398.1.2.3.4 phases=4 linecode=LC1 length=7.452 units=m

New Line.LINE398 bus1=378.1.2.3.4 bus2=399.1.2.3.4 phases=4 linecode=LC1 length=7.452 units=m

New Line.LINE402 bus1=385.1.2.3.4 bus2=403.1.2.3.4 phases=4 linecode=LC4 length=13.9813 units=m

New Line.LINE418 bus1=403.1.2.3.4 bus2=419.1.2.3.4 phases=4 linecode=LC4 length=6.7376 units=m

New Line.LINE419 bus1=404.1.2.3.4 bus2=420.1.2.3.4 phases=4 linecode=LC1 length=5.9945 units=m

New Line.LINE420 bus1=404.1.2.3.4 bus2=421.1.2.3.4 phases=4 linecode=LC1 length=5.9945 units=m

New Line.LINE483 bus1=472.1.2.3.4 bus2=484.1.2.3.4 phases=4 linecode=LC1 length=2.3274 units=m

New Line.LINE484 bus1=472.1.2.3.4 bus2=485.1.2.3.4 phases=4 linecode=LC1 length=2.3274 units=m

New Line.LINE485 bus1=473.1.2.3.4 bus2=486.1.2.3.4 phases=4 linecode=LC1 length=7.6884 units=m

New Line.LINE497 bus1=486.1.2.3.4 bus2=498.1.2.3.4 phases=4 linecode=LC1 length=6.01 units=m

New Line.LINE498 bus1=486.1.2.3.4 bus2=499.1.2.3.4 phases=4 linecode=LC1 length=6.01 units=m

New Line.LINE546 bus1=533.1.2.3.4 bus2=547.1.2.3.4 phases=4 linecode=LC1 length=0.74798 units=m

New Line.LINE553 bus1=538.1.2.3.4 bus2=554.1.2.3.4 phases=4 linecode=LC4 length=5.076 units=m

New Line.LINE593 bus1=577.1.2.3.4 bus2=594.1.2.3.4 phases=4 linecode=LC5 length=1.6424 units=m

New Line.LINE612 bus1=593.1.2.3.4 bus2=613.1.2.3.4 phases=4 linecode=LC1 length=5.6894 units=m

New Line.LINE682 bus1=659.1.2.3.4 bus2=683.1.2.3.4 phases=4 linecode=LC1 length=5.121 units=m

New Line.LINE741 bus1=722.1.2.3.4 bus2=742.1.2.3.4 phases=4 linecode=LC1 length=1.9753 units=m

New Line.LINE759 bus1=740.1.2.3.4 bus2=760.1.2.3.4 phases=4 linecode=LC1 length=5.6702 units=m

New Line.LINE775 bus1=757.1.2.3.4 bus2=776.1.2.3.4 phases=4 linecode=LC5 length=5.6748 units=m

New Line.LINE814 bus1=797.1.2.3.4 bus2=815.1.2.3.4 phases=4 linecode=LC1 length=3.6729 units=m

New Line.LINE833 bus1=813.1.2.3.4 bus2=834.1.2.3.4 phases=4 linecode=LC1 length=5.5675 units=m

New Line.LINE867 bus1=850.1.2.3.4 bus2=868.1.2.3.4 phases=4 linecode=LC5 length=2.7964 units=m

New Line.LINE885 bus1=868.1.2.3.4 bus2=886.1.2.3.4 phases=4 linecode=LC5 length=2.7964 units=m

New Line.LINE902 bus1=884.1.2.3.4 bus2=903.1.2.3.4 phases=4 linecode=LC1 length=0.83508 units=m

New Line.LINE935 bus1=917.1.2.3.4 bus2=936.1.2.3.4 phases=4 linecode=LC1 length=4.7986 units=m

New Line.LINE936 bus1=917.1.2.3.4 bus2=937.1.2.3.4 phases=4 linecode=LC1 length=4.7986 units=m

New Line.LINE946 bus1=926.1.2.3.4 bus2=947.1.2.3.4 phases=4 linecode=LC5 length=11.57 units=m

New Line.LINE951 bus1=929.1.2.3.4 bus2=952.1.2.3.4 phases=4 linecode=LC1 length=5.3647 units=m

New Line.LINE966 bus1=947.1.2.3.4 bus2=967.1.2.3.4 phases=4 linecode=LC5 length=3.583 units=m

New Line.LINE975 bus1=955.1.2.3.4 bus2=976.1.2.3.4 phases=4 linecode=LC5 length=4.5716 units=m

New Line.LINE976 bus1=955.1.2.3.4 bus2=977.1.2.3.4 phases=4 linecode=LC5 length=2.2859 units=m

New Line.LINE985 bus1=967.1.2.3.4 bus2=986.1.2.3.4 phases=4 linecode=LC5 length=1.6099 units=m

New Line.LINE995 bus1=976.1.2.3.4 bus2=996.1.2.3.4 phases=4 linecode=LC5 length=5.3305 units=m

New Line.LINE1016 bus1=996.1.2.3.4 bus2=1017.1.2.3.4 phases=4 linecode=LC5 length=2.6173 units=m

New Line.LINE1043 bus1=1027.1.2.3.4 bus2=1044.1.2.3.4 phases=4 linecode=LC1 length=3.1308 units=m

New Line.LINE1046 bus1=1033.1.2.3.4 bus2=1047.1.2.3.4 phases=4 linecode=LC5 length=6.3289 units=m

New Line.LINE1047 bus1=1033.1.2.3.4 bus2=1048.1.2.3.4 phases=4 linecode=LC5 length=3.163 units=m

New Line.LINE1057 bus1=1047.1.2.3.4 bus2=1058.1.2.3.4 phases=4 linecode=LC5 length=11.201 units=m

New Line.LINE1058 bus1=1047.1.2.3.4 bus2=1059.1.2.3.4 phases=4 linecode=LC5 length=5.5996 units=m

New Line.LINE1064 bus1=1053.1.2.3.4 bus2=1065.1.2.3.4 phases=4 linecode=LC1 length=3.1339 units=m

New Line.LINE1070 bus1=1058.1.2.3.4 bus2=1071.1.2.3.4 phases=4 linecode=LC5 length=10.4037 units=m

New Line.LINE1129 bus1=1121.1.2.3.4 bus2=1130.1.2.3.4 phases=4 linecode=LC1 length=4.1125 units=m

New Line.LINE1186 bus1=1177.1.2.3.4 bus2=1187.1.2.3.4 phases=4 linecode=LC1 length=4.0332 units=m

New Line.LINE1187 bus1=1177.1.2.3.4 bus2=1188.1.2.3.4 phases=4 linecode=LC1 length=4.0332 units=m
