! Reduced enabled lines.

New Line._virtual_line0_line1_line2_line3_line4_line5_line6_line7_line8_line9_line10_line11_line12_line13_line14_line15_line16_line17_line18_line19_line20_line21_line22_line23_line24_line25_line26_line27_line28 bus1=sourcebus.1.2.3.4 bus2=29.1.2.3.4 phases=4 linecode=LC5 length=21.733082 units=m
! reduced_from=line0,line1,line2,line3,line4,line5,line6,line7,line8,line9,line10,line11,line12,line13,line14,line15,line16,line17,line18,line19,line20,line21,line22,line23,line24,line25,line26,line27,line28
! eliminated_buses=1,2,3,4,5,6,7,8,9,10,11,12,13,14,15,16,17,18,19,20,21,22,23,24,25,26,27,28

New Line._virtual_line29_line31_line33_line35_line38_line41_line43_line46_line49_line52_line56_line60_line64_line69_line73_line78_line82_line86_line91_line97_line101_line105 bus1=106.1.2.3.4 bus2=29.1.2.3.4 phases=4 linecode=LC5 length=96.05469 units=m
! reduced_from=line29,line31,line33,line35,line38,line41,line43,line46,line49,line52,line56,line60,line64,line69,line73,line78,line82,line86,line91,line97,line101,line105
! eliminated_buses=30,32,34,36,39,42,44,47,50,53,57,61,65,70,74,79,83,87,92,98,102

New Line._virtual_line30_line32_line34_line36_line39_line42_line45_line48_line51 bus1=52.1.2.3.4 bus2=29.1.2.3.4 phases=4 linecode=LC3 length=22.21011 units=m
! reduced_from=line30,line32,line34,line36,line39,line42,line45,line48,line51
! eliminated_buses=31,33,35,37,40,43,46,49

New Line._virtual_line54_line58 bus1=52.1.2.3.4 bus2=59.1.2.3.4 phases=4 linecode=LC1 length=16.2106 units=m
! reduced_from=line54,line58
! eliminated_buses=55

New Line._virtual_line55_line59 bus1=60.1.2.3.4 bus2=52.1.2.3.4 phases=4 linecode=LC3 length=6.4843 units=m
! reduced_from=line55,line59
! eliminated_buses=56

New Line._virtual_line62_line67 bus1=60.1.2.3.4 bus2=68.1.2.3.4 phases=4 linecode=LC1 length=13.5809 units=m
! reduced_from=line62,line67
! eliminated_buses=63

New Line._virtual_line63_line68_line71 bus1=60.1.2.3.4 bus2=72.1.2.3.4 phases=4 linecode=LC3 length=7.9889 units=m
! reduced_from=line63,line68,line71
! eliminated_buses=64,69

New Line._virtual_line75_line79 bus1=80.1.2.3.4 bus2=72.1.2.3.4 phases=4 linecode=LC1 length=10.8776 units=m
! reduced_from=line75,line79
! eliminated_buses=76

New Line._virtual_line76_line80_line84 bus1=85.1.2.3.4 bus2=72.1.2.3.4 phases=4 linecode=LC3 length=6.9086 units=m
! reduced_from=line76,line80,line84
! eliminated_buses=77,81

New Line._virtual_line88_line93 bus1=94.1.2.3.4 bus2=85.1.2.3.4 phases=4 linecode=LC1 length=10.09 units=m
! reduced_from=line88,line93
! eliminated_buses=89

New Line._virtual_line89_line95_line100 bus1=85.1.2.3.4 bus2=101.1.2.3.4 phases=4 linecode=LC3 length=10.0436 units=m
! reduced_from=line89,line95,line100
! eliminated_buses=90,96

New Line._virtual_line103_line107 bus1=101.1.2.3.4 bus2=108.1.2.3.4 phases=4 linecode=LC1 length=10.3995 units=m
! reduced_from=line103,line107
! eliminated_buses=104

New Line._virtual_line104_line108 bus1=101.1.2.3.4 bus2=109.1.2.3.4 phases=4 linecode=LC3 length=4.38922 units=m
! reduced_from=line104,line108
! eliminated_buses=105

New Line._virtual_line109_line114 bus1=106.1.2.3.4 bus2=115.1.2.3.4 phases=4 linecode=LC1 length=9.5858 units=m
! reduced_from=line109,line114
! eliminated_buses=110

New Line._virtual_line112_line118_line124_line128_line131_line135 bus1=136.1.2.3.4 bus2=109.1.2.3.4 phases=4 linecode=LC3 length=7.54137 units=m
! reduced_from=line112,line118,line124,line128,line131,line135
! eliminated_buses=113,119,125,129,132

New Line._virtual_line113_line119 bus1=109.1.2.3.4 bus2=120.1.2.3.4 phases=4 linecode=LC1 length=10.3797 units=m
! reduced_from=line113,line119
! eliminated_buses=114

New Line._virtual_line115_line120 bus1=121.1.2.3.4 bus2=111.1.2.3.4 phases=4 linecode=LC1 length=10.6533 units=m
! reduced_from=line115,line120
! eliminated_buses=116

New Line._virtual_line121_line125 bus1=117.1.2.3.4 bus2=126.1.2.3.4 phases=4 linecode=LC1 length=10.356 units=m
! reduced_from=line121,line125
! eliminated_buses=122

New Line._virtual_line122_line126_line129 bus1=117.1.2.3.4 bus2=130.1.2.3.4 phases=4 linecode=LC5 length=4.36364 units=m
! reduced_from=line122,line126,line129
! eliminated_buses=123,127

New Line._virtual_line132_line136_line141_line147_line154_line161_line169_line178_line187_line194 bus1=130.1.2.3.4 bus2=195.1.2.3.4 phases=4 linecode=LC1 length=11.27294 units=m
! reduced_from=line132,line136,line141,line147,line154,line161,line169,line178,line187,line194
! eliminated_buses=133,137,142,148,155,162,170,179,188

New Line._virtual_line137_line142 bus1=143.1.2.3.4 bus2=134.1.2.3.4 phases=4 linecode=LC1 length=10.6084 units=m
! reduced_from=line137,line142
! eliminated_buses=138

New Line._virtual_line138_line144 bus1=134.1.2.3.4 bus2=145.1.2.3.4 phases=4 linecode=LC5 length=6.0434 units=m
! reduced_from=line138,line144
! eliminated_buses=139

New Line._virtual_line139_line145_line151_line159 bus1=160.1.2.3.4 bus2=136.1.2.3.4 phases=4 linecode=LC3 length=15.0333 units=m
! reduced_from=line139,line145,line151,line159
! eliminated_buses=140,146,152

New Line._virtual_line149_line156 bus1=145.1.2.3.4 bus2=157.1.2.3.4 phases=4 linecode=LC1 length=13.9692 units=m
! reduced_from=line149,line156
! eliminated_buses=150

New Line._virtual_line152_line160_line168_line177_line186_line193_line199_line205_line212_line219_line225 bus1=226.1.2.3.4 bus2=147.1.2.3.4 phases=4 linecode=LC1 length=17.0784 units=m
! reduced_from=line152,line160,line168,line177,line186,line193,line199,line205,line212,line219,line225
! eliminated_buses=153,161,169,178,187,194,200,206,213,220

New Line._virtual_line157_line163 bus1=164.1.2.3.4 bus2=151.1.2.3.4 phases=4 linecode=LC1 length=9.8322 units=m
! reduced_from=line157,line163
! eliminated_buses=158

New Line._virtual_line164_line171 bus1=159.1.2.3.4 bus2=172.1.2.3.4 phases=4 linecode=LC1 length=10.9939 units=m
! reduced_from=line164,line171
! eliminated_buses=165

New Line._virtual_line167_line176_line185 bus1=160.1.2.3.4 bus2=186.1.2.3.4 phases=4 linecode=LC3 length=23.3899 units=m
! reduced_from=line167,line176,line185
! eliminated_buses=168,177

New Line._virtual_line172_line180 bus1=166.1.2.3.4 bus2=181.1.2.3.4 phases=4 linecode=LC1 length=11.6868 units=m
! reduced_from=line172,line180
! eliminated_buses=173

New Line._virtual_line174_line183_line190_line196_line202_line209_line217_line223_line229_line234_line239_line244 bus1=167.1.2.3.4 bus2=245.1.2.3.4 phases=4 linecode=LC1 length=17.54683 units=m
! reduced_from=line174,line183,line190,line196,line202,line209,line217,line223,line229,line234,line239,line244
! eliminated_buses=175,184,191,197,203,210,218,224,230,235,240

New Line._virtual_line181_line188 bus1=189.1.2.3.4 bus2=174.1.2.3.4 phases=4 linecode=LC1 length=10.7304 units=m
! reduced_from=line181,line188
! eliminated_buses=182

New Line._virtual_line182_line189_line195_line201 bus1=174.1.2.3.4 bus2=202.1.2.3.4 phases=4 linecode=LC5 length=29.8208 units=m
! reduced_from=line182,line189,line195,line201
! eliminated_buses=183,190,196

New Line._virtual_line192_line198_line204_line211_line218_line224_line230_line235_line240 bus1=186.1.2.3.4 bus2=241.1.2.3.4 phases=4 linecode=LC1 length=8.95275 units=m
! reduced_from=line192,line198,line204,line211,line218,line224,line230,line235,line240
! eliminated_buses=193,199,205,212,219,225,231,236

New Line._virtual_line208_line216_line222_line228_line233_line238_line243_line249_line252_line255_line258_line261_line264_line267_line270_line273_line276_line279_line282_line284_line286_line287_line288 bus1=202.1.2.3.4 bus2=289.1.2.3.4 phases=4 linecode=LC5 length=27.35706 units=m
! reduced_from=line208,line216,line222,line228,line233,line238,line243,line249,line252,line255,line258,line261,line264,line267,line270,line273,line276,line279,line282,line284,line286,line287,line288
! eliminated_buses=209,217,223,229,234,239,244,250,253,256,259,262,265,268,271,274,277,280,283,285,287,288

New Line._virtual_line214_line221_line227_line232_line237_line242_line248_line251_line254_line257_line260_line263_line266_line269_line272_line275_line278_line281 bus1=282.1.2.3.4 bus2=208.1.2.3.4 phases=4 linecode=LC1 length=26.07315 units=m
! reduced_from=line214,line221,line227,line232,line237,line242,line248,line251,line254,line257,line260,line263,line266,line269,line272,line275,line278,line281
! eliminated_buses=215,222,228,233,238,243,249,252,255,258,261,264,267,270,273,276,279

New Line._virtual_line245_line250_line253_line256_line259_line262_line265_line268_line271_line274_line277_line280_line283_line285 bus1=241.1.2.3.4 bus2=286.1.2.3.4 phases=4 linecode=LC1 length=13.670176 units=m
! reduced_from=line245,line250,line253,line256,line259,line262,line265,line268,line271,line274,line277,line280,line283,line285
! eliminated_buses=246,251,254,257,260,263,266,269,272,275,278,281,284

New Line._virtual_line290_line297_line305_line315_line325_line335_line347_line359 bus1=289.1.2.3.4 bus2=360.1.2.3.4 phases=4 linecode=LC5 length=51.11695 units=m
! reduced_from=line290,line297,line305,line315,line325,line335,line347,line359
! eliminated_buses=291,298,306,316,326,336,348

New Line._virtual_line292_line299_line307_line317_line327_line337_line349_line365_line386_line406_line426_line445_line465_line483_line502_line516_line529 bus1=290.1.2.3.4 bus2=530.1.2.3.4 phases=4 linecode=LC4 length=30.72002 units=m
! reduced_from=line292,line299,line307,line317,line327,line337,line349,line365,line386,line406,line426,line445,line465,line483,line502,line516,line529
! eliminated_buses=293,300,308,318,328,338,350,366,387,407,427,446,466,484,503,517

New Line._virtual_line309_line319 bus1=320.1.2.3.4 bus2=302.1.2.3.4 phases=4 linecode=LC5 length=14.8403 units=m
! reduced_from=line309,line319
! eliminated_buses=310

New Line._virtual_line312_line323_line333_line345_line358_line376_line396_line415_line436_line456_line475_line494_line512_line525_line539_line551_line563 bus1=304.1.2.3.4 bus2=564.1.2.3.4 phases=4 linecode=LC1 length=16.302042 units=m
! reduced_from=line312,line323,line333,line345,line358,line376,line396,line415,line436,line456,line475,line494,line512,line525,line539,line551,line563
! eliminated_buses=313,324,334,346,359,377,397,416,437,457,476,495,513,526,540,552

New Line._virtual_line321_line332_line344_line357_line375_line395_line414_line435_line455_line474_line493_line511 bus1=312.1.2.3.4 bus2=512.1.2.3.4 phases=4 linecode=LC1 length=8.640846 units=m
! reduced_from=line321,line332,line344,line357,line375,line395,line414,line435,line455,line474,line493,line511
! eliminated_buses=322,333,345,358,376,396,415,436,456,475,494

New Line._virtual_line339_line351 bus1=352.1.2.3.4 bus2=330.1.2.3.4 phases=4 linecode=LC5 length=8.7591 units=m
! reduced_from=line339,line351
! eliminated_buses=340

New Line._virtual_line341_line355 bus1=356.1.2.3.4 bus2=330.1.2.3.4 phases=4 linecode=LC1 length=12.756 units=m
! reduced_from=line341,line355
! eliminated_buses=342

New Line._virtual_line342_line356_line374_line394_line413_line434_line454_line473_line492_line510_line524 bus1=525.1.2.3.4 bus2=332.1.2.3.4 phases=4 linecode=LC1 length=7.52177 units=m
! reduced_from=line342,line356,line374,line394,line413,line434,line454,line473,line492,line510,line524
! eliminated_buses=343,357,375,395,414,435,455,474,493,511

New Line._virtual_line367_line388_line408 bus1=409.1.2.3.4 bus2=352.1.2.3.4 phases=4 linecode=LC5 length=23.3184 units=m
! reduced_from=line367,line388,line408
! eliminated_buses=368,389

New Line._virtual_line372_line393_line412_line433_line453_line472_line491_line509_line523_line538_line550_line562_line573_line583_line596 bus1=597.1.2.3.4 bus2=356.1.2.3.4 phases=4 linecode=LC1 length=13.95285 units=m
! reduced_from=line372,line393,line412,line433,line453,line472,line491,line509,line523,line538,line550,line562,line573,line583,line596
! eliminated_buses=373,394,413,434,454,473,492,510,524,539,551,563,574,584

New Line._virtual_line377_line397 bus1=360.1.2.3.4 bus2=398.1.2.3.4 phases=4 linecode=LC5 length=12.3419 units=m
! reduced_from=line377,line397
! eliminated_buses=378

New Line._virtual_line390_line410_line431_line451_line470_line489_line508_line522_line537 bus1=370.1.2.3.4 bus2=538.1.2.3.4 phases=4 linecode=LC1 length=8.52112 units=m
! reduced_from=line390,line410,line431,line451,line470,line489,line508,line522,line537
! eliminated_buses=391,411,432,452,471,490,509,523

New Line._virtual_line399_line419 bus1=420.1.2.3.4 bus2=380.1.2.3.4 phases=4 linecode=LC1 length=7.4744 units=m
! reduced_from=line399,line419
! eliminated_buses=400

New Line._virtual_line400_line420_line439_line459_line477 bus1=478.1.2.3.4 bus2=380.1.2.3.4 phases=4 linecode=LC1 length=6.7789 units=m
! reduced_from=line400,line420,line439,line459,line477
! eliminated_buses=401,421,440,460

New Line._virtual_line428_line447_line467_line485_line504_line518_line533_line546_line558_line570_line580_line593_line605_line614 bus1=409.1.2.3.4 bus2=615.1.2.3.4 phases=4 linecode=LC5 length=15.716365 units=m
! reduced_from=line428,line447,line467,line485,line504,line518,line533,line546,line558,line570,line580,line593,line605,line614
! eliminated_buses=429,448,468,486,505,519,534,547,559,571,581,594,606

New Line._virtual_line437_line457 bus1=458.1.2.3.4 bus2=418.1.2.3.4 phases=4 linecode=LC1 length=8.4719 units=m
! reduced_from=line437,line457
! eliminated_buses=438

New Line._virtual_line438_line458_line476_line495_line513 bus1=514.1.2.3.4 bus2=418.1.2.3.4 phases=4 linecode=LC1 length=10.19728 units=m
! reduced_from=line438,line458,line476,line495,line513
! eliminated_buses=439,459,477,496

New Line._virtual_line449_line469_line488_line507_line521_line536_line549_line561_line572_line582_line595_line607_line616_line625_line635_line647_line660_line671_line682_line692_line703_line715_line727_line741_line750_line761_line772 bus1=431.1.2.3.4 bus2=773.1.2.3.4 phases=4 linecode=LC1 length=21.347543 units=m
! reduced_from=line449,line469,line488,line507,line521,line536,line549,line561,line572,line582,line595,line607,line616,line625,line635,line647,line660,line671,line682,line692,line703,line715,line727,line741,line750,line761,line772
! eliminated_buses=450,470,489,508,522,537,550,562,573,583,596,608,617,626,636,648,661,672,683,693,704,716,728,742,751,762

New Line._virtual_line496_line514_line528_line541_line553_line565_line575 bus1=576.1.2.3.4 bus2=478.1.2.3.4 phases=4 linecode=LC1 length=11.07763 units=m
! reduced_from=line496,line514,line528,line541,line553,line565,line575
! eliminated_buses=497,515,529,542,554,566

New Line._virtual_line526_line540_line552_line564_line574_line584 bus1=585.1.2.3.4 bus2=514.1.2.3.4 phases=4 linecode=LC1 length=11.24928 units=m
! reduced_from=line526,line540,line552,line564,line574,line584
! eliminated_buses=527,541,553,565,575

New Line._virtual_line542_line554 bus1=530.1.2.3.4 bus2=555.1.2.3.4 phases=4 linecode=LC4 length=10.1664 units=m
! reduced_from=line542,line554
! eliminated_buses=543

New Line._virtual_line543_line556 bus1=530.1.2.3.4 bus2=557.1.2.3.4 phases=4 linecode=LC1 length=9.1055 units=m
! reduced_from=line543,line556
! eliminated_buses=544

New Line._virtual_line567_line579 bus1=555.1.2.3.4 bus2=580.1.2.3.4 phases=4 linecode=LC1 length=9.61 units=m
! reduced_from=line567,line579
! eliminated_buses=568

New Line._virtual_line576_line587 bus1=588.1.2.3.4 bus2=567.1.2.3.4 phases=4 linecode=LC1 length=13.2252 units=m
! reduced_from=line576,line587
! eliminated_buses=577

New Line._virtual_line585_line599 bus1=600.1.2.3.4 bus2=576.1.2.3.4 phases=4 linecode=LC1 length=5.2372 units=m
! reduced_from=line585,line599
! eliminated_buses=586

New Line._virtual_line586_line600_line610_line618_line627_line637 bus1=576.1.2.3.4 bus2=638.1.2.3.4 phases=4 linecode=LC1 length=5.2869 units=m
! reduced_from=line586,line600,line610,line618,line627,line637
! eliminated_buses=587,601,611,619,628

New Line._virtual_line588_line601_line611_line619_line628_line638_line652_line663_line674_line685_line696_line708_line720_line732_line745 bus1=578.1.2.3.4 bus2=746.1.2.3.4 phases=4 linecode=LC4 length=39.97176 units=m
! reduced_from=line588,line601,line611,line619,line628,line638,line652,line663,line674,line685,line696,line708,line720,line732,line745
! eliminated_buses=589,602,612,620,629,639,653,664,675,686,697,709,721,733

New Line._virtual_line589_line603 bus1=604.1.2.3.4 bus2=578.1.2.3.4 phases=4 linecode=LC1 length=12.9495 units=m
! reduced_from=line589,line603
! eliminated_buses=590

New Line._virtual_line597_line608_line617_line626_line636 bus1=637.1.2.3.4 bus2=585.1.2.3.4 phases=4 linecode=LC1 length=11.85813 units=m
! reduced_from=line597,line608,line617,line626,line636
! eliminated_buses=598,609,618,627

New Line._virtual_line598_line609 bus1=610.1.2.3.4 bus2=585.1.2.3.4 phases=4 linecode=LC1 length=9.5444 units=m
! reduced_from=line598,line609
! eliminated_buses=599

New Line._virtual_line633_line646_line659_line670_line681_line691_line702_line714_line726_line740_line749_line760_line771_line782_line793_line801_line809_line818_line825_line831_line838_line844_line851_line856_line860 bus1=625.1.2.3.4 bus2=861.1.2.3.4 phases=4 linecode=LC2 length=21.601515 units=m
! reduced_from=line633,line646,line659,line670,line681,line691,line702,line714,line726,line740,line749,line760,line771,line782,line793,line801,line809,line818,line825,line831,line838,line844,line851,line856,line860
! eliminated_buses=634,647,660,671,682,692,703,715,727,741,750,761,772,783,794,802,810,819,826,832,839,845,852,857

New Line._virtual_line648_line661_line672_line683 bus1=637.1.2.3.4 bus2=684.1.2.3.4 phases=4 linecode=LC1 length=13.20017 units=m
! reduced_from=line648,line661,line672,line683
! eliminated_buses=649,662,673

New Line._virtual_line650_line662_line673_line684_line695_line706 bus1=707.1.2.3.4 bus2=638.1.2.3.4 phases=4 linecode=LC1 length=12.3436 units=m
! reduced_from=line650,line662,line673,line684,line695,line706
! eliminated_buses=651,663,674,685,696

New Line._virtual_line693_line704_line716_line728_line742 bus1=743.1.2.3.4 bus2=684.1.2.3.4 phases=4 linecode=LC1 length=10.66863 units=m
! reduced_from=line693,line704,line716,line728,line742
! eliminated_buses=694,705,717,729

New Line._virtual_line694_line705 bus1=684.1.2.3.4 bus2=706.1.2.3.4 phases=4 linecode=LC1 length=10.1169 units=m
! reduced_from=line694,line705
! eliminated_buses=695

New Line._virtual_line717_line729_line743_line753_line763_line774_line786_line796 bus1=797.1.2.3.4 bus2=707.1.2.3.4 phases=4 linecode=LC1 length=10.505594 units=m
! reduced_from=line717,line729,line743,line753,line763,line774,line786,line796
! eliminated_buses=718,730,744,754,764,775,787

New Line._virtual_line718_line730 bus1=731.1.2.3.4 bus2=707.1.2.3.4 phases=4 linecode=LC1 length=4.9737 units=m
! reduced_from=line718,line730
! eliminated_buses=719

New Line._virtual_line751_line762_line773_line785_line795 bus1=743.1.2.3.4 bus2=796.1.2.3.4 phases=4 linecode=LC1 length=11.77728 units=m
! reduced_from=line751,line762,line773,line785,line795
! eliminated_buses=752,763,774,786

New Line._virtual_line757_line768_line779_line790 bus1=746.1.2.3.4 bus2=791.1.2.3.4 phases=4 linecode=LC1 length=12.5565 units=m
! reduced_from=line757,line768,line779,line790
! eliminated_buses=758,769,780

New Line._virtual_line765_line776_line788_line798_line806 bus1=807.1.2.3.4 bus2=756.1.2.3.4 phases=4 linecode=LC4 length=8.88403 units=m
! reduced_from=line765,line776,line788,line798,line806
! eliminated_buses=766,777,789,799

New Line._virtual_line767_line778 bus1=756.1.2.3.4 bus2=779.1.2.3.4 phases=4 linecode=LC1 length=12.3895 units=m
! reduced_from=line767,line778
! eliminated_buses=768

New Line._virtual_line783_line794_line802_line810_line819_line826_line832_line839_line845 bus1=773.1.2.3.4 bus2=846.1.2.3.4 phases=4 linecode=LC1 length=13.04409 units=m
! reduced_from=line783,line794,line802,line810,line819,line826,line832,line839,line845
! eliminated_buses=784,795,803,811,820,827,833,840

New Line._virtual_line803_line811_line820_line827_line833_line840_line846 bus1=847.1.2.3.4 bus2=796.1.2.3.4 phases=4 linecode=LC1 length=24.17245 units=m
! reduced_from=line803,line811,line820,line827,line833,line840,line846
! eliminated_buses=804,812,821,828,834,841

New Line._virtual_line804_line812 bus1=813.1.2.3.4 bus2=796.1.2.3.4 phases=4 linecode=LC1 length=16.1412 units=m
! reduced_from=line804,line812
! eliminated_buses=805

New Line._virtual_line814_line822_line828_line834_line841 bus1=842.1.2.3.4 bus2=807.1.2.3.4 phases=4 linecode=LC4 length=4.65362 units=m
! reduced_from=line814,line822,line828,line834,line841
! eliminated_buses=815,823,829,835

New Line._virtual_line816_line824_line830 bus1=831.1.2.3.4 bus2=807.1.2.3.4 phases=4 linecode=LC1 length=22.24255 units=m
! reduced_from=line816,line824,line830
! eliminated_buses=817,825

New Line._virtual_line836_line843_line850_line855_line859_line863_line868_line873_line878_line882_line887_line892 bus1=893.1.2.3.4 bus2=831.1.2.3.4 phases=4 linecode=LC1 length=26.81758 units=m
! reduced_from=line836,line843,line850,line855,line859,line863,line868,line873,line878,line882,line887,line892
! eliminated_buses=837,844,851,856,860,864,869,874,879,883,888

New Line._virtual_line849_line854_line858_line862_line867_line872_line877 bus1=878.1.2.3.4 bus2=842.1.2.3.4 phases=4 linecode=LC1 length=11.63844 units=m
! reduced_from=line849,line854,line858,line862,line867,line872,line877
! eliminated_buses=850,855,859,863,868,873

New Line._virtual_line852_line857_line861_line866_line871_line876_line881_line885_line890_line895_line899_line903_line907 bus1=908.1.2.3.4 bus2=846.1.2.3.4 phases=4 linecode=LC1 length=22.4105 units=m
! reduced_from=line852,line857,line861,line866,line871,line876,line881,line885,line890,line895,line899,line903,line907
! eliminated_buses=853,858,862,867,872,877,882,886,891,896,900,904

New Line._virtual_line864_line870_line875_line880_line884_line889_line894_line898_line902_line906_line910_line916 bus1=861.1.2.3.4 bus2=917.1.2.3.4 phases=4 linecode=LC2 length=12.53711 units=m
! reduced_from=line864,line870,line875,line880,line884,line889,line894,line898,line902,line906,line910,line916
! eliminated_buses=865,871,876,881,885,890,895,899,903,907,911

New Line._virtual_line911_line917_line922_line926_line930_line934_line938 bus1=939.1.2.3.4 bus2=908.1.2.3.4 phases=4 linecode=LC1 length=11.14929 units=m
! reduced_from=line911,line917,line922,line926,line930,line934,line938
! eliminated_buses=912,918,923,927,931,935

New Line._virtual_line920_line925_line929_line933_line937_line941_line946_line950_line954_line957_line960_line963_line966_line969_line972_line975_line978_line981_line984_line988_line992_line995_line997_line999_line1001_line1003_line1005_line1007_line1008_line1009_line1010_line1011_line1012_line1013_line1014 bus1=917.1.2.3.4 bus2=1015.1.2.3.4 phases=4 linecode=LC2 length=25.46713 units=m
! reduced_from=line920,line925,line929,line933,line937,line941,line946,line950,line954,line957,line960,line963,line966,line969,line972,line975,line978,line981,line984,line988,line992,line995,line997,line999,line1001,line1003,line1005,line1007,line1008,line1009,line1010,line1011,line1012,line1013,line1014
! eliminated_buses=921,926,930,934,938,942,947,951,955,958,961,964,967,970,973,976,979,982,985,989,993,996,998,1000,1002,1004,1006,1008,1009,1010,1011,1012,1013,1014

New Line._virtual_line942_line947_line951_line955_line958_line961_line964_line967_line970_line973_line976_line979_line982_line986_line990 bus1=991.1.2.3.4 bus2=939.1.2.3.4 phases=4 linecode=LC1 length=28.33814 units=m
! reduced_from=line942,line947,line951,line955,line958,line961,line964,line967,line970,line973,line976,line979,line982,line986,line990
! eliminated_buses=943,948,952,956,959,962,965,968,971,974,977,980,983,987

New Line.LINE110 bus1=106.1.2.3.4 bus2=111.1.2.3.4 phases=4 linecode=LC5 length=4.3722 units=m

New Line.LINE116 bus1=111.1.2.3.4 bus2=117.1.2.3.4 phases=4 linecode=LC5 length=10.1111 units=m

New Line.LINE133 bus1=130.1.2.3.4 bus2=134.1.2.3.4 phases=4 linecode=LC5 length=7.1399 units=m

New Line.LINE140 bus1=136.1.2.3.4 bus2=141.1.2.3.4 phases=4 linecode=LC4 length=0.12832 units=m

New Line.LINE146 bus1=141.1.2.3.4 bus2=147.1.2.3.4 phases=4 linecode=LC1 length=6.6122 units=m

New Line.LINE150 bus1=145.1.2.3.4 bus2=151.1.2.3.4 phases=4 linecode=LC5 length=11.3485 units=m

New Line.LINE153 bus1=147.1.2.3.4 bus2=154.1.2.3.4 phases=4 linecode=LC1 length=4.484 units=m

New Line.LINE158 bus1=151.1.2.3.4 bus2=159.1.2.3.4 phases=4 linecode=LC5 length=6.9117 units=m

New Line.LINE165 bus1=159.1.2.3.4 bus2=166.1.2.3.4 phases=4 linecode=LC5 length=7.9013 units=m

New Line.LINE166 bus1=160.1.2.3.4 bus2=167.1.2.3.4 phases=4 linecode=LC1 length=8.0412 units=m

New Line.LINE173 bus1=166.1.2.3.4 bus2=174.1.2.3.4 phases=4 linecode=LC5 length=6.3841 units=m

New Line.LINE175 bus1=167.1.2.3.4 bus2=176.1.2.3.4 phases=4 linecode=LC1 length=4.3388 units=m

New Line.LINE207 bus1=202.1.2.3.4 bus2=208.1.2.3.4 phases=4 linecode=LC1 length=9.9083 units=m

New Line.LINE215 bus1=208.1.2.3.4 bus2=216.1.2.3.4 phases=4 linecode=LC1 length=1.8829 units=m

New Line.LINE246 bus1=241.1.2.3.4 bus2=247.1.2.3.4 phases=4 linecode=LC1 length=5.9966 units=m

New Line.LINE289 bus1=289.1.2.3.4 bus2=290.1.2.3.4 phases=4 linecode=LC5 length=0.81708 units=m

New Line.LINE293 bus1=290.1.2.3.4 bus2=294.1.2.3.4 phases=4 linecode=LC5 length=8.7779 units=m

New Line.LINE301 bus1=294.1.2.3.4 bus2=302.1.2.3.4 phases=4 linecode=LC5 length=1.5144 units=m

New Line.LINE303 bus1=294.1.2.3.4 bus2=304.1.2.3.4 phases=4 linecode=LC1 length=13.1728 units=m

New Line.LINE311 bus1=302.1.2.3.4 bus2=312.1.2.3.4 phases=4 linecode=LC1 length=6.3198 units=m

New Line.LINE313 bus1=304.1.2.3.4 bus2=314.1.2.3.4 phases=4 linecode=LC1 length=5.544 units=m

New Line.LINE322 bus1=312.1.2.3.4 bus2=323.1.2.3.4 phases=4 linecode=LC1 length=4.9761 units=m

New Line.LINE329 bus1=320.1.2.3.4 bus2=330.1.2.3.4 phases=4 linecode=LC5 length=6.0025 units=m

New Line.LINE331 bus1=320.1.2.3.4 bus2=332.1.2.3.4 phases=4 linecode=LC1 length=7.6928 units=m

New Line.LINE343 bus1=332.1.2.3.4 bus2=344.1.2.3.4 phases=4 linecode=LC1 length=4.157 units=m

New Line.LINE369 bus1=352.1.2.3.4 bus2=370.1.2.3.4 phases=4 linecode=LC1 length=6.7082 units=m

New Line.LINE373 bus1=356.1.2.3.4 bus2=374.1.2.3.4 phases=4 linecode=LC1 length=5.7058 units=m

New Line.LINE379 bus1=360.1.2.3.4 bus2=380.1.2.3.4 phases=4 linecode=LC1 length=8.6332 units=m

New Line.LINE391 bus1=370.1.2.3.4 bus2=392.1.2.3.4 phases=4 linecode=LC1 length=5.0765 units=m

New Line.LINE417 bus1=398.1.2.3.4 bus2=418.1.2.3.4 phases=4 linecode=LC1 length=18.5452 units=m

New Line.LINE430 bus1=409.1.2.3.4 bus2=431.1.2.3.4 phases=4 linecode=LC1 length=5.2652 units=m

New Line.LINE450 bus1=431.1.2.3.4 bus2=451.1.2.3.4 phases=4 linecode=LC1 length=5.4197 units=m

New Line.LINE497 bus1=478.1.2.3.4 bus2=498.1.2.3.4 phases=4 linecode=LC1 length=5.018 units=m

New Line.LINE527 bus1=514.1.2.3.4 bus2=528.1.2.3.4 phases=4 linecode=LC1 length=6.0542 units=m

New Line.LINE566 bus1=555.1.2.3.4 bus2=567.1.2.3.4 phases=4 linecode=LC4 length=9.2886 units=m

New Line.LINE577 bus1=567.1.2.3.4 bus2=578.1.2.3.4 phases=4 linecode=LC4 length=6.9726 units=m

New Line.LINE624 bus1=615.1.2.3.4 bus2=625.1.2.3.4 phases=4 linecode=LC2 length=10.0436 units=m

New Line.LINE634 bus1=625.1.2.3.4 bus2=635.1.2.3.4 phases=4 linecode=LC2 length=5.4953 units=m

New Line.LINE649 bus1=637.1.2.3.4 bus2=650.1.2.3.4 phases=4 linecode=LC1 length=5.7401 units=m

New Line.LINE651 bus1=638.1.2.3.4 bus2=652.1.2.3.4 phases=4 linecode=LC1 length=5.6202 units=m

New Line.LINE752 bus1=743.1.2.3.4 bus2=753.1.2.3.4 phases=4 linecode=LC1 length=5.9256 units=m

New Line.LINE755 bus1=746.1.2.3.4 bus2=756.1.2.3.4 phases=4 linecode=LC4 length=7.7152 units=m

New Line.LINE784 bus1=773.1.2.3.4 bus2=785.1.2.3.4 phases=4 linecode=LC1 length=5.0452 units=m

New Line.LINE837 bus1=831.1.2.3.4 bus2=838.1.2.3.4 phases=4 linecode=LC1 length=4.9829 units=m

New Line.LINE853 bus1=846.1.2.3.4 bus2=854.1.2.3.4 phases=4 linecode=LC1 length=5.1413 units=m

New Line.LINE865 bus1=861.1.2.3.4 bus2=866.1.2.3.4 phases=4 linecode=LC2 length=3.6581 units=m

New Line.LINE912 bus1=908.1.2.3.4 bus2=913.1.2.3.4 phases=4 linecode=LC1 length=16.3176 units=m

New Line.LINE913 bus1=908.1.2.3.4 bus2=914.1.2.3.4 phases=4 linecode=LC1 length=5.5899 units=m

New Line.LINE921 bus1=917.1.2.3.4 bus2=922.1.2.3.4 phases=4 linecode=LC2 length=4.5193 units=m

New Line.LINE943 bus1=939.1.2.3.4 bus2=944.1.2.3.4 phases=4 linecode=LC1 length=4.1955 units=m
