! Reduced enabled lines.

New Line._virtual_line0_line1_line2_line3_line4_line5_line6_line7_line8_line9_line10_line11_line12_line13_line14_line15_line16_line17_line18_line19_line20_line21_line22_line23_line24_line25_line26_line27_line28_line29_line30_line31_line32_line33_line34_line35_line36_line37_line38_line39_line40_line41_line42_line43_line44_line46_line48_line50_line51_line52_line53_line54_line55 bus1=56.1.2.3.4 bus2=sourcebus.1.2.3.4 phases=4 linecode=LC4 length=77.874681 units=m
! reduced_from=line0,line1,line2,line3,line4,line5,line6,line7,line8,line9,line10,line11,line12,line13,line14,line15,line16,line17,line18,line19,line20,line21,line22,line23,line24,line25,line26,line27,line28,line29,line30,line31,line32,line33,line34,line35,line36,line37,line38,line39,line40,line41,line42,line43,line44,line46,line48,line50,line51,line52,line53,line54,line55
! eliminated_buses=1,2,3,4,5,6,7,8,9,10,11,12,13,14,15,16,17,18,19,20,21,22,23,24,25,26,27,28,29,30,31,32,33,34,35,36,37,38,39,40,41,42,43,44,45,47,49,51,52,53,54,55

New Line._virtual_line56_line58 bus1=56.1.2.3.4 bus2=59.1.2.3.4 phases=4 linecode=LC2 length=13.287 units=m
! reduced_from=line56,line58
! eliminated_buses=57

New Line._virtual_line59_line63 bus1=58.1.2.3.4 bus2=64.1.2.3.4 phases=4 linecode=LC1 length=11.7786 units=m
! reduced_from=line59,line63
! eliminated_buses=60

New Line._virtual_line60_line64 bus1=65.1.2.3.4 bus2=58.1.2.3.4 phases=4 linecode=LC4 length=5.6159 units=m
! reduced_from=line60,line64
! eliminated_buses=61

New Line._virtual_line62_line68 bus1=69.1.2.3.4 bus2=59.1.2.3.4 phases=4 linecode=LC2 length=12.01335 units=m
! reduced_from=line62,line68
! eliminated_buses=63

New Line._virtual_line65_line71_line78_line85_line92_line98_line103_line108_line112_line116_line121_line127_line132 bus1=62.1.2.3.4 bus2=133.1.2.3.4 phases=4 linecode=LC1 length=8.253282 units=m
! reduced_from=line65,line71,line78,line85,line92,line98,line103,line108,line112,line116,line121,line127,line132
! eliminated_buses=66,72,79,86,93,99,104,109,113,117,122,128

New Line._virtual_line69_line75 bus1=76.1.2.3.4 bus2=65.1.2.3.4 phases=4 linecode=LC1 length=10.528 units=m
! reduced_from=line69,line75
! eliminated_buses=70

New Line._virtual_line70_line77 bus1=78.1.2.3.4 bus2=65.1.2.3.4 phases=4 linecode=LC4 length=8.7514 units=m
! reduced_from=line70,line77
! eliminated_buses=71

New Line._virtual_line73_line80 bus1=69.1.2.3.4 bus2=81.1.2.3.4 phases=4 linecode=LC1 length=11.2375 units=m
! reduced_from=line73,line80
! eliminated_buses=74

New Line._virtual_line74_line81_line87_line94_line100_line105_line109_line113_line117_line122_line128 bus1=69.1.2.3.4 bus2=129.1.2.3.4 phases=4 linecode=LC2 length=3.123058 units=m
! reduced_from=line74,line81,line87,line94,line100,line105,line109,line113,line117,line122,line128
! eliminated_buses=75,82,88,95,101,106,110,114,118,123

New Line._virtual_line83_line89 bus1=78.1.2.3.4 bus2=90.1.2.3.4 phases=4 linecode=LC1 length=10.8401 units=m
! reduced_from=line83,line89
! eliminated_buses=84

New Line._virtual_line90_line96 bus1=85.1.2.3.4 bus2=97.1.2.3.4 phases=4 linecode=LC1 length=10.5025 units=m
! reduced_from=line90,line96
! eliminated_buses=91

New Line._virtual_line91_line97_line102_line107_line111_line115 bus1=116.1.2.3.4 bus2=85.1.2.3.4 phases=4 linecode=LC4 length=8.34956 units=m
! reduced_from=line91,line97,line102,line107,line111,line115
! eliminated_buses=92,98,103,108,112

New Line._virtual_line120_line126_line131_line137_line143_line149_line155_line162_line170_line179_line190_line202_line211_line218_line224_line230_line236_line240 bus1=116.1.2.3.4 bus2=241.1.2.3.4 phases=4 linecode=LC4 length=68.58742 units=m
! reduced_from=line120,line126,line131,line137,line143,line149,line155,line162,line170,line179,line190,line202,line211,line218,line224,line230,line236,line240
! eliminated_buses=121,127,132,138,144,150,156,163,171,180,191,203,212,219,225,231,237

New Line._virtual_line124_line130_line136_line142_line148_line154_line161_line168_line177_line187_line199_line209 bus1=120.1.2.3.4 bus2=210.1.2.3.4 phases=4 linecode=LC1 length=7.65703 units=m
! reduced_from=line124,line130,line136,line142,line148,line154,line161,line168,line177,line187,line199,line209
! eliminated_buses=125,131,137,143,149,155,162,169,178,188,200

New Line._virtual_line133_line138 bus1=139.1.2.3.4 bus2=129.1.2.3.4 phases=4 linecode=LC2 length=13.4252 units=m
! reduced_from=line133,line138
! eliminated_buses=134

New Line._virtual_line140_line146_line152_line159 bus1=160.1.2.3.4 bus2=135.1.2.3.4 phases=4 linecode=LC1 length=15.43464 units=m
! reduced_from=line140,line146,line152,line159
! eliminated_buses=141,147,153

New Line._virtual_line141_line147_line153_line160_line167_line176_line186_line198_line208_line216_line222_line228_line234_line238_line242_line246_line251 bus1=135.1.2.3.4 bus2=252.1.2.3.4 phases=4 linecode=LC1 length=15.88212 units=m
! reduced_from=line141,line147,line153,line160,line167,line176,line186,line198,line208,line216,line222,line228,line234,line238,line242,line246,line251
! eliminated_buses=142,148,154,161,168,177,187,199,209,217,223,229,235,239,243,247

New Line._virtual_line144_line150_line156_line163_line171_line180 bus1=139.1.2.3.4 bus2=181.1.2.3.4 phases=4 linecode=LC1 length=11.74194 units=m
! reduced_from=line144,line150,line156,line163,line171,line180
! eliminated_buses=145,151,157,164,172

New Line._virtual_line145_line151_line158 bus1=159.1.2.3.4 bus2=139.1.2.3.4 phases=4 linecode=LC2 length=13.6942 units=m
! reduced_from=line145,line151,line158
! eliminated_buses=146,152

New Line._virtual_line165_line173_line182_line194_line204_line212_line219_line225_line231 bus1=232.1.2.3.4 bus2=159.1.2.3.4 phases=4 linecode=LC1 length=13.59263 units=m
! reduced_from=line165,line173,line182,line194,line204,line212,line219,line225,line231
! eliminated_buses=166,174,183,195,205,213,220,226

New Line._virtual_line174_line183_line195_line205_line213_line220_line226_line232 bus1=167.1.2.3.4 bus2=233.1.2.3.4 phases=4 linecode=LC1 length=16.7694 units=m
! reduced_from=line174,line183,line195,line205,line213,line220,line226,line232
! eliminated_buses=175,184,196,206,214,221,227

New Line._virtual_line175_line185 bus1=167.1.2.3.4 bus2=186.1.2.3.4 phases=4 linecode=LC2 length=14.1198 units=m
! reduced_from=line175,line185
! eliminated_buses=176

New Line._virtual_line191_line203 bus1=181.1.2.3.4 bus2=204.1.2.3.4 phases=4 linecode=LC1 length=10.4833 units=m
! reduced_from=line191,line203
! eliminated_buses=192

New Line._virtual_line197_line207_line215_line221_line227_line233_line237_line241_line245_line250_line255_line259 bus1=186.1.2.3.4 bus2=260.1.2.3.4 phases=4 linecode=LC1 length=19.05025 units=m
! reduced_from=line197,line207,line215,line221,line227,line233,line237,line241,line245,line250,line255,line259
! eliminated_buses=198,208,216,222,228,234,238,242,246,251,256

New Line._virtual_line243_line247 bus1=248.1.2.3.4 bus2=241.1.2.3.4 phases=4 linecode=LC1 length=12.3947 units=m
! reduced_from=line243,line247
! eliminated_buses=244

New Line._virtual_line248_line252 bus1=245.1.2.3.4 bus2=253.1.2.3.4 phases=4 linecode=LC1 length=11.4091 units=m
! reduced_from=line248,line252
! eliminated_buses=249

New Line._virtual_line249_line254 bus1=245.1.2.3.4 bus2=255.1.2.3.4 phases=4 linecode=LC4 length=6.6938 units=m
! reduced_from=line249,line254
! eliminated_buses=250

New Line._virtual_line257_line261_line264_line267_line270 bus1=271.1.2.3.4 bus2=255.1.2.3.4 phases=4 linecode=LC2 length=3.03808 units=m
! reduced_from=line257,line261,line264,line267,line270
! eliminated_buses=258,262,265,268

New Line._virtual_line258_line262_line265_line268_line271_line275_line280_line286 bus1=255.1.2.3.4 bus2=287.1.2.3.4 phases=4 linecode=LC4 length=18.07087 units=m
! reduced_from=line258,line262,line265,line268,line271,line275,line280,line286
! eliminated_buses=259,263,266,269,272,276,281

New Line._virtual_line273_line277_line282_line288_line294_line301_line310_line320 bus1=321.1.2.3.4 bus2=271.1.2.3.4 phases=4 linecode=LC1 length=12.43371 units=m
! reduced_from=line273,line277,line282,line288,line294,line301,line310,line320
! eliminated_buses=274,278,283,289,295,302,311

New Line._virtual_line278_line283 bus1=284.1.2.3.4 bus2=275.1.2.3.4 phases=4 linecode=LC1 length=11.2233 units=m
! reduced_from=line278,line283
! eliminated_buses=279

New Line._virtual_line279_line284_line289_line295 bus1=296.1.2.3.4 bus2=275.1.2.3.4 phases=4 linecode=LC2 length=8.314046 units=m
! reduced_from=line279,line284,line289,line295
! eliminated_buses=280,285,290

New Line._virtual_line291_line297_line305_line314_line322_line330_line338_line346_line354_line361_line368_line374_line380_line387 bus1=287.1.2.3.4 bus2=388.1.2.3.4 phases=4 linecode=LC1 length=10.501835 units=m
! reduced_from=line291,line297,line305,line314,line322,line330,line338,line346,line354,line361,line368,line374,line380,line387
! eliminated_buses=292,298,306,315,323,331,339,347,355,362,369,375,381

New Line._virtual_line298_line306_line315_line323_line331_line339_line347_line355_line362_line369_line375_line381_line388_line394 bus1=293.1.2.3.4 bus2=395.1.2.3.4 phases=4 linecode=LC1 length=11.7314 units=m
! reduced_from=line298,line306,line315,line323,line331,line339,line347,line355,line362,line369,line375,line381,line388,line394
! eliminated_buses=299,307,316,324,332,340,348,356,363,370,376,382,389

New Line._virtual_line302_line311 bus1=312.1.2.3.4 bus2=296.1.2.3.4 phases=4 linecode=LC1 length=12.8574 units=m
! reduced_from=line302,line311
! eliminated_buses=303

New Line._virtual_line303_line312_line321_line329_line337_line345_line353_line360_line367 bus1=296.1.2.3.4 bus2=368.1.2.3.4 phases=4 linecode=LC1 length=16.12877 units=m
! reduced_from=line303,line312,line321,line329,line337,line345,line353,line360,line367
! eliminated_buses=304,313,322,330,338,346,354,361

New Line._virtual_line307_line316_line324_line332_line340_line348_line356_line363_line370_line376_line382_line389_line395_line401 bus1=300.1.2.3.4 bus2=402.1.2.3.4 phases=4 linecode=LC1 length=12.152905 units=m
! reduced_from=line307,line316,line324,line332,line340,line348,line356,line363,line370,line376,line382,line389,line395,line401
! eliminated_buses=308,317,325,333,341,349,357,364,371,377,383,390,396

New Line._virtual_line317_line325_line333_line341_line349_line357_line364_line371_line377_line383_line390_line396_line402_line408 bus1=409.1.2.3.4 bus2=309.1.2.3.4 phases=4 linecode=LC1 length=12.193285 units=m
! reduced_from=line317,line325,line333,line341,line349,line357,line364,line371,line377,line383,line390,line396,line402,line408
! eliminated_buses=318,326,334,342,350,358,365,372,378,384,391,397,403

New Line._virtual_line318_line327_line335_line343_line351_line359_line366_line373_line379 bus1=380.1.2.3.4 bus2=309.1.2.3.4 phases=4 linecode=LC4 length=4.19917 units=m
! reduced_from=line318,line327,line335,line343,line351,line359,line366,line373,line379
! eliminated_buses=319,328,336,344,352,360,367,374

New Line._virtual_line385_line391_line397_line403_line409_line415_line421_line427_line433_line439_line445_line451_line455_line459_line463_line467_line470_line473_line476 bus1=477.1.2.3.4 bus2=380.1.2.3.4 phases=4 linecode=LC1 length=10.885876 units=m
! reduced_from=line385,line391,line397,line403,line409,line415,line421,line427,line433,line439,line445,line451,line455,line459,line463,line467,line470,line473,line476
! eliminated_buses=386,392,398,404,410,416,422,428,434,440,446,452,456,460,464,468,471,474

New Line._virtual_line392_line398_line404_line410_line416_line422_line428_line434_line440_line446 bus1=447.1.2.3.4 bus2=387.1.2.3.4 phases=4 linecode=LC1 length=9.42924 units=m
! reduced_from=line392,line398,line404,line410,line416,line422,line428,line434,line440,line446
! eliminated_buses=393,399,405,411,417,423,429,435,441

New Line._virtual_line399_line405_line411_line417_line423_line429_line435_line441_line447_line452_line456_line460_line464 bus1=394.1.2.3.4 bus2=465.1.2.3.4 phases=4 linecode=LC1 length=10.129547 units=m
! reduced_from=line399,line405,line411,line417,line423,line429,line435,line441,line447,line452,line456,line460,line464
! eliminated_buses=400,406,412,418,424,430,436,442,448,453,457,461

New Line._virtual_line406_line412_line418_line424_line430_line436_line442_line448_line453_line457_line461_line465_line468_line471_line474_line477 bus1=401.1.2.3.4 bus2=478.1.2.3.4 phases=4 linecode=LC1 length=10.588006 units=m
! reduced_from=line406,line412,line418,line424,line430,line436,line442,line448,line453,line457,line461,line465,line468,line471,line474,line477
! eliminated_buses=407,413,419,425,431,437,443,449,454,458,462,466,469,472,475

New Line._virtual_line407_line414_line420_line426_line432_line438_line444_line450_line454_line458_line462_line466_line469_line472_line475_line478_line479_line480_line481_line482_line483_line484_line485 bus1=401.1.2.3.4 bus2=486.1.2.3.4 phases=4 linecode=LC4 length=29.83759 units=m
! reduced_from=line407,line414,line420,line426,line432,line438,line444,line450,line454,line458,line462,line466,line469,line472,line475,line478,line479,line480,line481,line482,line483,line484,line485
! eliminated_buses=408,415,421,427,433,439,445,451,455,459,463,467,470,473,476,479,480,481,482,483,484,485

New Line._virtual_line486_line487_line488_line489_line490_line491_line492_line493_line494_line495_line496_line497_line498_line499_line500_line501_line502_line503_line504_line505 bus1=506.1.2.3.4 bus2=486.1.2.3.4 phases=4 linecode=LC3 length=45.16635 units=m
! reduced_from=line486,line487,line488,line489,line490,line491,line492,line493,line494,line495,line496,line497,line498,line499,line500,line501,line502,line503,line504,line505
! eliminated_buses=487,488,489,490,491,492,493,494,495,496,497,498,499,500,501,502,503,504,505

New Line._virtual_line506_line508 bus1=509.1.2.3.4 bus2=506.1.2.3.4 phases=4 linecode=LC1 length=13.3618 units=m
! reduced_from=line506,line508
! eliminated_buses=507

New Line._virtual_line507_line509_line510 bus1=506.1.2.3.4 bus2=511.1.2.3.4 phases=4 linecode=LC3 length=12.5674 units=m
! reduced_from=line507,line509,line510
! eliminated_buses=508,510

New Line._virtual_line511_line513_line515_line517_line519_line522_line525 bus1=526.1.2.3.4 bus2=511.1.2.3.4 phases=4 linecode=LC1 length=7.128489 units=m
! reduced_from=line511,line513,line515,line517,line519,line522,line525
! eliminated_buses=512,514,516,518,520,523

New Line._virtual_line512_line514_line516_line518 bus1=511.1.2.3.4 bus2=519.1.2.3.4 phases=4 linecode=LC3 length=16.9788 units=m
! reduced_from=line512,line514,line516,line518
! eliminated_buses=513,515,517

New Line._virtual_line520_line523_line526_line530_line533 bus1=519.1.2.3.4 bus2=534.1.2.3.4 phases=4 linecode=LC1 length=7.87113 units=m
! reduced_from=line520,line523,line526,line530,line533
! eliminated_buses=521,524,527,531

New Line._virtual_line521_line524_line527_line531 bus1=519.1.2.3.4 bus2=532.1.2.3.4 phases=4 linecode=LC3 length=13.16292 units=m
! reduced_from=line521,line524,line527,line531
! eliminated_buses=522,525,528

New Line._virtual_line528_line532_line536_line541_line545_line549_line553_line558_line562_line566_line570_line574_line578_line582_line586_line590_line593_line596 bus1=597.1.2.3.4 bus2=526.1.2.3.4 phases=4 linecode=LC1 length=14.46822 units=m
! reduced_from=line528,line532,line536,line541,line545,line549,line553,line558,line562,line566,line570,line574,line578,line582,line586,line590,line593,line596
! eliminated_buses=529,533,537,542,546,550,554,559,563,567,571,575,579,583,587,591,594

New Line._virtual_line534_line539_line543_line547_line551_line555_line560_line564_line568_line572_line576_line580_line584_line588 bus1=589.1.2.3.4 bus2=532.1.2.3.4 phases=4 linecode=LC1 length=35.8358 units=m
! reduced_from=line534,line539,line543,line547,line551,line555,line560,line564,line568,line572,line576,line580,line584,line588
! eliminated_buses=535,540,544,548,552,556,561,565,569,573,577,581,585

New Line._virtual_line535_line540_line544_line548_line552 bus1=532.1.2.3.4 bus2=553.1.2.3.4 phases=4 linecode=LC1 length=7.55941 units=m
! reduced_from=line535,line540,line544,line548,line552
! eliminated_buses=536,541,545,549

New Line._virtual_line537_line542_line546_line550_line554_line559_line563_line567_line571_line575_line579_line583_line587_line591_line594_line597 bus1=598.1.2.3.4 bus2=534.1.2.3.4 phases=4 linecode=LC1 length=11.27589 units=m
! reduced_from=line537,line542,line546,line550,line554,line559,line563,line567,line571,line575,line579,line583,line587,line591,line594,line597
! eliminated_buses=538,543,547,551,555,560,564,568,572,576,580,584,588,592,595

New Line._virtual_line556_line561_line565_line569_line573_line577_line581_line585_line589_line592_line595_line598_line599_line600_line601_line602_line603_line604_line605_line606_line607 bus1=608.1.2.3.4 bus2=553.1.2.3.4 phases=4 linecode=LC1 length=12.508626 units=m
! reduced_from=line556,line561,line565,line569,line573,line577,line581,line585,line589,line592,line595,line598,line599,line600,line601,line602,line603,line604,line605,line606,line607
! eliminated_buses=557,562,566,570,574,578,582,586,590,593,596,599,600,601,602,603,604,605,606,607

New Line.LINE57 bus1=56.1.2.3.4 bus2=58.1.2.3.4 phases=4 linecode=LC4 length=4.4983 units=m

New Line.LINE61 bus1=59.1.2.3.4 bus2=62.1.2.3.4 phases=4 linecode=LC1 length=6.0755 units=m

New Line.LINE66 bus1=62.1.2.3.4 bus2=67.1.2.3.4 phases=4 linecode=LC1 length=7.7591 units=m

New Line.LINE84 bus1=78.1.2.3.4 bus2=85.1.2.3.4 phases=4 linecode=LC4 length=4.4276 units=m

New Line.LINE119 bus1=116.1.2.3.4 bus2=120.1.2.3.4 phases=4 linecode=LC1 length=6.7187 units=m

New Line.LINE125 bus1=120.1.2.3.4 bus2=126.1.2.3.4 phases=4 linecode=LC1 length=3.5644 units=m

New Line.LINE134 bus1=129.1.2.3.4 bus2=135.1.2.3.4 phases=4 linecode=LC1 length=0.03605 units=m

New Line.LINE166 bus1=159.1.2.3.4 bus2=167.1.2.3.4 phases=4 linecode=LC2 length=3.2458 units=m

New Line.LINE192 bus1=181.1.2.3.4 bus2=193.1.2.3.4 phases=4 linecode=LC1 length=4.3644 units=m

New Line.LINE244 bus1=241.1.2.3.4 bus2=245.1.2.3.4 phases=4 linecode=LC4 length=6.493 units=m

New Line.LINE274 bus1=271.1.2.3.4 bus2=275.1.2.3.4 phases=4 linecode=LC2 length=5.4864 units=m

New Line.LINE292 bus1=287.1.2.3.4 bus2=293.1.2.3.4 phases=4 linecode=LC4 length=8.7753 units=m

New Line.LINE299 bus1=293.1.2.3.4 bus2=300.1.2.3.4 phases=4 linecode=LC4 length=8.563 units=m

New Line.LINE308 bus1=300.1.2.3.4 bus2=309.1.2.3.4 phases=4 linecode=LC4 length=8.7712 units=m

New Line.LINE386 bus1=380.1.2.3.4 bus2=387.1.2.3.4 phases=4 linecode=LC4 length=5.5103 units=m

New Line.LINE393 bus1=387.1.2.3.4 bus2=394.1.2.3.4 phases=4 linecode=LC4 length=8.3103 units=m

New Line.LINE400 bus1=394.1.2.3.4 bus2=401.1.2.3.4 phases=4 linecode=LC4 length=7.439 units=m

New Line.LINE529 bus1=526.1.2.3.4 bus2=530.1.2.3.4 phases=4 linecode=LC1 length=4.6071 units=m

New Line.LINE538 bus1=534.1.2.3.4 bus2=539.1.2.3.4 phases=4 linecode=LC1 length=5.1044 units=m

New Line.LINE557 bus1=553.1.2.3.4 bus2=558.1.2.3.4 phases=4 linecode=LC1 length=5.4447 units=m
