! Reduced enabled lines.

New Line._virtual_line0_line1_line2_line3_line4_line5_line6_line7_line8_line9_line10_line11_line12_line13_line14_line15_line16_line17_line18_line19_line20_line21_line22_line23_line24_line25_line26_line27_line28_line29_line30_line31_line32_line33_line34_line35_line36_line37_line38_line39_line40_line41_line42_line44_line46_line48_line50_line52_line54_line56_line57_line58_line59_line60_line61_line62_line63_line64_line65_line66_line67_line68_line69_line70_line72_line75_line77_line79_line80_line81_line82_line83_line84_line85_line86_line87_line88_line89_line90_line91_line92_line93_line95_line98_line101_line104 bus1=sourcebus.1.2.3.4 bus2=105.1.2.3.4 phases=4 linecode=LC5 length=115.028987 units=m
! reduced_from=line0,line1,line2,line3,line4,line5,line6,line7,line8,line9,line10,line11,line12,line13,line14,line15,line16,line17,line18,line19,line20,line21,line22,line23,line24,line25,line26,line27,line28,line29,line30,line31,line32,line33,line34,line35,line36,line37,line38,line39,line40,line41,line42,line44,line46,line48,line50,line52,line54,line56,line57,line58,line59,line60,line61,line62,line63,line64,line65,line66,line67,line68,line69,line70,line72,line75,line77,line79,line80,line81,line82,line83,line84,line85,line86,line87,line88,line89,line90,line91,line92,line93,line95,line98,line101,line104
! eliminated_buses=1,2,3,4,5,6,7,8,9,10,11,12,13,14,15,16,17,18,19,20,21,22,23,24,25,26,27,28,29,30,31,32,33,34,35,36,37,38,39,40,41,42,43,45,47,49,51,53,55,57,58,59,60,61,62,63,64,65,66,67,68,69,70,71,73,76,78,80,81,82,83,84,85,86,87,88,89,90,91,92,93,94,96,99,102

New Line._virtual_line106_line109_line113_line118_line123_line129 bus1=105.1.2.3.4 bus2=130.1.2.3.4 phases=4 linecode=LC1 length=14.65946 units=m
! reduced_from=line106,line109,line113,line118,line123,line129
! eliminated_buses=107,110,114,119,124

New Line._virtual_line107_line111 bus1=105.1.2.3.4 bus2=112.1.2.3.4 phases=4 linecode=LC5 length=15.53927 units=m
! reduced_from=line107,line111
! eliminated_buses=108

New Line._virtual_line115_line120_line125_line131_line136 bus1=112.1.2.3.4 bus2=137.1.2.3.4 phases=4 linecode=LC1 length=11.94925 units=m
! reduced_from=line115,line120,line125,line131,line136
! eliminated_buses=116,121,126,132

New Line._virtual_line121_line126_line132_line137_line140_line144_line148 bus1=117.1.2.3.4 bus2=149.1.2.3.4 phases=4 linecode=LC1 length=11.3099 units=m
! reduced_from=line121,line126,line132,line137,line140,line144,line148
! eliminated_buses=122,127,133,138,141,145

New Line._virtual_line127_line133_line138 bus1=123.1.2.3.4 bus2=139.1.2.3.4 phases=4 linecode=LC1 length=3.54758 units=m
! reduced_from=line127,line133,line138
! eliminated_buses=128,134

New Line._virtual_line128_line134_line139_line143_line147_line151_line154_line157_line160_line164_line168_line174_line180_line186_line192_line197_line201_line205 bus1=123.1.2.3.4 bus2=206.1.2.3.4 phases=4 linecode=LC5 length=14.61417 units=m
! reduced_from=line128,line134,line139,line143,line147,line151,line154,line157,line160,line164,line168,line174,line180,line186,line192,line197,line201,line205
! eliminated_buses=129,135,140,144,148,152,155,158,161,165,169,175,181,187,193,198,202

New Line._virtual_line141_line145_line149_line152_line155_line158_line161_line165_line169_line175_line181_line187_line193_line198_line202_line206_line211_line216_line222 bus1=139.1.2.3.4 bus2=223.1.2.3.4 phases=4 linecode=LC1 length=8.879856 units=m
! reduced_from=line141,line145,line149,line152,line155,line158,line161,line165,line169,line175,line181,line187,line193,line198,line202,line206,line211,line216,line222
! eliminated_buses=142,146,150,153,156,159,162,166,170,176,182,188,194,199,203,207,212,217

New Line._virtual_line142_line146_line150_line153_line156_line159_line162_line166_line171_line177_line183_line189_line194_line199_line203_line207_line212_line217 bus1=139.1.2.3.4 bus2=218.1.2.3.4 phases=4 linecode=LC6 length=14.353482 units=m
! reduced_from=line142,line146,line150,line153,line156,line159,line162,line166,line171,line177,line183,line189,line194,line199,line203,line207,line212,line217
! eliminated_buses=143,147,151,154,157,160,163,167,172,178,184,190,195,200,204,208,213

New Line._virtual_line209_line214_line219_line223_line230 bus1=206.1.2.3.4 bus2=231.1.2.3.4 phases=4 linecode=LC1 length=10.65817 units=m
! reduced_from=line209,line214,line219,line223,line230
! eliminated_buses=210,215,220,224

New Line._virtual_line210_line215 bus1=206.1.2.3.4 bus2=216.1.2.3.4 phases=4 linecode=LC5 length=10.1761 units=m
! reduced_from=line210,line215
! eliminated_buses=211

New Line._virtual_line224_line231_line239_line246_line252_line258_line264_line272_line280_line289_line297_line304_line312 bus1=221.1.2.3.4 bus2=313.1.2.3.4 phases=4 linecode=LC1 length=7.888794 units=m
! reduced_from=line224,line231,line239,line246,line252,line258,line264,line272,line280,line289,line297,line304,line312
! eliminated_buses=225,232,240,247,253,259,265,273,281,290,298,305

New Line._virtual_line228_line236_line244_line250_line256_line262_line270_line278_line287_line295_line302_line310_line317_line320_line323_line326_line328_line330_line332_line334_line336_line337_line338 bus1=223.1.2.3.4 bus2=339.1.2.3.4 phases=4 linecode=LC1 length=21.59421 units=m
! reduced_from=line228,line236,line244,line250,line256,line262,line270,line278,line287,line295,line302,line310,line317,line320,line323,line326,line328,line330,line332,line334,line336,line337,line338
! eliminated_buses=229,237,245,251,257,263,271,279,288,296,303,311,318,321,324,327,329,331,333,335,337,338

New Line._virtual_line232_line240_line247_line253_line259_line265_line273_line281_line290_line298_line305 bus1=227.1.2.3.4 bus2=306.1.2.3.4 phases=4 linecode=LC1 length=5.729463 units=m
! reduced_from=line232,line240,line247,line253,line259,line265,line273,line281,line290,line298,line305
! eliminated_buses=233,241,248,254,260,266,274,282,291,299

New Line._virtual_line234_line241 bus1=228.1.2.3.4 bus2=242.1.2.3.4 phases=4 linecode=LC1 length=11.5663 units=m
! reduced_from=line234,line241
! eliminated_buses=235

New Line._virtual_line237_line245_line251_line257_line263_line271_line279_line288_line296_line303_line311 bus1=312.1.2.3.4 bus2=231.1.2.3.4 phases=4 linecode=LC1 length=8.47123 units=m
! reduced_from=line237,line245,line251,line257,line263,line271,line279,line288,line296,line303,line311
! eliminated_buses=238,246,252,258,264,272,280,289,297,304

New Line._virtual_line242_line248 bus1=236.1.2.3.4 bus2=249.1.2.3.4 phases=4 linecode=LC1 length=10.9339 units=m
! reduced_from=line242,line248
! eliminated_buses=243

New Line._virtual_line243_line249 bus1=250.1.2.3.4 bus2=236.1.2.3.4 phases=4 linecode=LC5 length=11.2593 units=m
! reduced_from=line243,line249
! eliminated_buses=244

New Line._virtual_line254_line260 bus1=261.1.2.3.4 bus2=250.1.2.3.4 phases=4 linecode=LC1 length=7.5577 units=m
! reduced_from=line254,line260
! eliminated_buses=255

New Line._virtual_line255_line261 bus1=262.1.2.3.4 bus2=250.1.2.3.4 phases=4 linecode=LC5 length=16.1218 units=m
! reduced_from=line255,line261
! eliminated_buses=256

New Line._virtual_line266_line274 bus1=261.1.2.3.4 bus2=275.1.2.3.4 phases=4 linecode=LC1 length=5.7206 units=m
! reduced_from=line266,line274
! eliminated_buses=267

New Line._virtual_line268_line275 bus1=276.1.2.3.4 bus2=262.1.2.3.4 phases=4 linecode=LC1 length=7.3168 units=m
! reduced_from=line268,line275
! eliminated_buses=269

New Line._virtual_line269_line277_line286 bus1=262.1.2.3.4 bus2=287.1.2.3.4 phases=4 linecode=LC5 length=14.475 units=m
! reduced_from=line269,line277,line286
! eliminated_buses=270,278

New Line._virtual_line282_line291 bus1=292.1.2.3.4 bus2=276.1.2.3.4 phases=4 linecode=LC1 length=6.361 units=m
! reduced_from=line282,line291
! eliminated_buses=283

New Line._virtual_line293_line300 bus1=301.1.2.3.4 bus2=287.1.2.3.4 phases=4 linecode=LC1 length=7.4359 units=m
! reduced_from=line293,line300
! eliminated_buses=294

New Line.LINE116 bus1=112.1.2.3.4 bus2=117.1.2.3.4 phases=4 linecode=LC5 length=3.4322 units=m

New Line.LINE122 bus1=117.1.2.3.4 bus2=123.1.2.3.4 phases=4 linecode=LC5 length=11.7361 units=m

New Line.LINE220 bus1=216.1.2.3.4 bus2=221.1.2.3.4 phases=4 linecode=LC1 length=6.2696 units=m

New Line.LINE221 bus1=216.1.2.3.4 bus2=222.1.2.3.4 phases=4 linecode=LC5 length=16.2935 units=m

New Line.LINE225 bus1=221.1.2.3.4 bus2=226.1.2.3.4 phases=4 linecode=LC1 length=5.1855 units=m

New Line.LINE226 bus1=222.1.2.3.4 bus2=227.1.2.3.4 phases=4 linecode=LC1 length=6.5781 units=m

New Line.LINE227 bus1=222.1.2.3.4 bus2=228.1.2.3.4 phases=4 linecode=LC5 length=14.925 units=m

New Line.LINE229 bus1=223.1.2.3.4 bus2=230.1.2.3.4 phases=4 linecode=LC1 length=4.947 units=m

New Line.LINE233 bus1=227.1.2.3.4 bus2=234.1.2.3.4 phases=4 linecode=LC1 length=4.8942 units=m

New Line.LINE235 bus1=228.1.2.3.4 bus2=236.1.2.3.4 phases=4 linecode=LC5 length=3.4139 units=m

New Line.LINE238 bus1=231.1.2.3.4 bus2=239.1.2.3.4 phases=4 linecode=LC1 length=4.4736 units=m

New Line.LINE267 bus1=261.1.2.3.4 bus2=268.1.2.3.4 phases=4 linecode=LC1 length=4.7418 units=m

New Line.LINE283 bus1=276.1.2.3.4 bus2=284.1.2.3.4 phases=4 linecode=LC1 length=5.4983 units=m

New Line.LINE307 bus1=301.1.2.3.4 bus2=308.1.2.3.4 phases=4 linecode=LC1 length=4.2946 units=m

New Line.LINE308 bus1=301.1.2.3.4 bus2=309.1.2.3.4 phases=4 linecode=LC1 length=7.6749 units=m

New Line.LINE314 bus1=308.1.2.3.4 bus2=315.1.2.3.4 phases=4 linecode=LC1 length=116.2545 units=m

New Line.LINE315 bus1=308.1.2.3.4 bus2=316.1.2.3.4 phases=4 linecode=LC1 length=3.867 units=m
