! Reduced enabled lines.

New Line._virtual_line0_line1_line2_line3_line4_line5_line6_line7_line8_line9_line10_line11_line12_line13_line14_line15_line16_line17_line18_line19_line20_line21_line22_line23_line24_line25_line26_line27_line28_line30_line32 bus1=sourcebus.1.2.3.4 bus2=33.1.2.3.4 phases=4 linecode=LC5 length=30.400499 units=m
! reduced_from=line0,line1,line2,line3,line4,line5,line6,line7,line8,line9,line10,line11,line12,line13,line14,line15,line16,line17,line18,line19,line20,line21,line22,line23,line24,line25,line26,line27,line28,line30,line32
! eliminated_buses=1,2,3,4,5,6,7,8,9,10,11,12,13,14,15,16,17,18,19,20,21,22,23,24,25,26,27,28,29,31

New Line._virtual_line35_line39 bus1=40.1.2.3.4 bus2=33.1.2.3.4 phases=4 linecode=LC1 length=17.6052 units=m
! reduced_from=line35,line39
! eliminated_buses=36

New Line._virtual_line37_line41_line44 bus1=45.1.2.3.4 bus2=35.1.2.3.4 phases=4 linecode=LC5 length=10.5682 units=m
! reduced_from=line37,line41,line44
! eliminated_buses=38,42

New Line._virtual_line38_line42 bus1=35.1.2.3.4 bus2=43.1.2.3.4 phases=4 linecode=LC1 length=18.7782 units=m
! reduced_from=line38,line42
! eliminated_buses=39

New Line._virtual_line47_line51 bus1=45.1.2.3.4 bus2=52.1.2.3.4 phases=4 linecode=LC1 length=19.4865 units=m
! reduced_from=line47,line51
! eliminated_buses=48

New Line._virtual_line49_line53_line56_line60_line63_line65_line67 bus1=68.1.2.3.4 bus2=47.1.2.3.4 phases=4 linecode=LC1 length=14.29831 units=m
! reduced_from=line49,line53,line56,line60,line63,line65,line67
! eliminated_buses=50,54,57,61,64,66

New Line._virtual_line50_line54 bus1=47.1.2.3.4 bus2=55.1.2.3.4 phases=4 linecode=LC5 length=4.58543 units=m
! reduced_from=line50,line54
! eliminated_buses=51

New Line._virtual_line57_line61 bus1=62.1.2.3.4 bus2=55.1.2.3.4 phases=4 linecode=LC1 length=20.5023 units=m
! reduced_from=line57,line61
! eliminated_buses=58

New Line._virtual_line58_line62_line64_line66_line68_line72_line75_line77_line79_line81_line83_line85_line87_line89_line91_line93_line95_line97 bus1=98.1.2.3.4 bus2=55.1.2.3.4 phases=4 linecode=LC5 length=12.62799 units=m
! reduced_from=line58,line62,line64,line66,line68,line72,line75,line77,line79,line81,line83,line85,line87,line89,line91,line93,line95,line97
! eliminated_buses=59,63,65,67,69,73,76,78,80,82,84,86,88,90,92,94,96

New Line._virtual_line69_line73 bus1=74.1.2.3.4 bus2=68.1.2.3.4 phases=4 linecode=LC1 length=7.0704 units=m
! reduced_from=line69,line73
! eliminated_buses=70

New Line._virtual_line70_line74_line76_line78_line80_line82_line84_line86_line88_line90_line92_line94_line96_line98_line101_line104_line107_line110_line113_line116_line119_line122_line125 bus1=68.1.2.3.4 bus2=126.1.2.3.4 phases=4 linecode=LC1 length=18.245634 units=m
! reduced_from=line70,line74,line76,line78,line80,line82,line84,line86,line88,line90,line92,line94,line96,line98,line101,line104,line107,line110,line113,line116,line119,line122,line125
! eliminated_buses=71,75,77,79,81,83,85,87,89,91,93,95,97,99,102,105,108,111,114,117,120,123

New Line._virtual_line99_line102_line105_line108_line111_line114_line117_line120_line123_line126_line130_line134_line137 bus1=138.1.2.3.4 bus2=98.1.2.3.4 phases=4 linecode=LC5 length=10.283651 units=m
! reduced_from=line99,line102,line105,line108,line111,line114,line117,line120,line123,line126,line130,line134,line137
! eliminated_buses=100,103,106,109,112,115,118,121,124,127,131,135

New Line._virtual_line100_line103_line106_line109_line112_line115_line118_line121_line124_line127_line132_line136_line139_line144_line149_line154_line160 bus1=161.1.2.3.4 bus2=98.1.2.3.4 phases=4 linecode=LC3 length=30.86177 units=m
! reduced_from=line100,line103,line106,line109,line112,line115,line118,line121,line124,line127,line132,line136,line139,line144,line149,line154,line160
! eliminated_buses=101,104,107,110,113,116,119,122,125,128,133,137,140,145,150,155

New Line._virtual_line128_line133 bus1=134.1.2.3.4 bus2=126.1.2.3.4 phases=4 linecode=LC1 length=8.395 units=m
! reduced_from=line128,line133
! eliminated_buses=129

New Line._virtual_line140_line145_line150_line155 bus1=138.1.2.3.4 bus2=156.1.2.3.4 phases=4 linecode=LC4 length=31.0431 units=m
! reduced_from=line140,line145,line150,line155
! eliminated_buses=141,146,151

New Line._virtual_line141_line146_line151_line156_line163_line169_line175_line181_line189_line197_line206_line214_line222_line230_line238_line247_line258_line266_line276_line287 bus1=138.1.2.3.4 bus2=288.1.2.3.4 phases=4 linecode=LC2 length=17.24659 units=m
! reduced_from=line141,line146,line151,line156,line163,line169,line175,line181,line189,line197,line206,line214,line222,line230,line238,line247,line258,line266,line276,line287
! eliminated_buses=142,147,152,157,164,170,176,182,190,198,207,215,223,231,239,248,259,267,277

New Line._virtual_line161_line167_line173_line179_line186_line194 bus1=156.1.2.3.4 bus2=195.1.2.3.4 phases=4 linecode=LC4 length=20.089309 units=m
! reduced_from=line161,line167,line173,line179,line186,line194
! eliminated_buses=162,168,174,180,187

New Line._virtual_line162_line168_line174_line180_line187_line195_line204_line212_line220 bus1=221.1.2.3.4 bus2=156.1.2.3.4 phases=4 linecode=LC1 length=13.727068 units=m
! reduced_from=line162,line168,line174,line180,line187,line195,line204,line212,line220
! eliminated_buses=163,169,175,181,188,196,205,213

New Line._virtual_line165_line170_line176 bus1=161.1.2.3.4 bus2=177.1.2.3.4 phases=4 linecode=LC1 length=10.24154 units=m
! reduced_from=line165,line170,line176
! eliminated_buses=166,171

New Line._virtual_line166_line172_line178 bus1=161.1.2.3.4 bus2=179.1.2.3.4 phases=4 linecode=LC3 length=7.7929 units=m
! reduced_from=line166,line172,line178
! eliminated_buses=167,173

New Line._virtual_line183_line191_line199 bus1=200.1.2.3.4 bus2=179.1.2.3.4 phases=4 linecode=LC1 length=11.8425 units=m
! reduced_from=line183,line191,line199
! eliminated_buses=184,192

New Line._virtual_line184_line192_line200_line208_line216 bus1=179.1.2.3.4 bus2=217.1.2.3.4 phases=4 linecode=LC3 length=14.13585 units=m
! reduced_from=line184,line192,line200,line208,line216
! eliminated_buses=185,193,201,209

New Line._virtual_line202_line210_line218_line226 bus1=227.1.2.3.4 bus2=195.1.2.3.4 phases=4 linecode=LC4 length=17.9856 units=m
! reduced_from=line202,line210,line218,line226
! eliminated_buses=203,211,219

New Line._virtual_line203_line211_line219_line228_line237_line246 bus1=195.1.2.3.4 bus2=247.1.2.3.4 phases=4 linecode=LC1 length=10.516399 units=m
! reduced_from=line203,line211,line219,line228,line237,line246
! eliminated_buses=204,212,220,229,238

New Line._virtual_line223_line231_line239 bus1=240.1.2.3.4 bus2=217.1.2.3.4 phases=4 linecode=LC1 length=10.8082 units=m
! reduced_from=line223,line231,line239
! eliminated_buses=224,232

New Line._virtual_line224_line232 bus1=233.1.2.3.4 bus2=217.1.2.3.4 phases=4 linecode=LC3 length=7.1464 units=m
! reduced_from=line224,line232
! eliminated_buses=225

New Line._virtual_line234_line243 bus1=227.1.2.3.4 bus2=244.1.2.3.4 phases=4 linecode=LC4 length=17.9309 units=m
! reduced_from=line234,line243
! eliminated_buses=235

New Line._virtual_line235_line245_line255_line264_line275_line285 bus1=286.1.2.3.4 bus2=227.1.2.3.4 phases=4 linecode=LC1 length=11.449608 units=m
! reduced_from=line235,line245,line255,line264,line275,line285
! eliminated_buses=236,246,256,265,276

New Line._virtual_line240_line248_line259_line267 bus1=268.1.2.3.4 bus2=233.1.2.3.4 phases=4 linecode=LC3 length=16.7328 units=m
! reduced_from=line240,line248,line259,line267
! eliminated_buses=241,249,260

New Line._virtual_line241_line249 bus1=250.1.2.3.4 bus2=233.1.2.3.4 phases=4 linecode=LC1 length=12.8353 units=m
! reduced_from=line241,line249
! eliminated_buses=242

New Line._virtual_line250_line260 bus1=244.1.2.3.4 bus2=261.1.2.3.4 phases=4 linecode=LC4 length=20.2113 units=m
! reduced_from=line250,line260
! eliminated_buses=251

New Line._virtual_line251_line262_line273_line283_line297 bus1=298.1.2.3.4 bus2=244.1.2.3.4 phases=4 linecode=LC1 length=10.39492 units=m
! reduced_from=line251,line262,line273,line283,line297
! eliminated_buses=252,263,274,284

New Line._virtual_line256_line265 bus1=247.1.2.3.4 bus2=266.1.2.3.4 phases=4 linecode=LC1 length=12.5962 units=m
! reduced_from=line256,line265
! eliminated_buses=257

New Line._virtual_line268_line279_line291_line306 bus1=307.1.2.3.4 bus2=261.1.2.3.4 phases=4 linecode=LC4 length=22.6798 units=m
! reduced_from=line268,line279,line291,line306
! eliminated_buses=269,280,292

New Line._virtual_line269_line281_line295_line309_line327_line345 bus1=261.1.2.3.4 bus2=346.1.2.3.4 phases=4 linecode=LC1 length=10.36239 units=m
! reduced_from=line269,line281,line295,line309,line327,line345
! eliminated_buses=270,282,296,310,328

New Line._virtual_line278_line290_line305_line321_line338_line354_line368_line382 bus1=383.1.2.3.4 bus2=268.1.2.3.4 phases=4 linecode=LC1 length=11.51636 units=m
! reduced_from=line278,line290,line305,line321,line338,line354,line368,line382
! eliminated_buses=279,291,306,322,339,355,369

New Line._virtual_line288_line303 bus1=278.1.2.3.4 bus2=304.1.2.3.4 phases=4 linecode=LC3 length=16.4967 units=m
! reduced_from=line288,line303
! eliminated_buses=289

New Line._virtual_line289_line304 bus1=278.1.2.3.4 bus2=305.1.2.3.4 phases=4 linecode=LC1 length=11.0261 units=m
! reduced_from=line289,line304
! eliminated_buses=290

New Line._virtual_line299_line314 bus1=315.1.2.3.4 bus2=286.1.2.3.4 phases=4 linecode=LC1 length=11.5866 units=m
! reduced_from=line299,line314
! eliminated_buses=300

New Line._virtual_line311_line329 bus1=330.1.2.3.4 bus2=298.1.2.3.4 phases=4 linecode=LC1 length=12.3418 units=m
! reduced_from=line311,line329
! eliminated_buses=312

New Line._virtual_line317_line333_line349_line364 bus1=303.1.2.3.4 bus2=365.1.2.3.4 phases=4 linecode=LC2 length=6.28456 units=m
! reduced_from=line317,line333,line349,line364
! eliminated_buses=318,334,350

New Line._virtual_line318_line334_line350_line365_line379_line393_line405_line416_line426_line437_line451_line465_line478_line491_line501_line510_line519_line528_line534_line540_line547_line554_line560 bus1=303.1.2.3.4 bus2=561.1.2.3.4 phases=4 linecode=LC6 length=11.870083 units=m
! reduced_from=line318,line334,line350,line365,line379,line393,line405,line416,line426,line437,line451,line465,line478,line491,line501,line510,line519,line528,line534,line540,line547,line554,line560
! eliminated_buses=319,335,351,366,380,394,406,417,427,438,452,466,479,492,502,511,520,529,535,541,548,555

New Line._virtual_line320_line337_line353 bus1=304.1.2.3.4 bus2=354.1.2.3.4 phases=4 linecode=LC6 length=10.9706 units=m
! reduced_from=line320,line337,line353
! eliminated_buses=321,338

New Line._virtual_line322_line339_line355_line369 bus1=307.1.2.3.4 bus2=370.1.2.3.4 phases=4 linecode=LC4 length=22.4603 units=m
! reduced_from=line322,line339,line355,line369
! eliminated_buses=323,340,356

New Line._virtual_line335_line351 bus1=320.1.2.3.4 bus2=352.1.2.3.4 phases=4 linecode=LC3 length=17.1369 units=m
! reduced_from=line335,line351
! eliminated_buses=336

New Line._virtual_line336_line352 bus1=320.1.2.3.4 bus2=353.1.2.3.4 phases=4 linecode=LC1 length=11.8785 units=m
! reduced_from=line336,line352
! eliminated_buses=337

New Line._virtual_line342_line357_line371_line386 bus1=387.1.2.3.4 bus2=324.1.2.3.4 phases=4 linecode=LC1 length=10.10909 units=m
! reduced_from=line342,line357,line371,line386
! eliminated_buses=343,358,372

New Line._virtual_line359_line373 bus1=374.1.2.3.4 bus2=346.1.2.3.4 phases=4 linecode=LC1 length=12.5652 units=m
! reduced_from=line359,line373
! eliminated_buses=360

New Line._virtual_line366_line380 bus1=352.1.2.3.4 bus2=381.1.2.3.4 phases=4 linecode=LC3 length=7.1529 units=m
! reduced_from=line366,line380
! eliminated_buses=367

New Line._virtual_line367_line381 bus1=382.1.2.3.4 bus2=352.1.2.3.4 phases=4 linecode=LC1 length=10.8317 units=m
! reduced_from=line367,line381
! eliminated_buses=368

New Line._virtual_line377_line390_line403_line414_line423 bus1=424.1.2.3.4 bus2=365.1.2.3.4 phases=4 linecode=LC2 length=14.66178 units=m
! reduced_from=line377,line390,line403,line414,line423
! eliminated_buses=378,391,404,415

New Line._virtual_line383_line396_line408_line418_line429_line440_line455 bus1=370.1.2.3.4 bus2=456.1.2.3.4 phases=4 linecode=LC4 length=23.00478 units=m
! reduced_from=line383,line396,line408,line418,line429,line440,line455
! eliminated_buses=384,397,409,419,430,441

New Line._virtual_line384_line398_line411_line421_line432 bus1=370.1.2.3.4 bus2=433.1.2.3.4 phases=4 linecode=LC1 length=8.99463 units=m
! reduced_from=line384,line398,line411,line421,line432
! eliminated_buses=385,399,412,422

New Line._virtual_line391_line404_line415_line425_line436_line450_line464_line477_line490_line500_line509_line518 bus1=519.1.2.3.4 bus2=379.1.2.3.4 phases=4 linecode=LC1 length=8.50075 units=m
! reduced_from=line391,line404,line415,line425,line436,line450,line464,line477,line490,line500,line509,line518
! eliminated_buses=392,405,416,426,437,451,465,478,491,501,510

New Line._virtual_line394_line406_line417 bus1=418.1.2.3.4 bus2=381.1.2.3.4 phases=4 linecode=LC3 length=18.08337 units=m
! reduced_from=line394,line406,line417
! eliminated_buses=395,407

New Line._virtual_line395_line407 bus1=381.1.2.3.4 bus2=408.1.2.3.4 phases=4 linecode=LC1 length=12.2175 units=m
! reduced_from=line395,line407
! eliminated_buses=396

New Line._virtual_line399_line412 bus1=387.1.2.3.4 bus2=413.1.2.3.4 phases=4 linecode=LC1 length=14.387 units=m
! reduced_from=line399,line412
! eliminated_buses=400

New Line._virtual_line427_line438 bus1=439.1.2.3.4 bus2=418.1.2.3.4 phases=4 linecode=LC3 length=13.3585 units=m
! reduced_from=line427,line438
! eliminated_buses=428

New Line._virtual_line428_line439_line454_line467_line480_line493 bus1=418.1.2.3.4 bus2=494.1.2.3.4 phases=4 linecode=LC1 length=11.54267 units=m
! reduced_from=line428,line439,line454,line467,line480,line493
! eliminated_buses=429,440,455,468,481

New Line._virtual_line434_line446_line460 bus1=424.1.2.3.4 bus2=461.1.2.3.4 phases=4 linecode=LC2 length=14.4682 units=m
! reduced_from=line434,line446,line460
! eliminated_buses=435,447

New Line._virtual_line443_line458 bus1=433.1.2.3.4 bus2=459.1.2.3.4 phases=4 linecode=LC1 length=12.0093 units=m
! reduced_from=line443,line458
! eliminated_buses=444

New Line._virtual_line448_line463_line476_line489_line499_line508_line517_line527_line533_line539_line546_line553 bus1=436.1.2.3.4 bus2=554.1.2.3.4 phases=4 linecode=LC1 length=7.582834 units=m
! reduced_from=line448,line463,line476,line489,line499,line508,line517,line527,line533,line539,line546,line553
! eliminated_buses=449,464,477,490,500,509,518,528,534,540,547

New Line._virtual_line452_line466_line479_line492_line502_line511_line520 bus1=521.1.2.3.4 bus2=439.1.2.3.4 phases=4 linecode=LC1 length=12.80371 units=m
! reduced_from=line452,line466,line479,line492,line502,line511,line520
! eliminated_buses=453,467,480,493,503,512

New Line._virtual_line470_line484_line495_line504_line513 bus1=456.1.2.3.4 bus2=514.1.2.3.4 phases=4 linecode=LC1 length=8.33404 units=m
! reduced_from=line470,line484,line495,line504,line513
! eliminated_buses=471,485,496,505

New Line._virtual_line473_line486_line496_line505_line514_line524_line531 bus1=532.1.2.3.4 bus2=461.1.2.3.4 phases=4 linecode=LC2 length=8.29134 units=m
! reduced_from=line473,line486,line496,line505,line514,line524,line531
! eliminated_buses=474,487,497,506,515,525

New Line._virtual_line474_line487_line497_line506_line515_line525_line532_line538_line545_line552_line559_line566_line574_line580_line586_line593_line598_line603 bus1=461.1.2.3.4 bus2=604.1.2.3.4 phases=4 linecode=LC6 length=8.226681 units=m
! reduced_from=line474,line487,line497,line506,line515,line525,line532,line538,line545,line552,line559,line566,line574,line580,line586,line593,line598,line603
! eliminated_buses=475,488,498,507,516,526,533,539,546,553,560,567,575,581,587,594,599

New Line._virtual_line522_line530_line535_line541_line548 bus1=514.1.2.3.4 bus2=549.1.2.3.4 phases=4 linecode=LC1 length=14.72521 units=m
! reduced_from=line522,line530,line535,line541,line548
! eliminated_buses=523,531,536,542

New Line._virtual_line536_line542_line549 bus1=532.1.2.3.4 bus2=550.1.2.3.4 phases=4 linecode=LC2 length=13.80017 units=m
! reduced_from=line536,line542,line549
! eliminated_buses=537,543

New Line._virtual_line537_line544_line551_line558_line565_line573_line579_line585 bus1=532.1.2.3.4 bus2=586.1.2.3.4 phases=4 linecode=LC1 length=8.22725 units=m
! reduced_from=line537,line544,line551,line558,line565,line573,line579,line585
! eliminated_buses=538,545,552,559,566,574,580

New Line._virtual_line556_line563 bus1=564.1.2.3.4 bus2=550.1.2.3.4 phases=4 linecode=LC1 length=12.0171 units=m
! reduced_from=line556,line563
! eliminated_buses=557

New Line._virtual_line562_line571 bus1=556.1.2.3.4 bus2=572.1.2.3.4 phases=4 linecode=LC1 length=13.9853 units=m
! reduced_from=line562,line571
! eliminated_buses=563

New Line._virtual_line567_line575_line581_line587_line594_line599_line604_line610_line615 bus1=616.1.2.3.4 bus2=561.1.2.3.4 phases=4 linecode=LC6 length=6.542784 units=m
! reduced_from=line567,line575,line581,line587,line594,line599,line604,line610,line615
! eliminated_buses=568,576,582,588,595,600,605,611

New Line._virtual_line569_line576 bus1=562.1.2.3.4 bus2=577.1.2.3.4 phases=4 linecode=LC2 length=2.8874 units=m
! reduced_from=line569,line576
! eliminated_buses=570

New Line._virtual_line570_line577 bus1=578.1.2.3.4 bus2=562.1.2.3.4 phases=4 linecode=LC1 length=15.3183 units=m
! reduced_from=line570,line577
! eliminated_buses=571

New Line._virtual_line582_line588_line595_line600_line605_line611_line616_line620_line624 bus1=625.1.2.3.4 bus2=577.1.2.3.4 phases=4 linecode=LC1 length=13.30323 units=m
! reduced_from=line582,line588,line595,line600,line605,line611,line616,line620,line624
! eliminated_buses=583,589,596,601,606,612,617,621

New Line._virtual_line591_line597_line602_line607_line613_line618_line622_line626_line628_line630_line632_line634 bus1=635.1.2.3.4 bus2=586.1.2.3.4 phases=4 linecode=LC1 length=6.632184 units=m
! reduced_from=line591,line597,line602,line607,line613,line618,line622,line626,line628,line630,line632,line634
! eliminated_buses=592,598,603,608,614,619,623,627,629,631,633

New Line._virtual_line608_line614_line619_line623_line627_line629_line631_line633_line635_line636_line637_line638 bus1=604.1.2.3.4 bus2=639.1.2.3.4 phases=4 linecode=LC6 length=8.63898 units=m
! reduced_from=line608,line614,line619,line623,line627,line629,line631,line633,line635,line636,line637,line638
! eliminated_buses=609,615,620,624,628,630,632,634,636,637,638

New Line.LINE34 bus1=33.1.2.3.4 bus2=35.1.2.3.4 phases=4 linecode=LC5 length=4.0664 units=m

New Line.LINE46 bus1=45.1.2.3.4 bus2=47.1.2.3.4 phases=4 linecode=LC5 length=2.2521 units=m

New Line.LINE71 bus1=68.1.2.3.4 bus2=72.1.2.3.4 phases=4 linecode=LC1 length=4.2021 units=m

New Line.LINE129 bus1=126.1.2.3.4 bus2=130.1.2.3.4 phases=4 linecode=LC1 length=4.9708 units=m

New Line.LINE257 bus1=247.1.2.3.4 bus2=258.1.2.3.4 phases=4 linecode=LC1 length=2.6358 units=m

New Line.LINE277 bus1=268.1.2.3.4 bus2=278.1.2.3.4 phases=4 linecode=LC3 length=6.6489 units=m

New Line.LINE300 bus1=286.1.2.3.4 bus2=301.1.2.3.4 phases=4 linecode=LC1 length=2.5928 units=m

New Line.LINE302 bus1=288.1.2.3.4 bus2=303.1.2.3.4 phases=4 linecode=LC9 length=6.5011 units=m

New Line.LINE312 bus1=298.1.2.3.4 bus2=313.1.2.3.4 phases=4 linecode=LC1 length=3.3808 units=m

New Line.LINE319 bus1=304.1.2.3.4 bus2=320.1.2.3.4 phases=4 linecode=LC3 length=5.917 units=m

New Line.LINE323 bus1=307.1.2.3.4 bus2=324.1.2.3.4 phases=4 linecode=LC4 length=1.9251 units=m

New Line.LINE360 bus1=346.1.2.3.4 bus2=361.1.2.3.4 phases=4 linecode=LC1 length=4.0328 units=m

New Line.LINE378 bus1=365.1.2.3.4 bus2=379.1.2.3.4 phases=4 linecode=LC1 length=8.1812 units=m

New Line.LINE392 bus1=379.1.2.3.4 bus2=393.1.2.3.4 phases=4 linecode=LC1 length=2.9373 units=m

New Line.LINE400 bus1=387.1.2.3.4 bus2=401.1.2.3.4 phases=4 linecode=LC1 length=2.1052 units=m

New Line.LINE435 bus1=424.1.2.3.4 bus2=436.1.2.3.4 phases=4 linecode=LC1 length=7.5626 units=m

New Line.LINE444 bus1=433.1.2.3.4 bus2=445.1.2.3.4 phases=4 linecode=LC1 length=3.4583 units=m

New Line.LINE449 bus1=436.1.2.3.4 bus2=450.1.2.3.4 phases=4 linecode=LC1 length=4.9785 units=m

New Line.LINE523 bus1=514.1.2.3.4 bus2=524.1.2.3.4 phases=4 linecode=LC1 length=3.1713 units=m

New Line.LINE555 bus1=550.1.2.3.4 bus2=556.1.2.3.4 phases=4 linecode=LC2 length=5.1455 units=m

New Line.LINE561 bus1=556.1.2.3.4 bus2=562.1.2.3.4 phases=4 linecode=LC2 length=6.0364 units=m

New Line.LINE568 bus1=561.1.2.3.4 bus2=569.1.2.3.4 phases=4 linecode=LC6 length=6.1202 units=m

New Line.LINE592 bus1=586.1.2.3.4 bus2=593.1.2.3.4 phases=4 linecode=LC1 length=2.7102 units=m

New Line.LINE609 bus1=604.1.2.3.4 bus2=610.1.2.3.4 phases=4 linecode=LC6 length=4.3431 units=m
