! Reduced enabled lines.

New Line._virtual_line0_line2_line3_line4_line5_line6_line7_line8_line9_line10_line11_line12_line13_line14_line15_line16_line17_line18_line19_line20_line21_line22_line23_line24_line25_line26_line27_line28_line29_line30_line31_line32_line33_line34_line35_line36_line37_line38_line39_line40_line41_line42 bus1=43.1.2.3.4 bus2=sourcebus.1.2.3.4 phases=4 linecode=LC4 length=40.834288 units=m
! reduced_from=line0,line2,line3,line4,line5,line6,line7,line8,line9,line10,line11,line12,line13,line14,line15,line16,line17,line18,line19,line20,line21,line22,line23,line24,line25,line26,line27,line28,line29,line30,line31,line32,line33,line34,line35,line36,line37,line38,line39,line40,line41,line42
! eliminated_buses=1,3,4,5,6,7,8,9,10,11,12,13,14,15,16,17,18,19,20,21,22,23,24,25,26,27,28,29,30,31,32,33,34,35,36,37,38,39,40,41,42

New Line._virtual_line44_line45_line46_line47_line48_line49_line50 bus1=44.1.2.3.4 bus2=51.1.2.3.4 phases=4 linecode=LC4 length=12.27309 units=m
! reduced_from=line44,line45,line46,line47,line48,line49,line50
! eliminated_buses=45,46,47,48,49,50

New Line._virtual_line51_line53_line55_line57_line59_line61_line63_line65_line67_line69_line71_line72_line73 bus1=51.1.2.3.4 bus2=74.1.2.3.4 phases=4 linecode=LC4 length=14.63828 units=m
! reduced_from=line51,line53,line55,line57,line59,line61,line63,line65,line67,line69,line71,line72,line73
! eliminated_buses=52,54,56,58,60,62,64,66,68,70,72,73

New Line._virtual_line52_line54_line56_line58_line60_line62_line64_line66_line68_line70 bus1=51.1.2.3.4 bus2=71.1.2.3.4 phases=4 linecode=LC1 length=9.275489 units=m
! reduced_from=line52,line54,line56,line58,line60,line62,line64,line66,line68,line70
! eliminated_buses=53,55,57,59,61,63,65,67,69

New Line._virtual_line74_line76_line79_line82_line85_line89_line94_line99 bus1=100.1.2.3.4 bus2=74.1.2.3.4 phases=4 linecode=LC1 length=13.661207 units=m
! reduced_from=line74,line76,line79,line82,line85,line89,line94,line99
! eliminated_buses=75,77,80,83,86,90,95

New Line._virtual_line77_line80_line83_line86_line90_line95_line100_line104_line108_line112 bus1=113.1.2.3.4 bus2=76.1.2.3.4 phases=4 linecode=LC1 length=10.895471 units=m
! reduced_from=line77,line80,line83,line86,line90,line95,line100,line104,line108,line112
! eliminated_buses=78,81,84,87,91,96,101,105,109

New Line._virtual_line78_line81_line84 bus1=85.1.2.3.4 bus2=76.1.2.3.4 phases=4 linecode=LC4 length=13.64209 units=m
! reduced_from=line78,line81,line84
! eliminated_buses=79,82

New Line._virtual_line87_line91_line96_line101_line105_line109_line113 bus1=85.1.2.3.4 bus2=114.1.2.3.4 phases=4 linecode=LC1 length=14.220262 units=m
! reduced_from=line87,line91,line96,line101,line105,line109,line113
! eliminated_buses=88,92,97,102,106,110

New Line._virtual_line92_line97_line102_line106_line110_line114_line116_line118_line120_line122_line124_line126_line128 bus1=89.1.2.3.4 bus2=129.1.2.3.4 phases=4 linecode=LC4 length=14.129695 units=m
! reduced_from=line92,line97,line102,line106,line110,line114,line116,line118,line120,line122,line124,line126,line128
! eliminated_buses=93,98,103,107,111,115,117,119,121,123,125,127

New Line._virtual_line93_line98_line103_line107_line111_line115_line117_line119_line121_line123_line125_line127_line129 bus1=130.1.2.3.4 bus2=89.1.2.3.4 phases=4 linecode=LC8 length=18.04763 units=m
! reduced_from=line93,line98,line103,line107,line111,line115,line117,line119,line121,line123,line125,line127,line129
! eliminated_buses=94,99,104,108,112,116,118,120,122,124,126,128

New Line._virtual_line130_line134_line140_line147_line157_line169_line183_line196_line210 bus1=211.1.2.3.4 bus2=129.1.2.3.4 phases=4 linecode=LC1 length=12.643727 units=m
! reduced_from=line130,line134,line140,line147,line157,line169,line183,line196,line210
! eliminated_buses=131,135,141,148,158,170,184,197

New Line._virtual_line133_line139 bus1=140.1.2.3.4 bus2=130.1.2.3.4 phases=4 linecode=LC4 length=11.5804 units=m
! reduced_from=line133,line139
! eliminated_buses=134

New Line._virtual_line135_line141_line148_line158_line170_line184_line197_line211_line224_line236_line246_line255_line262_line269_line276_line283_line290_line296 bus1=297.1.2.3.4 bus2=132.1.2.3.4 phases=4 linecode=LC4 length=2.606639 units=m
! reduced_from=line135,line141,line148,line158,line170,line184,line197,line211,line224,line236,line246,line255,line262,line269,line276,line283,line290,line296
! eliminated_buses=136,142,149,159,171,185,198,212,225,237,247,256,263,270,277,284,291

New Line._virtual_line136_line142_line149_line159_line171_line185_line198_line212_line225_line237 bus1=238.1.2.3.4 bus2=132.1.2.3.4 phases=4 linecode=LC1 length=11.949677 units=m
! reduced_from=line136,line142,line149,line159,line171,line185,line198,line212,line225,line237
! eliminated_buses=137,143,150,160,172,186,199,213,226

New Line._virtual_line137_line143 bus1=133.1.2.3.4 bus2=144.1.2.3.4 phases=4 linecode=LC4 length=1.93318 units=m
! reduced_from=line137,line143
! eliminated_buses=138

New Line._virtual_line138_line144_line152_line163_line176_line190_line204 bus1=133.1.2.3.4 bus2=205.1.2.3.4 phases=4 linecode=LC1 length=9.89653 units=m
! reduced_from=line138,line144,line152,line163,line176,line190,line204
! eliminated_buses=139,145,153,164,177,191

New Line._virtual_line145_line153_line164_line177_line191_line205_line219_line231_line242_line251 bus1=252.1.2.3.4 bus2=140.1.2.3.4 phases=4 linecode=LC1 length=10.509007 units=m
! reduced_from=line145,line153,line164,line177,line191,line205,line219,line231,line242,line251
! eliminated_buses=146,154,165,178,192,206,220,232,243

New Line._virtual_line146_line156 bus1=157.1.2.3.4 bus2=140.1.2.3.4 phases=4 linecode=LC4 length=1.95601 units=m
! reduced_from=line146,line156
! eliminated_buses=147

New Line._virtual_line150_line160_line172_line186_line199_line213 bus1=214.1.2.3.4 bus2=144.1.2.3.4 phases=4 linecode=LC1 length=11.46632 units=m
! reduced_from=line150,line160,line172,line186,line199,line213
! eliminated_buses=151,161,173,187,200

New Line._virtual_line161_line173_line187_line200_line214_line226_line238_line247_line256_line263_line270_line277_line284 bus1=285.1.2.3.4 bus2=152.1.2.3.4 phases=4 linecode=LC1 length=10.249 units=m
! reduced_from=line161,line173,line187,line200,line214,line226,line238,line247,line256,line263,line270,line277,line284
! eliminated_buses=162,174,188,201,215,227,239,248,257,264,271,278

New Line._virtual_line167_line180_line194_line208_line222_line234_line244_line253_line260_line267_line274_line281_line288_line294 bus1=295.1.2.3.4 bus2=157.1.2.3.4 phases=4 linecode=LC1 length=9.87322 units=m
! reduced_from=line167,line180,line194,line208,line222,line234,line244,line253,line260,line267,line274,line281,line288,line294
! eliminated_buses=168,181,195,209,223,235,245,254,261,268,275,282,289

New Line._virtual_line174_line188_line201_line215_line227_line239_line248_line257_line264_line271_line278_line285_line291 bus1=292.1.2.3.4 bus2=163.1.2.3.4 phases=4 linecode=LC1 length=9.36305 units=m
! reduced_from=line174,line188,line201,line215,line227,line239,line248,line257,line264,line271,line278,line285,line291
! eliminated_buses=175,189,202,216,228,240,249,258,265,272,279,286

New Line._virtual_line175_line189 bus1=163.1.2.3.4 bus2=190.1.2.3.4 phases=4 linecode=LC4 length=10.25729 units=m
! reduced_from=line175,line189
! eliminated_buses=176

New Line._virtual_line181_line195_line209_line223_line235_line245_line254_line261_line268_line275_line282_line289_line295 bus1=169.1.2.3.4 bus2=296.1.2.3.4 phases=4 linecode=LC1 length=24.05823 units=m
! reduced_from=line181,line195,line209,line223,line235,line245,line254,line261,line268,line275,line282,line289,line295
! eliminated_buses=182,196,210,224,236,246,255,262,269,276,283,290

New Line._virtual_line203_line218 bus1=219.1.2.3.4 bus2=190.1.2.3.4 phases=4 linecode=LC1 length=8.9765 units=m
! reduced_from=line203,line218
! eliminated_buses=204

New Line._virtual_line217_line230_line241_line250_line259_line266_line273_line280_line287_line293_line298_line302 bus1=203.1.2.3.4 bus2=303.1.2.3.4 phases=4 linecode=LC1 length=13.09363 units=m
! reduced_from=line217,line230,line241,line250,line259,line266,line273,line280,line287,line293,line298,line302
! eliminated_buses=218,231,242,251,260,267,274,281,288,294,299

New Line._virtual_line229_line240_line249_line258_line265_line272_line279_line286_line292_line297_line301_line305 bus1=306.1.2.3.4 bus2=217.1.2.3.4 phases=4 linecode=LC1 length=25.62636 units=m
! reduced_from=line229,line240,line249,line258,line265,line272,line279,line286,line292,line297,line301,line305
! eliminated_buses=230,241,250,259,266,273,280,287,293,298,302

New Line._virtual_line299_line303_line306_line308_line310_line312 bus1=313.1.2.3.4 bus2=297.1.2.3.4 phases=4 linecode=LC4 length=13.29165 units=m
! reduced_from=line299,line303,line306,line308,line310,line312
! eliminated_buses=300,304,307,309,311

New Line._virtual_line300_line304_line307_line309_line311_line313_line316_line319 bus1=297.1.2.3.4 bus2=320.1.2.3.4 phases=4 linecode=LC1 length=11.271905 units=m
! reduced_from=line300,line304,line307,line309,line311,line313,line316,line319
! eliminated_buses=301,305,308,310,312,314,317

New Line._virtual_line314_line317_line320_line323_line326_line329_line333_line337_line340 bus1=341.1.2.3.4 bus2=313.1.2.3.4 phases=4 linecode=LC1 length=12.36128 units=m
! reduced_from=line314,line317,line320,line323,line326,line329,line333,line337,line340
! eliminated_buses=315,318,321,324,327,330,334,338

New Line._virtual_line315_line318 bus1=313.1.2.3.4 bus2=319.1.2.3.4 phases=4 linecode=LC4 length=1.20591 units=m
! reduced_from=line315,line318
! eliminated_buses=316

New Line._virtual_line321_line324_line327_line330_line334_line338_line341_line343_line345_line347 bus1=319.1.2.3.4 bus2=348.1.2.3.4 phases=4 linecode=LC1 length=11.716424 units=m
! reduced_from=line321,line324,line327,line330,line334,line338,line341,line343,line345,line347
! eliminated_buses=322,325,328,331,335,339,342,344,346

New Line._virtual_line322_line325_line328 bus1=329.1.2.3.4 bus2=319.1.2.3.4 phases=4 linecode=LC4 length=10.4214 units=m
! reduced_from=line322,line325,line328
! eliminated_buses=323,326

New Line._virtual_line331_line335 bus1=336.1.2.3.4 bus2=329.1.2.3.4 phases=4 linecode=LC1 length=9.1824 units=m
! reduced_from=line331,line335
! eliminated_buses=332

New Line._virtual_line332_line336_line339_line342_line344_line346 bus1=329.1.2.3.4 bus2=347.1.2.3.4 phases=4 linecode=LC4 length=6.76699 units=m
! reduced_from=line332,line336,line339,line342,line344,line346
! eliminated_buses=333,337,340,343,345

New Line._virtual_line348_line350 bus1=347.1.2.3.4 bus2=351.1.2.3.4 phases=4 linecode=LC1 length=10.4561 units=m
! reduced_from=line348,line350
! eliminated_buses=349

New Line._virtual_line351_line353_line356_line360_line363_line366 bus1=367.1.2.3.4 bus2=350.1.2.3.4 phases=4 linecode=LC1 length=11.64269 units=m
! reduced_from=line351,line353,line356,line360,line363,line366
! eliminated_buses=352,354,357,361,364

New Line._virtual_line354_line357_line361_line364_line367 bus1=368.1.2.3.4 bus2=353.1.2.3.4 phases=4 linecode=LC1 length=11.16238 units=m
! reduced_from=line354,line357,line361,line364,line367
! eliminated_buses=355,358,362,365

New Line._virtual_line358_line362_line365_line368_line369_line370_line371_line372_line373 bus1=374.1.2.3.4 bus2=356.1.2.3.4 phases=4 linecode=LC1 length=13.49056 units=m
! reduced_from=line358,line362,line365,line368,line369,line370,line371,line372,line373
! eliminated_buses=359,363,366,369,370,371,372,373

New Line.LINE43 bus1=43.1.2.3.4 bus2=44.1.2.3.4 phases=4 linecode=LC5 length=1.0004 units=m

New Line.LINE75 bus1=74.1.2.3.4 bus2=76.1.2.3.4 phases=4 linecode=LC4 length=1.7967 units=m

New Line.LINE88 bus1=85.1.2.3.4 bus2=89.1.2.3.4 phases=4 linecode=LC4 length=8.4845 units=m

New Line.LINE131 bus1=129.1.2.3.4 bus2=132.1.2.3.4 phases=4 linecode=LC4 length=12.8115 units=m

New Line.LINE132 bus1=130.1.2.3.4 bus2=133.1.2.3.4 phases=4 linecode=LC4 length=1.7838 units=m

New Line.LINE151 bus1=144.1.2.3.4 bus2=152.1.2.3.4 phases=4 linecode=LC4 length=13.6305 units=m

New Line.LINE162 bus1=152.1.2.3.4 bus2=163.1.2.3.4 phases=4 linecode=LC4 length=1.8535 units=m

New Line.LINE168 bus1=157.1.2.3.4 bus2=169.1.2.3.4 phases=4 linecode=LC4 length=0.90922 units=m

New Line.LINE202 bus1=190.1.2.3.4 bus2=203.1.2.3.4 phases=4 linecode=LC4 length=1.0321 units=m

New Line.LINE216 bus1=203.1.2.3.4 bus2=217.1.2.3.4 phases=4 linecode=LC4 length=1.2177 units=m

New Line.LINE349 bus1=347.1.2.3.4 bus2=350.1.2.3.4 phases=4 linecode=LC4 length=8.3957 units=m

New Line.LINE352 bus1=350.1.2.3.4 bus2=353.1.2.3.4 phases=4 linecode=LC4 length=1.9419 units=m

New Line.LINE355 bus1=353.1.2.3.4 bus2=356.1.2.3.4 phases=4 linecode=LC4 length=4.0011 units=m
