! Reduced enabled lines.

New Line._virtual_line0_line1_line2_line3_line4_line5_line6_line7_line8_line9_line10_line11_line12_line13_line14_line15_line16_line17_line18_line19_line20_line21_line22_line23_line24_line25_line26_line27_line28_line29_line30_line31_line32_line33_line34_line35_line36_line37_line38_line39_line40_line41_line42_line43_line44_line45_line46_line47_line48_line49_line50_line51 bus1=52.1.2.3.4 bus2=sourcebus.1.2.3.4 phases=4 linecode=LC4 length=48.01863 units=m
! reduced_from=line0,line1,line2,line3,line4,line5,line6,line7,line8,line9,line10,line11,line12,line13,line14,line15,line16,line17,line18,line19,line20,line21,line22,line23,line24,line25,line26,line27,line28,line29,line30,line31,line32,line33,line34,line35,line36,line37,line38,line39,line40,line41,line42,line43,line44,line45,line46,line47,line48,line49,line50,line51
! eliminated_buses=1,2,3,4,5,6,7,8,9,10,11,12,13,14,15,16,17,18,19,20,21,22,23,24,25,26,27,28,29,30,31,32,33,34,35,36,37,38,39,40,41,42,43,44,45,46,47,48,49,50,51

New Line._virtual_line52_line53_line54_line55_line56_line57_line58_line59_line60_line61_line62_line63_line64_line65_line66 bus1=67.1.2.3.4 bus2=52.1.2.3.4 phases=4 linecode=LC7 length=19.119329 units=m
! reduced_from=line52,line53,line54,line55,line56,line57,line58,line59,line60,line61,line62,line63,line64,line65,line66
! eliminated_buses=53,54,55,56,57,58,59,60,61,62,63,64,65,66

New Line._virtual_line67_line68_line69_line70_line71_line72 bus1=73.1.2.3.4 bus2=67.1.2.3.4 phases=4 linecode=LC4 length=5.87942 units=m
! reduced_from=line67,line68,line69,line70,line71,line72
! eliminated_buses=68,69,70,71,72

New Line._virtual_line73_line75_line77_line79_line81 bus1=82.1.2.3.4 bus2=73.1.2.3.4 phases=4 linecode=LC4 length=19.63124 units=m
! reduced_from=line73,line75,line77,line79,line81
! eliminated_buses=74,76,78,80

New Line._virtual_line74_line76_line78_line80_line82_line85_line89 bus1=90.1.2.3.4 bus2=73.1.2.3.4 phases=4 linecode=LC1 length=32.96061 units=m
! reduced_from=line74,line76,line78,line80,line82,line85,line89
! eliminated_buses=75,77,79,81,83,86

New Line._virtual_line84_line88 bus1=82.1.2.3.4 bus2=89.1.2.3.4 phases=4 linecode=LC1 length=13.6661 units=m
! reduced_from=line84,line88
! eliminated_buses=85

New Line._virtual_line87_line92 bus1=93.1.2.3.4 bus2=84.1.2.3.4 phases=4 linecode=LC1 length=13.9752 units=m
! reduced_from=line87,line92
! eliminated_buses=88

New Line._virtual_line90_line93_line95 bus1=87.1.2.3.4 bus2=96.1.2.3.4 phases=4 linecode=LC4 length=13.831 units=m
! reduced_from=line90,line93,line95
! eliminated_buses=91,94

New Line._virtual_line91_line94 bus1=87.1.2.3.4 bus2=95.1.2.3.4 phases=4 linecode=LC1 length=14.3027 units=m
! reduced_from=line91,line94
! eliminated_buses=92

New Line._virtual_line96_line98 bus1=99.1.2.3.4 bus2=96.1.2.3.4 phases=4 linecode=LC1 length=13.7056 units=m
! reduced_from=line96,line98
! eliminated_buses=97

New Line._virtual_line97_line99_line100_line101 bus1=102.1.2.3.4 bus2=96.1.2.3.4 phases=4 linecode=LC4 length=9.7287 units=m
! reduced_from=line97,line99,line100,line101
! eliminated_buses=98,100,101

New Line._virtual_line102_line104 bus1=102.1.2.3.4 bus2=105.1.2.3.4 phases=4 linecode=LC4 length=11.0936 units=m
! reduced_from=line102,line104
! eliminated_buses=103

New Line._virtual_line103_line106 bus1=102.1.2.3.4 bus2=107.1.2.3.4 phases=4 linecode=LC1 length=13.6245 units=m
! reduced_from=line103,line106
! eliminated_buses=104

New Line._virtual_line107_line110_line113 bus1=114.1.2.3.4 bus2=105.1.2.3.4 phases=4 linecode=LC4 length=10.78459 units=m
! reduced_from=line107,line110,line113
! eliminated_buses=108,111

New Line._virtual_line108_line111 bus1=105.1.2.3.4 bus2=112.1.2.3.4 phases=4 linecode=LC1 length=14.671 units=m
! reduced_from=line108,line111
! eliminated_buses=109

New Line._virtual_line115_line118 bus1=114.1.2.3.4 bus2=119.1.2.3.4 phases=4 linecode=LC4 length=11.8982 units=m
! reduced_from=line115,line118
! eliminated_buses=116

New Line._virtual_line116_line119 bus1=114.1.2.3.4 bus2=120.1.2.3.4 phases=4 linecode=LC1 length=14.5695 units=m
! reduced_from=line116,line119
! eliminated_buses=117

New Line._virtual_line121_line124 bus1=125.1.2.3.4 bus2=119.1.2.3.4 phases=4 linecode=LC1 length=15.3563 units=m
! reduced_from=line121,line124
! eliminated_buses=122

New Line._virtual_line122_line125 bus1=121.1.2.3.4 bus2=126.1.2.3.4 phases=4 linecode=LC4 length=16.7312 units=m
! reduced_from=line122,line125
! eliminated_buses=123

New Line._virtual_line123_line126 bus1=121.1.2.3.4 bus2=127.1.2.3.4 phases=4 linecode=LC1 length=14.1199 units=m
! reduced_from=line123,line126
! eliminated_buses=124

New Line._virtual_line127_line129 bus1=130.1.2.3.4 bus2=126.1.2.3.4 phases=4 linecode=LC1 length=15.254 units=m
! reduced_from=line127,line129
! eliminated_buses=128

New Line._virtual_line128_line130_line131_line132_line133_line134_line135_line136_line137_line138_line139_line140_line141_line143_line145_line147_line149_line151_line153_line155_line157_line159_line161_line163_line165_line167_line170 bus1=126.1.2.3.4 bus2=171.1.2.3.4 phases=4 linecode=LC4 length=47.68886 units=m
! reduced_from=line128,line130,line131,line132,line133,line134,line135,line136,line137,line138,line139,line140,line141,line143,line145,line147,line149,line151,line153,line155,line157,line159,line161,line163,line165,line167,line170
! eliminated_buses=129,131,132,133,134,135,136,137,138,139,140,141,142,144,146,148,150,152,154,156,158,160,162,164,166,168

New Line._virtual_line173_line177 bus1=178.1.2.3.4 bus2=171.1.2.3.4 phases=4 linecode=LC1 length=11.9429 units=m
! reduced_from=line173,line177
! eliminated_buses=174

New Line._virtual_line178_line182 bus1=175.1.2.3.4 bus2=183.1.2.3.4 phases=4 linecode=LC1 length=12.6165 units=m
! reduced_from=line178,line182
! eliminated_buses=179

New Line._virtual_line183_line186_line191_line195 bus1=180.1.2.3.4 bus2=196.1.2.3.4 phases=4 linecode=LC4 length=14.986 units=m
! reduced_from=line183,line186,line191,line195
! eliminated_buses=184,187,192

New Line._virtual_line189_line193 bus1=194.1.2.3.4 bus2=185.1.2.3.4 phases=4 linecode=LC1 length=12.1101 units=m
! reduced_from=line189,line193
! eliminated_buses=190

New Line._virtual_line198_line203_line209_line214_line218_line221_line224 bus1=225.1.2.3.4 bus2=196.1.2.3.4 phases=4 linecode=LC4 length=9.7504 units=m
! reduced_from=line198,line203,line209,line214,line218,line221,line224
! eliminated_buses=199,204,210,215,219,222

New Line._virtual_line206_line211 bus1=200.1.2.3.4 bus2=212.1.2.3.4 phases=4 linecode=LC1 length=12.8893 units=m
! reduced_from=line206,line211
! eliminated_buses=207

New Line._virtual_line227_line231_line234_line235_line236_line237_line238 bus1=239.1.2.3.4 bus2=225.1.2.3.4 phases=4 linecode=LC4 length=13.09404 units=m
! reduced_from=line227,line231,line234,line235,line236,line237,line238
! eliminated_buses=228,232,235,236,237,238

New Line._virtual_line228_line233 bus1=234.1.2.3.4 bus2=225.1.2.3.4 phases=4 linecode=LC1 length=15.242 units=m
! reduced_from=line228,line233
! eliminated_buses=229

New Line._virtual_line239_line241 bus1=239.1.2.3.4 bus2=242.1.2.3.4 phases=4 linecode=LC1 length=23.8861 units=m
! reduced_from=line239,line241
! eliminated_buses=240

New Line.LINE83 bus1=82.1.2.3.4 bus2=84.1.2.3.4 phases=4 linecode=LC4 length=14.9586 units=m

New Line.LINE86 bus1=84.1.2.3.4 bus2=87.1.2.3.4 phases=4 linecode=LC4 length=8.8369 units=m

New Line.LINE120 bus1=119.1.2.3.4 bus2=121.1.2.3.4 phases=4 linecode=LC4 length=8.3997 units=m

New Line.LINE174 bus1=171.1.2.3.4 bus2=175.1.2.3.4 phases=4 linecode=LC4 length=13.1142 units=m

New Line.LINE179 bus1=175.1.2.3.4 bus2=180.1.2.3.4 phases=4 linecode=LC4 length=6.9857 units=m

New Line.LINE184 bus1=180.1.2.3.4 bus2=185.1.2.3.4 phases=4 linecode=LC4 length=2.2834 units=m

New Line.LINE199 bus1=196.1.2.3.4 bus2=200.1.2.3.4 phases=4 linecode=LC4 length=0.57333 units=m
