! Reduced enabled lines.

New Line._virtual_line0_line1_line2_line3_line4_line5_line6_line7_line8_line9_line10_line11_line12_line13_line14_line15_line16_line17_line18_line19_line20_line21_line22_line23_line24_line25_line26_line27_line28_line29_line30_line31_line32_line33_line34_line35_line36 bus1=37.1.2.3.4 bus2=sourcebus.1.2.3.4 phases=4 linecode=LC5 length=34.86163 units=m
! reduced_from=line0,line1,line2,line3,line4,line5,line6,line7,line8,line9,line10,line11,line12,line13,line14,line15,line16,line17,line18,line19,line20,line21,line22,line23,line24,line25,line26,line27,line28,line29,line30,line31,line32,line33,line34,line35,line36
! eliminated_buses=1,2,3,4,5,6,7,8,9,10,11,12,13,14,15,16,17,18,19,20,21,22,23,24,25,26,27,28,29,30,31,32,33,34,35,36

New Line._virtual_line37_line39_line41_line46_line51_line56_line62_line68_line74 bus1=37.1.2.3.4 bus2=75.1.2.3.4 phases=4 linecode=LC1 length=14.59803 units=m
! reduced_from=line37,line39,line41,line46,line51,line56,line62,line68,line74
! eliminated_buses=38,40,42,47,52,57,63,69

New Line._virtual_line38_line40 bus1=37.1.2.3.4 bus2=41.1.2.3.4 phases=4 linecode=LC5 length=15.8454 units=m
! reduced_from=line38,line40
! eliminated_buses=39

New Line._virtual_line42_line47_line52_line57_line63_line69 bus1=41.1.2.3.4 bus2=70.1.2.3.4 phases=4 linecode=LC5 length=7.19327 units=m
! reduced_from=line42,line47,line52,line57,line63,line69
! eliminated_buses=43,48,53,58,64

New Line._virtual_line43_line49_line54 bus1=55.1.2.3.4 bus2=41.1.2.3.4 phases=4 linecode=LC8 length=31.3937 units=m
! reduced_from=line43,line49,line54
! eliminated_buses=44,50

New Line._virtual_line59_line65_line71_line78_line85_line94_line102_line107_line112_line118_line125_line132_line141_line150_line160_line169_line175_line182_line189_line198_line203_line209_line214_line219_line224_line229_line233 bus1=234.1.2.3.4 bus2=55.1.2.3.4 phases=4 linecode=LC5 length=22.63599 units=m
! reduced_from=line59,line65,line71,line78,line85,line94,line102,line107,line112,line118,line125,line132,line141,line150,line160,line169,line175,line182,line189,line198,line203,line209,line214,line219,line224,line229,line233
! eliminated_buses=60,66,72,79,86,95,103,108,113,119,126,133,142,151,161,170,176,183,190,199,204,210,215,220,225,230

New Line._virtual_line61_line67_line73_line80_line87_line96_line104_line109_line114_line120_line127_line136_line145_line154_line163_line172 bus1=173.1.2.3.4 bus2=55.1.2.3.4 phases=4 linecode=LC8 length=54.47916 units=m
! reduced_from=line61,line67,line73,line80,line87,line96,line104,line109,line114,line120,line127,line136,line145,line154,line163,line172
! eliminated_buses=62,68,74,81,88,97,105,110,115,121,128,137,146,155,164

New Line._virtual_line76_line84 bus1=70.1.2.3.4 bus2=85.1.2.3.4 phases=4 linecode=LC1 length=31.2123 units=m
! reduced_from=line76,line84
! eliminated_buses=77

New Line._virtual_line81_line88 bus1=89.1.2.3.4 bus2=76.1.2.3.4 phases=4 linecode=LC1 length=31.3706 units=m
! reduced_from=line81,line88
! eliminated_buses=82

New Line._virtual_line89_line97_line105_line110 bus1=111.1.2.3.4 bus2=83.1.2.3.4 phases=4 linecode=LC5 length=1.98218 units=m
! reduced_from=line89,line97,line105,line110
! eliminated_buses=90,98,106

New Line._virtual_line90_line99 bus1=100.1.2.3.4 bus2=83.1.2.3.4 phases=4 linecode=LC1 length=31.1244 units=m
! reduced_from=line90,line99
! eliminated_buses=91

New Line._virtual_line117_line124_line131_line140_line149_line159_line168_line174_line181_line188_line197_line202_line207_line213_line218_line223_line228_line232 bus1=233.1.2.3.4 bus2=111.1.2.3.4 phases=4 linecode=LC6 length=22.977964 units=m
! reduced_from=line117,line124,line131,line140,line149,line159,line168,line174,line181,line188,line197,line202,line207,line213,line218,line223,line228,line232
! eliminated_buses=118,125,132,141,150,160,169,175,182,189,198,203,208,214,219,224,229

New Line._virtual_line121_line128_line137 bus1=116.1.2.3.4 bus2=138.1.2.3.4 phases=4 linecode=LC5 length=5.6706 units=m
! reduced_from=line121,line128,line137
! eliminated_buses=122,129

New Line._virtual_line123_line130_line139 bus1=140.1.2.3.4 bus2=116.1.2.3.4 phases=4 linecode=LC1 length=10.78991 units=m
! reduced_from=line123,line130,line139
! eliminated_buses=124,131

New Line._virtual_line147_line158 bus1=159.1.2.3.4 bus2=138.1.2.3.4 phases=4 linecode=LC1 length=9.5182 units=m
! reduced_from=line147,line158
! eliminated_buses=148

New Line._virtual_line156_line167 bus1=147.1.2.3.4 bus2=168.1.2.3.4 phases=4 linecode=LC1 length=11.3418 units=m
! reduced_from=line156,line167
! eliminated_buses=157

New Line._virtual_line165_line173_line180_line187_line196 bus1=156.1.2.3.4 bus2=197.1.2.3.4 phases=4 linecode=LC1 length=24.68149 units=m
! reduced_from=line165,line173,line180,line187,line196
! eliminated_buses=166,174,181,188

New Line._virtual_line178_line185 bus1=173.1.2.3.4 bus2=186.1.2.3.4 phases=4 linecode=LC1 length=14.8008 units=m
! reduced_from=line178,line185
! eliminated_buses=179

New Line._virtual_line179_line186_line195_line200_line205_line211_line216_line221_line226_line231_line235_line239_line243_line249_line255_line261_line269_line277_line286_line295_line305_line315_line324_line333_line341 bus1=342.1.2.3.4 bus2=173.1.2.3.4 phases=4 linecode=LC8 length=23.49286 units=m
! reduced_from=line179,line186,line195,line200,line205,line211,line216,line221,line226,line231,line235,line239,line243,line249,line255,line261,line269,line277,line286,line295,line305,line315,line324,line333,line341
! eliminated_buses=180,187,196,201,206,212,217,222,227,232,236,240,244,250,256,262,270,278,287,296,306,316,325,334

New Line._virtual_line236_line240_line244_line250_line256_line262_line270_line278_line287_line296_line306_line316_line325_line334_line342_line351_line362 bus1=234.1.2.3.4 bus2=363.1.2.3.4 phases=4 linecode=LC1 length=15.923711 units=m
! reduced_from=line236,line240,line244,line250,line256,line262,line270,line278,line287,line296,line306,line316,line325,line334,line342,line351,line362
! eliminated_buses=237,241,245,251,257,263,271,279,288,297,307,317,326,335,343,352

New Line._virtual_line237_line241_line245 bus1=234.1.2.3.4 bus2=246.1.2.3.4 phases=4 linecode=LC5 length=10.9229 units=m
! reduced_from=line237,line241,line245
! eliminated_buses=238,242

New Line._virtual_line251_line257_line263_line271_line279 bus1=246.1.2.3.4 bus2=280.1.2.3.4 phases=4 linecode=LC1 length=23.8379 units=m
! reduced_from=line251,line257,line263,line271,line279
! eliminated_buses=252,258,264,272

New Line._virtual_line258_line264 bus1=265.1.2.3.4 bus2=253.1.2.3.4 phases=4 linecode=LC5 length=8.6854 units=m
! reduced_from=line258,line264
! eliminated_buses=259

New Line._virtual_line267_line275_line284_line293_line303_line313_line322_line331_line339_line347_line357 bus1=260.1.2.3.4 bus2=358.1.2.3.4 phases=4 linecode=LC1 length=12.13356 units=m
! reduced_from=line267,line275,line284,line293,line303,line313,line322,line331,line339,line347,line357
! eliminated_buses=268,276,285,294,304,314,323,332,340,348

New Line._virtual_line272_line280_line288_line297_line307 bus1=308.1.2.3.4 bus2=265.1.2.3.4 phases=4 linecode=LC1 length=23.57797 units=m
! reduced_from=line272,line280,line288,line297,line307
! eliminated_buses=273,281,289,298

New Line._virtual_line281_line289_line298_line308_line317_line326 bus1=274.1.2.3.4 bus2=327.1.2.3.4 phases=4 linecode=LC1 length=22.76944 units=m
! reduced_from=line281,line289,line298,line308,line317,line326
! eliminated_buses=282,290,299,309,318

New Line._virtual_line282_line291 bus1=274.1.2.3.4 bus2=292.1.2.3.4 phases=4 linecode=LC5 length=8.3452 units=m
! reduced_from=line282,line291
! eliminated_buses=283

New Line._virtual_line300_line310_line319_line328_line336_line344_line353_line364_line376_line386_line396_line405_line414_line422 bus1=292.1.2.3.4 bus2=423.1.2.3.4 phases=4 linecode=LC1 length=14.78941 units=m
! reduced_from=line300,line310,line319,line328,line336,line344,line353,line364,line376,line386,line396,line405,line414,line422
! eliminated_buses=301,311,320,329,337,345,354,365,377,387,397,406,415

New Line._virtual_line301_line311_line320_line329_line337_line345 bus1=346.1.2.3.4 bus2=292.1.2.3.4 phases=4 linecode=LC5 length=5.51629 units=m
! reduced_from=line301,line311,line320,line329,line337,line345
! eliminated_buses=302,312,321,330,338

New Line._virtual_line350_line361_line374_line384_line394_line403_line412 bus1=342.1.2.3.4 bus2=413.1.2.3.4 phases=4 linecode=LC4 length=5.63215 units=m
! reduced_from=line350,line361,line374,line384,line394,line403,line412
! eliminated_buses=351,362,375,385,395,404

New Line._virtual_line354_line365_line377_line387_line397_line406 bus1=407.1.2.3.4 bus2=346.1.2.3.4 phases=4 linecode=LC1 length=24.04519 units=m
! reduced_from=line354,line365,line377,line387,line397,line406
! eliminated_buses=355,366,378,388,398

New Line._virtual_line355_line366_line378_line388_line398_line407_line415_line423 bus1=346.1.2.3.4 bus2=424.1.2.3.4 phases=4 linecode=LC5 length=3.3453 units=m
! reduced_from=line355,line366,line378,line388,line398,line407,line415,line423
! eliminated_buses=356,367,379,389,399,408,416

New Line._virtual_line359_line371 bus1=372.1.2.3.4 bus2=350.1.2.3.4 phases=4 linecode=LC1 length=12.4633 units=m
! reduced_from=line359,line371
! eliminated_buses=360

New Line._virtual_line368_line380_line390_line400_line409_line417 bus1=358.1.2.3.4 bus2=418.1.2.3.4 phases=4 linecode=LC1 length=12.218273 units=m
! reduced_from=line368,line380,line390,line400,line409,line417
! eliminated_buses=369,381,391,401,410

New Line._virtual_line372_line381 bus1=361.1.2.3.4 bus2=382.1.2.3.4 phases=4 linecode=LC1 length=11.4396 units=m
! reduced_from=line372,line381
! eliminated_buses=373

New Line._virtual_line382_line391 bus1=392.1.2.3.4 bus2=374.1.2.3.4 phases=4 linecode=LC1 length=10.9337 units=m
! reduced_from=line382,line391
! eliminated_buses=383

New Line._virtual_line392_line401 bus1=402.1.2.3.4 bus2=384.1.2.3.4 phases=4 linecode=LC1 length=9.8218 units=m
! reduced_from=line392,line401
! eliminated_buses=393

New Line._virtual_line393_line402_line411_line419_line426 bus1=384.1.2.3.4 bus2=427.1.2.3.4 phases=4 linecode=LC4 length=7.8604 units=m
! reduced_from=line393,line402,line411,line419,line426
! eliminated_buses=394,403,412,420

New Line._virtual_line420_line427_line438_line447_line456_line469_line480_line490_line499 bus1=413.1.2.3.4 bus2=500.1.2.3.4 phases=4 linecode=LC4 length=10.07254 units=m
! reduced_from=line420,line427,line438,line447,line456,line469,line480,line490,line499
! eliminated_buses=421,428,439,448,457,470,481,491

New Line._virtual_line421_line429_line440 bus1=441.1.2.3.4 bus2=413.1.2.3.4 phases=4 linecode=LC4 length=43.3374 units=m
! reduced_from=line421,line429,line440
! eliminated_buses=422,430

New Line._virtual_line430_line441_line451_line460_line473_line484 bus1=423.1.2.3.4 bus2=485.1.2.3.4 phases=4 linecode=LC1 length=12.37955 units=m
! reduced_from=line430,line441,line451,line460,line473,line484
! eliminated_buses=431,442,452,461,474

New Line._virtual_line432_line442_line452_line461_line474_line485 bus1=424.1.2.3.4 bus2=486.1.2.3.4 phases=4 linecode=LC1 length=25.74019 units=m
! reduced_from=line432,line442,line452,line461,line474,line485
! eliminated_buses=433,443,453,462,475

New Line._virtual_line433_line443 bus1=424.1.2.3.4 bus2=444.1.2.3.4 phases=4 linecode=LC5 length=9.556 units=m
! reduced_from=line433,line443
! eliminated_buses=434

New Line._virtual_line436_line445 bus1=446.1.2.3.4 bus2=427.1.2.3.4 phases=4 linecode=LC1 length=11.3121 units=m
! reduced_from=line436,line445
! eliminated_buses=437

New Line._virtual_line437_line446_line455 bus1=456.1.2.3.4 bus2=427.1.2.3.4 phases=4 linecode=LC4 length=6.479045 units=m
! reduced_from=line437,line446,line455
! eliminated_buses=438,447

New Line._virtual_line449_line458_line471_line481_line491_line500_line511_line523_line536_line548_line561_line575 bus1=576.1.2.3.4 bus2=441.1.2.3.4 phases=4 linecode=LC4 length=8.91227 units=m
! reduced_from=line449,line458,line471,line481,line491,line500,line511,line523,line536,line548,line561,line575
! eliminated_buses=450,459,472,482,492,501,512,524,537,549,562

New Line._virtual_line450_line459_line472 bus1=473.1.2.3.4 bus2=441.1.2.3.4 phases=4 linecode=LC4 length=15.70983 units=m
! reduced_from=line450,line459,line472
! eliminated_buses=451,460

New Line._virtual_line462_line475_line486_line495_line505_line516 bus1=454.1.2.3.4 bus2=517.1.2.3.4 phases=4 linecode=LC1 length=27.36994 units=m
! reduced_from=line462,line475,line486,line495,line505,line516
! eliminated_buses=463,476,487,496,506

New Line._virtual_line463_line476_line487_line496_line506_line517_line529_line540_line552_line565_line579_line595_line610_line624_line639_line654_line672_line687 bus1=454.1.2.3.4 bus2=688.1.2.3.4 phases=4 linecode=LC5 length=16.35873 units=m
! reduced_from=line463,line476,line487,line496,line506,line517,line529,line540,line552,line565,line579,line595,line610,line624,line639,line654,line672,line687
! eliminated_buses=464,477,488,497,507,518,530,541,553,566,580,596,611,625,640,655,673

New Line._virtual_line466_line478_line489_line498_line508_line519_line531_line542_line554_line567_line581 bus1=455.1.2.3.4 bus2=582.1.2.3.4 phases=4 linecode=LC1 length=11.9299 units=m
! reduced_from=line466,line478,line489,line498,line508,line519,line531,line542,line554,line567,line581
! eliminated_buses=467,479,490,499,509,520,532,543,555,568

New Line._virtual_line467_line479 bus1=456.1.2.3.4 bus2=480.1.2.3.4 phases=4 linecode=LC1 length=11.7995 units=m
! reduced_from=line467,line479
! eliminated_buses=468

New Line._virtual_line482_line492_line501_line512_line524 bus1=473.1.2.3.4 bus2=525.1.2.3.4 phases=4 linecode=LC6 length=14.26345 units=m
! reduced_from=line482,line492,line501,line512,line524
! eliminated_buses=483,493,502,513

New Line._virtual_line483_line494 bus1=473.1.2.3.4 bus2=495.1.2.3.4 phases=4 linecode=LC4 length=11.93747 units=m
! reduced_from=line483,line494
! eliminated_buses=484

New Line._virtual_line503_line514_line525_line537_line549_line562_line576_line592 bus1=495.1.2.3.4 bus2=593.1.2.3.4 phases=4 linecode=LC6 length=12.57561 units=m
! reduced_from=line503,line514,line525,line537,line549,line562,line576,line592
! eliminated_buses=504,515,526,538,550,563,577

New Line._virtual_line504_line515 bus1=516.1.2.3.4 bus2=495.1.2.3.4 phases=4 linecode=LC4 length=1.73504 units=m
! reduced_from=line504,line515
! eliminated_buses=505

New Line._virtual_line510_line522_line535_line547_line560_line574_line589 bus1=500.1.2.3.4 bus2=590.1.2.3.4 phases=4 linecode=LC6 length=13.70353 units=m
! reduced_from=line510,line522,line535,line547,line560,line574,line589
! eliminated_buses=511,523,536,548,561,575

New Line._virtual_line521_line534_line546_line559_line573_line588 bus1=510.1.2.3.4 bus2=589.1.2.3.4 phases=4 linecode=LC6 length=14.35115 units=m
! reduced_from=line521,line534,line546,line559,line573,line588
! eliminated_buses=522,535,547,560,574

New Line._virtual_line526_line538_line550_line563_line577_line593_line608_line622_line637_line652_line670_line685_line698_line713_line725_line736_line747_line758_line770_line779_line788_line797_line806_line815_line825_line834_line844 bus1=845.1.2.3.4 bus2=516.1.2.3.4 phases=4 linecode=LC6 length=28.791313 units=m
! reduced_from=line526,line538,line550,line563,line577,line593,line608,line622,line637,line652,line670,line685,line698,line713,line725,line736,line747,line758,line770,line779,line788,line797,line806,line815,line825,line834,line844
! eliminated_buses=527,539,551,564,578,594,609,623,638,653,671,686,699,714,726,737,748,759,771,780,789,798,807,816,826,835

New Line._virtual_line527_line539_line551_line564_line578_line594_line609_line623_line638_line653_line671_line686_line699 bus1=516.1.2.3.4 bus2=700.1.2.3.4 phases=4 linecode=LC6 length=14.78762 units=m
! reduced_from=line527,line539,line551,line564,line578,line594,line609,line623,line638,line653,line671,line686,line699
! eliminated_buses=528,540,552,565,579,595,610,624,639,654,672,687

New Line._virtual_line533_line545_line558_line572_line587 bus1=521.1.2.3.4 bus2=588.1.2.3.4 phases=4 linecode=LC6 length=16.98351 units=m
! reduced_from=line533,line545,line558,line572,line587
! eliminated_buses=534,546,559,573

New Line._virtual_line544_line557_line571_line586_line604 bus1=533.1.2.3.4 bus2=605.1.2.3.4 phases=4 linecode=LC6 length=15.61378 units=m
! reduced_from=line544,line557,line571,line586,line604
! eliminated_buses=545,558,572,587

New Line._virtual_line555_line568_line582_line599_line613 bus1=614.1.2.3.4 bus2=544.1.2.3.4 phases=4 linecode=LC6 length=18.44618 units=m
! reduced_from=line555,line568,line582,line599,line613
! eliminated_buses=556,569,583,600

New Line._virtual_line556_line570 bus1=544.1.2.3.4 bus2=571.1.2.3.4 phases=4 linecode=LC4 length=12.4147 units=m
! reduced_from=line556,line570
! eliminated_buses=557

New Line._virtual_line585_line603_line618_line632_line647_line664 bus1=665.1.2.3.4 bus2=571.1.2.3.4 phases=4 linecode=LC6 length=13.32247 units=m
! reduced_from=line585,line603,line618,line632,line647,line664
! eliminated_buses=586,604,619,633,648

New Line._virtual_line590_line605 bus1=606.1.2.3.4 bus2=576.1.2.3.4 phases=4 linecode=LC1 length=12.613 units=m
! reduced_from=line590,line605
! eliminated_buses=591

New Line._virtual_line591_line607 bus1=576.1.2.3.4 bus2=608.1.2.3.4 phases=4 linecode=LC4 length=5.80248 units=m
! reduced_from=line591,line607
! eliminated_buses=592

New Line._virtual_line597_line612_line626_line641_line656 bus1=657.1.2.3.4 bus2=582.1.2.3.4 phases=4 linecode=LC1 length=11.70999 units=m
! reduced_from=line597,line612,line626,line641,line656
! eliminated_buses=598,613,627,642

New Line._virtual_line602_line617_line631_line646_line663_line680 bus1=681.1.2.3.4 bus2=585.1.2.3.4 phases=4 linecode=LC1 length=15.56828 units=m
! reduced_from=line602,line617,line631,line646,line663,line680
! eliminated_buses=603,618,632,647,664

New Line._virtual_line615_line628_line643_line658_line675 bus1=602.1.2.3.4 bus2=676.1.2.3.4 phases=4 linecode=LC1 length=13.17879 units=m
! reduced_from=line615,line628,line643,line658,line675
! eliminated_buses=616,629,644,659

New Line._virtual_line620_line634 bus1=608.1.2.3.4 bus2=635.1.2.3.4 phases=4 linecode=LC1 length=12.9756 units=m
! reduced_from=line620,line634
! eliminated_buses=621

New Line._virtual_line621_line636 bus1=637.1.2.3.4 bus2=608.1.2.3.4 phases=4 linecode=LC4 length=9.5215 units=m
! reduced_from=line621,line636
! eliminated_buses=622

New Line._virtual_line629_line644_line660_line676_line690_line704_line718_line730 bus1=731.1.2.3.4 bus2=617.1.2.3.4 phases=4 linecode=LC1 length=14.91502 units=m
! reduced_from=line629,line644,line660,line676,line690,line704,line718,line730
! eliminated_buses=630,645,661,677,691,705,719

New Line._virtual_line630_line645 bus1=646.1.2.3.4 bus2=617.1.2.3.4 phases=4 linecode=LC4 length=12.3886 units=m
! reduced_from=line630,line645
! eliminated_buses=631

New Line._virtual_line650_line667 bus1=637.1.2.3.4 bus2=668.1.2.3.4 phases=4 linecode=LC1 length=12.1521 units=m
! reduced_from=line650,line667
! eliminated_buses=651

New Line._virtual_line661_line677_line691_line705_line719_line731_line742_line754_line766 bus1=646.1.2.3.4 bus2=767.1.2.3.4 phases=4 linecode=LC6 length=14.4704 units=m
! reduced_from=line661,line677,line691,line705,line719,line731,line742,line754,line766
! eliminated_buses=662,678,692,706,720,732,743,755

New Line._virtual_line662_line679_line693_line707_line721_line733_line744_line755_line767_line776_line785_line794_line803_line812_line822_line831 bus1=646.1.2.3.4 bus2=832.1.2.3.4 phases=4 linecode=LC4 length=31.91951 units=m
! reduced_from=line662,line679,line693,line707,line721,line733,line744,line755,line767,line776,line785,line794,line803,line812,line822,line831
! eliminated_buses=663,680,694,708,722,734,745,756,768,777,786,795,804,813,823

New Line._virtual_line668_line683 bus1=684.1.2.3.4 bus2=652.1.2.3.4 phases=4 linecode=LC1 length=12.9404 units=m
! reduced_from=line668,line683
! eliminated_buses=669

New Line._virtual_line669_line684 bus1=652.1.2.3.4 bus2=685.1.2.3.4 phases=4 linecode=LC4 length=12.2286 units=m
! reduced_from=line669,line684
! eliminated_buses=670

New Line._virtual_line696_line710 bus1=711.1.2.3.4 bus2=685.1.2.3.4 phases=4 linecode=LC1 length=12.3745 units=m
! reduced_from=line696,line710
! eliminated_buses=697

New Line._virtual_line700_line714_line726_line737_line748_line759_line771_line780_line789_line798_line807 bus1=688.1.2.3.4 bus2=808.1.2.3.4 phases=4 linecode=LC1 length=11.58295 units=m
! reduced_from=line700,line714,line726,line737,line748,line759,line771,line780,line789,line798,line807
! eliminated_buses=701,715,727,738,749,760,772,781,790,799

New Line._virtual_line701_line716_line728 bus1=729.1.2.3.4 bus2=688.1.2.3.4 phases=4 linecode=LC5 length=18.2538 units=m
! reduced_from=line701,line716,line728
! eliminated_buses=702,717

New Line._virtual_line711_line724 bus1=725.1.2.3.4 bus2=698.1.2.3.4 phases=4 linecode=LC1 length=12.0168 units=m
! reduced_from=line711,line724
! eliminated_buses=712

New Line._virtual_line739_line750_line761_line773_line782_line791_line800_line809_line819_line828_line837_line847 bus1=729.1.2.3.4 bus2=848.1.2.3.4 phases=4 linecode=LC1 length=11.53502 units=m
! reduced_from=line739,line750,line761,line773,line782,line791,line800,line809,line819,line828,line837,line847
! eliminated_buses=740,751,762,774,783,792,801,810,820,829,838

New Line._virtual_line740_line752 bus1=753.1.2.3.4 bus2=729.1.2.3.4 phases=4 linecode=LC5 length=6.31187 units=m
! reduced_from=line740,line752
! eliminated_buses=741

New Line._virtual_line763_line775_line784_line793_line802_line811_line821_line830_line839_line849_line859_line868_line877_line887_line896_line905_line913_line921_line929_line937_line945_line952 bus1=753.1.2.3.4 bus2=953.1.2.3.4 phases=4 linecode=LC1 length=20.08886 units=m
! reduced_from=line763,line775,line784,line793,line802,line811,line821,line830,line839,line849,line859,line868,line877,line887,line896,line905,line913,line921,line929,line937,line945,line952
! eliminated_buses=764,776,785,794,803,812,822,831,840,850,860,869,878,888,897,906,914,922,930,938,946

New Line._virtual_line816_line826_line835_line845_line854_line864_line873_line883_line893_line903_line911_line919_line927_line935_line943_line950_line957 bus1=958.1.2.3.4 bus2=808.1.2.3.4 phases=4 linecode=LC1 length=13.83485 units=m
! reduced_from=line816,line826,line835,line845,line854,line864,line873,line883,line893,line903,line911,line919,line927,line935,line943,line950,line957
! eliminated_buses=817,827,836,846,855,865,874,884,894,904,912,920,928,936,944,951

New Line._virtual_line840_line850_line860_line869 bus1=832.1.2.3.4 bus2=870.1.2.3.4 phases=4 linecode=LC4 length=2.48307 units=m
! reduced_from=line840,line850,line860,line869
! eliminated_buses=841,851,861

New Line._virtual_line841_line851_line861_line870_line880_line891_line901_line909_line918_line926_line934_line942_line949_line956_line962_line966_line970_line974_line978_line982 bus1=832.1.2.3.4 bus2=983.1.2.3.4 phases=4 linecode=LC4 length=29.80374 units=m
! reduced_from=line841,line851,line861,line870,line880,line891,line901,line909,line918,line926,line934,line942,line949,line956,line962,line966,line970,line974,line978,line982
! eliminated_buses=842,852,862,871,881,892,902,910,919,927,935,943,950,957,963,967,971,975,979

New Line._virtual_line856_line866_line875_line885_line895 bus1=848.1.2.3.4 bus2=896.1.2.3.4 phases=4 linecode=LC1 length=12.72649 units=m
! reduced_from=line856,line866,line875,line885,line895
! eliminated_buses=857,867,876,886

New Line._virtual_line879_line890_line900_line908_line917_line925_line933_line941_line948_line955_line961_line965_line969_line973_line977_line981_line985_line990 bus1=991.1.2.3.4 bus2=870.1.2.3.4 phases=4 linecode=LC4 length=16.35989 units=m
! reduced_from=line879,line890,line900,line908,line917,line925,line933,line941,line948,line955,line961,line965,line969,line973,line977,line981,line985,line990
! eliminated_buses=880,891,901,909,918,926,934,942,949,956,962,966,970,974,978,982,986

New Line._virtual_line889_line899 bus1=900.1.2.3.4 bus2=879.1.2.3.4 phases=4 linecode=LC6 length=13.0559 units=m
! reduced_from=line889,line899
! eliminated_buses=890

New Line._virtual_line897_line906_line914_line922_line930_line938_line946_line953_line959_line963_line967_line971_line975_line979_line983_line988_line994_line1001_line1009_line1020_line1033_line1048_line1062 bus1=889.1.2.3.4 bus2=1063.1.2.3.4 phases=4 linecode=LC4 length=56.98545 units=m
! reduced_from=line897,line906,line914,line922,line930,line938,line946,line953,line959,line963,line967,line971,line975,line979,line983,line988,line994,line1001,line1009,line1020,line1033,line1048,line1062
! eliminated_buses=898,907,915,923,931,939,947,954,960,964,968,972,976,980,984,989,995,1002,1010,1021,1034,1049

New Line._virtual_line898_line907_line916_line924_line932_line940 bus1=941.1.2.3.4 bus2=889.1.2.3.4 phases=4 linecode=LC6 length=14.10602 units=m
! reduced_from=line898,line907,line916,line924,line932,line940
! eliminated_buses=899,908,917,925,933

New Line._virtual_line986_line991_line997_line1004_line1013_line1025_line1039 bus1=983.1.2.3.4 bus2=1040.1.2.3.4 phases=4 linecode=LC6 length=13.54079 units=m
! reduced_from=line986,line991,line997,line1004,line1013,line1025,line1039
! eliminated_buses=987,992,998,1005,1014,1026

New Line._virtual_line992_line998_line1005_line1014_line1026_line1040 bus1=1041.1.2.3.4 bus2=988.1.2.3.4 phases=4 linecode=LC6 length=15.46555 units=m
! reduced_from=line992,line998,line1005,line1014,line1026,line1040
! eliminated_buses=993,999,1006,1015,1027

New Line._virtual_line995_line1002 bus1=1003.1.2.3.4 bus2=991.1.2.3.4 phases=4 linecode=LC4 length=3.0745 units=m
! reduced_from=line995,line1002
! eliminated_buses=996

New Line._virtual_line996_line1003_line1012_line1024_line1038_line1053_line1068_line1083_line1100_line1115_line1130_line1143_line1153_line1164_line1173_line1183 bus1=991.1.2.3.4 bus2=1184.1.2.3.4 phases=4 linecode=LC5 length=8.68023 units=m
! reduced_from=line996,line1003,line1012,line1024,line1038,line1053,line1068,line1083,line1100,line1115,line1130,line1143,line1153,line1164,line1173,line1183
! eliminated_buses=997,1004,1013,1025,1039,1054,1069,1084,1101,1116,1131,1144,1154,1165,1174

New Line._virtual_line999_line1006_line1015_line1027_line1041_line1054 bus1=1055.1.2.3.4 bus2=994.1.2.3.4 phases=4 linecode=LC6 length=15.38257 units=m
! reduced_from=line999,line1006,line1015,line1027,line1041,line1054
! eliminated_buses=1000,1007,1016,1028,1042

New Line._virtual_line1007_line1016_line1028_line1042_line1055_line1069_line1084 bus1=1085.1.2.3.4 bus2=1001.1.2.3.4 phases=4 linecode=LC6 length=14.48932 units=m
! reduced_from=line1007,line1016,line1028,line1042,line1055,line1069,line1084
! eliminated_buses=1008,1017,1029,1043,1056,1070

New Line._virtual_line1010_line1021_line1034_line1049_line1063 bus1=1064.1.2.3.4 bus2=1003.1.2.3.4 phases=4 linecode=LC6 length=15.04234 units=m
! reduced_from=line1010,line1021,line1034,line1049,line1063
! eliminated_buses=1011,1022,1035,1050

New Line._virtual_line1017_line1029_line1043_line1056_line1070_line1085_line1101_line1116 bus1=1009.1.2.3.4 bus2=1117.1.2.3.4 phases=4 linecode=LC6 length=13.55982 units=m
! reduced_from=line1017,line1029,line1043,line1056,line1070,line1085,line1101,line1116
! eliminated_buses=1018,1030,1044,1057,1071,1086,1102

New Line._virtual_line1022_line1035_line1050_line1064_line1078_line1094 bus1=1095.1.2.3.4 bus2=1012.1.2.3.4 phases=4 linecode=LC6 length=15.7956 units=m
! reduced_from=line1022,line1035,line1050,line1064,line1078,line1094
! eliminated_buses=1023,1036,1051,1065,1079

New Line._virtual_line1030_line1044_line1057_line1071_line1086_line1102_line1117 bus1=1118.1.2.3.4 bus2=1019.1.2.3.4 phases=4 linecode=LC6 length=14.6683 units=m
! reduced_from=line1030,line1044,line1057,line1071,line1086,line1102,line1117
! eliminated_buses=1031,1045,1058,1072,1087,1103

New Line._virtual_line1036_line1051_line1065_line1079_line1095_line1109 bus1=1024.1.2.3.4 bus2=1110.1.2.3.4 phases=4 linecode=LC6 length=14.44091 units=m
! reduced_from=line1036,line1051,line1065,line1079,line1095,line1109
! eliminated_buses=1037,1052,1066,1080,1096

New Line._virtual_line1037_line1052 bus1=1024.1.2.3.4 bus2=1053.1.2.3.4 phases=4 linecode=LC4 length=11.0755 units=m
! reduced_from=line1037,line1052
! eliminated_buses=1038

New Line._virtual_line1045_line1058_line1072_line1087 bus1=1088.1.2.3.4 bus2=1032.1.2.3.4 phases=4 linecode=LC6 length=16.0793 units=m
! reduced_from=line1045,line1058,line1072,line1087
! eliminated_buses=1046,1059,1073

New Line._virtual_line1059_line1073_line1088_line1103_line1118_line1131 bus1=1047.1.2.3.4 bus2=1132.1.2.3.4 phases=4 linecode=LC6 length=18.00251 units=m
! reduced_from=line1059,line1073,line1088,line1103,line1118,line1131
! eliminated_buses=1060,1074,1089,1104,1119

New Line._virtual_line1066_line1080_line1096_line1110_line1124_line1136 bus1=1053.1.2.3.4 bus2=1137.1.2.3.4 phases=4 linecode=LC1 length=13.94655 units=m
! reduced_from=line1066,line1080,line1096,line1110,line1124,line1136
! eliminated_buses=1067,1081,1097,1111,1125

New Line._virtual_line1074_line1089_line1104_line1119_line1132_line1144_line1154 bus1=1061.1.2.3.4 bus2=1155.1.2.3.4 phases=4 linecode=LC6 length=17.13345 units=m
! reduced_from=line1074,line1089,line1104,line1119,line1132,line1144,line1154
! eliminated_buses=1075,1090,1105,1120,1133,1145

New Line._virtual_line1077_line1093_line1108_line1123_line1135 bus1=1063.1.2.3.4 bus2=1136.1.2.3.4 phases=4 linecode=LC5 length=6.72791 units=m
! reduced_from=line1077,line1093,line1108,line1123,line1135
! eliminated_buses=1078,1094,1109,1124

New Line._virtual_line1081_line1097_line1111_line1125_line1137 bus1=1138.1.2.3.4 bus2=1068.1.2.3.4 phases=4 linecode=LC6 length=14.18656 units=m
! reduced_from=line1081,line1097,line1111,line1125,line1137
! eliminated_buses=1082,1098,1112,1126

New Line._virtual_line1090_line1105_line1120_line1133_line1145_line1155 bus1=1076.1.2.3.4 bus2=1156.1.2.3.4 phases=4 linecode=LC6 length=17.61597 units=m
! reduced_from=line1090,line1105,line1120,line1133,line1145,line1155
! eliminated_buses=1091,1106,1121,1134,1146

New Line._virtual_line1098_line1112_line1126_line1138_line1148_line1158 bus1=1083.1.2.3.4 bus2=1159.1.2.3.4 phases=4 linecode=LC6 length=14.9587 units=m
! reduced_from=line1098,line1112,line1126,line1138,line1148,line1158
! eliminated_buses=1099,1113,1127,1139,1149

New Line._virtual_line1113_line1127_line1139 bus1=1140.1.2.3.4 bus2=1100.1.2.3.4 phases=4 linecode=LC6 length=13.88724 units=m
! reduced_from=line1113,line1127,line1139
! eliminated_buses=1114,1128

New Line._virtual_line1128_line1140_line1149_line1159_line1168_line1177_line1187_line1195 bus1=1196.1.2.3.4 bus2=1115.1.2.3.4 phases=4 linecode=LC6 length=14.763391 units=m
! reduced_from=line1128,line1140,line1149,line1159,line1168,line1177,line1187,line1195
! eliminated_buses=1129,1141,1150,1160,1169,1178,1188

New Line._virtual_line1141_line1150_line1160_line1169_line1178 bus1=1179.1.2.3.4 bus2=1130.1.2.3.4 phases=4 linecode=LC6 length=15.390845 units=m
! reduced_from=line1141,line1150,line1160,line1169,line1178
! eliminated_buses=1142,1151,1161,1170

New Line._virtual_line1147_line1157_line1167_line1176_line1186_line1194_line1201_line1208_line1215 bus1=1216.1.2.3.4 bus2=1136.1.2.3.4 phases=4 linecode=LC4 length=11.61599 units=m
! reduced_from=line1147,line1157,line1167,line1176,line1186,line1194,line1201,line1208,line1215
! eliminated_buses=1148,1158,1168,1177,1187,1195,1202,1209

New Line._virtual_line1151_line1161_line1170_line1179_line1188_line1196_line1202_line1209_line1216_line1223_line1229_line1237 bus1=1238.1.2.3.4 bus2=1143.1.2.3.4 phases=4 linecode=LC6 length=17.27069 units=m
! reduced_from=line1151,line1161,line1170,line1179,line1188,line1196,line1202,line1209,line1216,line1223,line1229,line1237
! eliminated_buses=1152,1162,1171,1180,1189,1197,1203,1210,1217,1224,1230

New Line._virtual_line1162_line1171_line1180_line1189_line1197_line1203 bus1=1204.1.2.3.4 bus2=1153.1.2.3.4 phases=4 linecode=LC6 length=17.64191 units=m
! reduced_from=line1162,line1171,line1180,line1189,line1197,line1203
! eliminated_buses=1163,1172,1181,1190,1198

New Line._virtual_line1163_line1172 bus1=1153.1.2.3.4 bus2=1173.1.2.3.4 phases=4 linecode=LC4 length=11.1575 units=m
! reduced_from=line1163,line1172
! eliminated_buses=1164

New Line._virtual_line1181_line1190_line1198_line1204_line1210_line1217_line1224_line1230 bus1=1231.1.2.3.4 bus2=1173.1.2.3.4 phases=4 linecode=LC6 length=17.87729 units=m
! reduced_from=line1181,line1190,line1198,line1204,line1210,line1217,line1224,line1230
! eliminated_buses=1182,1191,1199,1205,1211,1218,1225

New Line.LINE75 bus1=70.1.2.3.4 bus2=76.1.2.3.4 phases=4 linecode=LC5 length=6.9157 units=m

New Line.LINE82 bus1=76.1.2.3.4 bus2=83.1.2.3.4 phases=4 linecode=LC5 length=8.0646 units=m

New Line.LINE83 bus1=76.1.2.3.4 bus2=84.1.2.3.4 phases=4 linecode=LC5 length=4.4457 units=m

New Line.LINE93 bus1=84.1.2.3.4 bus2=94.1.2.3.4 phases=4 linecode=LC1 length=14.9376 units=m

New Line.LINE100 bus1=94.1.2.3.4 bus2=101.1.2.3.4 phases=4 linecode=LC1 length=6.9153 units=m

New Line.LINE101 bus1=94.1.2.3.4 bus2=102.1.2.3.4 phases=4 linecode=LC1 length=5.3904 units=m

New Line.LINE115 bus1=111.1.2.3.4 bus2=116.1.2.3.4 phases=4 linecode=LC5 length=0.32003 units=m

New Line.LINE146 bus1=138.1.2.3.4 bus2=147.1.2.3.4 phases=4 linecode=LC5 length=2.8027 units=m

New Line.LINE155 bus1=147.1.2.3.4 bus2=156.1.2.3.4 phases=4 linecode=LC5 length=1.2428 units=m

New Line.LINE192 bus1=186.1.2.3.4 bus2=193.1.2.3.4 phases=4 linecode=LC1 length=6.9971 units=m

New Line.LINE193 bus1=186.1.2.3.4 bus2=194.1.2.3.4 phases=4 linecode=LC1 length=6.9971 units=m

New Line.LINE194 bus1=186.1.2.3.4 bus2=195.1.2.3.4 phases=4 linecode=LC1 length=6.9971 units=m

New Line.LINE252 bus1=246.1.2.3.4 bus2=253.1.2.3.4 phases=4 linecode=LC5 length=4.9748 units=m

New Line.LINE259 bus1=253.1.2.3.4 bus2=260.1.2.3.4 phases=4 linecode=LC5 length=1.6001 units=m

New Line.LINE273 bus1=265.1.2.3.4 bus2=274.1.2.3.4 phases=4 linecode=LC5 length=1.9252 units=m

New Line.LINE349 bus1=342.1.2.3.4 bus2=350.1.2.3.4 phases=4 linecode=LC4 length=6.3877 units=m

New Line.LINE360 bus1=350.1.2.3.4 bus2=361.1.2.3.4 phases=4 linecode=LC4 length=5.5947 units=m

New Line.LINE369 bus1=358.1.2.3.4 bus2=370.1.2.3.4 phases=4 linecode=LC1 length=4.2093 units=m

New Line.LINE373 bus1=361.1.2.3.4 bus2=374.1.2.3.4 phases=4 linecode=LC4 length=8.8672 units=m

New Line.LINE383 bus1=374.1.2.3.4 bus2=384.1.2.3.4 phases=4 linecode=LC4 length=6.4943 units=m

New Line.LINE431 bus1=423.1.2.3.4 bus2=432.1.2.3.4 phases=4 linecode=LC1 length=4.069 units=m

New Line.LINE453 bus1=444.1.2.3.4 bus2=454.1.2.3.4 phases=4 linecode=LC5 length=3.7028 units=m

New Line.LINE454 bus1=444.1.2.3.4 bus2=455.1.2.3.4 phases=4 linecode=LC5 length=1.0789 units=m

New Line.LINE509 bus1=500.1.2.3.4 bus2=510.1.2.3.4 phases=4 linecode=LC4 length=13.3222 units=m

New Line.LINE520 bus1=510.1.2.3.4 bus2=521.1.2.3.4 phases=4 linecode=LC4 length=7.3908 units=m

New Line.LINE532 bus1=521.1.2.3.4 bus2=533.1.2.3.4 phases=4 linecode=LC4 length=13.3622 units=m

New Line.LINE543 bus1=533.1.2.3.4 bus2=544.1.2.3.4 phases=4 linecode=LC4 length=2.8994 units=m

New Line.LINE584 bus1=571.1.2.3.4 bus2=585.1.2.3.4 phases=4 linecode=LC4 length=7.7816 units=m

New Line.LINE598 bus1=582.1.2.3.4 bus2=599.1.2.3.4 phases=4 linecode=LC1 length=4.6823 units=m

New Line.LINE601 bus1=585.1.2.3.4 bus2=602.1.2.3.4 phases=4 linecode=LC4 length=10.9016 units=m

New Line.LINE616 bus1=602.1.2.3.4 bus2=617.1.2.3.4 phases=4 linecode=LC4 length=4.8825 units=m

New Line.LINE651 bus1=637.1.2.3.4 bus2=652.1.2.3.4 phases=4 linecode=LC4 length=5.6458 units=m

New Line.LINE697 bus1=685.1.2.3.4 bus2=698.1.2.3.4 phases=4 linecode=LC4 length=2.4866 units=m

New Line.LINE817 bus1=808.1.2.3.4 bus2=818.1.2.3.4 phases=4 linecode=LC1 length=4.7791 units=m

New Line.LINE857 bus1=848.1.2.3.4 bus2=858.1.2.3.4 phases=4 linecode=LC1 length=4.1187 units=m

New Line.LINE878 bus1=870.1.2.3.4 bus2=879.1.2.3.4 phases=4 linecode=LC4 length=0.87199 units=m

New Line.LINE888 bus1=879.1.2.3.4 bus2=889.1.2.3.4 phases=4 linecode=LC4 length=11.2425 units=m

New Line.LINE987 bus1=983.1.2.3.4 bus2=988.1.2.3.4 phases=4 linecode=LC4 length=8.8701 units=m

New Line.LINE993 bus1=988.1.2.3.4 bus2=994.1.2.3.4 phases=4 linecode=LC4 length=8.6052 units=m

New Line.LINE1000 bus1=994.1.2.3.4 bus2=1001.1.2.3.4 phases=4 linecode=LC4 length=10.0939 units=m

New Line.LINE1008 bus1=1001.1.2.3.4 bus2=1009.1.2.3.4 phases=4 linecode=LC4 length=8.4047 units=m

New Line.LINE1011 bus1=1003.1.2.3.4 bus2=1012.1.2.3.4 phases=4 linecode=LC4 length=8.9347 units=m

New Line.LINE1018 bus1=1009.1.2.3.4 bus2=1019.1.2.3.4 phases=4 linecode=LC4 length=10.3985 units=m

New Line.LINE1023 bus1=1012.1.2.3.4 bus2=1024.1.2.3.4 phases=4 linecode=LC4 length=9.0091 units=m

New Line.LINE1031 bus1=1019.1.2.3.4 bus2=1032.1.2.3.4 phases=4 linecode=LC4 length=9.628 units=m

New Line.LINE1046 bus1=1032.1.2.3.4 bus2=1047.1.2.3.4 phases=4 linecode=LC4 length=10.4937 units=m

New Line.LINE1060 bus1=1047.1.2.3.4 bus2=1061.1.2.3.4 phases=4 linecode=LC4 length=8.0072 units=m

New Line.LINE1067 bus1=1053.1.2.3.4 bus2=1068.1.2.3.4 phases=4 linecode=LC4 length=8.4907 units=m

New Line.LINE1075 bus1=1061.1.2.3.4 bus2=1076.1.2.3.4 phases=4 linecode=LC4 length=10.827 units=m

New Line.LINE1082 bus1=1068.1.2.3.4 bus2=1083.1.2.3.4 phases=4 linecode=LC4 length=11.0244 units=m

New Line.LINE1099 bus1=1083.1.2.3.4 bus2=1100.1.2.3.4 phases=4 linecode=LC4 length=7.8628 units=m

New Line.LINE1114 bus1=1100.1.2.3.4 bus2=1115.1.2.3.4 phases=4 linecode=LC4 length=10.9667 units=m

New Line.LINE1129 bus1=1115.1.2.3.4 bus2=1130.1.2.3.4 phases=4 linecode=LC4 length=7.8801 units=m

New Line.LINE1142 bus1=1130.1.2.3.4 bus2=1143.1.2.3.4 phases=4 linecode=LC4 length=12.5389 units=m

New Line.LINE1152 bus1=1143.1.2.3.4 bus2=1153.1.2.3.4 phases=4 linecode=LC4 length=6.288 units=m

New Line.LINE1191 bus1=1184.1.2.3.4 bus2=1192.1.2.3.4 phases=4 linecode=LC1 length=10.4267 units=m

New Line.LINE1222 bus1=1216.1.2.3.4 bus2=1223.1.2.3.4 phases=4 linecode=LC1 length=10.1722 units=m
