! Reduced enabled lines.

New Line._virtual_line0_line1_line2_line3_line4_line5_line6_line7_line8_line9_line10_line11_line12_line13_line14_line15_line16_line17_line18_line19_line20_line21_line22_line23_line24_line25_line26_line27_line28_line29_line30_line31_line32_line33_line34_line35_line36_line37_line38_line39_line40_line41_line42_line43_line44_line45_line46_line47_line48_line49_line50_line51_line52_line53_line54_line55_line56_line57_line58_line59_line60_line61_line62_line63_line64 bus1=sourcebus.1.2.3.4 bus2=65.1.2.3.4 phases=4 linecode=LC5 length=49.044939 units=m
! reduced_from=line0,line1,line2,line3,line4,line5,line6,line7,line8,line9,line10,line11,line12,line13,line14,line15,line16,line17,line18,line19,line20,line21,line22,line23,line24,line25,line26,line27,line28,line29,line30,line31,line32,line33,line34,line35,line36,line37,line38,line39,line40,line41,line42,line43,line44,line45,line46,line47,line48,line49,line50,line51,line52,line53,line54,line55,line56,line57,line58,line59,line60,line61,line62,line63,line64
! eliminated_buses=1,2,3,4,5,6,7,8,9,10,11,12,13,14,15,16,17,18,19,20,21,22,23,24,25,26,27,28,29,30,31,32,33,34,35,36,37,38,39,40,41,42,43,44,45,46,47,48,49,50,51,52,53,54,55,56,57,58,59,60,61,62,63,64

New Line._virtual_line66_line68_line71_line75_line80_line85_line91_line97_line102_line108 bus1=66.1.2.3.4 bus2=109.1.2.3.4 phases=4 linecode=LC6 length=35.08968 units=m
! reduced_from=line66,line68,line71,line75,line80,line85,line91,line97,line102,line108
! eliminated_buses=67,69,72,76,81,86,92,98,103

New Line._virtual_line69_line72_line76_line81_line86_line92_line98_line103_line109_line116_line123_line130_line137_line144_line152_line158_line164_line169_line174 bus1=68.1.2.3.4 bus2=175.1.2.3.4 phases=4 linecode=LC1 length=36.76373 units=m
! reduced_from=line69,line72,line76,line81,line86,line92,line98,line103,line109,line116,line123,line130,line137,line144,line152,line158,line164,line169,line174
! eliminated_buses=70,73,77,82,87,93,99,104,110,117,124,131,138,145,153,159,165,170

New Line._virtual_line73_line77_line82_line87_line93 bus1=71.1.2.3.4 bus2=94.1.2.3.4 phases=4 linecode=LC1 length=18.38641 units=m
! reduced_from=line73,line77,line82,line87,line93
! eliminated_buses=74,78,83,88

New Line._virtual_line74_line79_line84 bus1=71.1.2.3.4 bus2=85.1.2.3.4 phases=4 linecode=LC4 length=18.5181 units=m
! reduced_from=line74,line79,line84
! eliminated_buses=75,80

New Line._virtual_line89_line94_line99_line104_line110_line117 bus1=118.1.2.3.4 bus2=85.1.2.3.4 phases=4 linecode=LC1 length=14.81292 units=m
! reduced_from=line89,line94,line99,line104,line110,line117
! eliminated_buses=90,95,100,105,111

New Line._virtual_line95_line100_line105_line111_line118_line124 bus1=125.1.2.3.4 bus2=91.1.2.3.4 phases=4 linecode=LC1 length=15.42508 units=m
! reduced_from=line95,line100,line105,line111,line118,line124
! eliminated_buses=96,101,106,112,119

New Line._virtual_line96_line101_line107_line113 bus1=114.1.2.3.4 bus2=91.1.2.3.4 phases=4 linecode=LC4 length=18.0534 units=m
! reduced_from=line96,line101,line107,line113
! eliminated_buses=97,102,108

New Line._virtual_line114_line122_line129_line136_line143_line151_line157_line163_line168_line173_line179_line184_line189_line195_line202_line209_line216_line223_line231_line239 bus1=109.1.2.3.4 bus2=240.1.2.3.4 phases=4 linecode=LC1 length=25.18805 units=m
! reduced_from=line114,line122,line129,line136,line143,line151,line157,line163,line168,line173,line179,line184,line189,line195,line202,line209,line216,line223,line231,line239
! eliminated_buses=115,123,130,137,144,152,158,164,169,174,180,185,190,196,203,210,217,224,232

New Line._virtual_line120_line126_line132_line139_line146 bus1=114.1.2.3.4 bus2=147.1.2.3.4 phases=4 linecode=LC1 length=16.09287 units=m
! reduced_from=line120,line126,line132,line139,line146
! eliminated_buses=121,127,133,140

New Line._virtual_line121_line128 bus1=114.1.2.3.4 bus2=129.1.2.3.4 phases=4 linecode=LC4 length=3.3173 units=m
! reduced_from=line121,line128
! eliminated_buses=122

New Line._virtual_line134_line141_line148_line155_line161 bus1=129.1.2.3.4 bus2=162.1.2.3.4 phases=4 linecode=LC1 length=18.74998 units=m
! reduced_from=line134,line141,line148,line155,line161
! eliminated_buses=135,142,149,156

New Line._virtual_line135_line142_line150_line156_line162_line167_line172 bus1=173.1.2.3.4 bus2=129.1.2.3.4 phases=4 linecode=LC4 length=13.846241 units=m
! reduced_from=line135,line142,line150,line156,line162,line167,line172
! eliminated_buses=136,143,151,157,163,168

New Line._virtual_line177_line182 bus1=173.1.2.3.4 bus2=183.1.2.3.4 phases=4 linecode=LC1 length=12.1494 units=m
! reduced_from=line177,line182
! eliminated_buses=178

New Line._virtual_line178_line183_line188 bus1=189.1.2.3.4 bus2=173.1.2.3.4 phases=4 linecode=LC4 length=12.9795 units=m
! reduced_from=line178,line183,line188
! eliminated_buses=179,184

New Line._virtual_line193_line199_line206_line213_line219_line226_line234_line242_line249_line254 bus1=189.1.2.3.4 bus2=255.1.2.3.4 phases=4 linecode=LC1 length=16.44214 units=m
! reduced_from=line193,line199,line206,line213,line219,line226,line234,line242,line249,line254
! eliminated_buses=194,200,207,214,220,227,235,243,250

New Line._virtual_line194_line201 bus1=189.1.2.3.4 bus2=202.1.2.3.4 phases=4 linecode=LC4 length=16.6323 units=m
! reduced_from=line194,line201
! eliminated_buses=195

New Line._virtual_line207_line214_line220_line227_line235_line243_line250_line255_line259_line263_line266_line269_line272_line274_line277 bus1=202.1.2.3.4 bus2=278.1.2.3.4 phases=4 linecode=LC2 length=17.86745 units=m
! reduced_from=line207,line214,line220,line227,line235,line243,line250,line255,line259,line263,line266,line269,line272,line274,line277
! eliminated_buses=208,215,221,228,236,244,251,256,260,264,267,270,273,275

New Line._virtual_line208_line215 bus1=202.1.2.3.4 bus2=216.1.2.3.4 phases=4 linecode=LC4 length=14.213 units=m
! reduced_from=line208,line215
! eliminated_buses=209

New Line._virtual_line221_line228_line236_line244_line251_line256_line260_line264_line267_line270 bus1=271.1.2.3.4 bus2=216.1.2.3.4 phases=4 linecode=LC1 length=14.790217 units=m
! reduced_from=line221,line228,line236,line244,line251,line256,line260,line264,line267,line270
! eliminated_buses=222,229,237,245,252,257,261,265,268

New Line._virtual_line222_line230_line238_line246_line253_line258_line262_line265_line268_line271_line273_line275 bus1=276.1.2.3.4 bus2=216.1.2.3.4 phases=4 linecode=LC4 length=24.95368 units=m
! reduced_from=line222,line230,line238,line246,line253,line258,line262,line265,line268,line271,line273,line275
! eliminated_buses=223,231,239,247,254,259,263,266,269,272,274

New Line._virtual_line278_line281_line284_line287_line290_line293_line296_line299_line301_line303_line305_line307_line310 bus1=311.1.2.3.4 bus2=276.1.2.3.4 phases=4 linecode=LC4 length=22.24951 units=m
! reduced_from=line278,line281,line284,line287,line290,line293,line296,line299,line301,line303,line305,line307,line310
! eliminated_buses=279,282,285,288,291,294,297,300,302,304,306,308

New Line._virtual_line279_line282_line285_line288_line291_line294_line297_line300_line302_line304_line306 bus1=276.1.2.3.4 bus2=307.1.2.3.4 phases=4 linecode=LC4 length=21.37817 units=m
! reduced_from=line279,line282,line285,line288,line291,line294,line297,line300,line302,line304,line306
! eliminated_buses=280,283,286,289,292,295,298,301,303,305

New Line._virtual_line308_line311_line315_line319_line324_line331_line337_line343_line349_line356_line363 bus1=364.1.2.3.4 bus2=307.1.2.3.4 phases=4 linecode=LC1 length=15.8477 units=m
! reduced_from=line308,line311,line315,line319,line324,line331,line337,line343,line349,line356,line363
! eliminated_buses=309,312,316,320,325,332,338,344,350,357

New Line._virtual_line309_line312_line316_line320 bus1=321.1.2.3.4 bus2=307.1.2.3.4 phases=4 linecode=LC4 length=16.442 units=m
! reduced_from=line309,line312,line316,line320
! eliminated_buses=310,313,317

New Line._virtual_line313_line317_line321_line327_line335_line341 bus1=311.1.2.3.4 bus2=342.1.2.3.4 phases=4 linecode=LC1 length=17.79314 units=m
! reduced_from=line313,line317,line321,line327,line335,line341
! eliminated_buses=314,318,322,328,336

New Line._virtual_line314_line318 bus1=311.1.2.3.4 bus2=319.1.2.3.4 phases=4 linecode=LC4 length=8.6548 units=m
! reduced_from=line314,line318
! eliminated_buses=315

New Line._virtual_line322_line328 bus1=329.1.2.3.4 bus2=319.1.2.3.4 phases=4 linecode=LC1 length=18.2116 units=m
! reduced_from=line322,line328
! eliminated_buses=323

New Line._virtual_line326_line334_line340 bus1=321.1.2.3.4 bus2=341.1.2.3.4 phases=4 linecode=LC4 length=18.1313 units=m
! reduced_from=line326,line334,line340
! eliminated_buses=327,335

New Line._virtual_line329_line336_line342_line348_line355_line362_line369_line375 bus1=376.1.2.3.4 bus2=324.1.2.3.4 phases=4 linecode=LC1 length=21.51681 units=m
! reduced_from=line329,line336,line342,line348,line355,line362,line369,line375
! eliminated_buses=330,337,343,349,356,363,370

New Line._virtual_line332_line338_line344_line350_line357_line364_line370_line376_line382_line388_line393 bus1=326.1.2.3.4 bus2=394.1.2.3.4 phases=4 linecode=LC4 length=17.79022 units=m
! reduced_from=line332,line338,line344,line350,line357,line364,line370,line376,line382,line388,line393
! eliminated_buses=333,339,345,351,358,365,371,377,383,389

New Line._virtual_line333_line339_line345_line351_line358_line365_line371_line377_line383_line389_line394_line398 bus1=326.1.2.3.4 bus2=399.1.2.3.4 phases=4 linecode=LC4 length=12.85681 units=m
! reduced_from=line333,line339,line345,line351,line358,line365,line371,line377,line383,line389,line394,line398
! eliminated_buses=334,340,346,352,359,366,372,378,384,390,395

New Line._virtual_line346_line352_line359_line366_line372_line378_line384_line390_line395 bus1=341.1.2.3.4 bus2=396.1.2.3.4 phases=4 linecode=LC1 length=13.14403 units=m
! reduced_from=line346,line352,line359,line366,line372,line378,line384,line390,line395
! eliminated_buses=347,353,360,367,373,379,385,391

New Line._virtual_line353_line360_line367_line373_line379_line385_line391_line396_line399_line401_line403 bus1=404.1.2.3.4 bus2=348.1.2.3.4 phases=4 linecode=LC1 length=13.54223 units=m
! reduced_from=line353,line360,line367,line373,line379,line385,line391,line396,line399,line401,line403
! eliminated_buses=354,361,368,374,380,386,392,397,400,402

New Line._virtual_line354_line361_line368_line374 bus1=375.1.2.3.4 bus2=348.1.2.3.4 phases=4 linecode=LC4 length=17.0969 units=m
! reduced_from=line354,line361,line368,line374
! eliminated_buses=355,362,369

New Line._virtual_line380_line386_line392_line397_line400_line402_line404_line405 bus1=406.1.2.3.4 bus2=375.1.2.3.4 phases=4 linecode=LC1 length=15.78897 units=m
! reduced_from=line380,line386,line392,line397,line400,line402,line404,line405
! eliminated_buses=381,387,393,398,401,403,405

New Line.LINE65 bus1=65.1.2.3.4 bus2=66.1.2.3.4 phases=4 linecode=LC4 length=8.9065 units=m

New Line.LINE67 bus1=66.1.2.3.4 bus2=68.1.2.3.4 phases=4 linecode=LC4 length=1.8962 units=m

New Line.LINE70 bus1=68.1.2.3.4 bus2=71.1.2.3.4 phases=4 linecode=LC4 length=2.3074 units=m

New Line.LINE90 bus1=85.1.2.3.4 bus2=91.1.2.3.4 phases=4 linecode=LC4 length=4.4727 units=m

New Line.LINE323 bus1=319.1.2.3.4 bus2=324.1.2.3.4 phases=4 linecode=LC4 length=5.0985 units=m

New Line.LINE325 bus1=321.1.2.3.4 bus2=326.1.2.3.4 phases=4 linecode=LC4 length=1.1609 units=m

New Line.LINE347 bus1=341.1.2.3.4 bus2=348.1.2.3.4 phases=4 linecode=LC4 length=2.4636 units=m
