! Reduced enabled lines.

New Line._virtual_line0_line1_line2_line3_line4_line5_line6_line7_line8_line9_line10_line11_line12_line13_line14_line15_line16_line17_line18_line19_line20_line21_line22_line23_line24_line25_line26_line27_line28_line29_line30_line31_line32_line33_line34_line35_line36_line37_line38_line39_line40_line41_line42_line43_line44_line45_line46_line47_line48_line49_line50_line51_line52_line53_line54_line55_line56_line57_line58_line59_line60_line62 bus1=63.1.2.3.4 bus2=sourcebus.1.2.3.4 phases=4 linecode=LC4 length=52.483867 units=m
! reduced_from=line0,line1,line2,line3,line4,line5,line6,line7,line8,line9,line10,line11,line12,line13,line14,line15,line16,line17,line18,line19,line20,line21,line22,line23,line24,line25,line26,line27,line28,line29,line30,line31,line32,line33,line34,line35,line36,line37,line38,line39,line40,line41,line42,line43,line44,line45,line46,line47,line48,line49,line50,line51,line52,line53,line54,line55,line56,line57,line58,line59,line60,line62
! eliminated_buses=1,2,3,4,5,6,7,8,9,10,11,12,13,14,15,16,17,18,19,20,21,22,23,24,25,26,27,28,29,30,31,32,33,34,35,36,37,38,39,40,41,42,43,44,45,46,47,48,49,50,51,52,53,54,55,56,57,58,59,60,61

New Line._virtual_line64_line67_line71_line75 bus1=76.1.2.3.4 bus2=63.1.2.3.4 phases=4 linecode=LC1 length=19.77363 units=m
! reduced_from=line64,line67,line71,line75
! eliminated_buses=65,68,72

New Line._virtual_line68_line72_line76_line79 bus1=66.1.2.3.4 bus2=80.1.2.3.4 phases=4 linecode=LC1 length=13.74809 units=m
! reduced_from=line68,line72,line76,line79
! eliminated_buses=69,73,77

New Line._virtual_line69_line73 bus1=74.1.2.3.4 bus2=66.1.2.3.4 phases=4 linecode=LC4 length=10.0949 units=m
! reduced_from=line69,line73
! eliminated_buses=70

New Line._virtual_line80_line85 bus1=78.1.2.3.4 bus2=86.1.2.3.4 phases=4 linecode=LC4 length=9.6857 units=m
! reduced_from=line80,line85
! eliminated_buses=81

New Line._virtual_line82_line87 bus1=78.1.2.3.4 bus2=88.1.2.3.4 phases=4 linecode=LC1 length=11.3207 units=m
! reduced_from=line82,line87
! eliminated_buses=83

New Line._virtual_line84_line88 bus1=79.1.2.3.4 bus2=89.1.2.3.4 phases=4 linecode=LC1 length=11.2748 units=m
! reduced_from=line84,line88
! eliminated_buses=85

New Line._virtual_line91_line95 bus1=86.1.2.3.4 bus2=96.1.2.3.4 phases=4 linecode=LC1 length=11.0926 units=m
! reduced_from=line91,line95
! eliminated_buses=92

New Line._virtual_line94_line98 bus1=99.1.2.3.4 bus2=90.1.2.3.4 phases=4 linecode=LC1 length=11.4621 units=m
! reduced_from=line94,line98
! eliminated_buses=95

New Line._virtual_line97_line100_line101_line102_line103_line104_line105_line106 bus1=93.1.2.3.4 bus2=107.1.2.3.4 phases=4 linecode=LC5 length=22.52712 units=m
! reduced_from=line97,line100,line101,line102,line103,line104,line105,line106
! eliminated_buses=98,101,102,103,104,105,106

New Line._virtual_line107_line108_line109_line110_line111_line112_line113_line114_line115_line116_line117_line118_line119_line120_line121_line122_line123_line124_line125_line126_line127_line128_line129_line130_line131_line132_line133_line134_line135_line136_line137_line139_line141_line143_line145_line147_line149_line151_line153_line155_line157_line159_line161_line163_line165_line167 bus1=107.1.2.3.4 bus2=168.1.2.3.4 phases=4 linecode=LC4 length=72.91219 units=m
! reduced_from=line107,line108,line109,line110,line111,line112,line113,line114,line115,line116,line117,line118,line119,line120,line121,line122,line123,line124,line125,line126,line127,line128,line129,line130,line131,line132,line133,line134,line135,line136,line137,line139,line141,line143,line145,line147,line149,line151,line153,line155,line157,line159,line161,line163,line165,line167
! eliminated_buses=108,109,110,111,112,113,114,115,116,117,118,119,120,121,122,123,124,125,126,127,128,129,130,131,132,133,134,135,136,137,138,140,142,144,146,148,150,152,154,156,158,160,162,164,166

New Line._virtual_line169_line172 bus1=173.1.2.3.4 bus2=168.1.2.3.4 phases=4 linecode=LC1 length=13.113 units=m
! reduced_from=line169,line172
! eliminated_buses=170

New Line._virtual_line170_line173 bus1=168.1.2.3.4 bus2=174.1.2.3.4 phases=4 linecode=LC4 length=16.1022 units=m
! reduced_from=line170,line173
! eliminated_buses=171

New Line._virtual_line175_line178_line182_line185_line188_line191_line193_line196_line200_line205_line210 bus1=211.1.2.3.4 bus2=174.1.2.3.4 phases=4 linecode=LC6 length=12.09374 units=m
! reduced_from=line175,line178,line182,line185,line188,line191,line193,line196,line200,line205,line210
! eliminated_buses=176,179,183,186,189,192,194,197,201,206

New Line._virtual_line179_line183 bus1=177.1.2.3.4 bus2=184.1.2.3.4 phases=4 linecode=LC1 length=19.836 units=m
! reduced_from=line179,line183
! eliminated_buses=180

New Line._virtual_line180_line184 bus1=177.1.2.3.4 bus2=185.1.2.3.4 phases=4 linecode=LC4 length=12.9636 units=m
! reduced_from=line180,line184
! eliminated_buses=181

New Line._virtual_line186_line189 bus1=185.1.2.3.4 bus2=190.1.2.3.4 phases=4 linecode=LC1 length=18.7108 units=m
! reduced_from=line186,line189
! eliminated_buses=187

New Line._virtual_line187_line190_line192_line195 bus1=196.1.2.3.4 bus2=185.1.2.3.4 phases=4 linecode=LC4 length=17.11983 units=m
! reduced_from=line187,line190,line192,line195
! eliminated_buses=188,191,193

New Line._virtual_line198_line202_line207_line212_line218_line225_line232_line239_line246_line251_line255_line259_line263 bus1=264.1.2.3.4 bus2=196.1.2.3.4 phases=4 linecode=LC6 length=23.183776 units=m
! reduced_from=line198,line202,line207,line212,line218,line225,line232,line239,line246,line251,line255,line259,line263
! eliminated_buses=199,203,208,213,219,226,233,240,247,252,256,260

New Line._virtual_line203_line208 bus1=200.1.2.3.4 bus2=209.1.2.3.4 phases=4 linecode=LC6 length=19.5945 units=m
! reduced_from=line203,line208
! eliminated_buses=204

New Line._virtual_line204_line209 bus1=200.1.2.3.4 bus2=210.1.2.3.4 phases=4 linecode=LC4 length=7.2123 units=m
! reduced_from=line204,line209
! eliminated_buses=205

New Line._virtual_line213_line219 bus1=210.1.2.3.4 bus2=220.1.2.3.4 phases=4 linecode=LC6 length=21.155 units=m
! reduced_from=line213,line219
! eliminated_buses=214

New Line._virtual_line215_line222_line229_line236_line243 bus1=244.1.2.3.4 bus2=211.1.2.3.4 phases=4 linecode=LC6 length=14.87114 units=m
! reduced_from=line215,line222,line229,line236,line243
! eliminated_buses=216,223,230,237

New Line._virtual_line216_line223_line230_line237 bus1=238.1.2.3.4 bus2=211.1.2.3.4 phases=4 linecode=LC6 length=2.07576 units=m
! reduced_from=line216,line223,line230,line237
! eliminated_buses=217,224,231

New Line._virtual_line220_line226 bus1=227.1.2.3.4 bus2=215.1.2.3.4 phases=4 linecode=LC6 length=13.5387 units=m
! reduced_from=line220,line226
! eliminated_buses=221

New Line._virtual_line227_line233 bus1=234.1.2.3.4 bus2=222.1.2.3.4 phases=4 linecode=LC6 length=11.8755 units=m
! reduced_from=line227,line233
! eliminated_buses=228

New Line._virtual_line234_line240 bus1=229.1.2.3.4 bus2=241.1.2.3.4 phases=4 linecode=LC6 length=17.0371 units=m
! reduced_from=line234,line240
! eliminated_buses=235

New Line._virtual_line235_line242_line248_line253 bus1=254.1.2.3.4 bus2=229.1.2.3.4 phases=4 linecode=LC4 length=16.17606 units=m
! reduced_from=line235,line242,line248,line253
! eliminated_buses=236,243,249

New Line._virtual_line256_line260_line264_line267_line270_line273_line276_line279_line282_line285_line290_line293_line296_line299_line302_line305_line308_line311 bus1=254.1.2.3.4 bus2=312.1.2.3.4 phases=4 linecode=LC2 length=23.11363 units=m
! reduced_from=line256,line260,line264,line267,line270,line273,line276,line279,line282,line285,line290,line293,line296,line299,line302,line305,line308,line311
! eliminated_buses=257,261,265,268,271,274,277,280,283,286,291,294,297,300,303,306,309

New Line._virtual_line257_line262_line266_line269_line272_line275_line278_line281_line284 bus1=285.1.2.3.4 bus2=254.1.2.3.4 phases=4 linecode=LC4 length=23.54684 units=m
! reduced_from=line257,line262,line266,line269,line272,line275,line278,line281,line284
! eliminated_buses=258,263,267,270,273,276,279,282

New Line._virtual_line287_line292_line295_line298_line301_line304_line307_line310_line313_line319_line325_line330_line335_line344_line353_line362_line370_line375_line380_line385_line389_line393 bus1=285.1.2.3.4 bus2=394.1.2.3.4 phases=4 linecode=LC2 length=28.89247 units=m
! reduced_from=line287,line292,line295,line298,line301,line304,line307,line310,line313,line319,line325,line330,line335,line344,line353,line362,line370,line375,line380,line385,line389,line393
! eliminated_buses=288,293,296,299,302,305,308,311,314,320,326,331,336,345,354,363,371,376,381,386,390

New Line._virtual_line315_line323 bus1=312.1.2.3.4 bus2=324.1.2.3.4 phases=4 linecode=LC1 length=9.1205 units=m
! reduced_from=line315,line323
! eliminated_buses=316

New Line._virtual_line320_line326 bus1=327.1.2.3.4 bus2=315.1.2.3.4 phases=4 linecode=LC2 length=4.71055 units=m
! reduced_from=line320,line326
! eliminated_buses=321

New Line._virtual_line321_line328 bus1=329.1.2.3.4 bus2=315.1.2.3.4 phases=4 linecode=LC6 length=9.4246 units=m
! reduced_from=line321,line328
! eliminated_buses=322

New Line._virtual_line332_line339 bus1=327.1.2.3.4 bus2=340.1.2.3.4 phases=4 linecode=LC2 length=14.9751 units=m
! reduced_from=line332,line339
! eliminated_buses=333

New Line._virtual_line336_line345_line354_line363_line371_line376_line381_line386_line390_line394 bus1=332.1.2.3.4 bus2=395.1.2.3.4 phases=4 linecode=LC6 length=21.11883 units=m
! reduced_from=line336,line345,line354,line363,line371,line376,line381,line386,line390,line394
! eliminated_buses=337,346,355,364,372,377,382,387,391

New Line._virtual_line337_line346_line355_line364_line372_line377_line382_line387_line391_line395_line397 bus1=332.1.2.3.4 bus2=398.1.2.3.4 phases=4 linecode=LC1 length=19.6703 units=m
! reduced_from=line337,line346,line355,line364,line372,line377,line382,line387,line391,line395,line397
! eliminated_buses=338,347,356,365,373,378,383,388,392,396

New Line._virtual_line342_line351 bus1=334.1.2.3.4 bus2=352.1.2.3.4 phases=4 linecode=LC1 length=11.2631 units=m
! reduced_from=line342,line351
! eliminated_buses=343

New Line._virtual_line348_line357 bus1=340.1.2.3.4 bus2=358.1.2.3.4 phases=4 linecode=LC1 length=10.5527 units=m
! reduced_from=line348,line357
! eliminated_buses=349

New Line._virtual_line358_line366 bus1=367.1.2.3.4 bus2=350.1.2.3.4 phases=4 linecode=LC1 length=22.9247 units=m
! reduced_from=line358,line366
! eliminated_buses=359

New Line.LINE65 bus1=63.1.2.3.4 bus2=66.1.2.3.4 phases=4 linecode=LC4 length=6.2886 units=m

New Line.LINE77 bus1=74.1.2.3.4 bus2=78.1.2.3.4 phases=4 linecode=LC4 length=17.0828 units=m

New Line.LINE78 bus1=74.1.2.3.4 bus2=79.1.2.3.4 phases=4 linecode=LC4 length=9.9675 units=m

New Line.LINE89 bus1=86.1.2.3.4 bus2=90.1.2.3.4 phases=4 linecode=LC4 length=8.9669 units=m

New Line.LINE92 bus1=90.1.2.3.4 bus2=93.1.2.3.4 phases=4 linecode=LC4 length=5.3939 units=m

New Line.LINE176 bus1=174.1.2.3.4 bus2=177.1.2.3.4 phases=4 linecode=LC4 length=23.6578 units=m

New Line.LINE199 bus1=196.1.2.3.4 bus2=200.1.2.3.4 phases=4 linecode=LC4 length=6.3575 units=m

New Line.LINE214 bus1=210.1.2.3.4 bus2=215.1.2.3.4 phases=4 linecode=LC4 length=13.5082 units=m

New Line.LINE221 bus1=215.1.2.3.4 bus2=222.1.2.3.4 phases=4 linecode=LC4 length=10.3662 units=m

New Line.LINE228 bus1=222.1.2.3.4 bus2=229.1.2.3.4 phases=4 linecode=LC4 length=10.0137 units=m

New Line.LINE244 bus1=238.1.2.3.4 bus2=245.1.2.3.4 phases=4 linecode=LC1 length=3.956 units=m

New Line.LINE249 bus1=244.1.2.3.4 bus2=250.1.2.3.4 phases=4 linecode=LC1 length=4.6179 units=m

New Line.LINE314 bus1=312.1.2.3.4 bus2=315.1.2.3.4 phases=4 linecode=LC2 length=10.6956 units=m

New Line.LINE331 bus1=327.1.2.3.4 bus2=332.1.2.3.4 phases=4 linecode=LC6 length=15.9994 units=m

New Line.LINE333 bus1=327.1.2.3.4 bus2=334.1.2.3.4 phases=4 linecode=LC2 length=2.1587 units=m

New Line.LINE349 bus1=340.1.2.3.4 bus2=350.1.2.3.4 phases=4 linecode=LC2 length=2.8551 units=m
