! Reduced enabled lines.

New Line._virtual_line0_line1_line2_line3_line4_line5_line6_line7_line8_line9_line10_line11_line12_line13_line14_line15_line16_line17_line18_line19_line20_line21_line22_line23_line24_line25_line26_line27_line28_line29_line30_line31 bus1=32.1.2.3.4 bus2=sourcebus.1.2.3.4 phases=4 linecode=LC4 length=11.974041 units=m
! reduced_from=line0,line1,line2,line3,line4,line5,line6,line7,line8,line9,line10,line11,line12,line13,line14,line15,line16,line17,line18,line19,line20,line21,line22,line23,line24,line25,line26,line27,line28,line29,line30,line31
! eliminated_buses=1,2,3,4,5,6,7,8,9,10,11,12,13,14,15,16,17,18,19,20,21,22,23,24,25,26,27,28,29,30,31

New Line._virtual_line32_line34_line37 bus1=38.1.2.3.4 bus2=32.1.2.3.4 phases=4 linecode=LC3 length=7.7038 units=m
! reduced_from=line32,line34,line37
! eliminated_buses=33,35

New Line._virtual_line40_line44 bus1=38.1.2.3.4 bus2=45.1.2.3.4 phases=4 linecode=LC6 length=13.3983 units=m
! reduced_from=line40,line44
! eliminated_buses=41

New Line._virtual_line41_line45_line48 bus1=49.1.2.3.4 bus2=38.1.2.3.4 phases=4 linecode=LC3 length=14.05352 units=m
! reduced_from=line41,line45,line48
! eliminated_buses=42,46

New Line._virtual_line52_line58_line62 bus1=49.1.2.3.4 bus2=63.1.2.3.4 phases=4 linecode=LC3 length=13.673 units=m
! reduced_from=line52,line58,line62
! eliminated_buses=53,59

New Line._virtual_line66_line71_line77_line81_line84_line87_line91_line94 bus1=63.1.2.3.4 bus2=95.1.2.3.4 phases=4 linecode=LC3 length=14.28693 units=m
! reduced_from=line66,line71,line77,line81,line84,line87,line91,line94
! eliminated_buses=67,72,78,82,85,88,92

New Line._virtual_line97_line101 bus1=95.1.2.3.4 bus2=102.1.2.3.4 phases=4 linecode=LC6 length=12.6917 units=m
! reduced_from=line97,line101
! eliminated_buses=98

New Line._virtual_line103_line107 bus1=99.1.2.3.4 bus2=108.1.2.3.4 phases=4 linecode=LC3 length=12.0566 units=m
! reduced_from=line103,line107
! eliminated_buses=104

New Line._virtual_line110_line113_line116_line119 bus1=108.1.2.3.4 bus2=120.1.2.3.4 phases=4 linecode=LC1 length=14.13663 units=m
! reduced_from=line110,line113,line116,line119
! eliminated_buses=111,114,117

New Line._virtual_line111_line114_line117_line121_line124_line127 bus1=108.1.2.3.4 bus2=128.1.2.3.4 phases=4 linecode=LC3 length=18.9318 units=m
! reduced_from=line111,line114,line117,line121,line124,line127
! eliminated_buses=112,115,118,122,125

New Line._virtual_line130_line134_line137 bus1=138.1.2.3.4 bus2=128.1.2.3.4 phases=4 linecode=LC6 length=15.34925 units=m
! reduced_from=line130,line134,line137
! eliminated_buses=131,135

New Line._virtual_line131_line135 bus1=128.1.2.3.4 bus2=136.1.2.3.4 phases=4 linecode=LC3 length=7.2942 units=m
! reduced_from=line131,line135
! eliminated_buses=132

New Line._virtual_line138_line141 bus1=142.1.2.3.4 bus2=136.1.2.3.4 phases=4 linecode=LC6 length=16.4094 units=m
! reduced_from=line138,line141
! eliminated_buses=139

New Line._virtual_line142_line144 bus1=140.1.2.3.4 bus2=145.1.2.3.4 phases=4 linecode=LC6 length=16.7098 units=m
! reduced_from=line142,line144
! eliminated_buses=143

New Line._virtual_line143_line145 bus1=140.1.2.3.4 bus2=146.1.2.3.4 phases=4 linecode=LC3 length=8.41169 units=m
! reduced_from=line143,line145
! eliminated_buses=144

New Line._virtual_line146_line148 bus1=149.1.2.3.4 bus2=146.1.2.3.4 phases=4 linecode=LC6 length=10.4185 units=m
! reduced_from=line146,line148
! eliminated_buses=147

New Line._virtual_line147_line149 bus1=150.1.2.3.4 bus2=146.1.2.3.4 phases=4 linecode=LC3 length=4.433323 units=m
! reduced_from=line147,line149
! eliminated_buses=148

New Line._virtual_line150_line152 bus1=150.1.2.3.4 bus2=153.1.2.3.4 phases=4 linecode=LC6 length=11.2595 units=m
! reduced_from=line150,line152
! eliminated_buses=151

New Line._virtual_line151_line153 bus1=150.1.2.3.4 bus2=154.1.2.3.4 phases=4 linecode=LC3 length=3.99381 units=m
! reduced_from=line151,line153
! eliminated_buses=152

New Line._virtual_line154_line156 bus1=157.1.2.3.4 bus2=154.1.2.3.4 phases=4 linecode=LC6 length=12.461 units=m
! reduced_from=line154,line156
! eliminated_buses=155

New Line._virtual_line155_line157_line158_line160_line161_line163_line166_line168_line171_line173_line175 bus1=154.1.2.3.4 bus2=176.1.2.3.4 phases=4 linecode=LC3 length=48.21939 units=m
! reduced_from=line155,line157,line158,line160,line161,line163,line166,line168,line171,line173,line175
! eliminated_buses=156,158,159,161,162,164,167,169,172,174

New Line._virtual_line176_line178 bus1=176.1.2.3.4 bus2=179.1.2.3.4 phases=4 linecode=LC1 length=13.0063 units=m
! reduced_from=line176,line178
! eliminated_buses=177

New Line._virtual_line177_line179_line180 bus1=176.1.2.3.4 bus2=181.1.2.3.4 phases=4 linecode=LC3 length=13.5007 units=m
! reduced_from=line177,line179,line180
! eliminated_buses=178,180

New Line._virtual_line181_line183 bus1=184.1.2.3.4 bus2=181.1.2.3.4 phases=4 linecode=LC1 length=13.1125 units=m
! reduced_from=line181,line183
! eliminated_buses=182

New Line._virtual_line182_line184 bus1=185.1.2.3.4 bus2=181.1.2.3.4 phases=4 linecode=LC3 length=9.4579 units=m
! reduced_from=line182,line184
! eliminated_buses=183

New Line._virtual_line185_line187 bus1=188.1.2.3.4 bus2=185.1.2.3.4 phases=4 linecode=LC1 length=13.147 units=m
! reduced_from=line185,line187
! eliminated_buses=186

New Line._virtual_line186_line188_line189 bus1=190.1.2.3.4 bus2=185.1.2.3.4 phases=4 linecode=LC3 length=8.6875 units=m
! reduced_from=line186,line188,line189
! eliminated_buses=187,189

New Line._virtual_line190_line192 bus1=190.1.2.3.4 bus2=193.1.2.3.4 phases=4 linecode=LC1 length=12.1506 units=m
! reduced_from=line190,line192
! eliminated_buses=191

New Line.LINE51 bus1=49.1.2.3.4 bus2=52.1.2.3.4 phases=4 linecode=LC6 length=6.7057 units=m

New Line.LINE55 bus1=52.1.2.3.4 bus2=56.1.2.3.4 phases=4 linecode=LC6 length=5.5592 units=m

New Line.LINE56 bus1=52.1.2.3.4 bus2=57.1.2.3.4 phases=4 linecode=LC6 length=5.5592 units=m

New Line.LINE67 bus1=63.1.2.3.4 bus2=68.1.2.3.4 phases=4 linecode=LC6 length=8.2989 units=m

New Line.LINE72 bus1=68.1.2.3.4 bus2=73.1.2.3.4 phases=4 linecode=LC6 length=5.6569 units=m

New Line.LINE73 bus1=68.1.2.3.4 bus2=74.1.2.3.4 phases=4 linecode=LC6 length=5.6569 units=m

New Line.LINE98 bus1=95.1.2.3.4 bus2=99.1.2.3.4 phases=4 linecode=LC3 length=5.3315 units=m

New Line.LINE102 bus1=99.1.2.3.4 bus2=103.1.2.3.4 phases=4 linecode=LC6 length=8.9794 units=m

New Line.LINE106 bus1=103.1.2.3.4 bus2=107.1.2.3.4 phases=4 linecode=LC1 length=4.4241 units=m

New Line.LINE139 bus1=136.1.2.3.4 bus2=140.1.2.3.4 phases=4 linecode=LC3 length=4.2893 units=m
