! Reduced enabled lines.

New Line._virtual_line0_line1_line2_line3_line4_line5_line6_line7_line8_line9_line10_line11_line12_line13_line14_line15_line16_line17_line18_line19_line20_line21_line22_line23_line24 bus1=sourcebus.1.2.3.4 bus2=25.1.2.3.4 phases=4 linecode=LC4 length=10.565918 units=m
! reduced_from=line0,line1,line2,line3,line4,line5,line6,line7,line8,line9,line10,line11,line12,line13,line14,line15,line16,line17,line18,line19,line20,line21,line22,line23,line24
! eliminated_buses=1,2,3,4,5,6,7,8,9,10,11,12,13,14,15,16,17,18,19,20,21,22,23,24

New Line._virtual_line25_line26_line27_line29_line31_line33_line35_line37_line40 bus1=25.1.2.3.4 bus2=41.1.2.3.4 phases=4 linecode=LC3 length=26.35692 units=m
! reduced_from=line25,line26,line27,line29,line31,line33,line35,line37,line40
! eliminated_buses=26,27,28,30,32,34,36,38

New Line._virtual_line43_line47 bus1=48.1.2.3.4 bus2=41.1.2.3.4 phases=4 linecode=LC6 length=12.5793 units=m
! reduced_from=line43,line47
! eliminated_buses=44

New Line._virtual_line48_line52 bus1=53.1.2.3.4 bus2=45.1.2.3.4 phases=4 linecode=LC6 length=12.379 units=m
! reduced_from=line48,line52
! eliminated_buses=49

New Line._virtual_line49_line53 bus1=54.1.2.3.4 bus2=45.1.2.3.4 phases=4 linecode=LC3 length=2.96123 units=m
! reduced_from=line49,line53
! eliminated_buses=50

New Line._virtual_line56_line60_line63_line66_line68_line70_line72_line74_line77_line81_line84_line88_line92 bus1=54.1.2.3.4 bus2=93.1.2.3.4 phases=4 linecode=LC3 length=34.49329 units=m
! reduced_from=line56,line60,line63,line66,line68,line70,line72,line74,line77,line81,line84,line88,line92
! eliminated_buses=57,61,64,67,69,71,73,75,78,82,85,89

New Line._virtual_line57_line61_line64_line67_line69_line71_line73_line75_line78_line82_line85_line89_line93_line98_line104_line111_line120_line130_line141_line152_line162_line171_line179_line187_line195_line203_line212_line221_line231_line242_line254_line265_line276_line286_line296_line306_line317_line327_line339_line349_line358_line372_line389_line404_line420_line435_line450_line466_line483_line502_line522_line543_line565_line589_line613_line638_line660_line682_line703_line723 bus1=54.1.2.3.4 bus2=724.1.2.3.4 phases=4 linecode=LC9 length=59.594266 units=m
! reduced_from=line57,line61,line64,line67,line69,line71,line73,line75,line78,line82,line85,line89,line93,line98,line104,line111,line120,line130,line141,line152,line162,line171,line179,line187,line195,line203,line212,line221,line231,line242,line254,line265,line276,line286,line296,line306,line317,line327,line339,line349,line358,line372,line389,line404,line420,line435,line450,line466,line483,line502,line522,line543,line565,line589,line613,line638,line660,line682,line703,line723
! eliminated_buses=58,62,65,68,70,72,74,76,79,83,86,90,94,99,105,112,121,131,142,153,163,172,180,188,196,204,213,222,232,243,255,266,277,287,297,307,318,328,340,350,359,373,390,405,421,436,451,467,484,503,523,544,566,590,614,639,661,683,704

New Line._virtual_line95_line100_line106_line113_line122_line132_line143_line154_line164_line172_line180_line188_line196_line205_line214_line223_line233_line244_line256_line267_line278_line288_line297_line307_line318_line328_line340_line350 bus1=93.1.2.3.4 bus2=351.1.2.3.4 phases=4 linecode=LC6 length=22.454487 units=m
! reduced_from=line95,line100,line106,line113,line122,line132,line143,line154,line164,line172,line180,line188,line196,line205,line214,line223,line233,line244,line256,line267,line278,line288,line297,line307,line318,line328,line340,line350
! eliminated_buses=96,101,107,114,123,133,144,155,165,173,181,189,197,206,215,224,234,245,257,268,279,289,298,308,319,329,341

New Line._virtual_line96_line101_line107_line114_line123_line133_line144_line155_line165_line173_line181_line189_line197_line206_line215_line224_line234_line245_line257_line268_line279 bus1=93.1.2.3.4 bus2=280.1.2.3.4 phases=4 linecode=LC6 length=16.926191 units=m
! reduced_from=line96,line101,line107,line114,line123,line133,line144,line155,line165,line173,line181,line189,line197,line206,line215,line224,line234,line245,line257,line268,line279
! eliminated_buses=97,102,108,115,124,134,145,156,166,174,182,190,198,207,216,225,235,246,258,269

New Line._virtual_line97_line103_line110 bus1=93.1.2.3.4 bus2=111.1.2.3.4 phases=4 linecode=LC3 length=22.7044 units=m
! reduced_from=line97,line103,line110
! eliminated_buses=98,104

New Line._virtual_line117_line126_line136_line147_line158_line167_line175_line183_line191_line199_line208_line217_line226_line236_line247_line259_line270_line281_line290_line299_line309_line320_line330_line342_line352_line362_line375_line392_line407_line423_line438_line453_line469_line486_line505_line525_line546_line568_line592_line616_line640_line662 bus1=111.1.2.3.4 bus2=663.1.2.3.4 phases=4 linecode=LC2 length=27.037378 units=m
! reduced_from=line117,line126,line136,line147,line158,line167,line175,line183,line191,line199,line208,line217,line226,line236,line247,line259,line270,line281,line290,line299,line309,line320,line330,line342,line352,line362,line375,line392,line407,line423,line438,line453,line469,line486,line505,line525,line546,line568,line592,line616,line640,line662
! eliminated_buses=118,127,137,148,159,168,176,184,192,200,209,218,227,237,248,260,271,282,291,300,310,321,331,343,353,363,376,393,408,424,439,454,470,487,506,526,547,569,593,617,641

New Line._virtual_line118_line127_line137_line148_line159_line168_line176_line184_line192_line200_line209_line218_line227_line237_line248_line260_line271_line282_line291_line300_line310_line321_line331_line343_line353_line363 bus1=111.1.2.3.4 bus2=364.1.2.3.4 phases=4 linecode=LC2 length=13.147227 units=m
! reduced_from=line118,line127,line137,line148,line159,line168,line176,line184,line192,line200,line209,line218,line227,line237,line248,line260,line271,line282,line291,line300,line310,line321,line331,line343,line353,line363
! eliminated_buses=119,128,138,149,160,169,177,185,193,201,210,219,228,238,249,261,272,283,292,301,311,322,332,344,354

New Line._virtual_line119_line128_line138_line149_line160_line169_line177_line185_line193_line201_line210_line219_line229 bus1=111.1.2.3.4 bus2=230.1.2.3.4 phases=4 linecode=LC3 length=19.79926 units=m
! reduced_from=line119,line128,line138,line149,line160,line169,line177,line185,line193,line201,line210,line219,line229
! eliminated_buses=120,129,139,150,161,170,178,186,194,202,211,220

New Line._virtual_line239_line250 bus1=251.1.2.3.4 bus2=230.1.2.3.4 phases=4 linecode=LC6 length=11.8437 units=m
! reduced_from=line239,line250
! eliminated_buses=240

New Line._virtual_line251_line261 bus1=262.1.2.3.4 bus2=241.1.2.3.4 phases=4 linecode=LC6 length=11.6943 units=m
! reduced_from=line251,line261
! eliminated_buses=252

New Line._virtual_line262_line272 bus1=273.1.2.3.4 bus2=253.1.2.3.4 phases=4 linecode=LC6 length=11.5166 units=m
! reduced_from=line262,line272
! eliminated_buses=263

New Line._virtual_line273_line283 bus1=264.1.2.3.4 bus2=284.1.2.3.4 phases=4 linecode=LC6 length=10.4296 units=m
! reduced_from=line273,line283
! eliminated_buses=274

New Line._virtual_line274_line284 bus1=264.1.2.3.4 bus2=285.1.2.3.4 phases=4 linecode=LC3 length=4.37281 units=m
! reduced_from=line274,line284
! eliminated_buses=275

New Line._virtual_line293_line304_line315_line325_line337_line347_line357_line371 bus1=372.1.2.3.4 bus2=285.1.2.3.4 phases=4 linecode=LC9 length=26.131045 units=m
! reduced_from=line293,line304,line315,line325,line337,line347,line357,line371
! eliminated_buses=294,305,316,326,338,348,358

New Line._virtual_line302_line314 bus1=315.1.2.3.4 bus2=293.1.2.3.4 phases=4 linecode=LC6 length=13.6682 units=m
! reduced_from=line302,line314
! eliminated_buses=303

New Line._virtual_line312_line324 bus1=325.1.2.3.4 bus2=302.1.2.3.4 phases=4 linecode=LC6 length=14.7443 units=m
! reduced_from=line312,line324
! eliminated_buses=313

New Line._virtual_line322_line332_line344 bus1=312.1.2.3.4 bus2=345.1.2.3.4 phases=4 linecode=LC3 length=11.1643 units=m
! reduced_from=line322,line332,line344
! eliminated_buses=323,333

New Line._virtual_line335_line346 bus1=324.1.2.3.4 bus2=347.1.2.3.4 phases=4 linecode=LC6 length=11.9139 units=m
! reduced_from=line335,line346
! eliminated_buses=336

New Line._virtual_line354_line364_line378_line394_line408_line424_line439_line454_line470_line487_line506_line526_line547_line569_line593_line617_line641_line663_line685_line706 bus1=345.1.2.3.4 bus2=707.1.2.3.4 phases=4 linecode=LC1 length=13.358792 units=m
! reduced_from=line354,line364,line378,line394,line408,line424,line439,line454,line470,line487,line506,line526,line547,line569,line593,line617,line641,line663,line685,line706
! eliminated_buses=355,365,379,395,409,425,440,455,471,488,507,527,548,570,594,618,642,664,686

New Line._virtual_line360_line373_line390_line405_line421_line436_line451_line467_line484_line503_line523_line544_line566_line590_line614 bus1=615.1.2.3.4 bus2=351.1.2.3.4 phases=4 linecode=LC6 length=18.99504 units=m
! reduced_from=line360,line373,line390,line405,line421,line436,line451,line467,line484,line503,line523,line544,line566,line590,line614
! eliminated_buses=361,374,391,406,422,437,452,468,485,504,524,545,567,591

New Line._virtual_line365_line379_line395_line409_line425_line440_line455_line471_line488_line507_line527_line549_line571_line595_line619_line643_line665_line686_line707_line724_line740 bus1=741.1.2.3.4 bus2=356.1.2.3.4 phases=4 linecode=LC1 length=13.911025 units=m
! reduced_from=line365,line379,line395,line409,line425,line440,line455,line471,line488,line507,line527,line549,line571,line595,line619,line643,line665,line686,line707,line724,line740
! eliminated_buses=366,380,396,410,426,441,456,472,489,508,528,550,572,596,620,644,666,687,708,725

New Line._virtual_line366_line380_line396_line410_line426_line441_line456_line472_line489_line508_line528_line550 bus1=551.1.2.3.4 bus2=356.1.2.3.4 phases=4 linecode=LC1 length=13.023648 units=m
! reduced_from=line366,line380,line396,line410,line426,line441,line456,line472,line489,line508,line528,line550
! eliminated_buses=367,381,397,411,427,442,457,473,490,509,529

New Line._virtual_line367_line381 bus1=356.1.2.3.4 bus2=382.1.2.3.4 phases=4 linecode=LC3 length=20.1329 units=m
! reduced_from=line367,line381
! eliminated_buses=368

New Line._virtual_line377_line393 bus1=364.1.2.3.4 bus2=394.1.2.3.4 phases=4 linecode=LC2 length=7.7739 units=m
! reduced_from=line377,line393
! eliminated_buses=378

New Line._virtual_line386_line401_line418_line433_line448 bus1=372.1.2.3.4 bus2=449.1.2.3.4 phases=4 linecode=LC2 length=1.23149 units=m
! reduced_from=line386,line401,line418,line433,line448
! eliminated_buses=387,402,419,434

New Line._virtual_line397_line412 bus1=413.1.2.3.4 bus2=382.1.2.3.4 phases=4 linecode=LC3 length=3.4535 units=m
! reduced_from=line397,line412
! eliminated_buses=398

New Line._virtual_line415_line430_line445_line460_line477_line496_line516_line537 bus1=399.1.2.3.4 bus2=538.1.2.3.4 phases=4 linecode=LC1 length=14.69703 units=m
! reduced_from=line415,line430,line445,line460,line477,line496,line516,line537
! eliminated_buses=416,431,446,461,478,497,517

New Line._virtual_line427_line442_line457 bus1=413.1.2.3.4 bus2=458.1.2.3.4 phases=4 linecode=LC3 length=11.4925 units=m
! reduced_from=line427,line442,line457
! eliminated_buses=428,443

New Line._virtual_line428_line444_line459_line476_line495_line515 bus1=413.1.2.3.4 bus2=516.1.2.3.4 phases=4 linecode=LC1 length=14.460008 units=m
! reduced_from=line428,line444,line459,line476,line495,line515
! eliminated_buses=429,445,460,477,496

New Line._virtual_line463_line480_line499_line519_line540_line562_line586_line610_line635_line657_line679_line700_line720_line736_line751_line761_line769_line777_line785_line791_line797_line805_line813_line821_line828_line835_line842_line849_line856_line863_line870_line877_line884_line891_line898_line905_line911 bus1=912.1.2.3.4 bus2=449.1.2.3.4 phases=4 linecode=LC2 length=22.497352 units=m
! reduced_from=line463,line480,line499,line519,line540,line562,line586,line610,line635,line657,line679,line700,line720,line736,line751,line761,line769,line777,line785,line791,line797,line805,line813,line821,line828,line835,line842,line849,line856,line863,line870,line877,line884,line891,line898,line905,line911
! eliminated_buses=464,481,500,520,541,563,587,611,636,658,680,701,721,737,752,762,770,778,786,792,798,806,814,822,829,836,843,850,857,864,871,878,885,892,899,906

New Line._virtual_line464_line481_line500_line520_line541_line563_line587_line611_line636_line658_line680_line701_line721_line737_line752_line762_line770 bus1=449.1.2.3.4 bus2=771.1.2.3.4 phases=4 linecode=LC2 length=19.083766 units=m
! reduced_from=line464,line481,line500,line520,line541,line563,line587,line611,line636,line658,line680,line701,line721,line737,line752,line762,line770
! eliminated_buses=465,482,501,521,542,564,588,612,637,659,681,702,722,738,753,763

New Line._virtual_line473_line490_line509_line529_line551_line572_line596 bus1=458.1.2.3.4 bus2=597.1.2.3.4 phases=4 linecode=LC6 length=13.21824 units=m
! reduced_from=line473,line490,line509,line529,line551,line572,line596
! eliminated_buses=474,491,510,530,552,573

New Line._virtual_line491_line510_line530_line552_line573_line597_line620 bus1=621.1.2.3.4 bus2=475.1.2.3.4 phases=4 linecode=LC1 length=13.40602 units=m
! reduced_from=line491,line510,line530,line552,line573,line597,line620
! eliminated_buses=492,511,531,553,574,598

New Line._virtual_line511_line531_line553_line574_line598_line621_line644 bus1=493.1.2.3.4 bus2=645.1.2.3.4 phases=4 linecode=LC6 length=12.07834 units=m
! reduced_from=line511,line531,line553,line574,line598,line621,line644
! eliminated_buses=512,532,554,575,599,622

New Line._virtual_line535_line558_line582_line606_line631_line653_line675 bus1=514.1.2.3.4 bus2=676.1.2.3.4 phases=4 linecode=LC1 length=12.46985 units=m
! reduced_from=line535,line558,line582,line606,line631,line653,line675
! eliminated_buses=536,559,583,607,632,654

New Line._virtual_line554_line575_line599_line622_line645_line666 bus1=534.1.2.3.4 bus2=667.1.2.3.4 phases=4 linecode=LC6 length=12.47117 units=m
! reduced_from=line554,line575,line599,line622,line645,line666
! eliminated_buses=555,576,600,623,646

New Line._virtual_line556_line578_line601_line624_line646_line667_line687 bus1=535.1.2.3.4 bus2=688.1.2.3.4 phases=4 linecode=LC1 length=11.91137 units=m
! reduced_from=line556,line578,line601,line624,line646,line667,line687
! eliminated_buses=557,579,602,625,647,668

New Line._virtual_line580_line605_line630_line652_line674_line696_line716_line733 bus1=558.1.2.3.4 bus2=734.1.2.3.4 phases=4 linecode=LC6 length=12.90212 units=m
! reduced_from=line580,line605,line630,line652,line674,line696,line716,line733
! eliminated_buses=581,606,631,653,675,697,717

New Line._virtual_line602_line625_line647_line668_line688_line708_line725_line741 bus1=742.1.2.3.4 bus2=580.1.2.3.4 phases=4 linecode=LC1 length=14.15514 units=m
! reduced_from=line602,line625,line647,line668,line688,line708,line725,line741
! eliminated_buses=603,626,648,669,689,709,726

New Line._virtual_line626_line648_line669_line689_line709_line726_line742 bus1=604.1.2.3.4 bus2=743.1.2.3.4 phases=4 linecode=LC6 length=13.01111 units=m
! reduced_from=line626,line648,line669,line689,line709,line726,line742
! eliminated_buses=627,649,670,690,710,727

New Line._virtual_line627_line649 bus1=604.1.2.3.4 bus2=650.1.2.3.4 phases=4 linecode=LC3 length=25.5481 units=m
! reduced_from=line627,line649
! eliminated_buses=628

New Line._virtual_line628_line651_line673_line695_line715_line732_line748_line758 bus1=605.1.2.3.4 bus2=759.1.2.3.4 phases=4 linecode=LC1 length=12.84978 units=m
! reduced_from=line628,line651,line673,line695,line715,line732,line748,line758
! eliminated_buses=629,652,674,696,716,733,749

New Line._virtual_line691_line711 bus1=712.1.2.3.4 bus2=672.1.2.3.4 phases=4 linecode=LC3 length=15.3896 units=m
! reduced_from=line691,line711
! eliminated_buses=692

New Line._virtual_line694_line714_line731_line747_line757_line767_line775 bus1=776.1.2.3.4 bus2=673.1.2.3.4 phases=4 linecode=LC6 length=11.92346 units=m
! reduced_from=line694,line714,line731,line747,line757,line767,line775
! eliminated_buses=695,715,732,748,758,768

New Line._virtual_line713_line730_line746 bus1=747.1.2.3.4 bus2=694.1.2.3.4 phases=4 linecode=LC1 length=11.6755 units=m
! reduced_from=line713,line730,line746
! eliminated_buses=714,731

New Line._virtual_line738_line753_line763_line771_line780_line786_line792_line798_line806_line814_line822_line829_line836_line843_line850_line857_line864_line871_line878_line885_line892_line899_line906_line912_line919_line924_line929_line934 bus1=724.1.2.3.4 bus2=935.1.2.3.4 phases=4 linecode=LC6 length=16.657489 units=m
! reduced_from=line738,line753,line763,line771,line780,line786,line792,line798,line806,line814,line822,line829,line836,line843,line850,line857,line864,line871,line878,line885,line892,line899,line906,line912,line919,line924,line929,line934
! eliminated_buses=739,754,764,772,781,787,793,799,807,815,823,830,837,844,851,858,865,872,879,886,893,900,907,913,920,925,930

New Line._virtual_line739_line754_line764_line772_line781_line787_line793 bus1=724.1.2.3.4 bus2=794.1.2.3.4 phases=4 linecode=LC9 length=9.1749 units=m
! reduced_from=line739,line754,line764,line772,line781,line787,line793
! eliminated_buses=740,755,765,773,782,788

New Line._virtual_line744_line755_line765_line773_line782_line788_line794_line802_line811_line819 bus1=820.1.2.3.4 bus2=729.1.2.3.4 phases=4 linecode=LC6 length=9.763791 units=m
! reduced_from=line744,line755,line765,line773,line782,line788,line794,line802,line811,line819
! eliminated_buses=745,756,766,774,783,789,795,803,812

New Line._virtual_line799_line808_line816_line824_line831_line838_line845_line852_line859_line866_line873_line880_line887_line894_line901_line907_line913_line920_line925_line930_line935_line941_line946_line951_line956_line961_line965_line970_line974_line978_line984_line990_line997_line1004_line1011 bus1=794.1.2.3.4 bus2=1012.1.2.3.4 phases=4 linecode=LC6 length=18.348141 units=m
! reduced_from=line799,line808,line816,line824,line831,line838,line845,line852,line859,line866,line873,line880,line887,line894,line901,line907,line913,line920,line925,line930,line935,line941,line946,line951,line956,line961,line965,line970,line974,line978,line984,line990,line997,line1004,line1011
! eliminated_buses=800,809,817,825,832,839,846,853,860,867,874,881,888,895,902,908,914,921,926,931,936,942,947,952,957,962,966,971,975,979,985,991,998,1005

New Line._virtual_line800_line809_line817_line825_line832_line839_line846_line853_line860_line867_line874_line881_line888_line895_line902_line908_line914_line921_line926_line931_line936_line942_line947_line952_line957_line962 bus1=963.1.2.3.4 bus2=794.1.2.3.4 phases=4 linecode=LC6 length=15.067694 units=m
! reduced_from=line800,line809,line817,line825,line832,line839,line846,line853,line860,line867,line874,line881,line888,line895,line902,line908,line914,line921,line926,line931,line936,line942,line947,line952,line957,line962
! eliminated_buses=801,810,818,826,833,840,847,854,861,868,875,882,889,896,903,909,915,922,927,932,937,943,948,953,958

New Line._virtual_line801_line810_line818_line826_line833_line840_line847_line854_line861_line868_line875_line882_line889_line896_line903_line909_line915_line922_line927_line932_line937_line943_line948_line953_line958_line963_line968_line972_line976 bus1=977.1.2.3.4 bus2=794.1.2.3.4 phases=4 linecode=LC9 length=28.37957 units=m
! reduced_from=line801,line810,line818,line826,line833,line840,line847,line854,line861,line868,line875,line882,line889,line896,line903,line909,line915,line922,line927,line932,line937,line943,line948,line953,line958,line963,line968,line972,line976
! eliminated_buses=802,811,819,827,834,841,848,855,862,869,876,883,890,897,904,910,916,923,928,933,938,944,949,954,959,964,969,973

New Line._virtual_line940_line945_line950_line955_line960_line964_line969_line973_line977_line983_line989_line996_line1003_line1010_line1017_line1025_line1032_line1038_line1044_line1049_line1054_line1059_line1064_line1069_line1073_line1077_line1081_line1085_line1089_line1094_line1098_line1101_line1104_line1107 bus1=1108.1.2.3.4 bus2=935.1.2.3.4 phases=4 linecode=LC6 length=26.753827 units=m
! reduced_from=line940,line945,line950,line955,line960,line964,line969,line973,line977,line983,line989,line996,line1003,line1010,line1017,line1025,line1032,line1038,line1044,line1049,line1054,line1059,line1064,line1069,line1073,line1077,line1081,line1085,line1089,line1094,line1098,line1101,line1104,line1107
! eliminated_buses=941,946,951,956,961,965,970,974,978,984,990,997,1004,1011,1018,1026,1033,1039,1045,1050,1055,1060,1065,1070,1074,1078,1082,1086,1090,1095,1099,1102,1105

New Line._virtual_line967_line971_line975_line979_line985_line991_line998_line1005_line1012_line1020_line1027_line1033_line1039_line1045_line1050_line1055_line1060_line1065 bus1=1066.1.2.3.4 bus2=963.1.2.3.4 phases=4 linecode=LC6 length=18.226338 units=m
! reduced_from=line967,line971,line975,line979,line985,line991,line998,line1005,line1012,line1020,line1027,line1033,line1039,line1045,line1050,line1055,line1060,line1065
! eliminated_buses=968,972,976,980,986,992,999,1006,1013,1021,1028,1034,1040,1046,1051,1056,1061

New Line._virtual_line980_line986_line992_line999_line1006_line1013_line1021_line1028_line1034_line1040_line1046_line1051_line1056_line1061_line1066_line1070_line1074_line1078_line1082_line1086 bus1=977.1.2.3.4 bus2=1087.1.2.3.4 phases=4 linecode=LC6 length=9.232757 units=m
! reduced_from=line980,line986,line992,line999,line1006,line1013,line1021,line1028,line1034,line1040,line1046,line1051,line1056,line1061,line1066,line1070,line1074,line1078,line1082,line1086
! eliminated_buses=981,987,993,1000,1007,1014,1022,1029,1035,1041,1047,1052,1057,1062,1067,1071,1075,1079,1083

New Line._virtual_line981_line987 bus1=988.1.2.3.4 bus2=977.1.2.3.4 phases=4 linecode=LC9 length=5.3795 units=m
! reduced_from=line981,line987
! eliminated_buses=982

New Line._virtual_line982_line988_line995_line1002_line1009_line1016_line1024_line1031_line1037_line1043_line1048_line1053_line1058_line1063_line1068_line1072_line1076_line1080_line1084_line1088_line1093_line1097 bus1=977.1.2.3.4 bus2=1098.1.2.3.4 phases=4 linecode=LC6 length=18.74819 units=m
! reduced_from=line982,line988,line995,line1002,line1009,line1016,line1024,line1031,line1037,line1043,line1048,line1053,line1058,line1063,line1068,line1072,line1076,line1080,line1084,line1088,line1093,line1097
! eliminated_buses=983,989,996,1003,1010,1017,1025,1032,1038,1044,1049,1054,1059,1064,1069,1073,1077,1081,1085,1089,1094

New Line._virtual_line993_line1000_line1007_line1014_line1022_line1029_line1035_line1041_line1047_line1052_line1057_line1062_line1067_line1071_line1075_line1079_line1083_line1087_line1092_line1096_line1100_line1103_line1106_line1109_line1111_line1113_line1115_line1117_line1119_line1121_line1123_line1125_line1127_line1129 bus1=1130.1.2.3.4 bus2=988.1.2.3.4 phases=4 linecode=LC6 length=21.003271 units=m
! reduced_from=line993,line1000,line1007,line1014,line1022,line1029,line1035,line1041,line1047,line1052,line1057,line1062,line1067,line1071,line1075,line1079,line1083,line1087,line1092,line1096,line1100,line1103,line1106,line1109,line1111,line1113,line1115,line1117,line1119,line1121,line1123,line1125,line1127,line1129
! eliminated_buses=994,1001,1008,1015,1023,1030,1036,1042,1048,1053,1058,1063,1068,1072,1076,1080,1084,1088,1093,1097,1101,1104,1107,1110,1112,1114,1116,1118,1120,1122,1124,1126,1128

New Line._virtual_line1019_line1026 bus1=1012.1.2.3.4 bus2=1027.1.2.3.4 phases=4 linecode=LC6 length=7.7666 units=m
! reduced_from=line1019,line1026
! eliminated_buses=1020

New Line._virtual_line1091_line1095_line1099_line1102_line1105_line1108_line1110_line1112_line1114_line1116_line1118_line1120_line1122_line1124_line1126_line1128_line1130_line1133_line1135_line1137_line1139_line1141_line1143_line1145_line1147_line1149_line1151_line1153_line1155_line1157_line1159 bus1=1160.1.2.3.4 bus2=1087.1.2.3.4 phases=4 linecode=LC6 length=31.996854 units=m
! reduced_from=line1091,line1095,line1099,line1102,line1105,line1108,line1110,line1112,line1114,line1116,line1118,line1120,line1122,line1124,line1126,line1128,line1130,line1133,line1135,line1137,line1139,line1141,line1143,line1145,line1147,line1149,line1151,line1153,line1155,line1157,line1159
! eliminated_buses=1092,1096,1100,1103,1106,1109,1111,1113,1115,1117,1119,1121,1123,1125,1127,1129,1131,1134,1136,1138,1140,1142,1144,1146,1148,1150,1152,1154,1156,1158

New Line._virtual_line1132_line1134_line1136_line1138_line1140_line1142_line1144_line1146_line1148_line1150_line1152_line1154_line1156_line1158_line1160_line1161_line1162_line1163_line1164_line1165_line1166_line1167_line1168_line1169_line1170_line1171_line1172 bus1=1173.1.2.3.4 bus2=1130.1.2.3.4 phases=4 linecode=LC6 length=19.89626 units=m
! reduced_from=line1132,line1134,line1136,line1138,line1140,line1142,line1144,line1146,line1148,line1150,line1152,line1154,line1156,line1158,line1160,line1161,line1162,line1163,line1164,line1165,line1166,line1167,line1168,line1169,line1170,line1171,line1172
! eliminated_buses=1133,1135,1137,1139,1141,1143,1145,1147,1149,1151,1153,1155,1157,1159,1161,1162,1163,1164,1165,1166,1167,1168,1169,1170,1171,1172

New Line.LINE44 bus1=41.1.2.3.4 bus2=45.1.2.3.4 phases=4 linecode=LC3 length=6.338 units=m

New Line.LINE240 bus1=230.1.2.3.4 bus2=241.1.2.3.4 phases=4 linecode=LC3 length=4.1267 units=m

New Line.LINE252 bus1=241.1.2.3.4 bus2=253.1.2.3.4 phases=4 linecode=LC3 length=4.4263 units=m

New Line.LINE263 bus1=253.1.2.3.4 bus2=264.1.2.3.4 phases=4 linecode=LC3 length=5.1279 units=m

New Line.LINE292 bus1=285.1.2.3.4 bus2=293.1.2.3.4 phases=4 linecode=LC3 length=11.9323 units=m

New Line.LINE301 bus1=293.1.2.3.4 bus2=302.1.2.3.4 phases=4 linecode=LC3 length=4.9681 units=m

New Line.LINE311 bus1=302.1.2.3.4 bus2=312.1.2.3.4 phases=4 linecode=LC3 length=2.7286 units=m

New Line.LINE323 bus1=312.1.2.3.4 bus2=324.1.2.3.4 phases=4 linecode=LC3 length=3.0986 units=m

New Line.LINE355 bus1=345.1.2.3.4 bus2=356.1.2.3.4 phases=4 linecode=LC3 length=20.6379 units=m

New Line.LINE359 bus1=351.1.2.3.4 bus2=360.1.2.3.4 phases=4 linecode=LC6 length=6.8092 units=m

New Line.LINE376 bus1=364.1.2.3.4 bus2=377.1.2.3.4 phases=4 linecode=LC2 length=3.9189 units=m

New Line.LINE398 bus1=382.1.2.3.4 bus2=399.1.2.3.4 phases=4 linecode=LC3 length=0.5 units=m

New Line.LINE474 bus1=458.1.2.3.4 bus2=475.1.2.3.4 phases=4 linecode=LC3 length=5.6644 units=m

New Line.LINE492 bus1=475.1.2.3.4 bus2=493.1.2.3.4 phases=4 linecode=LC3 length=10.3465 units=m

New Line.LINE512 bus1=493.1.2.3.4 bus2=513.1.2.3.4 phases=4 linecode=LC3 length=7.6963 units=m

New Line.LINE513 bus1=493.1.2.3.4 bus2=514.1.2.3.4 phases=4 linecode=LC3 length=3.8552 units=m

New Line.LINE533 bus1=513.1.2.3.4 bus2=534.1.2.3.4 phases=4 linecode=LC3 length=7.9429 units=m

New Line.LINE534 bus1=513.1.2.3.4 bus2=535.1.2.3.4 phases=4 linecode=LC3 length=14.7834 units=m

New Line.LINE557 bus1=535.1.2.3.4 bus2=558.1.2.3.4 phases=4 linecode=LC3 length=9.914 units=m

New Line.LINE579 bus1=558.1.2.3.4 bus2=580.1.2.3.4 phases=4 linecode=LC3 length=5.8846 units=m

New Line.LINE603 bus1=580.1.2.3.4 bus2=604.1.2.3.4 phases=4 linecode=LC3 length=11.3694 units=m

New Line.LINE604 bus1=580.1.2.3.4 bus2=605.1.2.3.4 phases=4 linecode=LC3 length=16.2218 units=m

New Line.LINE671 bus1=650.1.2.3.4 bus2=672.1.2.3.4 phases=4 linecode=LC3 length=4.4303 units=m

New Line.LINE672 bus1=650.1.2.3.4 bus2=673.1.2.3.4 phases=4 linecode=LC3 length=1.8822 units=m

New Line.LINE693 bus1=672.1.2.3.4 bus2=694.1.2.3.4 phases=4 linecode=LC3 length=4.6043 units=m

New Line.LINE728 bus1=712.1.2.3.4 bus2=729.1.2.3.4 phases=4 linecode=LC6 length=7.1795 units=m

New Line.LINE743 bus1=729.1.2.3.4 bus2=744.1.2.3.4 phases=4 linecode=LC6 length=5.1264 units=m

New Line.LINE778 bus1=771.1.2.3.4 bus2=779.1.2.3.4 phases=4 linecode=LC2 length=1.6954 units=m

New Line.LINE779 bus1=771.1.2.3.4 bus2=780.1.2.3.4 phases=4 linecode=LC2 length=6.505 units=m

New Line.LINE917 bus1=912.1.2.3.4 bus2=918.1.2.3.4 phases=4 linecode=LC2 length=7.106 units=m

New Line.LINE918 bus1=912.1.2.3.4 bus2=919.1.2.3.4 phases=4 linecode=LC2 length=2.8241 units=m

New Line.LINE939 bus1=935.1.2.3.4 bus2=940.1.2.3.4 phases=4 linecode=LC6 length=3.6261 units=m

New Line.LINE966 bus1=963.1.2.3.4 bus2=967.1.2.3.4 phases=4 linecode=LC6 length=5.804 units=m

New Line.LINE1018 bus1=1012.1.2.3.4 bus2=1019.1.2.3.4 phases=4 linecode=LC6 length=2.5216 units=m

New Line.LINE1090 bus1=1087.1.2.3.4 bus2=1091.1.2.3.4 phases=4 linecode=LC6 length=4.8799 units=m

New Line.LINE1131 bus1=1130.1.2.3.4 bus2=1132.1.2.3.4 phases=4 linecode=LC6 length=3.1341 units=m
