! Reduced enabled lines.

New Line._virtual_line0_line1_line2_line3_line4_line5_line6_line7_line8_line9_line10_line11_line12_line13_line14_line15_line16_line17_line18_line19_line20_line21_line22_line23_line24_line25_line26_line27_line28_line29_line30_line31_line32_line33_line34_line35_line36_line37_line38_line39_line40_line41_line42_line43_line44_line45_line46_line47_line48_line49_line50_line51_line52_line53_line54_line55_line56_line57 bus1=58.1.2.3.4 bus2=sourcebus.1.2.3.4 phases=4 linecode=LC4 length=48.587413 units=m
! reduced_from=line0,line1,line2,line3,line4,line5,line6,line7,line8,line9,line10,line11,line12,line13,line14,line15,line16,line17,line18,line19,line20,line21,line22,line23,line24,line25,line26,line27,line28,line29,line30,line31,line32,line33,line34,line35,line36,line37,line38,line39,line40,line41,line42,line43,line44,line45,line46,line47,line48,line49,line50,line51,line52,line53,line54,line55,line56,line57
! eliminated_buses=1,2,3,4,5,6,7,8,9,10,11,12,13,14,15,16,17,18,19,20,21,22,23,24,25,26,27,28,29,30,31,32,33,34,35,36,37,38,39,40,41,42,43,44,45,46,47,48,49,50,51,52,53,54,55,56,57

New Line._virtual_line59_line60_line61_line62_line63_line64_line65_line66_line67_line68_line69_line71_line73_line76_line79 bus1=80.1.2.3.4 bus2=58.1.2.3.4 phases=4 linecode=LC4 length=34.53713 units=m
! reduced_from=line59,line60,line61,line62,line63,line64,line65,line66,line67,line68,line69,line71,line73,line76,line79
! eliminated_buses=60,61,62,63,64,65,66,67,68,69,70,72,74,77

New Line._virtual_line82_line86 bus1=80.1.2.3.4 bus2=87.1.2.3.4 phases=4 linecode=LC6 length=14.0204 units=m
! reduced_from=line82,line86
! eliminated_buses=83

New Line._virtual_line83_line88_line92 bus1=80.1.2.3.4 bus2=93.1.2.3.4 phases=4 linecode=LC4 length=12.5048 units=m
! reduced_from=line83,line88,line92
! eliminated_buses=84,89

New Line._virtual_line96_line101_line106_line112_line119_line125_line131_line137_line144_line152_line159_line166_line174_line183_line192_line200_line207_line215 bus1=216.1.2.3.4 bus2=93.1.2.3.4 phases=4 linecode=LC1 length=19.480289 units=m
! reduced_from=line96,line101,line106,line112,line119,line125,line131,line137,line144,line152,line159,line166,line174,line183,line192,line200,line207,line215
! eliminated_buses=97,102,107,113,120,126,132,138,145,153,160,167,175,184,193,201,208

New Line._virtual_line97_line102 bus1=103.1.2.3.4 bus2=93.1.2.3.4 phases=4 linecode=LC4 length=8.0908 units=m
! reduced_from=line97,line102
! eliminated_buses=98

New Line._virtual_line108_line115 bus1=116.1.2.3.4 bus2=103.1.2.3.4 phases=4 linecode=LC4 length=18.1502 units=m
! reduced_from=line108,line115
! eliminated_buses=109

New Line._virtual_line114_line120_line126_line132_line138_line145_line153_line160_line167_line175_line184_line193 bus1=194.1.2.3.4 bus2=108.1.2.3.4 phases=4 linecode=LC6 length=10.30238 units=m
! reduced_from=line114,line120,line126,line132,line138,line145,line153,line160,line167,line175,line184,line193
! eliminated_buses=115,121,127,133,139,146,154,161,168,176,185

New Line._virtual_line121_line127 bus1=128.1.2.3.4 bus2=116.1.2.3.4 phases=4 linecode=LC6 length=13.7215 units=m
! reduced_from=line121,line127
! eliminated_buses=122

New Line._virtual_line122_line128_line133 bus1=116.1.2.3.4 bus2=134.1.2.3.4 phases=4 linecode=LC4 length=10.0317 units=m
! reduced_from=line122,line128,line133
! eliminated_buses=123,129

New Line._virtual_line139_line146_line154_line161_line168_line176_line185_line194_line201_line208_line216_line222_line229_line236_line243_line252_line260_line268_line275_line283_line291 bus1=292.1.2.3.4 bus2=134.1.2.3.4 phases=4 linecode=LC1 length=16.359407 units=m
! reduced_from=line139,line146,line154,line161,line168,line176,line185,line194,line201,line208,line216,line222,line229,line236,line243,line252,line260,line268,line275,line283,line291
! eliminated_buses=140,147,155,162,169,177,186,195,202,209,217,223,230,237,244,253,261,269,276,284

New Line._virtual_line147_line155 bus1=156.1.2.3.4 bus2=141.1.2.3.4 phases=4 linecode=LC6 length=13.9099 units=m
! reduced_from=line147,line155
! eliminated_buses=148

New Line._virtual_line148_line156_line163 bus1=141.1.2.3.4 bus2=164.1.2.3.4 phases=4 linecode=LC4 length=8.6591 units=m
! reduced_from=line148,line156,line163
! eliminated_buses=149,157

New Line._virtual_line171_line180_line189_line198_line205_line213_line220_line227_line235_line242_line251_line259_line267_line274_line282_line290_line299_line305_line311_line316_line320 bus1=321.1.2.3.4 bus2=164.1.2.3.4 phases=4 linecode=LC1 length=17.168832 units=m
! reduced_from=line171,line180,line189,line198,line205,line213,line220,line227,line235,line242,line251,line259,line267,line274,line282,line290,line299,line305,line311,line316,line320
! eliminated_buses=172,181,190,199,206,214,221,228,236,243,252,260,268,275,283,291,300,306,312,317

New Line._virtual_line178_line187 bus1=171.1.2.3.4 bus2=188.1.2.3.4 phases=4 linecode=LC4 length=6.5219 units=m
! reduced_from=line178,line187
! eliminated_buses=179

New Line._virtual_line179_line188 bus1=171.1.2.3.4 bus2=189.1.2.3.4 phases=4 linecode=LC6 length=12.978 units=m
! reduced_from=line179,line188
! eliminated_buses=180

New Line._virtual_line196_line203_line211_line219 bus1=188.1.2.3.4 bus2=220.1.2.3.4 phases=4 linecode=LC4 length=8.8014 units=m
! reduced_from=line196,line203,line211,line219
! eliminated_buses=197,204,212

New Line._virtual_line197_line204_line212 bus1=213.1.2.3.4 bus2=188.1.2.3.4 phases=4 linecode=LC6 length=13.1159 units=m
! reduced_from=line197,line204,line212
! eliminated_buses=198,205

New Line._virtual_line225_line232 bus1=233.1.2.3.4 bus2=220.1.2.3.4 phases=4 linecode=LC6 length=14.0342 units=m
! reduced_from=line225,line232
! eliminated_buses=226

New Line._virtual_line239_line246 bus1=234.1.2.3.4 bus2=247.1.2.3.4 phases=4 linecode=LC4 length=7.3582 units=m
! reduced_from=line239,line246
! eliminated_buses=240

New Line._virtual_line240_line247_line257_line265_line272_line280_line288_line297_line303_line309_line315_line319_line324_line328_line331_line334_line336_line338_line340_line342 bus1=234.1.2.3.4 bus2=343.1.2.3.4 phases=4 linecode=LC1 length=18.87145 units=m
! reduced_from=line240,line247,line257,line265,line272,line280,line288,line297,line303,line309,line315,line319,line324,line328,line331,line334,line336,line338,line340,line342
! eliminated_buses=241,248,258,266,273,281,289,298,304,310,316,320,325,329,332,335,337,339,341

New Line._virtual_line255_line262 bus1=247.1.2.3.4 bus2=263.1.2.3.4 phases=4 linecode=LC6 length=13.019 units=m
! reduced_from=line255,line262
! eliminated_buses=256

New Line._virtual_line256_line263_line270_line278_line286 bus1=247.1.2.3.4 bus2=287.1.2.3.4 phases=4 linecode=LC4 length=9.55374 units=m
! reduced_from=line256,line263,line270,line278,line286
! eliminated_buses=257,264,271,279

New Line._virtual_line294_line300_line306 bus1=287.1.2.3.4 bus2=307.1.2.3.4 phases=4 linecode=LC4 length=14.1022 units=m
! reduced_from=line294,line300,line306
! eliminated_buses=295,301

New Line._virtual_line295_line301_line307_line313_line318_line323_line327_line330_line333_line335_line337_line339_line341_line343_line344_line345_line346 bus1=287.1.2.3.4 bus2=347.1.2.3.4 phases=4 linecode=LC1 length=16.94679 units=m
! reduced_from=line295,line301,line307,line313,line318,line323,line327,line330,line333,line335,line337,line339,line341,line343,line344,line345,line346
! eliminated_buses=296,302,308,314,319,324,328,331,334,336,338,340,342,344,345,346

New Line._virtual_line312_line317 bus1=318.1.2.3.4 bus2=307.1.2.3.4 phases=4 linecode=LC8 length=3.1727 units=m
! reduced_from=line312,line317
! eliminated_buses=313

New Line._virtual_line321_line325_line329_line332 bus1=333.1.2.3.4 bus2=318.1.2.3.4 phases=4 linecode=LC1 length=17.8285 units=m
! reduced_from=line321,line325,line329,line332
! eliminated_buses=322,326,330

New Line.LINE58 bus1=58.1.2.3.4 bus2=59.1.2.3.4 phases=4 linecode=LC1 length=4.6979 units=m

New Line.LINE107 bus1=103.1.2.3.4 bus2=108.1.2.3.4 phases=4 linecode=LC6 length=9.3908 units=m

New Line.LINE113 bus1=108.1.2.3.4 bus2=114.1.2.3.4 phases=4 linecode=LC6 length=4.3751 units=m

New Line.LINE140 bus1=134.1.2.3.4 bus2=141.1.2.3.4 phases=4 linecode=LC4 length=7.6863 units=m

New Line.LINE170 bus1=164.1.2.3.4 bus2=171.1.2.3.4 phases=4 linecode=LC4 length=9.4965 units=m

New Line.LINE226 bus1=220.1.2.3.4 bus2=227.1.2.3.4 phases=4 linecode=LC4 length=2.9178 units=m

New Line.LINE233 bus1=227.1.2.3.4 bus2=234.1.2.3.4 phases=4 linecode=LC4 length=7.6616 units=m

New Line.LINE234 bus1=227.1.2.3.4 bus2=235.1.2.3.4 phases=4 linecode=LC1 length=1.4764 units=m
