! Reduced enabled lines.

New Line._virtual_line0_line1_line2_line3_line4_line5_line6_line7_line8_line9_line10_line11_line12_line13_line14_line15_line16_line17_line18_line19_line20_line21_line22_line23_line24_line25_line26_line27_line28_line29_line30_line31_line32_line33_line34_line35_line36_line37_line38_line39_line40_line41_line42_line43_line44_line45_line46_line47_line48_line49_line50_line51 bus1=52.1.2.3.4 bus2=sourcebus.1.2.3.4 phases=4 linecode=LC4 length=37.611572 units=m
! reduced_from=line0,line1,line2,line3,line4,line5,line6,line7,line8,line9,line10,line11,line12,line13,line14,line15,line16,line17,line18,line19,line20,line21,line22,line23,line24,line25,line26,line27,line28,line29,line30,line31,line32,line33,line34,line35,line36,line37,line38,line39,line40,line41,line42,line43,line44,line45,line46,line47,line48,line49,line50,line51
! eliminated_buses=1,2,3,4,5,6,7,8,9,10,11,12,13,14,15,16,17,18,19,20,21,22,23,24,25,26,27,28,29,30,31,32,33,34,35,36,37,38,39,40,41,42,43,44,45,46,47,48,49,50,51

New Line._virtual_line53_line56 bus1=57.1.2.3.4 bus2=52.1.2.3.4 phases=4 linecode=LC6 length=11.3919 units=m
! reduced_from=line53,line56
! eliminated_buses=54

New Line._virtual_line55_line59 bus1=60.1.2.3.4 bus2=53.1.2.3.4 phases=4 linecode=LC6 length=11.1266 units=m
! reduced_from=line55,line59
! eliminated_buses=56

New Line._virtual_line57_line60 bus1=61.1.2.3.4 bus2=55.1.2.3.4 phases=4 linecode=LC4 length=10.191 units=m
! reduced_from=line57,line60
! eliminated_buses=58

New Line._virtual_line58_line62 bus1=63.1.2.3.4 bus2=55.1.2.3.4 phases=4 linecode=LC6 length=12.0986 units=m
! reduced_from=line58,line62
! eliminated_buses=59

New Line._virtual_line64_line68 bus1=69.1.2.3.4 bus2=61.1.2.3.4 phases=4 linecode=LC6 length=11.5378 units=m
! reduced_from=line64,line68
! eliminated_buses=65

New Line._virtual_line70_line75_line80_line83 bus1=84.1.2.3.4 bus2=67.1.2.3.4 phases=4 linecode=LC4 length=10.21753 units=m
! reduced_from=line70,line75,line80,line83
! eliminated_buses=71,76,81

New Line._virtual_line71_line76 bus1=67.1.2.3.4 bus2=77.1.2.3.4 phases=4 linecode=LC6 length=11.2685 units=m
! reduced_from=line71,line76
! eliminated_buses=72

New Line._virtual_line72_line77_line81_line84_line88_line92_line95_line99_line103_line106_line109_line112_line115 bus1=116.1.2.3.4 bus2=68.1.2.3.4 phases=4 linecode=LC6 length=18.58766 units=m
! reduced_from=line72,line77,line81,line84,line88,line92,line95,line99,line103,line106,line109,line112,line115
! eliminated_buses=73,78,82,85,89,93,96,100,104,107,110,113

New Line._virtual_line73_line78 bus1=68.1.2.3.4 bus2=79.1.2.3.4 phases=4 linecode=LC6 length=8.9769 units=m
! reduced_from=line73,line78
! eliminated_buses=74

New Line._virtual_line86_line90_line94 bus1=84.1.2.3.4 bus2=95.1.2.3.4 phases=4 linecode=LC4 length=6.1317 units=m
! reduced_from=line86,line90,line94
! eliminated_buses=87,91

New Line._virtual_line87_line91 bus1=92.1.2.3.4 bus2=84.1.2.3.4 phases=4 linecode=LC6 length=11.6931 units=m
! reduced_from=line87,line91
! eliminated_buses=88

New Line._virtual_line97_line101_line105_line108_line111_line114_line117_line120_line122 bus1=95.1.2.3.4 bus2=123.1.2.3.4 phases=4 linecode=LC4 length=10.17705 units=m
! reduced_from=line97,line101,line105,line108,line111,line114,line117,line120,line122
! eliminated_buses=98,102,106,109,112,115,118,121

New Line._virtual_line98_line102 bus1=103.1.2.3.4 bus2=95.1.2.3.4 phases=4 linecode=LC6 length=11.8349 units=m
! reduced_from=line98,line102
! eliminated_buses=99

New Line._virtual_line124_line127_line130_line132_line134 bus1=123.1.2.3.4 bus2=135.1.2.3.4 phases=4 linecode=LC4 length=9.63275 units=m
! reduced_from=line124,line127,line130,line132,line134
! eliminated_buses=125,128,131,133

New Line._virtual_line125_line128 bus1=123.1.2.3.4 bus2=129.1.2.3.4 phases=4 linecode=LC6 length=11.5797 units=m
! reduced_from=line125,line128
! eliminated_buses=126

New Line._virtual_line136_line139_line142_line145_line149_line153_line158_line162_line166_line170_line174_line179_line184_line189_line194_line198_line203_line209_line216_line222_line228_line234_line239_line244_line247_line250 bus1=251.1.2.3.4 bus2=135.1.2.3.4 phases=4 linecode=LC6 length=13.59658 units=m
! reduced_from=line136,line139,line142,line145,line149,line153,line158,line162,line166,line170,line174,line179,line184,line189,line194,line198,line203,line209,line216,line222,line228,line234,line239,line244,line247,line250
! eliminated_buses=137,140,143,146,150,154,159,163,167,171,175,180,185,190,195,199,204,210,217,223,229,235,240,245,248

New Line._virtual_line137_line140_line143_line147_line151 bus1=152.1.2.3.4 bus2=135.1.2.3.4 phases=4 linecode=LC4 length=8.54389 units=m
! reduced_from=line137,line140,line143,line147,line151
! eliminated_buses=138,141,144,148

New Line._virtual_line155_line160_line164_line168_line172_line176_line181_line185_line190_line195_line199_line204_line210_line217_line223_line229 bus1=152.1.2.3.4 bus2=230.1.2.3.4 phases=4 linecode=LC6 length=15.370298 units=m
! reduced_from=line155,line160,line164,line168,line172,line176,line181,line185,line190,line195,line199,line204,line210,line217,line223,line229
! eliminated_buses=156,161,165,169,173,177,182,186,191,196,200,205,211,218,224

New Line._virtual_line156_line161_line165_line169_line173 bus1=174.1.2.3.4 bus2=152.1.2.3.4 phases=4 linecode=LC4 length=8.84602 units=m
! reduced_from=line156,line161,line165,line169,line173
! eliminated_buses=157,162,166,170

New Line._virtual_line177_line182_line186_line191_line196_line200_line205_line211_line218_line224_line230_line235_line240_line245_line248_line251_line253_line255_line258_line261_line265_line269_line273_line277_line280_line283_line286 bus1=287.1.2.3.4 bus2=174.1.2.3.4 phases=4 linecode=LC6 length=13.54415 units=m
! reduced_from=line177,line182,line186,line191,line196,line200,line205,line211,line218,line224,line230,line235,line240,line245,line248,line251,line253,line255,line258,line261,line265,line269,line273,line277,line280,line283,line286
! eliminated_buses=178,183,187,192,197,201,206,212,219,225,231,236,241,246,249,252,254,256,259,262,266,270,274,278,281,284

New Line._virtual_line178_line183 bus1=184.1.2.3.4 bus2=174.1.2.3.4 phases=4 linecode=LC4 length=10.5406 units=m
! reduced_from=line178,line183
! eliminated_buses=179

New Line._virtual_line187_line192 bus1=193.1.2.3.4 bus2=184.1.2.3.4 phases=4 linecode=LC6 length=14.6401 units=m
! reduced_from=line187,line192
! eliminated_buses=188

New Line._virtual_line188_line193_line197_line202 bus1=203.1.2.3.4 bus2=184.1.2.3.4 phases=4 linecode=LC4 length=9.85543 units=m
! reduced_from=line188,line193,line197,line202
! eliminated_buses=189,194,198

New Line._virtual_line207_line213 bus1=203.1.2.3.4 bus2=214.1.2.3.4 phases=4 linecode=LC1 length=12.3666 units=m
! reduced_from=line207,line213
! eliminated_buses=208

New Line._virtual_line214_line220 bus1=209.1.2.3.4 bus2=221.1.2.3.4 phases=4 linecode=LC1 length=12.7261 units=m
! reduced_from=line214,line220
! eliminated_buses=215

New Line._virtual_line215_line221_line227_line233 bus1=209.1.2.3.4 bus2=234.1.2.3.4 phases=4 linecode=LC4 length=12.1973 units=m
! reduced_from=line215,line221,line227,line233
! eliminated_buses=216,222,228

New Line._virtual_line237_line242 bus1=243.1.2.3.4 bus2=234.1.2.3.4 phases=4 linecode=LC1 length=13.3407 units=m
! reduced_from=line237,line242
! eliminated_buses=238

New Line._virtual_line238_line243_line246_line249_line252_line254_line256_line259 bus1=234.1.2.3.4 bus2=260.1.2.3.4 phases=4 linecode=LC4 length=2.00397 units=m
! reduced_from=line238,line243,line246,line249,line252,line254,line256,line259
! eliminated_buses=239,244,247,250,253,255,257

New Line._virtual_line262_line266 bus1=267.1.2.3.4 bus2=260.1.2.3.4 phases=4 linecode=LC1 length=13.857 units=m
! reduced_from=line262,line266
! eliminated_buses=263

New Line._virtual_line263_line267 bus1=260.1.2.3.4 bus2=268.1.2.3.4 phases=4 linecode=LC4 length=9.8702 units=m
! reduced_from=line263,line267
! eliminated_buses=264

New Line._virtual_line270_line274 bus1=268.1.2.3.4 bus2=275.1.2.3.4 phases=4 linecode=LC1 length=14.8992 units=m
! reduced_from=line270,line274
! eliminated_buses=271

New Line._virtual_line271_line275_line278_line281_line284_line287_line289_line291 bus1=292.1.2.3.4 bus2=268.1.2.3.4 phases=4 linecode=LC4 length=6.63116 units=m
! reduced_from=line271,line275,line278,line281,line284,line287,line289,line291
! eliminated_buses=272,276,279,282,285,288,290

New Line._virtual_line293_line296 bus1=292.1.2.3.4 bus2=297.1.2.3.4 phases=4 linecode=LC1 length=9.9731 units=m
! reduced_from=line293,line296
! eliminated_buses=294

New Line._virtual_line294_line297 bus1=292.1.2.3.4 bus2=298.1.2.3.4 phases=4 linecode=LC4 length=8.4114 units=m
! reduced_from=line294,line297
! eliminated_buses=295

New Line._virtual_line299_line302 bus1=298.1.2.3.4 bus2=303.1.2.3.4 phases=4 linecode=LC1 length=10.2928 units=m
! reduced_from=line299,line302
! eliminated_buses=300

New Line._virtual_line300_line303 bus1=298.1.2.3.4 bus2=304.1.2.3.4 phases=4 linecode=LC4 length=9.448 units=m
! reduced_from=line300,line303
! eliminated_buses=301

New Line._virtual_line305_line308 bus1=309.1.2.3.4 bus2=304.1.2.3.4 phases=4 linecode=LC1 length=10.3554 units=m
! reduced_from=line305,line308
! eliminated_buses=306

New Line._virtual_line309_line312 bus1=307.1.2.3.4 bus2=313.1.2.3.4 phases=4 linecode=LC1 length=12.1206 units=m
! reduced_from=line309,line312
! eliminated_buses=310

New Line.LINE52 bus1=52.1.2.3.4 bus2=53.1.2.3.4 phases=4 linecode=LC4 length=10.5984 units=m

New Line.LINE54 bus1=53.1.2.3.4 bus2=55.1.2.3.4 phases=4 linecode=LC4 length=6.5193 units=m

New Line.LINE63 bus1=61.1.2.3.4 bus2=64.1.2.3.4 phases=4 linecode=LC4 length=5.7073 units=m

New Line.LINE66 bus1=64.1.2.3.4 bus2=67.1.2.3.4 phases=4 linecode=LC4 length=0.72801 units=m

New Line.LINE67 bus1=64.1.2.3.4 bus2=68.1.2.3.4 phases=4 linecode=LC6 length=11.0414 units=m

New Line.LINE208 bus1=203.1.2.3.4 bus2=209.1.2.3.4 phases=4 linecode=LC4 length=7.2754 units=m

New Line.LINE306 bus1=304.1.2.3.4 bus2=307.1.2.3.4 phases=4 linecode=LC4 length=6.6734 units=m
