! Reduced enabled lines.

New Line._virtual_line0_line1_line2_line3_line4_line5_line6_line7_line8_line9_line10_line11_line12_line13_line14_line15_line16_line17_line18_line19_line20_line21_line22_line23_line24_line25_line26_line27_line28_line29_line30_line31_line32_line33_line34_line35_line36_line37_line38_line39_line40_line41 bus1=sourcebus.1.2.3.4 bus2=42.1.2.3.4 phases=4 linecode=LC8 length=29.181136 units=m
! reduced_from=line0,line1,line2,line3,line4,line5,line6,line7,line8,line9,line10,line11,line12,line13,line14,line15,line16,line17,line18,line19,line20,line21,line22,line23,line24,line25,line26,line27,line28,line29,line30,line31,line32,line33,line34,line35,line36,line37,line38,line39,line40,line41
! eliminated_buses=1,2,3,4,5,6,7,8,9,10,11,12,13,14,15,16,17,18,19,20,21,22,23,24,25,26,27,28,29,30,31,32,33,34,35,36,37,38,39,40,41

New Line._virtual_line42_line44_line48_line53_line59_line65_line71_line78_line84_line90_line96_line103_line112_line120_line129_line137_line145_line153_line161_line169_line178_line190 bus1=191.1.2.3.4 bus2=42.1.2.3.4 phases=4 linecode=LC8 length=70.8383 units=m
! reduced_from=line42,line44,line48,line53,line59,line65,line71,line78,line84,line90,line96,line103,line112,line120,line129,line137,line145,line153,line161,line169,line178,line190
! eliminated_buses=43,45,49,54,60,66,72,79,85,91,97,104,113,121,130,138,146,154,162,170,179

New Line._virtual_line46_line51_line57_line63_line68_line74_line81_line87_line93 bus1=94.1.2.3.4 bus2=44.1.2.3.4 phases=4 linecode=LC8 length=35.609755 units=m
! reduced_from=line46,line51,line57,line63,line68,line74,line81,line87,line93
! eliminated_buses=47,52,58,64,69,75,82,88

New Line._virtual_line47_line52_line58_line64_line69_line76_line82_line89_line95_line102_line110_line118_line125_line135_line144_line152_line160_line168_line176_line188_line199_line211_line223_line236_line246_line254_line265_line276_line287_line298_line311 bus1=312.1.2.3.4 bus2=44.1.2.3.4 phases=4 linecode=LC9 length=17.0332 units=m
! reduced_from=line47,line52,line58,line64,line69,line76,line82,line89,line95,line102,line110,line118,line125,line135,line144,line152,line160,line168,line176,line188,line199,line211,line223,line236,line246,line254,line265,line276,line287,line298,line311
! eliminated_buses=48,53,59,65,70,77,83,90,96,103,111,119,126,136,145,153,161,169,177,189,200,212,224,237,247,255,266,277,288,299

New Line._virtual_line99_line106_line114_line121_line130_line138_line146 bus1=94.1.2.3.4 bus2=147.1.2.3.4 phases=4 linecode=LC8 length=12.92587 units=m
! reduced_from=line99,line106,line114,line121,line130,line138,line146
! eliminated_buses=100,107,115,122,131,139

New Line._virtual_line100_line109_line117_line124_line134_line143_line151_line159_line167_line175 bus1=94.1.2.3.4 bus2=176.1.2.3.4 phases=4 linecode=LC9 length=37.3564 units=m
! reduced_from=line100,line109,line117,line124,line134,line143,line151,line159,line167,line175
! eliminated_buses=101,110,118,125,135,144,152,160,168

New Line._virtual_line154_line162_line170_line179 bus1=180.1.2.3.4 bus2=147.1.2.3.4 phases=4 linecode=LC8 length=10.31316 units=m
! reduced_from=line154,line162,line170,line179
! eliminated_buses=155,163,171

New Line._virtual_line155_line164_line172 bus1=147.1.2.3.4 bus2=173.1.2.3.4 phases=4 linecode=LC1 length=14.27612 units=m
! reduced_from=line155,line164,line172
! eliminated_buses=156,165

New Line._virtual_line185_line195_line207_line219_line231 bus1=232.1.2.3.4 bus2=176.1.2.3.4 phases=4 linecode=LC1 length=14.68137 units=m
! reduced_from=line185,line195,line207,line219,line231
! eliminated_buses=186,196,208,220

New Line._virtual_line191_line203 bus1=180.1.2.3.4 bus2=204.1.2.3.4 phases=4 linecode=LC8 length=3.85355 units=m
! reduced_from=line191,line203
! eliminated_buses=192

New Line._virtual_line192_line205_line217 bus1=180.1.2.3.4 bus2=218.1.2.3.4 phases=4 linecode=LC1 length=11.58618 units=m
! reduced_from=line192,line205,line217
! eliminated_buses=193,206

New Line._virtual_line197_line209_line221_line233_line245 bus1=246.1.2.3.4 bus2=188.1.2.3.4 phases=4 linecode=LC1 length=12.81761 units=m
! reduced_from=line197,line209,line221,line233,line245
! eliminated_buses=198,210,222,234

New Line._virtual_line198_line210_line222 bus1=223.1.2.3.4 bus2=188.1.2.3.4 phases=4 linecode=LC1 length=6.14233 units=m
! reduced_from=line198,line210,line222
! eliminated_buses=199,211

New Line._virtual_line200_line212_line224_line237_line247 bus1=248.1.2.3.4 bus2=191.1.2.3.4 phases=4 linecode=LC8 length=5.66652 units=m
! reduced_from=line200,line212,line224,line237,line247
! eliminated_buses=201,213,225,238

New Line._virtual_line201_line213_line225_line238_line248_line260_line271_line282_line293_line304_line317_line331 bus1=191.1.2.3.4 bus2=332.1.2.3.4 phases=4 linecode=LC2 length=12.19202 units=m
! reduced_from=line201,line213,line225,line238,line248,line260,line271,line282,line293,line304,line317,line331
! eliminated_buses=202,214,226,239,249,261,272,283,294,305,318

New Line._virtual_line202_line214_line226_line239_line249_line261_line272_line283_line294_line305_line318_line332_line346_line360_line374_line388_line404_line418_line430_line438_line451_line464_line477_line490_line503 bus1=191.1.2.3.4 bus2=504.1.2.3.4 phases=4 linecode=LC2 length=22.844625 units=m
! reduced_from=line202,line214,line226,line239,line249,line261,line272,line283,line294,line305,line318,line332,line346,line360,line374,line388,line404,line418,line430,line438,line451,line464,line477,line490,line503
! eliminated_buses=203,215,227,240,250,262,273,284,295,306,319,333,347,361,375,389,405,419,431,439,452,465,478,491

New Line._virtual_line215_line227 bus1=228.1.2.3.4 bus2=204.1.2.3.4 phases=4 linecode=LC8 length=5.8535 units=m
! reduced_from=line215,line227
! eliminated_buses=216

New Line._virtual_line216_line229_line242 bus1=204.1.2.3.4 bus2=243.1.2.3.4 phases=4 linecode=LC1 length=13.13536 units=m
! reduced_from=line216,line229,line242
! eliminated_buses=217,230

New Line._virtual_line240_line250_line262_line274 bus1=275.1.2.3.4 bus2=228.1.2.3.4 phases=4 linecode=LC8 length=21.0889 units=m
! reduced_from=line240,line250,line262,line274
! eliminated_buses=241,251,263

New Line._virtual_line241_line252 bus1=253.1.2.3.4 bus2=228.1.2.3.4 phases=4 linecode=LC6 length=13.6738 units=m
! reduced_from=line241,line252
! eliminated_buses=242

New Line._virtual_line255_line266_line277_line288_line299_line312_line326_line341_line355_line369_line383_line399_line413_line425_line437 bus1=248.1.2.3.4 bus2=438.1.2.3.4 phases=4 linecode=LC8 length=12.70297 units=m
! reduced_from=line255,line266,line277,line288,line299,line312,line326,line341,line355,line369,line383,line399,line413,line425,line437
! eliminated_buses=256,267,278,289,300,313,327,342,356,370,384,400,414,426

New Line._virtual_line256_line267_line278_line289_line300_line313_line327_line342_line356_line370_line384_line400_line414_line426 bus1=248.1.2.3.4 bus2=427.1.2.3.4 phases=4 linecode=LC2 length=15.43631 units=m
! reduced_from=line256,line267,line278,line289,line300,line313,line327,line342,line356,line370,line384,line400,line414,line426
! eliminated_buses=257,268,279,290,301,314,328,343,357,371,385,401,415

New Line._virtual_line257_line268_line279_line290_line301_line314_line328_line343_line357_line371_line385_line401_line415_line427 bus1=248.1.2.3.4 bus2=428.1.2.3.4 phases=4 linecode=LC2 length=15.274763 units=m
! reduced_from=line257,line268,line279,line290,line301,line314,line328,line343,line357,line371,line385,line401,line415,line427
! eliminated_buses=258,269,280,291,302,315,329,344,358,372,386,402,416

New Line._virtual_line258_line269_line280_line291_line302_line315_line329_line344_line358_line372_line386_line402 bus1=403.1.2.3.4 bus2=248.1.2.3.4 phases=4 linecode=LC2 length=15.258486 units=m
! reduced_from=line258,line269,line280,line291,line302,line315,line329,line344,line358,line372,line386,line402
! eliminated_buses=259,270,281,292,303,316,330,345,359,373,387

New Line._virtual_line284_line295 bus1=296.1.2.3.4 bus2=275.1.2.3.4 phases=4 linecode=LC6 length=8.3359 units=m
! reduced_from=line284,line295
! eliminated_buses=285

New Line._virtual_line306_line319_line333_line347_line361_line375_line389_line405 bus1=406.1.2.3.4 bus2=296.1.2.3.4 phases=4 linecode=LC6 length=13.65711 units=m
! reduced_from=line306,line319,line333,line347,line361,line375,line389,line405
! eliminated_buses=307,320,334,348,362,376,390

New Line._virtual_line322_line335_line349_line363_line377 bus1=312.1.2.3.4 bus2=378.1.2.3.4 phases=4 linecode=LC2 length=14.00446 units=m
! reduced_from=line322,line335,line349,line363,line377
! eliminated_buses=323,336,350,364

New Line._virtual_line323_line337_line351_line365_line379_line395 bus1=312.1.2.3.4 bus2=396.1.2.3.4 phases=4 linecode=LC2 length=11.12817 units=m
! reduced_from=line323,line337,line351,line365,line379,line395
! eliminated_buses=324,338,352,366,380

New Line._virtual_line338_line352_line366_line380_line396_line410_line422_line434_line442_line455_line468_line481_line494_line507_line519_line531_line543_line555_line567_line581 bus1=325.1.2.3.4 bus2=582.1.2.3.4 phases=4 linecode=LC2 length=25.648446 units=m
! reduced_from=line338,line352,line366,line380,line396,line410,line422,line434,line442,line455,line468,line481,line494,line507,line519,line531,line543,line555,line567,line581
! eliminated_buses=339,353,367,381,397,411,423,435,443,456,469,482,495,508,520,532,544,556,568

New Line._virtual_line339_line353_line367_line381_line397_line411_line423_line435_line443_line456_line469_line482_line495_line508_line520_line532_line544_line556_line568_line582_line597_line609 bus1=610.1.2.3.4 bus2=325.1.2.3.4 phases=4 linecode=LC2 length=28.366056 units=m
! reduced_from=line339,line353,line367,line381,line397,line411,line423,line435,line443,line456,line469,line482,line495,line508,line520,line532,line544,line556,line568,line582,line597,line609
! eliminated_buses=340,354,368,382,398,412,424,436,444,457,470,483,496,509,521,533,545,557,569,583,598

New Line._virtual_line340_line354_line368_line382_line398_line412_line424_line436_line444_line457_line470_line483_line496_line509_line521_line533_line545_line557_line569_line583_line598_line610_line621_line631_line641_line653_line664_line674_line687_line699 bus1=700.1.2.3.4 bus2=325.1.2.3.4 phases=4 linecode=LC9 length=21.119062 units=m
! reduced_from=line340,line354,line368,line382,line398,line412,line424,line436,line444,line457,line470,line483,line496,line509,line521,line533,line545,line557,line569,line583,line598,line610,line621,line631,line641,line653,line664,line674,line687,line699
! eliminated_buses=341,355,369,383,399,413,425,437,445,458,471,484,497,510,522,534,546,558,570,584,599,611,622,632,642,654,665,675,688

New Line._virtual_line392_line406_line419_line431_line439_line452_line465_line478_line491_line504_line516_line528_line540_line552_line564_line578_line592_line606_line617 bus1=378.1.2.3.4 bus2=618.1.2.3.4 phases=4 linecode=LC2 length=7.76513 units=m
! reduced_from=line392,line406,line419,line431,line439,line452,line465,line478,line491,line504,line516,line528,line540,line552,line564,line578,line592,line606,line617
! eliminated_buses=393,407,420,432,440,453,466,479,492,505,517,529,541,553,565,579,593,607

New Line._virtual_line408_line421_line433_line441_line454_line467_line480_line493_line506_line518_line530_line542_line554_line566_line580_line594 bus1=396.1.2.3.4 bus2=595.1.2.3.4 phases=4 linecode=LC2 length=17.869674 units=m
! reduced_from=line408,line421,line433,line441,line454,line467,line480,line493,line506,line518,line530,line542,line554,line566,line580,line594
! eliminated_buses=409,422,434,442,455,468,481,494,507,519,531,543,555,567,581

New Line._virtual_line445_line458_line471_line484_line497_line510_line522_line534_line546_line558 bus1=559.1.2.3.4 bus2=438.1.2.3.4 phases=4 linecode=LC2 length=13.24931 units=m
! reduced_from=line445,line458,line471,line484,line497,line510,line522,line534,line546,line558
! eliminated_buses=446,459,472,485,498,511,523,535,547

New Line._virtual_line447_line460_line473_line486_line499_line512_line524_line536_line548_line560 bus1=438.1.2.3.4 bus2=561.1.2.3.4 phases=4 linecode=LC8 length=9.86767 units=m
! reduced_from=line447,line460,line473,line486,line499,line512,line524,line536,line548,line560
! eliminated_buses=448,461,474,487,500,513,525,537,549

New Line._virtual_line449_line462_line475_line488_line501_line514_line526_line538_line550_line562_line576_line590_line604_line615_line627_line637_line649 bus1=438.1.2.3.4 bus2=650.1.2.3.4 phases=4 linecode=LC2 length=13.99054 units=m
! reduced_from=line449,line462,line475,line488,line501,line514,line526,line538,line550,line562,line576,line590,line604,line615,line627,line637,line649
! eliminated_buses=450,463,476,489,502,515,527,539,551,563,577,591,605,616,628,638

New Line._virtual_line572_line586_line600_line611_line622_line632_line642_line654_line665_line675_line688 bus1=561.1.2.3.4 bus2=689.1.2.3.4 phases=4 linecode=LC2 length=11.44166 units=m
! reduced_from=line572,line586,line600,line611,line622,line632,line642,line654,line665,line675,line688
! eliminated_buses=573,587,601,612,623,633,643,655,666,676

New Line._virtual_line573_line587_line601_line612_line624_line634_line644_line656_line667_line677_line690_line702_line716_line730_line744_line759_line772_line785_line799_line815_line831_line845_line859_line873_line885_line895 bus1=561.1.2.3.4 bus2=896.1.2.3.4 phases=4 linecode=LC2 length=16.64201 units=m
! reduced_from=line573,line587,line601,line612,line624,line634,line644,line656,line667,line677,line690,line702,line716,line730,line744,line759,line772,line785,line799,line815,line831,line845,line859,line873,line885,line895
! eliminated_buses=574,588,602,613,625,635,645,657,668,678,691,703,717,731,745,760,773,786,800,816,832,846,860,874,886

New Line._virtual_line574_line588_line602_line613_line626_line636 bus1=561.1.2.3.4 bus2=637.1.2.3.4 phases=4 linecode=LC8 length=2.941506 units=m
! reduced_from=line574,line588,line602,line613,line626,line636
! eliminated_buses=575,589,603,614,627

New Line._virtual_line595_line608_line618_line629_line639_line651_line662_line672 bus1=673.1.2.3.4 bus2=582.1.2.3.4 phases=4 linecode=LC2 length=13.04493 units=m
! reduced_from=line595,line608,line618,line629,line639,line651,line662,line672
! eliminated_buses=596,609,619,630,640,652,663

New Line._virtual_line619_line630_line640_line652_line663_line673_line686_line698_line710_line724_line738_line753_line768_line781 bus1=610.1.2.3.4 bus2=782.1.2.3.4 phases=4 linecode=LC2 length=8.92902 units=m
! reduced_from=line619,line630,line640,line652,line663,line673,line686,line698,line710,line724,line738,line753,line768,line781
! eliminated_buses=620,631,641,653,664,674,687,699,711,725,739,754,769

New Line._virtual_line646_line658_line669_line679_line692_line704_line718_line732_line746_line761_line774_line787_line801_line817_line833_line847_line861_line875 bus1=637.1.2.3.4 bus2=876.1.2.3.4 phases=4 linecode=LC2 length=21.72705 units=m
! reduced_from=line646,line658,line669,line679,line692,line704,line718,line732,line746,line761,line774,line787,line801,line817,line833,line847,line861,line875
! eliminated_buses=647,659,670,680,693,705,719,733,747,762,775,788,802,818,834,848,862

New Line._virtual_line647_line659_line670 bus1=637.1.2.3.4 bus2=671.1.2.3.4 phases=4 linecode=LC8 length=3.87449 units=m
! reduced_from=line647,line659,line670
! eliminated_buses=648,660

New Line._virtual_line648_line660_line671_line685_line697_line709_line723_line737_line752_line767_line780_line793_line807_line823_line837_line851_line865 bus1=637.1.2.3.4 bus2=866.1.2.3.4 phases=4 linecode=LC2 length=21.58091 units=m
! reduced_from=line648,line660,line671,line685,line697,line709,line723,line737,line752,line767,line780,line793,line807,line823,line837,line851,line865
! eliminated_buses=649,661,672,686,698,710,724,738,753,768,781,794,808,824,838,852

New Line._virtual_line682_line695_line707_line721_line735_line750_line765_line778_line791_line805 bus1=806.1.2.3.4 bus2=671.1.2.3.4 phases=4 linecode=LC2 length=12.03274 units=m
! reduced_from=line682,line695,line707,line721,line735,line750,line765,line778,line791,line805
! eliminated_buses=683,696,708,722,736,751,766,779,792

New Line._virtual_line683_line696_line708_line722_line736_line751_line766_line779_line792_line806_line822_line836_line850_line864_line878_line889 bus1=671.1.2.3.4 bus2=890.1.2.3.4 phases=4 linecode=LC2 length=13.91562 units=m
! reduced_from=line683,line696,line708,line722,line736,line751,line766,line779,line792,line806,line822,line836,line850,line864,line878,line889
! eliminated_buses=684,697,709,723,737,752,767,780,793,807,823,837,851,865,879

New Line._virtual_line711_line725_line739_line754_line769_line782_line794_line808_line824_line838_line852_line866 bus1=700.1.2.3.4 bus2=867.1.2.3.4 phases=4 linecode=LC2 length=23.477 units=m
! reduced_from=line711,line725,line739,line754,line769,line782,line794,line808,line824,line838,line852,line866
! eliminated_buses=712,726,740,755,770,783,795,809,825,839,853

New Line._virtual_line712_line726_line740_line755_line770_line783_line795_line809_line825_line839_line853_line867_line879_line890_line900_line909_line915_line921_line928_line934_line940_line946_line952_line957_line961 bus1=700.1.2.3.4 bus2=962.1.2.3.4 phases=4 linecode=LC2 length=19.713238 units=m
! reduced_from=line712,line726,line740,line755,line770,line783,line795,line809,line825,line839,line853,line867,line879,line890,line900,line909,line915,line921,line928,line934,line940,line946,line952,line957,line961
! eliminated_buses=713,727,741,756,771,784,796,810,826,840,854,868,880,891,901,910,916,922,929,935,941,947,953,958

New Line._virtual_line713_line727_line741_line756_line771_line784 bus1=700.1.2.3.4 bus2=785.1.2.3.4 phases=4 linecode=LC9 length=13.33653 units=m
! reduced_from=line713,line727,line741,line756,line771,line784
! eliminated_buses=714,728,742,757,772

New Line._virtual_line796_line810_line826_line840_line854_line868_line880_line891_line901_line910_line916_line922_line929_line935_line941_line947 bus1=948.1.2.3.4 bus2=785.1.2.3.4 phases=4 linecode=LC2 length=10.169532 units=m
! reduced_from=line796,line810,line826,line840,line854,line868,line880,line891,line901,line910,line916,line922,line929,line935,line941,line947
! eliminated_buses=797,811,827,841,855,869,881,892,902,911,917,923,930,936,942

New Line._virtual_line797_line811_line827_line841_line855_line869_line881_line892_line902_line911_line917_line923_line930_line936_line942_line948_line955_line959_line963_line969 bus1=785.1.2.3.4 bus2=970.1.2.3.4 phases=4 linecode=LC2 length=10.599428 units=m
! reduced_from=line797,line811,line827,line841,line855,line869,line881,line892,line902,line911,line917,line923,line930,line936,line942,line948,line955,line959,line963,line969
! eliminated_buses=798,812,828,842,856,870,882,893,903,912,918,924,931,937,943,949,956,960,964

New Line._virtual_line812_line828_line842_line856_line870_line882_line893_line903_line912_line918 bus1=799.1.2.3.4 bus2=919.1.2.3.4 phases=4 linecode=LC2 length=18.36855 units=m
! reduced_from=line812,line828,line842,line856,line870,line882,line893,line903,line912,line918
! eliminated_buses=813,829,843,857,871,883,894,904,913

New Line._virtual_line813_line829_line843_line857_line871_line883 bus1=884.1.2.3.4 bus2=799.1.2.3.4 phases=4 linecode=LC2 length=28.22288 units=m
! reduced_from=line813,line829,line843,line857,line871,line883
! eliminated_buses=814,830,844,858,872

New Line._virtual_line814_line830_line844_line858_line872_line884_line894_line904_line913_line919_line926_line932_line938_line944_line950 bus1=799.1.2.3.4 bus2=951.1.2.3.4 phases=4 linecode=LC2 length=22.78835 units=m
! reduced_from=line814,line830,line844,line858,line872,line884,line894,line904,line913,line919,line926,line932,line938,line944,line950
! eliminated_buses=815,831,845,859,873,885,895,905,914,920,927,933,939,945

New Line._virtual_line924_line931_line937_line943_line949_line956_line960_line964_line970_line975 bus1=919.1.2.3.4 bus2=976.1.2.3.4 phases=4 linecode=LC2 length=6.24453 units=m
! reduced_from=line924,line931,line937,line943,line949,line956,line960,line964,line970,line975
! eliminated_buses=925,932,938,944,950,957,961,965,971

New Line._virtual_line953_line958_line962_line968_line972_line977_line982_line986_line990_line994_line998_line1002 bus1=1003.1.2.3.4 bus2=948.1.2.3.4 phases=4 linecode=LC2 length=13.97261 units=m
! reduced_from=line953,line958,line962,line968,line972,line977,line982,line986,line990,line994,line998,line1002
! eliminated_buses=954,959,963,969,973,978,983,987,991,995,999

New Line._virtual_line965_line971_line976_line981_line985_line989_line993_line997_line1001_line1005_line1008_line1011_line1014_line1017_line1020_line1023 bus1=962.1.2.3.4 bus2=1024.1.2.3.4 phases=4 linecode=LC2 length=19.096412 units=m
! reduced_from=line965,line971,line976,line981,line985,line989,line993,line997,line1001,line1005,line1008,line1011,line1014,line1017,line1020,line1023
! eliminated_buses=966,972,977,982,986,990,994,998,1002,1006,1009,1012,1015,1018,1021

New Line._virtual_line973_line978_line983_line987_line991_line995_line999_line1003_line1006_line1009_line1012_line1015_line1018_line1021_line1024_line1026_line1028 bus1=1029.1.2.3.4 bus2=970.1.2.3.4 phases=4 linecode=LC2 length=10.399433 units=m
! reduced_from=line973,line978,line983,line987,line991,line995,line999,line1003,line1006,line1009,line1012,line1015,line1018,line1021,line1024,line1026,line1028
! eliminated_buses=974,979,984,988,992,996,1000,1004,1007,1010,1013,1016,1019,1022,1025,1027

New Line._virtual_line979_line984_line988_line992_line996_line1000_line1004_line1007_line1010_line1013_line1016_line1019_line1022_line1025_line1027 bus1=1028.1.2.3.4 bus2=976.1.2.3.4 phases=4 linecode=LC2 length=16.20205 units=m
! reduced_from=line979,line984,line988,line992,line996,line1000,line1004,line1007,line1010,line1013,line1016,line1019,line1022,line1025,line1027
! eliminated_buses=980,985,989,993,997,1001,1005,1008,1011,1014,1017,1020,1023,1026

New Line.LINE43 bus1=42.1.2.3.4 bus2=44.1.2.3.4 phases=4 linecode=LC8 length=0.81192 units=m

New Line.LINE182 bus1=173.1.2.3.4 bus2=183.1.2.3.4 phases=4 linecode=LC1 length=6.7038 units=m

New Line.LINE187 bus1=176.1.2.3.4 bus2=188.1.2.3.4 phases=4 linecode=LC9 length=10.6864 units=m

New Line.LINE234 bus1=223.1.2.3.4 bus2=235.1.2.3.4 phases=4 linecode=LC1 length=4.2762 units=m

New Line.LINE235 bus1=223.1.2.3.4 bus2=236.1.2.3.4 phases=4 linecode=LC1 length=7.009 units=m

New Line.LINE244 bus1=232.1.2.3.4 bus2=245.1.2.3.4 phases=4 linecode=LC1 length=6.3425 units=m

New Line.LINE307 bus1=296.1.2.3.4 bus2=308.1.2.3.4 phases=4 linecode=LC6 length=4.5598 units=m

New Line.LINE324 bus1=312.1.2.3.4 bus2=325.1.2.3.4 phases=4 linecode=LC9 length=2.1355 units=m

New Line.LINE394 bus1=378.1.2.3.4 bus2=395.1.2.3.4 phases=4 linecode=LC2 length=8.7929 units=m

New Line.LINE409 bus1=396.1.2.3.4 bus2=410.1.2.3.4 phases=4 linecode=LC2 length=1.732 units=m

New Line.LINE416 bus1=403.1.2.3.4 bus2=417.1.2.3.4 phases=4 linecode=LC2 length=8.9042 units=m

New Line.LINE570 bus1=559.1.2.3.4 bus2=571.1.2.3.4 phases=4 linecode=LC2 length=9.5044 units=m

New Line.LINE596 bus1=582.1.2.3.4 bus2=597.1.2.3.4 phases=4 linecode=LC2 length=6.4852 units=m

New Line.LINE620 bus1=610.1.2.3.4 bus2=621.1.2.3.4 phases=4 linecode=LC2 length=4.1269 units=m

New Line.LINE661 bus1=650.1.2.3.4 bus2=662.1.2.3.4 phases=4 linecode=LC2 length=9.8407 units=m

New Line.LINE684 bus1=671.1.2.3.4 bus2=685.1.2.3.4 phases=4 linecode=LC1 length=7.8369 units=m

New Line.LINE700 bus1=689.1.2.3.4 bus2=701.1.2.3.4 phases=4 linecode=LC2 length=8.7527 units=m

New Line.LINE798 bus1=785.1.2.3.4 bus2=799.1.2.3.4 phases=4 linecode=LC9 length=5.809 units=m

New Line.LINE821 bus1=806.1.2.3.4 bus2=822.1.2.3.4 phases=4 linecode=LC2 length=8.8414 units=m

New Line.LINE899 bus1=890.1.2.3.4 bus2=900.1.2.3.4 phases=4 linecode=LC2 length=8.7274 units=m

New Line.LINE905 bus1=896.1.2.3.4 bus2=906.1.2.3.4 phases=4 linecode=LC2 length=8.9997 units=m

New Line.LINE925 bus1=919.1.2.3.4 bus2=926.1.2.3.4 phases=4 linecode=LC2 length=6.1903 units=m

New Line.LINE954 bus1=948.1.2.3.4 bus2=955.1.2.3.4 phases=4 linecode=LC2 length=5.9082 units=m

New Line.LINE966 bus1=962.1.2.3.4 bus2=967.1.2.3.4 phases=4 linecode=LC2 length=9.9404 units=m

New Line.LINE967 bus1=962.1.2.3.4 bus2=968.1.2.3.4 phases=4 linecode=LC2 length=4.4136 units=m

New Line.LINE974 bus1=970.1.2.3.4 bus2=975.1.2.3.4 phases=4 linecode=LC2 length=8.4057 units=m

New Line.LINE980 bus1=976.1.2.3.4 bus2=981.1.2.3.4 phases=4 linecode=LC2 length=5.9039 units=m
