! Reduced enabled lines.

New Line._virtual_line0_line1_line2_line3_line4_line5_line6_line7_line8_line9_line10_line11_line12_line13_line14_line15_line16_line17_line18_line19_line20_line21_line22_line23_line24_line25_line26_line27_line28_line29_line30_line31_line32_line33_line34_line35_line36_line37_line39_line41_line44_line47_line50_line53_line55_line57_line59_line61_line63_line65_line67_line70_line72 bus1=sourcebus.1.2.3.4 bus2=73.1.2.3.4 phases=4 linecode=LC4 length=137.218962 units=m
! reduced_from=line0,line1,line2,line3,line4,line5,line6,line7,line8,line9,line10,line11,line12,line13,line14,line15,line16,line17,line18,line19,line20,line21,line22,line23,line24,line25,line26,line27,line28,line29,line30,line31,line32,line33,line34,line35,line36,line37,line39,line41,line44,line47,line50,line53,line55,line57,line59,line61,line63,line65,line67,line70,line72
! eliminated_buses=1,2,3,4,5,6,7,8,9,10,11,12,13,14,15,16,17,18,19,20,21,22,23,24,25,26,27,28,29,30,31,32,33,34,35,36,37,38,40,42,45,48,51,54,56,58,60,62,64,66,68,71

New Line._virtual_line82_line84_line86_line88 bus1=89.1.2.3.4 bus2=73.1.2.3.4 phases=4 linecode=LC4 length=9.49221 units=m
! reduced_from=line82,line84,line86,line88
! eliminated_buses=83,85,87

New Line._virtual_line91_line96_line102_line108_line114_line120_line125_line130_line135_line140_line145_line150_line155_line161_line169_line177 bus1=178.1.2.3.4 bus2=89.1.2.3.4 phases=4 linecode=LC4 length=11.86336 units=m
! reduced_from=line91,line96,line102,line108,line114,line120,line125,line130,line135,line140,line145,line150,line155,line161,line169,line177
! eliminated_buses=92,97,103,109,115,121,126,131,136,141,146,151,156,162,170

New Line._virtual_line93_line98_line104_line110_line116_line122_line127_line132_line137_line142_line147 bus1=91.1.2.3.4 bus2=148.1.2.3.4 phases=4 linecode=LC2 length=53.64934 units=m
! reduced_from=line93,line98,line104,line110,line116,line122,line127,line132,line137,line142,line147
! eliminated_buses=94,99,105,111,117,123,128,133,138,143

New Line._virtual_line94_line100_line106_line112_line118_line123_line128_line133_line138_line143_line148_line153_line159_line167_line175_line183_line193 bus1=91.1.2.3.4 bus2=194.1.2.3.4 phases=4 linecode=LC2 length=9.823499 units=m
! reduced_from=line94,line100,line106,line112,line118,line123,line128,line133,line138,line143,line148,line153,line159,line167,line175,line183,line193
! eliminated_buses=95,101,107,113,119,124,129,134,139,144,149,154,160,168,176,184

New Line._virtual_line95_line101_line107_line113_line119_line124_line129_line134_line139_line144_line149_line154_line160_line168_line176 bus1=91.1.2.3.4 bus2=177.1.2.3.4 phases=4 linecode=LC2 length=21.64134 units=m
! reduced_from=line95,line101,line107,line113,line119,line124,line129,line134,line139,line144,line149,line154,line160,line168,line176
! eliminated_buses=96,102,108,114,120,125,130,135,140,145,150,155,161,169

New Line._virtual_line152_line158_line166 bus1=148.1.2.3.4 bus2=167.1.2.3.4 phases=4 linecode=LC4 length=6.82703 units=m
! reduced_from=line152,line158,line166
! eliminated_buses=153,159

New Line._virtual_line156_line162_line170_line178_line188_line198_line208 bus1=209.1.2.3.4 bus2=152.1.2.3.4 phases=4 linecode=LC4 length=8.93066 units=m
! reduced_from=line156,line162,line170,line178,line188,line198,line208
! eliminated_buses=157,163,171,179,189,199

New Line._virtual_line157_line163 bus1=164.1.2.3.4 bus2=152.1.2.3.4 phases=4 linecode=LC6 length=9.5081 units=m
! reduced_from=line157,line163
! eliminated_buses=158

New Line._virtual_line173_line181_line191_line199_line209_line221_line233_line247_line263 bus1=264.1.2.3.4 bus2=167.1.2.3.4 phases=4 linecode=LC6 length=10.10491 units=m
! reduced_from=line173,line181,line191,line199,line209,line221,line233,line247,line263
! eliminated_buses=174,182,192,200,210,222,234,248

New Line._virtual_line174_line182_line192_line201 bus1=202.1.2.3.4 bus2=167.1.2.3.4 phases=4 linecode=LC4 length=7.22311 units=m
! reduced_from=line174,line182,line192,line201
! eliminated_buses=175,183,193

New Line._virtual_line185_line194_line204_line214_line226_line239_line254_line270_line283_line295_line308_line321_line334_line347_line358 bus1=177.1.2.3.4 bus2=359.1.2.3.4 phases=4 linecode=LC2 length=15.12993 units=m
! reduced_from=line185,line194,line204,line214,line226,line239,line254,line270,line283,line295,line308,line321,line334,line347,line358
! eliminated_buses=186,195,205,215,227,240,255,271,284,296,309,322,335,348

New Line._virtual_line187_line197 bus1=198.1.2.3.4 bus2=178.1.2.3.4 phases=4 linecode=LC6 length=13.1748 units=m
! reduced_from=line187,line197
! eliminated_buses=188

New Line._virtual_line196_line207_line218_line230_line244_line260_line277_line289 bus1=187.1.2.3.4 bus2=290.1.2.3.4 phases=4 linecode=LC6 length=13.60995 units=m
! reduced_from=line196,line207,line218,line230,line244,line260,line277,line289
! eliminated_buses=197,208,219,231,245,261,278

New Line._virtual_line203_line213_line225_line238_line253_line269_line282_line294_line307_line320_line333 bus1=194.1.2.3.4 bus2=334.1.2.3.4 phases=4 linecode=LC2 length=11.304691 units=m
! reduced_from=line203,line213,line225,line238,line253,line269,line282,line294,line307,line320,line333
! eliminated_buses=204,214,226,239,254,270,283,295,308,321

New Line._virtual_line206_line217 bus1=196.1.2.3.4 bus2=218.1.2.3.4 phases=4 linecode=LC4 length=12.6464 units=m
! reduced_from=line206,line217
! eliminated_buses=207

New Line._virtual_line211_line223_line235_line249_line265_line278_line290_line302 bus1=303.1.2.3.4 bus2=202.1.2.3.4 phases=4 linecode=LC2 length=10.511992 units=m
! reduced_from=line211,line223,line235,line249,line265,line278,line290,line302
! eliminated_buses=212,224,236,250,266,279,291

New Line._virtual_line212_line224 bus1=225.1.2.3.4 bus2=202.1.2.3.4 phases=4 linecode=LC4 length=5.53756 units=m
! reduced_from=line212,line224
! eliminated_buses=213

New Line._virtual_line216_line229_line243_line259_line276_line288_line301_line314 bus1=206.1.2.3.4 bus2=315.1.2.3.4 phases=4 linecode=LC6 length=13.20941 units=m
! reduced_from=line216,line229,line243,line259,line276,line288,line301,line314
! eliminated_buses=217,230,244,260,277,289,302

New Line._virtual_line219_line231_line246_line262 bus1=263.1.2.3.4 bus2=209.1.2.3.4 phases=4 linecode=LC4 length=22.7564 units=m
! reduced_from=line219,line231,line246,line262
! eliminated_buses=220,232,247

New Line._virtual_line220_line232 bus1=233.1.2.3.4 bus2=209.1.2.3.4 phases=4 linecode=LC6 length=9.381 units=m
! reduced_from=line220,line232
! eliminated_buses=221

New Line._virtual_line227_line240_line255_line271_line284_line296_line309_line322_line335 bus1=336.1.2.3.4 bus2=216.1.2.3.4 phases=4 linecode=LC6 length=13.16231 units=m
! reduced_from=line227,line240,line255,line271,line284,line296,line309,line322,line335
! eliminated_buses=228,241,256,272,285,297,310,323

New Line._virtual_line228_line242 bus1=243.1.2.3.4 bus2=216.1.2.3.4 phases=4 linecode=LC4 length=5.1508 units=m
! reduced_from=line228,line242
! eliminated_buses=229

New Line._virtual_line236_line250_line266_line279_line291_line303_line315_line328_line341 bus1=342.1.2.3.4 bus2=225.1.2.3.4 phases=4 linecode=LC2 length=9.62394 units=m
! reduced_from=line236,line250,line266,line279,line291,line303,line315,line328,line341
! eliminated_buses=237,251,267,280,292,304,316,329

New Line._virtual_line237_line252_line268_line281_line293_line306 bus1=225.1.2.3.4 bus2=307.1.2.3.4 phases=4 linecode=LC4 length=9.31784 units=m
! reduced_from=line237,line252,line268,line281,line293,line306
! eliminated_buses=238,253,269,282,294

New Line._virtual_line258_line275 bus1=276.1.2.3.4 bus2=243.1.2.3.4 phases=4 linecode=LC4 length=13.442 units=m
! reduced_from=line258,line275
! eliminated_buses=259

New Line._virtual_line273_line286_line298_line311_line324_line337_line348 bus1=349.1.2.3.4 bus2=258.1.2.3.4 phases=4 linecode=LC4 length=13.79519 units=m
! reduced_from=line273,line286,line298,line311,line324,line337,line348
! eliminated_buses=274,287,299,312,325,338

New Line._virtual_line274_line287_line299_line312 bus1=313.1.2.3.4 bus2=258.1.2.3.4 phases=4 linecode=LC4 length=8.41465 units=m
! reduced_from=line274,line287,line299,line312
! eliminated_buses=275,288,300

New Line._virtual_line318_line330_line343_line353_line363_line370_line377_line383_line389_line394_line399_line405 bus1=307.1.2.3.4 bus2=406.1.2.3.4 phases=4 linecode=LC2 length=9.93218 units=m
! reduced_from=line318,line330,line343,line353,line363,line370,line377,line383,line389,line394,line399,line405
! eliminated_buses=319,331,344,354,364,371,378,384,390,395,400

New Line._virtual_line325_line338_line349_line359_line368 bus1=369.1.2.3.4 bus2=313.1.2.3.4 phases=4 linecode=LC4 length=4.85011 units=m
! reduced_from=line325,line338,line349,line359,line368
! eliminated_buses=326,339,350,360

New Line._virtual_line326_line339_line350_line360 bus1=361.1.2.3.4 bus2=313.1.2.3.4 phases=4 linecode=LC4 length=12.75626 units=m
! reduced_from=line326,line339,line350,line360
! eliminated_buses=327,340,351

New Line._virtual_line331_line344_line354_line364_line371_line378_line384_line390_line395_line400_line406 bus1=407.1.2.3.4 bus2=320.1.2.3.4 phases=4 linecode=LC2 length=3.76543 units=m
! reduced_from=line331,line344,line354,line364,line371,line378,line384,line390,line395,line400,line406
! eliminated_buses=332,345,355,365,372,379,385,391,396,401

New Line._virtual_line332_line346_line357_line367_line374_line380_line386 bus1=387.1.2.3.4 bus2=320.1.2.3.4 phases=4 linecode=LC4 length=19.77048 units=m
! reduced_from=line332,line346,line357,line367,line374,line380,line386
! eliminated_buses=333,347,358,368,375,381

New Line._virtual_line375_line381_line387_line393_line398 bus1=369.1.2.3.4 bus2=399.1.2.3.4 phases=4 linecode=LC4 length=9.142574 units=m
! reduced_from=line375,line381,line387,line393,line398
! eliminated_buses=376,382,388,394

New Line._virtual_line376_line382_line388 bus1=369.1.2.3.4 bus2=389.1.2.3.4 phases=4 linecode=LC4 length=12.08425 units=m
! reduced_from=line376,line382,line388
! eliminated_buses=377,383

New Line._virtual_line392_line397_line402_line409 bus1=410.1.2.3.4 bus2=387.1.2.3.4 phases=4 linecode=LC4 length=9.6645 units=m
! reduced_from=line392,line397,line402,line409
! eliminated_buses=393,398,403

New Line._virtual_line412_line421_line428_line436_line445_line455_line465_line476 bus1=477.1.2.3.4 bus2=405.1.2.3.4 phases=4 linecode=LC4 length=12.86968 units=m
! reduced_from=line412,line421,line428,line436,line445,line455,line465,line476
! eliminated_buses=413,422,429,437,446,456,466

New Line._virtual_line413_line422 bus1=405.1.2.3.4 bus2=423.1.2.3.4 phases=4 linecode=LC4 length=2.30047 units=m
! reduced_from=line413,line422
! eliminated_buses=414

New Line._virtual_line419_line425_line433_line441_line450_line460_line470_line480 bus1=410.1.2.3.4 bus2=481.1.2.3.4 phases=4 linecode=LC6 length=4.28966 units=m
! reduced_from=line419,line425,line433,line441,line450,line460,line470,line480
! eliminated_buses=420,426,434,442,451,461,471

New Line._virtual_line426_line434_line442_line451_line461_line471_line481_line492_line501_line511 bus1=421.1.2.3.4 bus2=512.1.2.3.4 phases=4 linecode=LC6 length=10.304217 units=m
! reduced_from=line426,line434,line442,line451,line461,line471,line481,line492,line501,line511
! eliminated_buses=427,435,443,452,462,472,482,493,502

New Line._virtual_line427_line435 bus1=421.1.2.3.4 bus2=436.1.2.3.4 phases=4 linecode=LC4 length=7.6225 units=m
! reduced_from=line427,line435
! eliminated_buses=428

New Line._virtual_line429_line437 bus1=423.1.2.3.4 bus2=438.1.2.3.4 phases=4 linecode=LC4 length=12.7618 units=m
! reduced_from=line429,line437
! eliminated_buses=430

New Line._virtual_line438_line446 bus1=447.1.2.3.4 bus2=431.1.2.3.4 phases=4 linecode=LC4 length=11.8535 units=m
! reduced_from=line438,line446
! eliminated_buses=439

New Line._virtual_line443_line452_line462_line472_line482_line493_line502 bus1=503.1.2.3.4 bus2=436.1.2.3.4 phases=4 linecode=LC6 length=9.92593 units=m
! reduced_from=line443,line452,line462,line472,line482,line493,line502
! eliminated_buses=444,453,463,473,483,494

New Line._virtual_line447_line456 bus1=457.1.2.3.4 bus2=440.1.2.3.4 phases=4 linecode=LC4 length=12.6922 units=m
! reduced_from=line447,line456
! eliminated_buses=448

New Line._virtual_line448_line458_line467_line478_line488_line499_line509_line519_line527_line535_line544_line554 bus1=555.1.2.3.4 bus2=440.1.2.3.4 phases=4 linecode=LC4 length=20.2759 units=m
! reduced_from=line448,line458,line467,line478,line488,line499,line509,line519,line527,line535,line544,line554
! eliminated_buses=449,459,468,479,489,500,510,520,528,536,545

New Line._virtual_line453_line463_line473_line483_line494_line503_line512 bus1=445.1.2.3.4 bus2=513.1.2.3.4 phases=4 linecode=LC6 length=10.18797 units=m
! reduced_from=line453,line463,line473,line483,line494,line503,line512
! eliminated_buses=454,464,474,484,495,504

New Line._virtual_line454_line464_line475 bus1=476.1.2.3.4 bus2=445.1.2.3.4 phases=4 linecode=LC4 length=8.4115 units=m
! reduced_from=line454,line464,line475
! eliminated_buses=455,465

New Line._virtual_line485_line496_line505_line514_line522_line529_line537_line546_line556_line563_line571_line579 bus1=580.1.2.3.4 bus2=476.1.2.3.4 phases=4 linecode=LC6 length=9.68686 units=m
! reduced_from=line485,line496,line505,line514,line522,line529,line537,line546,line556,line563,line571,line579
! eliminated_buses=486,497,506,515,523,530,538,547,557,564,572

New Line._virtual_line486_line497 bus1=498.1.2.3.4 bus2=476.1.2.3.4 phases=4 linecode=LC4 length=7.7528 units=m
! reduced_from=line486,line497
! eliminated_buses=487

New Line._virtual_line506_line515_line523_line530_line538_line547_line557 bus1=498.1.2.3.4 bus2=558.1.2.3.4 phases=4 linecode=LC6 length=10.20118 units=m
! reduced_from=line506,line515,line523,line530,line538,line547,line557
! eliminated_buses=507,516,524,531,539,548

New Line._virtual_line516_line524_line531_line539_line548_line558_line564 bus1=565.1.2.3.4 bus2=508.1.2.3.4 phases=4 linecode=LC6 length=10.40893 units=m
! reduced_from=line516,line524,line531,line539,line548,line558,line564
! eliminated_buses=517,525,532,540,549,559

New Line._virtual_line517_line525_line532 bus1=508.1.2.3.4 bus2=533.1.2.3.4 phases=4 linecode=LC4 length=6.8488 units=m
! reduced_from=line517,line525,line532
! eliminated_buses=518,526

New Line._virtual_line541_line551_line561_line569_line577_line585_line591 bus1=592.1.2.3.4 bus2=533.1.2.3.4 phases=4 linecode=LC6 length=10.47803 units=m
! reduced_from=line541,line551,line561,line569,line577,line585,line591
! eliminated_buses=542,552,562,570,578,586

New Line._virtual_line550_line560_line568_line576_line584 bus1=585.1.2.3.4 bus2=541.1.2.3.4 phases=4 linecode=LC6 length=9.89881 units=m
! reduced_from=line550,line560,line568,line576,line584
! eliminated_buses=551,561,569,577

New Line._virtual_line566_line573_line581_line588_line594_line598_line603_line608_line613_line618_line622_line626_line630_line634_line638_line641_line644_line647_line650_line653_line656_line660_line665_line671_line678_line686_line694_line702_line710_line717_line724 bus1=560.1.2.3.4 bus2=725.1.2.3.4 phases=4 linecode=LC2 length=11.428606 units=m
! reduced_from=line566,line573,line581,line588,line594,line598,line603,line608,line613,line618,line622,line626,line630,line634,line638,line641,line644,line647,line650,line653,line656,line660,line665,line671,line678,line686,line694,line702,line710,line717,line724
! eliminated_buses=567,574,582,589,595,599,604,609,614,619,623,627,631,635,639,642,645,648,651,654,657,661,666,672,679,687,695,703,711,718

New Line._virtual_line574_line582_line589_line595 bus1=596.1.2.3.4 bus2=568.1.2.3.4 phases=4 linecode=LC4 length=23.0658 units=m
! reduced_from=line574,line582,line589,line595
! eliminated_buses=575,583,590

New Line._virtual_line575_line583_line590_line596_line601_line606_line611_line616 bus1=617.1.2.3.4 bus2=568.1.2.3.4 phases=4 linecode=LC6 length=9.3152 units=m
! reduced_from=line575,line583,line590,line596,line601,line606,line611,line616
! eliminated_buses=576,584,591,597,602,607,612

New Line._virtual_line599_line604_line609_line614_line619_line623_line627_line631_line635_line639_line642_line645_line648_line651_line654_line657_line661_line666_line672_line679_line687_line695_line703_line711_line718_line725_line730_line735_line739 bus1=596.1.2.3.4 bus2=740.1.2.3.4 phases=4 linecode=LC4 length=15.391902 units=m
! reduced_from=line599,line604,line609,line614,line619,line623,line627,line631,line635,line639,line642,line645,line648,line651,line654,line657,line661,line666,line672,line679,line687,line695,line703,line711,line718,line725,line730,line735,line739
! eliminated_buses=600,605,610,615,620,624,628,632,636,640,643,646,649,652,655,658,662,667,673,680,688,696,704,712,719,726,731,736

New Line._virtual_line600_line605_line610_line615_line620_line624_line628_line632_line636_line640_line643_line646_line649_line652_line655 bus1=656.1.2.3.4 bus2=596.1.2.3.4 phases=4 linecode=LC6 length=8.26038 units=m
! reduced_from=line600,line605,line610,line615,line620,line624,line628,line632,line636,line640,line643,line646,line649,line652,line655
! eliminated_buses=601,606,611,616,621,625,629,633,637,641,644,647,650,653

New Line._virtual_line659_line664_line670_line677_line685_line693_line701_line709 bus1=710.1.2.3.4 bus2=656.1.2.3.4 phases=4 linecode=LC6 length=10.415244 units=m
! reduced_from=line659,line664,line670,line677,line685,line693,line701,line709
! eliminated_buses=660,665,671,678,686,694,702

New Line._virtual_line662_line667_line673_line680_line688_line696_line704_line712_line719_line726_line731_line736 bus1=659.1.2.3.4 bus2=737.1.2.3.4 phases=4 linecode=LC6 length=20.305873 units=m
! reduced_from=line662,line667,line673,line680,line688,line696,line704,line712,line719,line726,line731,line736
! eliminated_buses=663,668,674,681,689,697,705,713,720,727,732

New Line._virtual_line663_line669_line676_line684_line692_line700_line708_line716_line723 bus1=659.1.2.3.4 bus2=724.1.2.3.4 phases=4 linecode=LC6 length=11.74826 units=m
! reduced_from=line663,line669,line676,line684,line692,line700,line708,line716,line723
! eliminated_buses=664,670,677,685,693,701,709,717

New Line._virtual_line743_line748_line754_line760_line765_line770_line776_line783_line792_line801_line809_line819 bus1=820.1.2.3.4 bus2=740.1.2.3.4 phases=4 linecode=LC4 length=27.9074 units=m
! reduced_from=line743,line748,line754,line760,line765,line770,line776,line783,line792,line801,line809,line819
! eliminated_buses=744,749,755,761,766,771,777,784,793,802,810

New Line._virtual_line747_line753_line759_line764_line769_line775_line782_line790 bus1=791.1.2.3.4 bus2=743.1.2.3.4 phases=4 linecode=LC6 length=15.44828 units=m
! reduced_from=line747,line753,line759,line764,line769,line775,line782,line790
! eliminated_buses=748,754,760,765,770,776,783

New Line._virtual_line751_line757_line763_line768 bus1=747.1.2.3.4 bus2=769.1.2.3.4 phases=4 linecode=LC7 length=8.08751 units=m
! reduced_from=line751,line757,line763,line768
! eliminated_buses=752,758,764

New Line._virtual_line752_line758 bus1=747.1.2.3.4 bus2=759.1.2.3.4 phases=4 linecode=LC6 length=14.7701 units=m
! reduced_from=line752,line758
! eliminated_buses=753

New Line._virtual_line774_line781_line789_line799_line807_line817_line827_line838 bus1=769.1.2.3.4 bus2=839.1.2.3.4 phases=4 linecode=LC6 length=3.741027 units=m
! reduced_from=line774,line781,line789,line799,line807,line817,line827,line838
! eliminated_buses=775,782,790,800,808,818,828

New Line._virtual_line779_line786 bus1=787.1.2.3.4 bus2=774.1.2.3.4 phases=4 linecode=LC7 length=5.0509 units=m
! reduced_from=line779,line786
! eliminated_buses=780

New Line._virtual_line780_line788_line798_line806_line816_line826_line837_line847_line858_line868 bus1=774.1.2.3.4 bus2=869.1.2.3.4 phases=4 linecode=LC6 length=15.314786 units=m
! reduced_from=line780,line788,line798,line806,line816,line826,line837,line847,line858,line868
! eliminated_buses=781,789,799,807,817,827,838,848,859

New Line._virtual_line795_line803 bus1=804.1.2.3.4 bus2=787.1.2.3.4 phases=4 linecode=LC7 length=6.8079 units=m
! reduced_from=line795,line803
! eliminated_buses=796

New Line._virtual_line796_line804_line814_line824_line835_line845_line856_line866_line876 bus1=787.1.2.3.4 bus2=877.1.2.3.4 phases=4 linecode=LC6 length=14.451184 units=m
! reduced_from=line796,line804,line814,line824,line835,line845,line856,line866,line876
! eliminated_buses=797,805,815,825,836,846,857,867

New Line._virtual_line813_line823_line834_line844_line855_line865_line875_line881_line886_line890 bus1=804.1.2.3.4 bus2=891.1.2.3.4 phases=4 linecode=LC6 length=14.964807 units=m
! reduced_from=line813,line823,line834,line844,line855,line865,line875,line881,line886,line890
! eliminated_buses=814,824,835,845,856,866,876,882,887

New Line._virtual_line829_line840 bus1=841.1.2.3.4 bus2=820.1.2.3.4 phases=4 linecode=LC4 length=8.136 units=m
! reduced_from=line829,line840
! eliminated_buses=830

New Line._virtual_line830_line841 bus1=820.1.2.3.4 bus2=842.1.2.3.4 phases=4 linecode=LC4 length=13.9922 units=m
! reduced_from=line830,line841
! eliminated_buses=831

New Line._virtual_line849_line859_line869_line877_line882_line887_line891_line895_line900_line905_line911_line918 bus1=919.1.2.3.4 bus2=839.1.2.3.4 phases=4 linecode=LC6 length=13.204456 units=m
! reduced_from=line849,line859,line869,line877,line882,line887,line891,line895,line900,line905,line911,line918
! eliminated_buses=850,860,870,878,883,888,892,896,901,906,912

New Line._virtual_line852_line862 bus1=841.1.2.3.4 bus2=863.1.2.3.4 phases=4 linecode=LC4 length=13.3561 units=m
! reduced_from=line852,line862
! eliminated_buses=853

New Line._virtual_line860_line870 bus1=871.1.2.3.4 bus2=852.1.2.3.4 phases=4 linecode=LC4 length=8.5329 units=m
! reduced_from=line860,line870
! eliminated_buses=861

New Line._virtual_line861_line871 bus1=872.1.2.3.4 bus2=852.1.2.3.4 phases=4 linecode=LC4 length=13.9304 units=m
! reduced_from=line861,line871
! eliminated_buses=862

New Line._virtual_line878_line883_line888 bus1=871.1.2.3.4 bus2=889.1.2.3.4 phases=4 linecode=LC4 length=7.83358 units=m
! reduced_from=line878,line883,line888
! eliminated_buses=879,884

New Line._virtual_line879_line884 bus1=885.1.2.3.4 bus2=871.1.2.3.4 phases=4 linecode=LC4 length=13.2517 units=m
! reduced_from=line879,line884
! eliminated_buses=880

New Line._virtual_line892_line896_line901_line906_line912_line919_line926 bus1=889.1.2.3.4 bus2=927.1.2.3.4 phases=4 linecode=LC4 length=3.45508 units=m
! reduced_from=line892,line896,line901,line906,line912,line919,line926
! eliminated_buses=893,897,902,907,913,920

New Line._virtual_line897_line902_line907_line913_line920_line927_line935_line942 bus1=894.1.2.3.4 bus2=943.1.2.3.4 phases=4 linecode=LC4 length=13.38094 units=m
! reduced_from=line897,line902,line907,line913,line920,line927,line935,line942
! eliminated_buses=898,903,908,914,921,928,936

New Line._virtual_line898_line903 bus1=894.1.2.3.4 bus2=904.1.2.3.4 phases=4 linecode=LC4 length=7.9036 units=m
! reduced_from=line898,line903
! eliminated_buses=899

New Line._virtual_line908_line915 bus1=916.1.2.3.4 bus2=904.1.2.3.4 phases=4 linecode=LC4 length=1.39996 units=m
! reduced_from=line908,line915
! eliminated_buses=909

New Line._virtual_line909_line916_line924_line931_line940_line946_line950_line954_line957_line960 bus1=961.1.2.3.4 bus2=904.1.2.3.4 phases=4 linecode=LC4 length=13.27283 units=m
! reduced_from=line909,line916,line924,line931,line940,line946,line950,line954,line957,line960
! eliminated_buses=910,917,925,932,941,947,951,955,958

New Line._virtual_line922_line929_line937_line944_line948_line952_line956_line959_line962_line964_line966_line968_line970_line972 bus1=973.1.2.3.4 bus2=916.1.2.3.4 phases=4 linecode=LC4 length=21.04041 units=m
! reduced_from=line922,line929,line937,line944,line948,line952,line956,line959,line962,line964,line966,line968,line970,line972
! eliminated_buses=923,930,938,945,949,953,957,960,963,965,967,969,971

New Line._virtual_line923_line930_line939_line945_line949_line953 bus1=954.1.2.3.4 bus2=916.1.2.3.4 phases=4 linecode=LC4 length=13.17614 units=m
! reduced_from=line923,line930,line939,line945,line949,line953
! eliminated_buses=924,931,940,946,950

New Line.LINE74 bus1=73.1.2.3.4 bus2=75.1.2.3.4 phases=4 linecode=LC1 length=12.9879 units=m

New Line.LINE75 bus1=73.1.2.3.4 bus2=76.1.2.3.4 phases=4 linecode=LC1 length=12.9879 units=m

New Line.LINE76 bus1=73.1.2.3.4 bus2=77.1.2.3.4 phases=4 linecode=LC1 length=12.9879 units=m

New Line.LINE77 bus1=73.1.2.3.4 bus2=78.1.2.3.4 phases=4 linecode=LC1 length=12.9879 units=m

New Line.LINE78 bus1=73.1.2.3.4 bus2=79.1.2.3.4 phases=4 linecode=LC1 length=12.9879 units=m

New Line.LINE79 bus1=73.1.2.3.4 bus2=80.1.2.3.4 phases=4 linecode=LC1 length=12.9879 units=m

New Line.LINE80 bus1=73.1.2.3.4 bus2=81.1.2.3.4 phases=4 linecode=LC1 length=12.9879 units=m

New Line.LINE81 bus1=73.1.2.3.4 bus2=82.1.2.3.4 phases=4 linecode=LC1 length=12.9879 units=m

New Line.LINE90 bus1=89.1.2.3.4 bus2=91.1.2.3.4 phases=4 linecode=LC2 length=2.7654 units=m

New Line.LINE151 bus1=148.1.2.3.4 bus2=152.1.2.3.4 phases=4 linecode=LC4 length=2.4057 units=m

New Line.LINE184 bus1=177.1.2.3.4 bus2=185.1.2.3.4 phases=4 linecode=LC2 length=5.6312 units=m

New Line.LINE186 bus1=178.1.2.3.4 bus2=187.1.2.3.4 phases=4 linecode=LC4 length=8.8235 units=m

New Line.LINE195 bus1=187.1.2.3.4 bus2=196.1.2.3.4 phases=4 linecode=LC4 length=2.036 units=m

New Line.LINE202 bus1=194.1.2.3.4 bus2=203.1.2.3.4 phases=4 linecode=LC2 length=5.9299 units=m

New Line.LINE205 bus1=196.1.2.3.4 bus2=206.1.2.3.4 phases=4 linecode=LC4 length=8.181 units=m

New Line.LINE215 bus1=206.1.2.3.4 bus2=216.1.2.3.4 phases=4 linecode=LC4 length=5.5219 units=m

New Line.LINE257 bus1=243.1.2.3.4 bus2=258.1.2.3.4 phases=4 linecode=LC4 length=1.9867 units=m

New Line.LINE319 bus1=307.1.2.3.4 bus2=320.1.2.3.4 phases=4 linecode=LC4 length=4.8349 units=m

New Line.LINE391 bus1=387.1.2.3.4 bus2=392.1.2.3.4 phases=4 linecode=LC1 length=11.9414 units=m

New Line.LINE403 bus1=399.1.2.3.4 bus2=404.1.2.3.4 phases=4 linecode=LC4 length=3.5625 units=m

New Line.LINE404 bus1=399.1.2.3.4 bus2=405.1.2.3.4 phases=4 linecode=LC4 length=8.102 units=m

New Line.LINE410 bus1=404.1.2.3.4 bus2=411.1.2.3.4 phases=4 linecode=LC4 length=9.3755 units=m

New Line.LINE411 bus1=404.1.2.3.4 bus2=412.1.2.3.4 phases=4 linecode=LC4 length=8.8094 units=m

New Line.LINE414 bus1=407.1.2.3.4 bus2=415.1.2.3.4 phases=4 linecode=LC2 length=5.8743 units=m

New Line.LINE415 bus1=407.1.2.3.4 bus2=416.1.2.3.4 phases=4 linecode=LC2 length=11.7445 units=m

New Line.LINE416 bus1=407.1.2.3.4 bus2=417.1.2.3.4 phases=4 linecode=LC2 length=11.7445 units=m

New Line.LINE420 bus1=410.1.2.3.4 bus2=421.1.2.3.4 phases=4 linecode=LC4 length=7.171 units=m

New Line.LINE430 bus1=423.1.2.3.4 bus2=431.1.2.3.4 phases=4 linecode=LC4 length=8.7965 units=m

New Line.LINE439 bus1=431.1.2.3.4 bus2=440.1.2.3.4 phases=4 linecode=LC4 length=1.5099 units=m

New Line.LINE444 bus1=436.1.2.3.4 bus2=445.1.2.3.4 phases=4 linecode=LC4 length=5.8957 units=m

New Line.LINE490 bus1=481.1.2.3.4 bus2=491.1.2.3.4 phases=4 linecode=LC6 length=12.7237 units=m

New Line.LINE491 bus1=481.1.2.3.4 bus2=492.1.2.3.4 phases=4 linecode=LC6 length=7.4768 units=m

New Line.LINE507 bus1=498.1.2.3.4 bus2=508.1.2.3.4 phases=4 linecode=LC4 length=7.7257 units=m

New Line.LINE540 bus1=533.1.2.3.4 bus2=541.1.2.3.4 phases=4 linecode=LC4 length=7.1973 units=m

New Line.LINE549 bus1=541.1.2.3.4 bus2=550.1.2.3.4 phases=4 linecode=LC4 length=3.5509 units=m

New Line.LINE559 bus1=550.1.2.3.4 bus2=560.1.2.3.4 phases=4 linecode=LC9 length=4.4027 units=m

New Line.LINE567 bus1=560.1.2.3.4 bus2=568.1.2.3.4 phases=4 linecode=LC4 length=7.2221 units=m

New Line.LINE658 bus1=656.1.2.3.4 bus2=659.1.2.3.4 phases=4 linecode=LC6 length=7.3413 units=m

New Line.LINE742 bus1=740.1.2.3.4 bus2=743.1.2.3.4 phases=4 linecode=LC7 length=4.5631 units=m

New Line.LINE746 bus1=743.1.2.3.4 bus2=747.1.2.3.4 phases=4 linecode=LC7 length=1.1749 units=m

New Line.LINE773 bus1=769.1.2.3.4 bus2=774.1.2.3.4 phases=4 linecode=LC7 length=6.7883 units=m

New Line.LINE848 bus1=839.1.2.3.4 bus2=849.1.2.3.4 phases=4 linecode=LC6 length=11.257 units=m

New Line.LINE851 bus1=841.1.2.3.4 bus2=852.1.2.3.4 phases=4 linecode=LC4 length=1.088 units=m

New Line.LINE893 bus1=889.1.2.3.4 bus2=894.1.2.3.4 phases=4 linecode=LC4 length=3.2433 units=m

New Line.LINE933 bus1=927.1.2.3.4 bus2=934.1.2.3.4 phases=4 linecode=LC4 length=9.8006 units=m

New Line.LINE934 bus1=927.1.2.3.4 bus2=935.1.2.3.4 phases=4 linecode=LC4 length=10.4238 units=m
