! Reduced enabled lines.

New Line._virtual_line0_line1_line2_line3_line4_line5_line6_line7_line8_line9_line10_line11_line12_line13_line14_line15_line16_line17_line18_line19_line20_line21_line22_line23_line24_line25_line26_line27_line28_line29_line30_line31_line32_line33_line34_line35_line36_line37_line38_line40_line42_line44_line46_line48_line50_line51_line52_line53_line54_line55_line56_line57_line58_line59_line60_line61_line62_line63_line64_line65_line66_line67_line68_line69_line70_line71_line72 bus1=sourcebus.1.2.3.4 bus2=73.1.2.3.4 phases=4 linecode=LC4 length=82.413245 units=m
! reduced_from=line0,line1,line2,line3,line4,line5,line6,line7,line8,line9,line10,line11,line12,line13,line14,line15,line16,line17,line18,line19,line20,line21,line22,line23,line24,line25,line26,line27,line28,line29,line30,line31,line32,line33,line34,line35,line36,line37,line38,line40,line42,line44,line46,line48,line50,line51,line52,line53,line54,line55,line56,line57,line58,line59,line60,line61,line62,line63,line64,line65,line66,line67,line68,line69,line70,line71,line72
! eliminated_buses=1,2,3,4,5,6,7,8,9,10,11,12,13,14,15,16,17,18,19,20,21,22,23,24,25,26,27,28,29,30,31,32,33,34,35,36,37,38,39,41,43,45,47,49,51,52,53,54,55,56,57,58,59,60,61,62,63,64,65,66,67,68,69,70,71,72

New Line._virtual_line73_line74_line75 bus1=76.1.2.3.4 bus2=73.1.2.3.4 phases=4 linecode=LC5 length=18.7671 units=m
! reduced_from=line73,line74,line75
! eliminated_buses=74,75

New Line._virtual_line76_line78_line80_line82 bus1=83.1.2.3.4 bus2=76.1.2.3.4 phases=4 linecode=LC5 length=11.99737 units=m
! reduced_from=line76,line78,line80,line82
! eliminated_buses=77,79,81

New Line._virtual_line77_line79_line81_line83_line86 bus1=87.1.2.3.4 bus2=76.1.2.3.4 phases=4 linecode=LC5 length=2.50118 units=m
! reduced_from=line77,line79,line81,line83,line86
! eliminated_buses=78,80,82,84

New Line._virtual_line84_line87_line90_line94_line99_line105_line111_line117_line123_line131_line140_line147_line155_line163_line171_line180_line188_line195_line201_line208_line214_line220 bus1=83.1.2.3.4 bus2=221.1.2.3.4 phases=4 linecode=LC5 length=46.51087 units=m
! reduced_from=line84,line87,line90,line94,line99,line105,line111,line117,line123,line131,line140,line147,line155,line163,line171,line180,line188,line195,line201,line208,line214,line220
! eliminated_buses=85,88,91,95,100,106,112,118,124,132,141,148,156,164,172,181,189,196,202,209,215

New Line._virtual_line85_line88_line91_line95_line100_line106 bus1=107.1.2.3.4 bus2=83.1.2.3.4 phases=4 linecode=LC5 length=2.73851 units=m
! reduced_from=line85,line88,line91,line95,line100,line106
! eliminated_buses=86,89,92,96,101

New Line._virtual_line89_line92 bus1=87.1.2.3.4 bus2=93.1.2.3.4 phases=4 linecode=LC4 length=2.04164 units=m
! reduced_from=line89,line92
! eliminated_buses=90

New Line._virtual_line97_line103 bus1=104.1.2.3.4 bus2=93.1.2.3.4 phases=4 linecode=LC4 length=11.7733 units=m
! reduced_from=line97,line103
! eliminated_buses=98

New Line._virtual_line102_line109 bus1=110.1.2.3.4 bus2=97.1.2.3.4 phases=4 linecode=LC4 length=11.1406 units=m
! reduced_from=line102,line109
! eliminated_buses=103

New Line._virtual_line107_line113 bus1=102.1.2.3.4 bus2=114.1.2.3.4 phases=4 linecode=LC4 length=8.0939 units=m
! reduced_from=line107,line113
! eliminated_buses=108

New Line._virtual_line108_line115 bus1=116.1.2.3.4 bus2=102.1.2.3.4 phases=4 linecode=LC4 length=11.3228 units=m
! reduced_from=line108,line115
! eliminated_buses=109

New Line._virtual_line112_line118 bus1=119.1.2.3.4 bus2=107.1.2.3.4 phases=4 linecode=LC4 length=5.05947 units=m
! reduced_from=line112,line118
! eliminated_buses=113

New Line._virtual_line120_line128 bus1=114.1.2.3.4 bus2=129.1.2.3.4 phases=4 linecode=LC4 length=11.3619 units=m
! reduced_from=line120,line128
! eliminated_buses=121

New Line._virtual_line125_line134 bus1=119.1.2.3.4 bus2=135.1.2.3.4 phases=4 linecode=LC4 length=12.6056 units=m
! reduced_from=line125,line134
! eliminated_buses=126

New Line._virtual_line126_line136_line145 bus1=146.1.2.3.4 bus2=120.1.2.3.4 phases=4 linecode=LC4 length=7.64615 units=m
! reduced_from=line126,line136,line145
! eliminated_buses=127,137

New Line._virtual_line127_line137 bus1=138.1.2.3.4 bus2=120.1.2.3.4 phases=4 linecode=LC4 length=11.7874 units=m
! reduced_from=line127,line137
! eliminated_buses=128

New Line._virtual_line133_line143 bus1=144.1.2.3.4 bus2=125.1.2.3.4 phases=4 linecode=LC4 length=12.9954 units=m
! reduced_from=line133,line143
! eliminated_buses=134

New Line._virtual_line142_line150 bus1=133.1.2.3.4 bus2=151.1.2.3.4 phases=4 linecode=LC4 length=13.4562 units=m
! reduced_from=line142,line150
! eliminated_buses=143

New Line._virtual_line149_line158 bus1=159.1.2.3.4 bus2=142.1.2.3.4 phases=4 linecode=LC4 length=13.8938 units=m
! reduced_from=line149,line158
! eliminated_buses=150

New Line._virtual_line153_line162 bus1=146.1.2.3.4 bus2=163.1.2.3.4 phases=4 linecode=LC4 length=11.6289 units=m
! reduced_from=line153,line162
! eliminated_buses=154

New Line._virtual_line157_line166_line175_line184_line191_line198_line205 bus1=149.1.2.3.4 bus2=206.1.2.3.4 phases=4 linecode=LC6 length=13.60183 units=m
! reduced_from=line157,line166,line175,line184,line191,line198,line205
! eliminated_buses=158,167,176,185,192,199

New Line._virtual_line161_line170 bus1=153.1.2.3.4 bus2=171.1.2.3.4 phases=4 linecode=LC4 length=11.7246 units=m
! reduced_from=line161,line170
! eliminated_buses=162

New Line._virtual_line165_line174_line183 bus1=157.1.2.3.4 bus2=184.1.2.3.4 phases=4 linecode=LC4 length=14.0387 units=m
! reduced_from=line165,line174,line183
! eliminated_buses=166,175

New Line._virtual_line169_line179 bus1=180.1.2.3.4 bus2=161.1.2.3.4 phases=4 linecode=LC4 length=11.9297 units=m
! reduced_from=line169,line179
! eliminated_buses=170

New Line._virtual_line172_line181_line189 bus1=165.1.2.3.4 bus2=190.1.2.3.4 phases=4 linecode=LC4 length=8.50591 units=m
! reduced_from=line172,line181,line189
! eliminated_buses=173,182

New Line._virtual_line173_line182_line190 bus1=191.1.2.3.4 bus2=165.1.2.3.4 phases=4 linecode=LC4 length=13.5458 units=m
! reduced_from=line173,line182,line190
! eliminated_buses=174,183

New Line._virtual_line178_line187 bus1=169.1.2.3.4 bus2=188.1.2.3.4 phases=4 linecode=LC4 length=12.0396 units=m
! reduced_from=line178,line187
! eliminated_buses=179

New Line._virtual_line186_line194 bus1=195.1.2.3.4 bus2=178.1.2.3.4 phases=4 linecode=LC4 length=11.7069 units=m
! reduced_from=line186,line194
! eliminated_buses=187

New Line._virtual_line192_line199 bus1=200.1.2.3.4 bus2=186.1.2.3.4 phases=4 linecode=LC4 length=9.4191 units=m
! reduced_from=line192,line199
! eliminated_buses=193

New Line._virtual_line193_line200 bus1=186.1.2.3.4 bus2=201.1.2.3.4 phases=4 linecode=LC4 length=12.3276 units=m
! reduced_from=line193,line200
! eliminated_buses=194

New Line._virtual_line196_line202 bus1=203.1.2.3.4 bus2=190.1.2.3.4 phases=4 linecode=LC4 length=13.4641 units=m
! reduced_from=line196,line202
! eliminated_buses=197

New Line._virtual_line203_line209_line215 bus1=198.1.2.3.4 bus2=216.1.2.3.4 phases=4 linecode=LC4 length=13.22486 units=m
! reduced_from=line203,line209,line215
! eliminated_buses=204,210

New Line._virtual_line204_line210_line217 bus1=218.1.2.3.4 bus2=198.1.2.3.4 phases=4 linecode=LC4 length=5.78866 units=m
! reduced_from=line204,line210,line217
! eliminated_buses=205,211

New Line._virtual_line206_line211 bus1=200.1.2.3.4 bus2=212.1.2.3.4 phases=4 linecode=LC4 length=12.1005 units=m
! reduced_from=line206,line211
! eliminated_buses=207

New Line._virtual_line212_line218 bus1=208.1.2.3.4 bus2=219.1.2.3.4 phases=4 linecode=LC4 length=11.8781 units=m
! reduced_from=line212,line218
! eliminated_buses=213

New Line._virtual_line213_line219 bus1=208.1.2.3.4 bus2=220.1.2.3.4 phases=4 linecode=LC4 length=8.3468 units=m
! reduced_from=line213,line219
! eliminated_buses=214

New Line._virtual_line222_line228_line236_line245 bus1=218.1.2.3.4 bus2=246.1.2.3.4 phases=4 linecode=LC4 length=12.5459 units=m
! reduced_from=line222,line228,line236,line245
! eliminated_buses=223,229,237

New Line._virtual_line223_line229_line237 bus1=218.1.2.3.4 bus2=238.1.2.3.4 phases=4 linecode=LC4 length=5.63854 units=m
! reduced_from=line223,line229,line237
! eliminated_buses=224,230

New Line._virtual_line224_line230_line238_line248_line257_line266_line275_line284_line292_line301 bus1=220.1.2.3.4 bus2=302.1.2.3.4 phases=4 linecode=LC4 length=11.66055 units=m
! reduced_from=line224,line230,line238,line248,line257,line266,line275,line284,line292,line301
! eliminated_buses=225,231,239,249,258,267,276,285,293

New Line._virtual_line225_line231_line239_line249_line258_line267_line276_line285_line293 bus1=220.1.2.3.4 bus2=294.1.2.3.4 phases=4 linecode=LC4 length=16.53514 units=m
! reduced_from=line225,line231,line239,line249,line258,line267,line276,line285,line293
! eliminated_buses=226,232,240,250,259,268,277,286

New Line._virtual_line233_line242 bus1=243.1.2.3.4 bus2=227.1.2.3.4 phases=4 linecode=LC7 length=5.8104 units=m
! reduced_from=line233,line242
! eliminated_buses=234

New Line._virtual_line234_line243_line253 bus1=227.1.2.3.4 bus2=254.1.2.3.4 phases=4 linecode=LC6 length=11.45923 units=m
! reduced_from=line234,line243,line253
! eliminated_buses=235,244

New Line._virtual_line246_line254 bus1=255.1.2.3.4 bus2=238.1.2.3.4 phases=4 linecode=LC4 length=12.7402 units=m
! reduced_from=line246,line254
! eliminated_buses=247

New Line._virtual_line247_line256 bus1=238.1.2.3.4 bus2=257.1.2.3.4 phases=4 linecode=LC4 length=6.0357 units=m
! reduced_from=line247,line256
! eliminated_buses=248

New Line._virtual_line252_line262 bus1=263.1.2.3.4 bus2=243.1.2.3.4 phases=4 linecode=LC7 length=11.4919 units=m
! reduced_from=line252,line262
! eliminated_buses=253

New Line._virtual_line261_line270 bus1=252.1.2.3.4 bus2=271.1.2.3.4 phases=4 linecode=LC7 length=11.6969 units=m
! reduced_from=line261,line270
! eliminated_buses=262

New Line._virtual_line264_line272 bus1=273.1.2.3.4 bus2=257.1.2.3.4 phases=4 linecode=LC4 length=13.2947 units=m
! reduced_from=line264,line272
! eliminated_buses=265

New Line._virtual_line268_line277 bus1=278.1.2.3.4 bus2=261.1.2.3.4 phases=4 linecode=LC7 length=8.382 units=m
! reduced_from=line268,line277
! eliminated_buses=269

New Line._virtual_line269_line279 bus1=280.1.2.3.4 bus2=261.1.2.3.4 phases=4 linecode=LC7 length=12.0773 units=m
! reduced_from=line269,line279
! eliminated_buses=270

New Line._virtual_line273_line281 bus1=282.1.2.3.4 bus2=266.1.2.3.4 phases=4 linecode=LC4 length=13.102 units=m
! reduced_from=line273,line281
! eliminated_buses=274

New Line._virtual_line282_line289 bus1=290.1.2.3.4 bus2=275.1.2.3.4 phases=4 linecode=LC4 length=13.3787 units=m
! reduced_from=line282,line289
! eliminated_buses=283

New Line._virtual_line287_line296 bus1=278.1.2.3.4 bus2=297.1.2.3.4 phases=4 linecode=LC7 length=11.6205 units=m
! reduced_from=line287,line296
! eliminated_buses=288

New Line._virtual_line290_line298 bus1=299.1.2.3.4 bus2=284.1.2.3.4 phases=4 linecode=LC4 length=12.4676 units=m
! reduced_from=line290,line298
! eliminated_buses=291

New Line._virtual_line294_line302 bus1=287.1.2.3.4 bus2=303.1.2.3.4 phases=4 linecode=LC7 length=8.1835 units=m
! reduced_from=line294,line302
! eliminated_buses=295

New Line._virtual_line295_line303 bus1=287.1.2.3.4 bus2=304.1.2.3.4 phases=4 linecode=LC7 length=11.9178 units=m
! reduced_from=line295,line303
! eliminated_buses=296

New Line._virtual_line299_line305 bus1=292.1.2.3.4 bus2=306.1.2.3.4 phases=4 linecode=LC4 length=12.9777 units=m
! reduced_from=line299,line305
! eliminated_buses=300

New Line._virtual_line306_line311 bus1=312.1.2.3.4 bus2=301.1.2.3.4 phases=4 linecode=LC4 length=12.5298 units=m
! reduced_from=line306,line311
! eliminated_buses=307

New Line._virtual_line307_line312_line318 bus1=319.1.2.3.4 bus2=301.1.2.3.4 phases=4 linecode=LC4 length=17.7767 units=m
! reduced_from=line307,line312,line318
! eliminated_buses=308,313

New Line._virtual_line309_line316 bus1=317.1.2.3.4 bus2=303.1.2.3.4 phases=4 linecode=LC7 length=11.5315 units=m
! reduced_from=line309,line316
! eliminated_buses=310

New Line._virtual_line314_line321 bus1=309.1.2.3.4 bus2=322.1.2.3.4 phases=4 linecode=LC7 length=6.9051 units=m
! reduced_from=line314,line321
! eliminated_buses=315

New Line._virtual_line315_line322_line327_line332_line337_line342_line348 bus1=349.1.2.3.4 bus2=309.1.2.3.4 phases=4 linecode=LC7 length=11.97404 units=m
! reduced_from=line315,line322,line327,line332,line337,line342,line348
! eliminated_buses=316,323,328,333,338,343

New Line._virtual_line325_line330_line335 bus1=322.1.2.3.4 bus2=336.1.2.3.4 phases=4 linecode=LC7 length=13.2848 units=m
! reduced_from=line325,line330,line335
! eliminated_buses=326,331

New Line._virtual_line326_line331_line336_line341_line347_line354_line360_line366_line372_line378_line382_line386_line391_line396 bus1=322.1.2.3.4 bus2=397.1.2.3.4 phases=4 linecode=LC6 length=5.03377 units=m
! reduced_from=line326,line331,line336,line341,line347,line354,line360,line366,line372,line378,line382,line386,line391,line396
! eliminated_buses=327,332,337,342,348,355,361,367,373,379,383,387,392

New Line._virtual_line340_line346_line353 bus1=354.1.2.3.4 bus2=336.1.2.3.4 phases=4 linecode=LC7 length=11.8122 units=m
! reduced_from=line340,line346,line353
! eliminated_buses=341,347

New Line._virtual_line345_line352_line359 bus1=340.1.2.3.4 bus2=360.1.2.3.4 phases=4 linecode=LC7 length=12.1195 units=m
! reduced_from=line345,line352,line359
! eliminated_buses=346,353

New Line._virtual_line351_line358_line365 bus1=366.1.2.3.4 bus2=345.1.2.3.4 phases=4 linecode=LC7 length=12.0313 units=m
! reduced_from=line351,line358,line365
! eliminated_buses=352,359

New Line._virtual_line357_line364_line371 bus1=372.1.2.3.4 bus2=351.1.2.3.4 phases=4 linecode=LC7 length=12.7909 units=m
! reduced_from=line357,line364,line371
! eliminated_buses=358,365

New Line._virtual_line363_line370_line377 bus1=378.1.2.3.4 bus2=357.1.2.3.4 phases=4 linecode=LC7 length=11.95268 units=m
! reduced_from=line363,line370,line377
! eliminated_buses=364,371

New Line._virtual_line368_line374_line380_line385_line390_line395_line399_line404_line407_line410_line413 bus1=363.1.2.3.4 bus2=414.1.2.3.4 phases=4 linecode=LC7 length=19.70567 units=m
! reduced_from=line368,line374,line380,line385,line390,line395,line399,line404,line407,line410,line413
! eliminated_buses=369,375,381,386,391,396,400,405,408,411

New Line._virtual_line369_line376 bus1=377.1.2.3.4 bus2=363.1.2.3.4 phases=4 linecode=LC7 length=11.5898 units=m
! reduced_from=line369,line376
! eliminated_buses=370

New Line.LINE96 bus1=93.1.2.3.4 bus2=97.1.2.3.4 phases=4 linecode=LC4 length=8.8295 units=m

New Line.LINE101 bus1=97.1.2.3.4 bus2=102.1.2.3.4 phases=4 linecode=LC4 length=1.7315 units=m

New Line.LINE119 bus1=114.1.2.3.4 bus2=120.1.2.3.4 phases=4 linecode=LC4 length=1.9995 units=m

New Line.LINE124 bus1=119.1.2.3.4 bus2=125.1.2.3.4 phases=4 linecode=LC4 length=5.2606 units=m

New Line.LINE132 bus1=125.1.2.3.4 bus2=133.1.2.3.4 phases=4 linecode=LC4 length=1.0508 units=m

New Line.LINE141 bus1=133.1.2.3.4 bus2=142.1.2.3.4 phases=4 linecode=LC4 length=8.3131 units=m

New Line.LINE148 bus1=142.1.2.3.4 bus2=149.1.2.3.4 phases=4 linecode=LC4 length=1.3002 units=m

New Line.LINE152 bus1=146.1.2.3.4 bus2=153.1.2.3.4 phases=4 linecode=LC4 length=1.7176 units=m

New Line.LINE156 bus1=149.1.2.3.4 bus2=157.1.2.3.4 phases=4 linecode=LC4 length=8.0556 units=m

New Line.LINE160 bus1=153.1.2.3.4 bus2=161.1.2.3.4 phases=4 linecode=LC4 length=9.0016 units=m

New Line.LINE164 bus1=157.1.2.3.4 bus2=165.1.2.3.4 phases=4 linecode=LC4 length=0.90071 units=m

New Line.LINE168 bus1=161.1.2.3.4 bus2=169.1.2.3.4 phases=4 linecode=LC4 length=4.524 units=m

New Line.LINE177 bus1=169.1.2.3.4 bus2=178.1.2.3.4 phases=4 linecode=LC4 length=8.5413 units=m

New Line.LINE185 bus1=178.1.2.3.4 bus2=186.1.2.3.4 phases=4 linecode=LC4 length=1.5778 units=m

New Line.LINE197 bus1=190.1.2.3.4 bus2=198.1.2.3.4 phases=4 linecode=LC4 length=1.6423 units=m

New Line.LINE207 bus1=200.1.2.3.4 bus2=208.1.2.3.4 phases=4 linecode=LC4 length=1.1997 units=m

New Line.LINE226 bus1=221.1.2.3.4 bus2=227.1.2.3.4 phases=4 linecode=LC7 length=0.92421 units=m

New Line.LINE251 bus1=243.1.2.3.4 bus2=252.1.2.3.4 phases=4 linecode=LC7 length=7.6165 units=m

New Line.LINE260 bus1=252.1.2.3.4 bus2=261.1.2.3.4 phases=4 linecode=LC7 length=1.2802 units=m

New Line.LINE265 bus1=257.1.2.3.4 bus2=266.1.2.3.4 phases=4 linecode=LC4 length=1.1044 units=m

New Line.LINE274 bus1=266.1.2.3.4 bus2=275.1.2.3.4 phases=4 linecode=LC4 length=7.94 units=m

New Line.LINE283 bus1=275.1.2.3.4 bus2=284.1.2.3.4 phases=4 linecode=LC4 length=0.96712 units=m

New Line.LINE286 bus1=278.1.2.3.4 bus2=287.1.2.3.4 phases=4 linecode=LC7 length=1.0918 units=m

New Line.LINE291 bus1=284.1.2.3.4 bus2=292.1.2.3.4 phases=4 linecode=LC4 length=8.7022 units=m

New Line.LINE300 bus1=292.1.2.3.4 bus2=301.1.2.3.4 phases=4 linecode=LC4 length=1.2963 units=m

New Line.LINE308 bus1=303.1.2.3.4 bus2=309.1.2.3.4 phases=4 linecode=LC7 length=1.6819 units=m

New Line.LINE339 bus1=336.1.2.3.4 bus2=340.1.2.3.4 phases=4 linecode=LC7 length=1.4705 units=m

New Line.LINE344 bus1=340.1.2.3.4 bus2=345.1.2.3.4 phases=4 linecode=LC7 length=8.2989 units=m

New Line.LINE350 bus1=345.1.2.3.4 bus2=351.1.2.3.4 phases=4 linecode=LC7 length=1.1424 units=m

New Line.LINE356 bus1=351.1.2.3.4 bus2=357.1.2.3.4 phases=4 linecode=LC7 length=8.745 units=m

New Line.LINE362 bus1=357.1.2.3.4 bus2=363.1.2.3.4 phases=4 linecode=LC7 length=1.3609 units=m

New Line.LINE400 bus1=397.1.2.3.4 bus2=401.1.2.3.4 phases=4 linecode=LC6 length=7.3413 units=m

New Line.LINE401 bus1=397.1.2.3.4 bus2=402.1.2.3.4 phases=4 linecode=LC6 length=9.0589 units=m
