! Reduced enabled lines.

New Line._virtual_line0_line1_line2_line3_line4_line5_line6_line7_line8_line9_line10_line11_line12_line13_line14_line15_line16_line17_line18_line19_line20_line21_line22_line23_line24_line25_line26_line27_line28_line29_line30_line31_line32_line33_line34_line35_line36_line37_line38_line39_line40_line41_line42_line43_line44_line46_line48_line50_line52_line54_line56 bus1=sourcebus.1.2.3.4 bus2=57.1.2.3.4 phases=4 linecode=LC5 length=55.489553 units=m
! reduced_from=line0,line1,line2,line3,line4,line5,line6,line7,line8,line9,line10,line11,line12,line13,line14,line15,line16,line17,line18,line19,line20,line21,line22,line23,line24,line25,line26,line27,line28,line29,line30,line31,line32,line33,line34,line35,line36,line37,line38,line39,line40,line41,line42,line43,line44,line46,line48,line50,line52,line54,line56
! eliminated_buses=1,2,3,4,5,6,7,8,9,10,11,12,13,14,15,16,17,18,19,20,21,22,23,24,25,26,27,28,29,30,31,32,33,34,35,36,37,38,39,40,41,42,43,44,45,47,49,51,53,55

New Line._virtual_line58_line62 bus1=63.1.2.3.4 bus2=57.1.2.3.4 phases=4 linecode=LC5 length=9.5472 units=m
! reduced_from=line58,line62
! eliminated_buses=59

New Line._virtual_line59_line63_line67_line71_line76_line81_line86_line91_line94_line97 bus1=98.1.2.3.4 bus2=57.1.2.3.4 phases=4 linecode=LC6 length=14.84462 units=m
! reduced_from=line59,line63,line67,line71,line76,line81,line86,line91,line94,line97
! eliminated_buses=60,64,68,72,77,82,87,92,95

New Line._virtual_line60_line64_line68_line72_line77_line82_line87_line92_line95_line98 bus1=57.1.2.3.4 bus2=99.1.2.3.4 phases=4 linecode=LC6 length=14.67268 units=m
! reduced_from=line60,line64,line68,line72,line77,line82,line87,line92,line95,line98
! eliminated_buses=61,65,69,73,78,83,88,93,96

New Line._virtual_line66_line70 bus1=63.1.2.3.4 bus2=71.1.2.3.4 phases=4 linecode=LC4 length=7.2047 units=m
! reduced_from=line66,line70
! eliminated_buses=67

New Line._virtual_line73_line78_line83_line88 bus1=89.1.2.3.4 bus2=71.1.2.3.4 phases=4 linecode=LC6 length=15.83517 units=m
! reduced_from=line73,line78,line83,line88
! eliminated_buses=74,79,84

New Line._virtual_line74_line79_line84_line89 bus1=90.1.2.3.4 bus2=71.1.2.3.4 phases=4 linecode=LC6 length=13.45446 units=m
! reduced_from=line74,line79,line84,line89
! eliminated_buses=75,80,85

New Line._virtual_line75_line80_line85_line90_line93_line96_line99_line100_line101_line102_line103_line104_line105_line106_line107_line108_line109_line110_line111_line112 bus1=71.1.2.3.4 bus2=113.1.2.3.4 phases=4 linecode=LC4 length=17.8912 units=m
! reduced_from=line75,line80,line85,line90,line93,line96,line99,line100,line101,line102,line103,line104,line105,line106,line107,line108,line109,line110,line111,line112
! eliminated_buses=76,81,86,91,94,97,100,101,102,103,104,105,106,107,108,109,110,111,112

New Line._virtual_line113_line116 bus1=117.1.2.3.4 bus2=113.1.2.3.4 phases=4 linecode=LC4 length=18.1349 units=m
! reduced_from=line113,line116
! eliminated_buses=114

New Line._virtual_line114_line117_line122_line129_line136 bus1=137.1.2.3.4 bus2=113.1.2.3.4 phases=4 linecode=LC6 length=13.94467 units=m
! reduced_from=line114,line117,line122,line129,line136
! eliminated_buses=115,118,123,130

New Line._virtual_line115_line118_line123_line130_line137_line145_line153_line160_line167 bus1=113.1.2.3.4 bus2=168.1.2.3.4 phases=4 linecode=LC6 length=15.01491 units=m
! reduced_from=line115,line118,line123,line130,line137,line145,line153,line160,line167
! eliminated_buses=116,119,124,131,138,146,154,161

New Line._virtual_line120_line127_line134_line143_line151_line159_line166 bus1=117.1.2.3.4 bus2=167.1.2.3.4 phases=4 linecode=LC6 length=14.92714 units=m
! reduced_from=line120,line127,line134,line143,line151,line159,line166
! eliminated_buses=121,128,135,144,152,160

New Line._virtual_line121_line128_line135_line144_line152 bus1=117.1.2.3.4 bus2=153.1.2.3.4 phases=4 linecode=LC6 length=14.06611 units=m
! reduced_from=line121,line128,line135,line144,line152
! eliminated_buses=122,129,136,145

New Line._virtual_line124_line131 bus1=132.1.2.3.4 bus2=120.1.2.3.4 phases=4 linecode=LC4 length=17.8388 units=m
! reduced_from=line124,line131
! eliminated_buses=125

New Line._virtual_line125_line132_line141_line149_line157_line164_line171_line178 bus1=179.1.2.3.4 bus2=120.1.2.3.4 phases=4 linecode=LC6 length=15.99773 units=m
! reduced_from=line125,line132,line141,line149,line157,line164,line171,line178
! eliminated_buses=126,133,142,150,158,165,172

New Line._virtual_line126_line133_line142_line150_line158_line165_line172_line179_line185 bus1=120.1.2.3.4 bus2=186.1.2.3.4 phases=4 linecode=LC6 length=15.42947 units=m
! reduced_from=line126,line133,line142,line150,line158,line165,line172,line179,line185
! eliminated_buses=127,134,143,151,159,166,173,180

New Line._virtual_line138_line146_line154_line161_line168_line173_line180_line186_line191_line196_line201 bus1=132.1.2.3.4 bus2=202.1.2.3.4 phases=4 linecode=LC6 length=16.08746 units=m
! reduced_from=line138,line146,line154,line161,line168,line173,line180,line186,line191,line196,line201
! eliminated_buses=139,147,155,162,169,174,181,187,192,197

New Line._virtual_line139_line147_line155_line162_line169_line174_line181_line187_line192_line197_line202 bus1=132.1.2.3.4 bus2=203.1.2.3.4 phases=4 linecode=LC6 length=15.37564 units=m
! reduced_from=line139,line147,line155,line162,line169,line174,line181,line187,line192,line197,line202
! eliminated_buses=140,148,156,163,170,175,182,188,193,198

New Line._virtual_line140_line148_line156_line163_line170 bus1=132.1.2.3.4 bus2=171.1.2.3.4 phases=4 linecode=LC4 length=19.192 units=m
! reduced_from=line140,line148,line156,line163,line170
! eliminated_buses=141,149,157,164

New Line._virtual_line175_line182_line188_line193_line198_line203_line206_line211_line216_line221_line226_line231_line236 bus1=237.1.2.3.4 bus2=171.1.2.3.4 phases=4 linecode=LC6 length=15.64939 units=m
! reduced_from=line175,line182,line188,line193,line198,line203,line206,line211,line216,line221,line226,line231,line236
! eliminated_buses=176,183,189,194,199,204,207,212,217,222,227,232

New Line._virtual_line176_line183_line189_line194_line199_line204_line207_line212_line217_line222_line227_line232_line237 bus1=238.1.2.3.4 bus2=171.1.2.3.4 phases=4 linecode=LC6 length=16.1753 units=m
! reduced_from=line176,line183,line189,line194,line199,line204,line207,line212,line217,line222,line227,line232,line237
! eliminated_buses=177,184,190,195,200,205,208,213,218,223,228,233

New Line._virtual_line177_line184_line190_line195_line200_line205 bus1=206.1.2.3.4 bus2=171.1.2.3.4 phases=4 linecode=LC4 length=7.5094 units=m
! reduced_from=line177,line184,line190,line195,line200,line205
! eliminated_buses=178,185,191,196,201

New Line._virtual_line208_line213_line218_line223_line228_line233_line238_line241_line245_line250_line255_line261 bus1=206.1.2.3.4 bus2=262.1.2.3.4 phases=4 linecode=LC6 length=14.81844 units=m
! reduced_from=line208,line213,line218,line223,line228,line233,line238,line241,line245,line250,line255,line261
! eliminated_buses=209,214,219,224,229,234,239,242,246,251,256

New Line._virtual_line209_line214_line219_line224_line229_line234_line239_line242_line246_line251_line256_line262 bus1=206.1.2.3.4 bus2=263.1.2.3.4 phases=4 linecode=LC6 length=15.851799 units=m
! reduced_from=line209,line214,line219,line224,line229,line234,line239,line242,line246,line251,line256,line262
! eliminated_buses=210,215,220,225,230,235,240,243,247,252,257

New Line._virtual_line210_line215_line220_line225_line230_line235_line240 bus1=241.1.2.3.4 bus2=206.1.2.3.4 phases=4 linecode=LC4 length=16.79669 units=m
! reduced_from=line210,line215,line220,line225,line230,line235,line240
! eliminated_buses=211,216,221,226,231,236

New Line._virtual_line243_line247_line252_line257_line263_line268_line273_line279_line285_line291_line297_line303_line309 bus1=241.1.2.3.4 bus2=310.1.2.3.4 phases=4 linecode=LC6 length=12.584408 units=m
! reduced_from=line243,line247,line252,line257,line263,line268,line273,line279,line285,line291,line297,line303,line309
! eliminated_buses=244,248,253,258,264,269,274,280,286,292,298,304

New Line._virtual_line248_line253_line258_line264_line269_line274_line280_line286_line292_line298_line304_line310_line315_line320_line325_line330_line334_line337_line339_line341_line343_line345_line346_line347 bus1=348.1.2.3.4 bus2=245.1.2.3.4 phases=4 linecode=LC6 length=13.672958 units=m
! reduced_from=line248,line253,line258,line264,line269,line274,line280,line286,line292,line298,line304,line310,line315,line320,line325,line330,line334,line337,line339,line341,line343,line345,line346,line347
! eliminated_buses=249,254,259,265,270,275,281,287,293,299,305,311,316,321,326,331,335,338,340,342,344,346,347

New Line._virtual_line249_line254 bus1=245.1.2.3.4 bus2=255.1.2.3.4 phases=4 linecode=LC4 length=14.7886 units=m
! reduced_from=line249,line254
! eliminated_buses=250

New Line._virtual_line259_line265_line270_line275_line281_line287_line293_line299_line305_line311_line316_line321_line326_line331 bus1=255.1.2.3.4 bus2=332.1.2.3.4 phases=4 linecode=LC6 length=12.733192 units=m
! reduced_from=line259,line265,line270,line275,line281,line287,line293,line299,line305,line311,line316,line321,line326,line331
! eliminated_buses=260,266,271,276,282,288,294,300,306,312,317,322,327

New Line._virtual_line266_line271_line276_line282_line288_line294_line300_line306_line312_line317_line322_line327 bus1=261.1.2.3.4 bus2=328.1.2.3.4 phases=4 linecode=LC6 length=12.92768 units=m
! reduced_from=line266,line271,line276,line282,line288,line294,line300,line306,line312,line317,line322,line327
! eliminated_buses=267,272,277,283,289,295,301,307,313,318,323

New Line._virtual_line267_line272 bus1=273.1.2.3.4 bus2=261.1.2.3.4 phases=4 linecode=LC4 length=16.3019 units=m
! reduced_from=line267,line272
! eliminated_buses=268

New Line._virtual_line277_line283_line289_line295_line301_line307_line313_line318_line323_line328_line332_line335_line338_line340_line342_line344 bus1=345.1.2.3.4 bus2=273.1.2.3.4 phases=4 linecode=LC6 length=13.76247 units=m
! reduced_from=line277,line283,line289,line295,line301,line307,line313,line318,line323,line328,line332,line335,line338,line340,line342,line344
! eliminated_buses=278,284,290,296,302,308,314,319,324,329,333,336,339,341,343

New Line._virtual_line284_line290_line296_line302_line308_line314_line319_line324_line329_line333_line336 bus1=279.1.2.3.4 bus2=337.1.2.3.4 phases=4 linecode=LC6 length=11.93811 units=m
! reduced_from=line284,line290,line296,line302,line308,line314,line319,line324,line329,line333,line336
! eliminated_buses=285,291,297,303,309,315,320,325,330,334

New Line.LINE119 bus1=117.1.2.3.4 bus2=120.1.2.3.4 phases=4 linecode=LC4 length=18.5747 units=m

New Line.LINE244 bus1=241.1.2.3.4 bus2=245.1.2.3.4 phases=4 linecode=LC4 length=3.2485 units=m

New Line.LINE260 bus1=255.1.2.3.4 bus2=261.1.2.3.4 phases=4 linecode=LC4 length=2.6382 units=m

New Line.LINE278 bus1=273.1.2.3.4 bus2=279.1.2.3.4 phases=4 linecode=LC4 length=3.0112 units=m
