! Reduced enabled lines.

New Line._virtual_line0_line1_line2_line3_line4_line5_line6_line7_line8_line9_line10_line11_line12_line13_line14_line15_line16_line17_line18_line19_line20_line21_line22_line23_line24_line25_line26_line27_line28_line29_line30_line31_line32_line33_line34_line35_line36_line37_line38_line39_line40_line41 bus1=42.1.2.3.4 bus2=sourcebus.1.2.3.4 phases=4 linecode=LC8 length=18.586709 units=m
! reduced_from=line0,line1,line2,line3,line4,line5,line6,line7,line8,line9,line10,line11,line12,line13,line14,line15,line16,line17,line18,line19,line20,line21,line22,line23,line24,line25,line26,line27,line28,line29,line30,line31,line32,line33,line34,line35,line36,line37,line38,line39,line40,line41
! eliminated_buses=1,2,3,4,5,6,7,8,9,10,11,12,13,14,15,16,17,18,19,20,21,22,23,24,25,26,27,28,29,30,31,32,33,34,35,36,37,38,39,40,41

New Line._virtual_line42_line44_line46_line48_line50_line52_line54_line56_line58_line60_line62_line64_line66_line68_line70_line72_line74_line76_line78_line80_line82_line84_line86_line88_line90_line92_line94_line96_line98_line100_line102_line104_line106_line108_line110_line112_line114_line116_line118_line120_line122_line124_line126_line128_line130_line132 bus1=42.1.2.3.4 bus2=133.1.2.3.4 phases=4 linecode=LC8 length=28.273036 units=m
! reduced_from=line42,line44,line46,line48,line50,line52,line54,line56,line58,line60,line62,line64,line66,line68,line70,line72,line74,line76,line78,line80,line82,line84,line86,line88,line90,line92,line94,line96,line98,line100,line102,line104,line106,line108,line110,line112,line114,line116,line118,line120,line122,line124,line126,line128,line130,line132
! eliminated_buses=43,45,47,49,51,53,55,57,59,61,63,65,67,69,71,73,75,77,79,81,83,85,87,89,91,93,95,97,99,101,103,105,107,109,111,113,115,117,119,121,123,125,127,129,131

New Line._virtual_line43_line45_line47_line49_line51_line53_line55_line57_line59_line61_line63_line65_line67_line69_line71_line73_line75_line77_line79_line81_line83_line85_line87_line89_line91_line93_line95_line97_line99_line101_line103_line105_line107_line109_line111_line113_line115_line117_line119_line121_line123_line125_line127_line129_line131_line133_line136_line140_line143_line146_line149_line152_line155_line158_line161_line164_line167_line170_line173_line176_line179 bus1=180.1.2.3.4 bus2=42.1.2.3.4 phases=4 linecode=LC5 length=37.166503 units=m
! reduced_from=line43,line45,line47,line49,line51,line53,line55,line57,line59,line61,line63,line65,line67,line69,line71,line73,line75,line77,line79,line81,line83,line85,line87,line89,line91,line93,line95,line97,line99,line101,line103,line105,line107,line109,line111,line113,line115,line117,line119,line121,line123,line125,line127,line129,line131,line133,line136,line140,line143,line146,line149,line152,line155,line158,line161,line164,line167,line170,line173,line176,line179
! eliminated_buses=44,46,48,50,52,54,56,58,60,62,64,66,68,70,72,74,76,78,80,82,84,86,88,90,92,94,96,98,100,102,104,106,108,110,112,114,116,118,120,122,124,126,128,130,132,134,137,141,144,147,150,153,156,159,162,165,168,171,174,177

New Line._virtual_line134_line137_line141_line144_line147_line150_line153_line156_line159_line162_line165_line168_line171_line174_line177_line180_line185_line192_line200_line211_line224_line237_line252_line268_line283_line298_line315_line334_line354_line377_line403_line432_line461_line490_line515_line542 bus1=133.1.2.3.4 bus2=543.1.2.3.4 phases=4 linecode=LC8 length=12.738201 units=m
! reduced_from=line134,line137,line141,line144,line147,line150,line153,line156,line159,line162,line165,line168,line171,line174,line177,line180,line185,line192,line200,line211,line224,line237,line252,line268,line283,line298,line315,line334,line354,line377,line403,line432,line461,line490,line515,line542
! eliminated_buses=135,138,142,145,148,151,154,157,160,163,166,169,172,175,178,181,186,193,201,212,225,238,253,269,284,299,316,335,355,378,404,433,462,491,516

New Line._virtual_line135_line139_line142_line145_line148_line151_line154_line157_line160_line163_line166_line169_line172_line175_line178 bus1=133.1.2.3.4 bus2=179.1.2.3.4 phases=4 linecode=LC8 length=33.78349 units=m
! reduced_from=line135,line139,line142,line145,line148,line151,line154,line157,line160,line163,line166,line169,line172,line175,line178
! eliminated_buses=136,140,143,146,149,152,155,158,161,164,167,170,173,176

New Line._virtual_line181_line186 bus1=179.1.2.3.4 bus2=187.1.2.3.4 phases=4 linecode=LC8 length=4.8257 units=m
! reduced_from=line181,line186
! eliminated_buses=182

New Line._virtual_line182_line188 bus1=189.1.2.3.4 bus2=179.1.2.3.4 phases=4 linecode=LC8 length=4.5615 units=m
! reduced_from=line182,line188
! eliminated_buses=183

New Line._virtual_line183_line189_line197_line206_line219_line232_line247_line263_line278 bus1=180.1.2.3.4 bus2=279.1.2.3.4 phases=4 linecode=LC8 length=28.04439 units=m
! reduced_from=line183,line189,line197,line206,line219,line232,line247,line263,line278
! eliminated_buses=184,190,198,207,220,233,248,264

New Line._virtual_line184_line191_line199 bus1=180.1.2.3.4 bus2=200.1.2.3.4 phases=4 linecode=LC8 length=11.68961 units=m
! reduced_from=line184,line191,line199
! eliminated_buses=185,192

New Line._virtual_line193_line202_line213_line226_line239_line254_line270_line285_line300_line317_line336_line356_line379_line405_line434 bus1=435.1.2.3.4 bus2=187.1.2.3.4 phases=4 linecode=LC6 length=20.268741 units=m
! reduced_from=line193,line202,line213,line226,line239,line254,line270,line285,line300,line317,line336,line356,line379,line405,line434
! eliminated_buses=194,203,214,227,240,255,271,286,301,318,337,357,380,406

New Line._virtual_line195_line204_line215_line228_line241 bus1=189.1.2.3.4 bus2=242.1.2.3.4 phases=4 linecode=LC6 length=6.50707 units=m
! reduced_from=line195,line204,line215,line228,line241
! eliminated_buses=196,205,216,229

New Line._virtual_line196_line205 bus1=189.1.2.3.4 bus2=206.1.2.3.4 phases=4 linecode=LC8 length=17.5951 units=m
! reduced_from=line196,line205
! eliminated_buses=197

New Line._virtual_line208_line222_line235_line250_line266_line281_line295_line312 bus1=200.1.2.3.4 bus2=313.1.2.3.4 phases=4 linecode=LC5 length=17.447655 units=m
! reduced_from=line208,line222,line235,line250,line266,line281,line295,line312
! eliminated_buses=209,223,236,251,267,282,296

New Line._virtual_line217_line229_line242_line258_line272_line287_line302 bus1=206.1.2.3.4 bus2=303.1.2.3.4 phases=4 linecode=LC6 length=6.1317 units=m
! reduced_from=line217,line229,line242,line258,line272,line287,line302
! eliminated_buses=218,230,243,259,273,288

New Line._virtual_line218_line231 bus1=232.1.2.3.4 bus2=206.1.2.3.4 phases=4 linecode=LC8 length=9.7246 units=m
! reduced_from=line218,line231
! eliminated_buses=219

New Line._virtual_line245_line260_line274_line288 bus1=289.1.2.3.4 bus2=232.1.2.3.4 phases=4 linecode=LC6 length=5.80664 units=m
! reduced_from=line245,line260,line274,line288
! eliminated_buses=246,261,275

New Line._virtual_line246_line262_line276_line290_line306_line323_line341_line361_line384_line410_line438_line466_line494_line519_line544_line571_line591_line611_line631_line651_line669_line687_line704 bus1=705.1.2.3.4 bus2=232.1.2.3.4 phases=4 linecode=LC8 length=26.036699 units=m
! reduced_from=line246,line262,line276,line290,line306,line323,line341,line361,line384,line410,line438,line466,line494,line519,line544,line571,line591,line611,line631,line651,line669,line687,line704
! eliminated_buses=247,263,277,291,307,324,342,362,385,411,439,467,495,520,545,572,592,612,632,652,670,688

New Line._virtual_line256_line271_line286_line301_line318_line337_line357_line380_line406 bus1=242.1.2.3.4 bus2=407.1.2.3.4 phases=4 linecode=LC6 length=11.26133 units=m
! reduced_from=line256,line271,line286,line301,line318,line337,line357,line380,line406
! eliminated_buses=257,272,287,302,319,338,358,381

New Line._virtual_line292_line308_line325_line343_line363_line386_line412_line440_line468_line495_line520_line545 bus1=279.1.2.3.4 bus2=546.1.2.3.4 phases=4 linecode=LC2 length=13.07724 units=m
! reduced_from=line292,line308,line325,line343,line363,line386,line412,line440,line468,line495,line520,line545
! eliminated_buses=293,309,326,344,364,387,413,441,469,496,521

New Line._virtual_line303_line321_line339_line359_line382_line408_line436_line464_line492_line517 bus1=289.1.2.3.4 bus2=518.1.2.3.4 phases=4 linecode=LC6 length=11.95113 units=m
! reduced_from=line303,line321,line339,line359,line382,line408,line436,line464,line492,line517
! eliminated_buses=304,322,340,360,383,409,437,465,493

New Line._virtual_line309_line326_line344_line364_line387_line413_line441_line469_line496_line521 bus1=522.1.2.3.4 bus2=294.1.2.3.4 phases=4 linecode=LC2 length=7.73708 units=m
! reduced_from=line309,line326,line344,line364,line387,line413,line441,line469,line496,line521
! eliminated_buses=310,327,345,365,388,414,442,470,497

New Line._virtual_line310_line327_line345 bus1=346.1.2.3.4 bus2=294.1.2.3.4 phases=4 linecode=LC8 length=9.84729 units=m
! reduced_from=line310,line327,line345
! eliminated_buses=311,328

New Line._virtual_line319_line338_line358_line381_line407_line435_line463_line491_line516 bus1=303.1.2.3.4 bus2=517.1.2.3.4 phases=4 linecode=LC6 length=10.2834 units=m
! reduced_from=line319,line338,line358,line381,line407,line435,line463,line491,line516
! eliminated_buses=320,339,359,382,408,436,464,492

New Line._virtual_line330_line351_line374_line400_line429_line458_line486_line512_line537_line561_line585_line605_line625_line645_line664_line682_line699_line715_line732_line748_line763_line776_line789_line802_line816_line827_line839_line852_line865_line877_line889_line901_line913_line924_line935_line947_line958_line969_line980 bus1=313.1.2.3.4 bus2=981.1.2.3.4 phases=4 linecode=LC2 length=26.618253 units=m
! reduced_from=line330,line351,line374,line400,line429,line458,line486,line512,line537,line561,line585,line605,line625,line645,line664,line682,line699,line715,line732,line748,line763,line776,line789,line802,line816,line827,line839,line852,line865,line877,line889,line901,line913,line924,line935,line947,line958,line969,line980
! eliminated_buses=331,352,375,401,430,459,487,513,538,562,586,606,626,646,665,683,700,716,733,749,764,777,790,803,817,828,840,853,866,878,890,902,914,925,936,948,959,970

New Line._virtual_line331_line352_line375_line401_line430_line459_line487_line513_line538_line562_line586_line606_line626_line646_line665_line683_line700_line716_line733 bus1=734.1.2.3.4 bus2=313.1.2.3.4 phases=4 linecode=LC2 length=20.011175 units=m
! reduced_from=line331,line352,line375,line401,line430,line459,line487,line513,line538,line562,line586,line606,line626,line646,line665,line683,line700,line716,line733
! eliminated_buses=332,353,376,402,431,460,488,514,539,563,587,607,627,647,666,684,701,717

New Line._virtual_line347_line368_line391_line417_line445_line473_line500_line525_line550_line574_line594_line614_line634_line653_line671_line688_line705_line722_line739_line754_line770_line783_line797_line812_line823_line835_line848_line861_line874_line886_line898 bus1=330.1.2.3.4 bus2=899.1.2.3.4 phases=4 linecode=LC2 length=29.140623 units=m
! reduced_from=line347,line368,line391,line417,line445,line473,line500,line525,line550,line574,line594,line614,line634,line653,line671,line688,line705,line722,line739,line754,line770,line783,line797,line812,line823,line835,line848,line861,line874,line886,line898
! eliminated_buses=348,369,392,418,446,474,501,526,551,575,595,615,635,654,672,689,706,723,740,755,771,784,798,813,824,836,849,862,875,887

New Line._virtual_line348_line369_line392_line418_line446_line474_line501_line526_line551_line575_line595_line615_line635_line654_line672_line689_line706_line723_line740_line755 bus1=756.1.2.3.4 bus2=330.1.2.3.4 phases=4 linecode=LC2 length=22.908595 units=m
! reduced_from=line348,line369,line392,line418,line446,line474,line501,line526,line551,line575,line595,line615,line635,line654,line672,line689,line706,line723,line740,line755
! eliminated_buses=349,370,393,419,447,475,502,527,552,576,596,616,636,655,673,690,707,724,741

New Line._virtual_line365_line388_line414_line442_line470_line497_line522_line548_line572_line592_line612_line632 bus1=633.1.2.3.4 bus2=346.1.2.3.4 phases=4 linecode=LC2 length=13.36563 units=m
! reduced_from=line365,line388,line414,line442,line470,line497,line522,line548,line572,line592,line612,line632
! eliminated_buses=366,389,415,443,471,498,523,549,573,593,613

New Line._virtual_line366_line389 bus1=346.1.2.3.4 bus2=390.1.2.3.4 phases=4 linecode=LC8 length=5.8582 units=m
! reduced_from=line366,line389
! eliminated_buses=367

New Line._virtual_line393_line419_line447_line475_line502_line527_line552_line576_line596_line616_line636_line655_line673_line690_line707_line724_line741_line756_line771_line784_line798_line813_line824_line836_line849_line862_line875_line887_line899_line911_line922_line933_line945_line956_line967_line978 bus1=371.1.2.3.4 bus2=979.1.2.3.4 phases=4 linecode=LC2 length=27.016436 units=m
! reduced_from=line393,line419,line447,line475,line502,line527,line552,line576,line596,line616,line636,line655,line673,line690,line707,line724,line741,line756,line771,line784,line798,line813,line824,line836,line849,line862,line875,line887,line899,line911,line922,line933,line945,line956,line967,line978
! eliminated_buses=394,420,448,476,503,528,553,577,597,617,637,656,674,691,708,725,742,757,772,785,799,814,825,837,850,863,876,888,900,912,923,934,946,957,968

New Line._virtual_line394_line420_line448_line476_line503_line528_line553_line577_line597_line617_line637_line656_line674_line691_line708_line725 bus1=726.1.2.3.4 bus2=371.1.2.3.4 phases=4 linecode=LC2 length=19.20086 units=m
! reduced_from=line394,line420,line448,line476,line503,line528,line553,line577,line597,line617,line637,line656,line674,line691,line708,line725
! eliminated_buses=395,421,449,477,504,529,554,578,598,618,638,657,675,692,709

New Line._virtual_line395_line423 bus1=424.1.2.3.4 bus2=371.1.2.3.4 phases=4 linecode=LC5 length=27.5179 units=m
! reduced_from=line395,line423
! eliminated_buses=396

New Line._virtual_line396_line424_line453_line481_line507_line532_line557_line581_line601_line621_line641_line660_line678_line695_line711_line728_line744_line759_line773_line786_line800_line815_line826_line838_line851_line864_line876_line888_line900_line912_line923_line934_line946_line957_line968_line979_line990_line1001_line1012_line1022_line1036 bus1=372.1.2.3.4 bus2=1037.1.2.3.4 phases=4 linecode=LC2 length=29.322539 units=m
! reduced_from=line396,line424,line453,line481,line507,line532,line557,line581,line601,line621,line641,line660,line678,line695,line711,line728,line744,line759,line773,line786,line800,line815,line826,line838,line851,line864,line876,line888,line900,line912,line923,line934,line946,line957,line968,line979,line990,line1001,line1012,line1022,line1036
! eliminated_buses=397,425,454,482,508,533,558,582,602,622,642,661,679,696,712,729,745,760,774,787,801,816,827,839,852,865,877,889,901,913,924,935,947,958,969,980,991,1002,1013,1023

New Line._virtual_line397_line425_line454_line482_line508_line533_line558_line582_line602_line622_line642_line661_line679_line696_line712_line729_line745_line760 bus1=761.1.2.3.4 bus2=372.1.2.3.4 phases=4 linecode=LC2 length=16.150731 units=m
! reduced_from=line397,line425,line454,line482,line508,line533,line558,line582,line602,line622,line642,line661,line679,line696,line712,line729,line745,line760
! eliminated_buses=398,426,455,483,509,534,559,583,603,623,643,662,680,697,713,730,746

New Line._virtual_line415_line443_line471_line498_line523_line549_line573_line593_line613_line633_line652_line670 bus1=390.1.2.3.4 bus2=671.1.2.3.4 phases=4 linecode=LC2 length=13.14486 units=m
! reduced_from=line415,line443,line471,line498,line523,line549,line573,line593,line613,line633,line652,line670
! eliminated_buses=416,444,472,499,524,550,574,594,614,634,653

New Line._virtual_line426_line455_line483_line509_line534_line559_line583_line603_line623_line643_line662_line680_line697_line713_line730_line746_line761_line774_line787_line801 bus1=802.1.2.3.4 bus2=399.1.2.3.4 phases=4 linecode=LC2 length=18.64109 units=m
! reduced_from=line426,line455,line483,line509,line534,line559,line583,line603,line623,line643,line662,line680,line697,line713,line730,line746,line761,line774,line787,line801
! eliminated_buses=427,456,484,510,535,560,584,604,624,644,663,681,698,714,731,747,762,775,788

New Line._virtual_line451_line479_line505_line530_line555_line579_line599_line619_line639_line658_line676_line693 bus1=424.1.2.3.4 bus2=694.1.2.3.4 phases=4 linecode=LC2 length=14.83483 units=m
! reduced_from=line451,line479,line505,line530,line555,line579,line599,line619,line639,line658,line676,line693
! eliminated_buses=452,480,506,531,556,580,600,620,640,659,677

New Line._virtual_line480_line506_line531_line556_line580_line600_line620_line640_line659_line677_line694_line710_line727_line743_line758 bus1=453.1.2.3.4 bus2=759.1.2.3.4 phases=4 linecode=LC2 length=10.90617 units=m
! reduced_from=line480,line506,line531,line556,line580,line600,line620,line640,line659,line677,line694,line710,line727,line743,line758
! eliminated_buses=481,507,532,557,581,601,621,641,660,678,695,711,728,744

New Line._virtual_line720_line736_line751_line766_line779_line792 bus1=705.1.2.3.4 bus2=793.1.2.3.4 phases=4 linecode=LC8 length=13.313863 units=m
! reduced_from=line720,line736,line751,line766,line779,line792
! eliminated_buses=721,737,752,767,780

New Line._virtual_line721_line737_line752_line767_line780_line794_line808_line820_line833_line846_line859_line872_line884_line896_line910_line921 bus1=922.1.2.3.4 bus2=705.1.2.3.4 phases=4 linecode=LC8 length=61.55377 units=m
! reduced_from=line721,line737,line752,line767,line780,line794,line808,line820,line833,line846,line859,line872,line884,line896,line910,line921
! eliminated_buses=722,738,753,768,781,795,809,821,834,847,860,873,885,897,911

New Line._virtual_line805_line818_line831 bus1=793.1.2.3.4 bus2=832.1.2.3.4 phases=4 linecode=LC8 length=14.1684 units=m
! reduced_from=line805,line818,line831
! eliminated_buses=806,819

New Line._virtual_line843_line856_line869_line881_line893 bus1=894.1.2.3.4 bus2=832.1.2.3.4 phases=4 linecode=LC8 length=13.14366 units=m
! reduced_from=line843,line856,line869,line881,line893
! eliminated_buses=844,857,870,882

New Line._virtual_line844_line857_line870_line882_line894_line906 bus1=832.1.2.3.4 bus2=907.1.2.3.4 phases=4 linecode=LC6 length=15.90272 units=m
! reduced_from=line844,line857,line870,line882,line894,line906
! eliminated_buses=845,858,871,883,895

New Line._virtual_line904_line916_line927_line938_line950_line961_line972_line983_line993_line1004_line1014 bus1=1015.1.2.3.4 bus2=894.1.2.3.4 phases=4 linecode=LC4 length=15.45716 units=m
! reduced_from=line904,line916,line927,line938,line950,line961,line972,line983,line993,line1004,line1014
! eliminated_buses=905,917,928,939,951,962,973,984,994,1005

New Line._virtual_line905_line917_line928_line939_line951_line962_line973_line985_line996_line1007_line1017_line1027_line1040_line1057_line1076_line1096_line1116_line1136_line1157_line1179_line1199_line1217_line1233_line1248_line1261_line1275_line1289_line1304_line1319_line1335_line1358_line1383_line1410 bus1=894.1.2.3.4 bus2=1411.1.2.3.4 phases=4 linecode=LC8 length=69.06866 units=m
! reduced_from=line905,line917,line928,line939,line951,line962,line973,line985,line996,line1007,line1017,line1027,line1040,line1057,line1076,line1096,line1116,line1136,line1157,line1179,line1199,line1217,line1233,line1248,line1261,line1275,line1289,line1304,line1319,line1335,line1358,line1383,line1410
! eliminated_buses=906,918,929,940,952,963,974,986,997,1008,1018,1028,1041,1058,1077,1097,1117,1137,1158,1180,1200,1218,1234,1249,1262,1276,1290,1305,1320,1336,1359,1384

New Line._virtual_line931_line943_line954_line965_line976_line988_line999_line1010_line1020_line1030_line1043_line1061_line1080_line1099_line1119_line1139_line1160_line1182_line1202_line1220_line1236_line1251 bus1=1252.1.2.3.4 bus2=922.1.2.3.4 phases=4 linecode=LC8 length=15.955333 units=m
! reduced_from=line931,line943,line954,line965,line976,line988,line999,line1010,line1020,line1030,line1043,line1061,line1080,line1099,line1119,line1139,line1160,line1182,line1202,line1220,line1236,line1251
! eliminated_buses=932,944,955,966,977,989,1000,1011,1021,1031,1044,1062,1081,1100,1120,1140,1161,1183,1203,1221,1237

New Line._virtual_line944_line955_line966_line977_line989_line1000_line1011_line1021 bus1=933.1.2.3.4 bus2=1022.1.2.3.4 phases=4 linecode=LC9 length=13.41036 units=m
! reduced_from=line944,line955,line966,line977,line989,line1000,line1011,line1021
! eliminated_buses=945,956,967,978,990,1001,1012

New Line._virtual_line1023_line1037 bus1=1015.1.2.3.4 bus2=1038.1.2.3.4 phases=4 linecode=LC4 length=1.52142 units=m
! reduced_from=line1023,line1037
! eliminated_buses=1024

New Line._virtual_line1024_line1038_line1055_line1074_line1094_line1114_line1134_line1155_line1177_line1197_line1215_line1230_line1245_line1258_line1272 bus1=1015.1.2.3.4 bus2=1273.1.2.3.4 phases=4 linecode=LC4 length=19.0515 units=m
! reduced_from=line1024,line1038,line1055,line1074,line1094,line1114,line1134,line1155,line1177,line1197,line1215,line1230,line1245,line1258,line1272
! eliminated_buses=1025,1039,1056,1075,1095,1115,1135,1156,1178,1198,1216,1231,1246,1259

New Line._virtual_line1031_line1044_line1062_line1081_line1100_line1120_line1140_line1161 bus1=1022.1.2.3.4 bus2=1162.1.2.3.4 phases=4 linecode=LC2 length=20.470562 units=m
! reduced_from=line1031,line1044,line1062,line1081,line1100,line1120,line1140,line1161
! eliminated_buses=1032,1045,1063,1082,1101,1121,1141

New Line._virtual_line1033_line1050_line1068_line1087_line1106_line1126_line1146_line1167_line1187_line1206 bus1=1207.1.2.3.4 bus2=1022.1.2.3.4 phases=4 linecode=LC2 length=18.95372 units=m
! reduced_from=line1033,line1050,line1068,line1087,line1106,line1126,line1146,line1167,line1187,line1206
! eliminated_buses=1034,1051,1069,1088,1107,1127,1147,1168,1188

New Line._virtual_line1034_line1051_line1069_line1088_line1107_line1127_line1147_line1169_line1189 bus1=1190.1.2.3.4 bus2=1022.1.2.3.4 phases=4 linecode=LC2 length=14.5498 units=m
! reduced_from=line1034,line1051,line1069,line1088,line1107,line1127,line1147,line1169,line1189
! eliminated_buses=1035,1052,1070,1089,1108,1128,1148,1170

New Line._virtual_line1035_line1052_line1070_line1089_line1108_line1128_line1148_line1170_line1190 bus1=1191.1.2.3.4 bus2=1022.1.2.3.4 phases=4 linecode=LC2 length=15.98311 units=m
! reduced_from=line1035,line1052,line1070,line1089,line1108,line1128,line1148,line1170,line1190
! eliminated_buses=1036,1053,1071,1090,1109,1129,1149,1171

New Line._virtual_line1045_line1063_line1082_line1101_line1121_line1141_line1162_line1183_line1203_line1221_line1237_line1252_line1266_line1280_line1294_line1309_line1324 bus1=1325.1.2.3.4 bus2=1033.1.2.3.4 phases=4 linecode=LC9 length=22.02639 units=m
! reduced_from=line1045,line1063,line1082,line1101,line1121,line1141,line1162,line1183,line1203,line1221,line1237,line1252,line1266,line1280,line1294,line1309,line1324
! eliminated_buses=1046,1064,1083,1102,1122,1142,1163,1184,1204,1222,1238,1253,1267,1281,1295,1310

New Line._virtual_line1046_line1064_line1083_line1102_line1122_line1142_line1163 bus1=1033.1.2.3.4 bus2=1164.1.2.3.4 phases=4 linecode=LC2 length=19.5083 units=m
! reduced_from=line1046,line1064,line1083,line1102,line1122,line1142,line1163
! eliminated_buses=1047,1065,1084,1103,1123,1143

New Line._virtual_line1047_line1065_line1084_line1103_line1123_line1143_line1164_line1184 bus1=1033.1.2.3.4 bus2=1185.1.2.3.4 phases=4 linecode=LC2 length=19.76233 units=m
! reduced_from=line1047,line1065,line1084,line1103,line1123,line1143,line1164,line1184
! eliminated_buses=1048,1066,1085,1104,1124,1144,1165

New Line._virtual_line1048_line1066_line1085_line1104_line1124_line1144_line1165_line1185_line1204 bus1=1205.1.2.3.4 bus2=1033.1.2.3.4 phases=4 linecode=LC2 length=15.83847 units=m
! reduced_from=line1048,line1066,line1085,line1104,line1124,line1144,line1165,line1185,line1204
! eliminated_buses=1049,1067,1086,1105,1125,1145,1166,1186

New Line._virtual_line1049_line1067_line1086_line1105_line1125_line1145_line1166_line1186_line1205_line1222_line1238 bus1=1033.1.2.3.4 bus2=1239.1.2.3.4 phases=4 linecode=LC2 length=15.127452 units=m
! reduced_from=line1049,line1067,line1086,line1105,line1125,line1145,line1166,line1186,line1205,line1222,line1238
! eliminated_buses=1050,1068,1087,1106,1126,1146,1167,1187,1206,1223

New Line._virtual_line1054_line1073_line1093_line1113_line1133_line1154 bus1=1038.1.2.3.4 bus2=1155.1.2.3.4 phases=4 linecode=LC6 length=12.90526 units=m
! reduced_from=line1054,line1073,line1093,line1113,line1133,line1154
! eliminated_buses=1055,1074,1094,1114,1134

New Line._virtual_line1072_line1092_line1112_line1132_line1153_line1176 bus1=1054.1.2.3.4 bus2=1177.1.2.3.4 phases=4 linecode=LC6 length=9.5773 units=m
! reduced_from=line1072,line1092,line1112,line1132,line1153,line1176
! eliminated_buses=1073,1093,1113,1133,1154

New Line._virtual_line1091_line1111_line1131_line1152_line1175_line1196 bus1=1072.1.2.3.4 bus2=1197.1.2.3.4 phases=4 linecode=LC6 length=8.26633 units=m
! reduced_from=line1091,line1111,line1131,line1152,line1175,line1196
! eliminated_buses=1092,1112,1132,1153,1176

New Line._virtual_line1109_line1129 bus1=1091.1.2.3.4 bus2=1130.1.2.3.4 phases=4 linecode=LC4 length=9.2744 units=m
! reduced_from=line1109,line1129
! eliminated_buses=1110

New Line._virtual_line1110_line1130_line1151_line1174_line1195_line1214 bus1=1091.1.2.3.4 bus2=1215.1.2.3.4 phases=4 linecode=LC6 length=10.05158 units=m
! reduced_from=line1110,line1130,line1151,line1174,line1195,line1214
! eliminated_buses=1111,1131,1152,1175,1196

New Line._virtual_line1149_line1171 bus1=1172.1.2.3.4 bus2=1130.1.2.3.4 phases=4 linecode=LC4 length=4.36899 units=m
! reduced_from=line1149,line1171
! eliminated_buses=1150

New Line._virtual_line1150_line1173_line1194_line1213_line1229_line1244 bus1=1245.1.2.3.4 bus2=1130.1.2.3.4 phases=4 linecode=LC6 length=7.82894 units=m
! reduced_from=line1150,line1173,line1194,line1213,line1229,line1244
! eliminated_buses=1151,1174,1195,1214,1230

New Line._virtual_line1191_line1208_line1224_line1239_line1253_line1267_line1281_line1295 bus1=1296.1.2.3.4 bus2=1172.1.2.3.4 phases=4 linecode=LC6 length=8.489408 units=m
! reduced_from=line1191,line1208,line1224,line1239,line1253,line1267,line1281,line1295
! eliminated_buses=1192,1209,1225,1240,1254,1268,1282

New Line._virtual_line1210_line1226_line1241_line1255_line1269_line1282_line1296 bus1=1193.1.2.3.4 bus2=1297.1.2.3.4 phases=4 linecode=LC6 length=5.74535 units=m
! reduced_from=line1210,line1226,line1241,line1255,line1269,line1282,line1296
! eliminated_buses=1211,1227,1242,1256,1270,1283

New Line._virtual_line1211_line1227_line1242_line1256_line1270_line1283_line1297_line1312_line1327_line1349_line1374 bus1=1375.1.2.3.4 bus2=1193.1.2.3.4 phases=4 linecode=LC4 length=11.062322 units=m
! reduced_from=line1211,line1227,line1242,line1256,line1270,line1283,line1297,line1312,line1327,line1349,line1374
! eliminated_buses=1212,1228,1243,1257,1271,1284,1298,1313,1328,1350

New Line._virtual_line1264_line1278_line1292_line1307_line1322_line1338_line1361_line1386_line1412_line1443_line1475_line1506_line1537_line1567_line1593 bus1=1252.1.2.3.4 bus2=1594.1.2.3.4 phases=4 linecode=LC9 length=14.79642 units=m
! reduced_from=line1264,line1278,line1292,line1307,line1322,line1338,line1361,line1386,line1412,line1443,line1475,line1506,line1537,line1567,line1593
! eliminated_buses=1265,1279,1293,1308,1323,1339,1362,1387,1413,1444,1476,1507,1538,1568

New Line._virtual_line1265_line1279_line1293_line1308_line1323_line1341_line1366 bus1=1367.1.2.3.4 bus2=1252.1.2.3.4 phases=4 linecode=LC9 length=28.71405 units=m
! reduced_from=line1265,line1279,line1293,line1308,line1323,line1341,line1366
! eliminated_buses=1266,1280,1294,1309,1324,1342

New Line._virtual_line1285_line1298_line1313 bus1=1273.1.2.3.4 bus2=1314.1.2.3.4 phases=4 linecode=LC4 length=4.54094 units=m
! reduced_from=line1285,line1298,line1313
! eliminated_buses=1286,1299

New Line._virtual_line1286_line1300_line1315_line1331_line1354_line1380_line1407_line1437_line1468_line1499_line1530_line1560_line1585_line1608_line1629_line1645_line1659_line1672_line1684_line1695_line1705_line1713_line1722 bus1=1723.1.2.3.4 bus2=1273.1.2.3.4 phases=4 linecode=LC2 length=13.715676 units=m
! reduced_from=line1286,line1300,line1315,line1331,line1354,line1380,line1407,line1437,line1468,line1499,line1530,line1560,line1585,line1608,line1629,line1645,line1659,line1672,line1684,line1695,line1705,line1713,line1722
! eliminated_buses=1287,1301,1316,1332,1355,1381,1408,1438,1469,1500,1531,1561,1586,1609,1630,1646,1660,1673,1685,1696,1706,1714

New Line._virtual_line1310_line1325_line1347_line1372_line1400_line1429_line1459_line1490_line1520_line1550 bus1=1551.1.2.3.4 bus2=1297.1.2.3.4 phases=4 linecode=LC6 length=13.99827 units=m
! reduced_from=line1310,line1325,line1347,line1372,line1400,line1429,line1459,line1490,line1520,line1550
! eliminated_buses=1311,1326,1348,1373,1401,1430,1460,1491,1521

New Line._virtual_line1311_line1326_line1348_line1373_line1401_line1430_line1460 bus1=1297.1.2.3.4 bus2=1461.1.2.3.4 phases=4 linecode=LC6 length=10.55326 units=m
! reduced_from=line1311,line1326,line1348,line1373,line1401,line1430,line1460
! eliminated_buses=1312,1327,1349,1374,1402,1431

New Line._virtual_line1329_line1352_line1378_line1406_line1436_line1467_line1498_line1529_line1559_line1584_line1607_line1628_line1644_line1658_line1671_line1683 bus1=1314.1.2.3.4 bus2=1684.1.2.3.4 phases=4 linecode=LC2 length=12.963541 units=m
! reduced_from=line1329,line1352,line1378,line1406,line1436,line1467,line1498,line1529,line1559,line1584,line1607,line1628,line1644,line1658,line1671,line1683
! eliminated_buses=1330,1353,1379,1407,1437,1468,1499,1530,1560,1585,1608,1629,1645,1659,1672

New Line._virtual_line1342_line1367_line1394_line1422_line1452_line1483_line1513_line1544_line1573 bus1=1325.1.2.3.4 bus2=1574.1.2.3.4 phases=4 linecode=LC2 length=15.56752 units=m
! reduced_from=line1342,line1367,line1394,line1422,line1452,line1483,line1513,line1544,line1573
! eliminated_buses=1343,1368,1395,1423,1453,1484,1514,1545

New Line._virtual_line1343_line1368_line1395_line1423_line1453_line1484_line1514_line1545_line1574_line1599 bus1=1325.1.2.3.4 bus2=1600.1.2.3.4 phases=4 linecode=LC2 length=18.02179 units=m
! reduced_from=line1343,line1368,line1395,line1423,line1453,line1484,line1514,line1545,line1574,line1599
! eliminated_buses=1344,1369,1396,1424,1454,1485,1515,1546,1575

New Line._virtual_line1344_line1369_line1396_line1424_line1454_line1485_line1515_line1546_line1575 bus1=1576.1.2.3.4 bus2=1325.1.2.3.4 phases=4 linecode=LC2 length=14.4244 units=m
! reduced_from=line1344,line1369,line1396,line1424,line1454,line1485,line1515,line1546,line1575
! eliminated_buses=1345,1370,1397,1425,1455,1486,1516,1547

New Line._virtual_line1345_line1370_line1397_line1425_line1455_line1486_line1516 bus1=1325.1.2.3.4 bus2=1517.1.2.3.4 phases=4 linecode=LC2 length=15.27658 units=m
! reduced_from=line1345,line1370,line1397,line1425,line1455,line1486,line1516
! eliminated_buses=1346,1371,1398,1426,1456,1487

New Line._virtual_line1346_line1371_line1398 bus1=1325.1.2.3.4 bus2=1399.1.2.3.4 phases=4 linecode=LC9 length=13.5844 units=m
! reduced_from=line1346,line1371,line1398
! eliminated_buses=1347,1372

New Line._virtual_line1351_line1377_line1405_line1435_line1466_line1497_line1528_line1558_line1583_line1606_line1627 bus1=1628.1.2.3.4 bus2=1329.1.2.3.4 phases=4 linecode=LC2 length=11.42991 units=m
! reduced_from=line1351,line1377,line1405,line1435,line1466,line1497,line1528,line1558,line1583,line1606,line1627
! eliminated_buses=1352,1378,1406,1436,1467,1498,1529,1559,1584,1607

New Line._virtual_line1375_line1404_line1434_line1465_line1496_line1527_line1557_line1582_line1605_line1626_line1643_line1657_line1670_line1682_line1694_line1704 bus1=1351.1.2.3.4 bus2=1705.1.2.3.4 phases=4 linecode=LC2 length=17.40683 units=m
! reduced_from=line1375,line1404,line1434,line1465,line1496,line1527,line1557,line1582,line1605,line1626,line1643,line1657,line1670,line1682,line1694,line1704
! eliminated_buses=1376,1405,1435,1466,1497,1528,1558,1583,1606,1627,1644,1658,1671,1683,1695

New Line._virtual_line1391_line1418_line1448_line1479_line1509_line1540_line1569_line1595_line1619_line1639_line1655 bus1=1367.1.2.3.4 bus2=1656.1.2.3.4 phases=4 linecode=LC2 length=27.65582 units=m
! reduced_from=line1391,line1418,line1448,line1479,line1509,line1540,line1569,line1595,line1619,line1639,line1655
! eliminated_buses=1392,1419,1449,1480,1510,1541,1570,1596,1620,1640

New Line._virtual_line1392_line1419_line1449_line1480_line1510_line1541_line1570_line1596_line1620_line1640_line1656_line1669 bus1=1670.1.2.3.4 bus2=1367.1.2.3.4 phases=4 linecode=LC2 length=27.8085 units=m
! reduced_from=line1392,line1419,line1449,line1480,line1510,line1541,line1570,line1596,line1620,line1640,line1656,line1669
! eliminated_buses=1393,1420,1450,1481,1511,1542,1571,1597,1621,1641,1657

New Line._virtual_line1402_line1431 bus1=1432.1.2.3.4 bus2=1375.1.2.3.4 phases=4 linecode=LC4 length=8.1915 units=m
! reduced_from=line1402,line1431
! eliminated_buses=1403

New Line._virtual_line1403_line1433_line1464_line1495_line1526_line1556_line1581 bus1=1375.1.2.3.4 bus2=1582.1.2.3.4 phases=4 linecode=LC6 length=10.19593 units=m
! reduced_from=line1403,line1433,line1464,line1495,line1526,line1556,line1581
! eliminated_buses=1404,1434,1465,1496,1527,1557

New Line._virtual_line1426_line1456_line1487_line1517_line1547_line1576_line1600 bus1=1399.1.2.3.4 bus2=1601.1.2.3.4 phases=4 linecode=LC2 length=19.5097 units=m
! reduced_from=line1426,line1456,line1487,line1517,line1547,line1576,line1600
! eliminated_buses=1427,1457,1488,1518,1548,1577

New Line._virtual_line1427_line1457_line1488_line1518_line1548 bus1=1399.1.2.3.4 bus2=1549.1.2.3.4 phases=4 linecode=LC2 length=15.65769 units=m
! reduced_from=line1427,line1457,line1488,line1518,line1548
! eliminated_buses=1428,1458,1489,1519

New Line._virtual_line1440_line1472_line1503_line1534_line1564 bus1=1411.1.2.3.4 bus2=1565.1.2.3.4 phases=4 linecode=LC8 length=10.53889 units=m
! reduced_from=line1440,line1472,line1503,line1534,line1564
! eliminated_buses=1441,1473,1504,1535

New Line._virtual_line1441_line1473_line1504_line1535_line1565_line1591_line1614_line1635_line1651_line1665_line1678_line1690_line1700_line1710_line1719_line1728_line1736_line1745_line1754_line1765_line1777_line1788_line1800_line1812_line1824_line1836 bus1=1411.1.2.3.4 bus2=1837.1.2.3.4 phases=4 linecode=LC5 length=23.213374 units=m
! reduced_from=line1441,line1473,line1504,line1535,line1565,line1591,line1614,line1635,line1651,line1665,line1678,line1690,line1700,line1710,line1719,line1728,line1736,line1745,line1754,line1765,line1777,line1788,line1800,line1812,line1824,line1836
! eliminated_buses=1442,1474,1505,1536,1566,1592,1615,1636,1652,1666,1679,1691,1701,1711,1720,1729,1737,1746,1755,1766,1778,1789,1801,1813,1825

New Line._virtual_line1462_line1493_line1524_line1554_line1580_line1604_line1625_line1642 bus1=1432.1.2.3.4 bus2=1643.1.2.3.4 phases=4 linecode=LC6 length=9.97391 units=m
! reduced_from=line1462,line1493,line1524,line1554,line1580,line1604,line1625,line1642
! eliminated_buses=1463,1494,1525,1555,1581,1605,1626

New Line._virtual_line1492_line1523_line1553_line1579_line1603_line1624 bus1=1625.1.2.3.4 bus2=1462.1.2.3.4 phases=4 linecode=LC6 length=14.00528 units=m
! reduced_from=line1492,line1523,line1553,line1579,line1603,line1624
! eliminated_buses=1493,1524,1554,1580,1604

New Line._virtual_line1589_line1612_line1633_line1649_line1663_line1676_line1688_line1698_line1708_line1716_line1725_line1733_line1741_line1750 bus1=1751.1.2.3.4 bus2=1565.1.2.3.4 phases=4 linecode=LC3 length=15.32335 units=m
! reduced_from=line1589,line1612,line1633,line1649,line1663,line1676,line1688,line1698,line1708,line1716,line1725,line1733,line1741,line1750
! eliminated_buses=1590,1613,1634,1650,1664,1677,1689,1699,1709,1717,1726,1734,1742

New Line._virtual_line1616_line1636_line1652_line1666_line1679_line1691_line1702_line1711_line1720_line1729_line1737_line1746_line1755 bus1=1594.1.2.3.4 bus2=1756.1.2.3.4 phases=4 linecode=LC1 length=7.71055 units=m
! reduced_from=line1616,line1636,line1652,line1666,line1679,line1691,line1702,line1711,line1720,line1729,line1737,line1746,line1755
! eliminated_buses=1617,1637,1653,1667,1680,1692,1703,1712,1721,1730,1738,1747

New Line._virtual_line1617_line1637_line1653_line1667_line1680_line1692_line1703_line1712_line1721_line1730_line1738_line1747_line1756_line1768_line1779_line1790_line1802_line1814_line1826_line1838_line1852 bus1=1853.1.2.3.4 bus2=1594.1.2.3.4 phases=4 linecode=LC9 length=50.02824 units=m
! reduced_from=line1617,line1637,line1653,line1667,line1680,line1692,line1703,line1712,line1721,line1730,line1738,line1747,line1756,line1768,line1779,line1790,line1802,line1814,line1826,line1838,line1852
! eliminated_buses=1618,1638,1654,1668,1681,1693,1704,1713,1722,1731,1739,1748,1757,1769,1780,1791,1803,1815,1827,1839

New Line._virtual_line1759_line1771_line1782_line1793_line1805_line1817_line1829 bus1=1751.1.2.3.4 bus2=1830.1.2.3.4 phases=4 linecode=LC3 length=10.17456 units=m
! reduced_from=line1759,line1771,line1782,line1793,line1805,line1817,line1829
! eliminated_buses=1760,1772,1783,1794,1806,1818

New Line._virtual_line1761_line1773_line1784_line1796_line1808_line1820_line1832_line1845_line1860_line1879_line1899_line1920_line1942_line1964 bus1=1965.1.2.3.4 bus2=1751.1.2.3.4 phases=4 linecode=LC6 length=13.186496 units=m
! reduced_from=line1761,line1773,line1784,line1796,line1808,line1820,line1832,line1845,line1860,line1879,line1899,line1920,line1942,line1964
! eliminated_buses=1762,1774,1785,1797,1809,1821,1833,1846,1861,1880,1900,1921,1943

New Line._virtual_line1766_line1778_line1789_line1801_line1813_line1825_line1837_line1851_line1866_line1885_line1906_line1928_line1951_line1974_line1995 bus1=1996.1.2.3.4 bus2=1756.1.2.3.4 phases=4 linecode=LC1 length=11.21296 units=m
! reduced_from=line1766,line1778,line1789,line1801,line1813,line1825,line1837,line1851,line1866,line1885,line1906,line1928,line1951,line1974,line1995
! eliminated_buses=1767,1779,1790,1802,1814,1826,1838,1852,1867,1886,1907,1929,1952,1975

New Line._virtual_line1841_line1855_line1873_line1892_line1913_line1935 bus1=1830.1.2.3.4 bus2=1936.1.2.3.4 phases=4 linecode=LC6 length=9.96266 units=m
! reduced_from=line1841,line1855,line1873,line1892,line1913,line1935
! eliminated_buses=1842,1856,1874,1893,1914

New Line._virtual_line1849_line1864 bus1=1837.1.2.3.4 bus2=1865.1.2.3.4 phases=4 linecode=LC5 length=3.6674 units=m
! reduced_from=line1849,line1864
! eliminated_buses=1850

New Line._virtual_line1850_line1865_line1884_line1905_line1927_line1950_line1973_line1994_line2016_line2037_line2057_line2075_line2092_line2109_line2124_line2138_line2153_line2168_line2181_line2193_line2205_line2215_line2227_line2239_line2250 bus1=1837.1.2.3.4 bus2=2251.1.2.3.4 phases=4 linecode=LC2 length=17.102001 units=m
! reduced_from=line1850,line1865,line1884,line1905,line1927,line1950,line1973,line1994,line2016,line2037,line2057,line2075,line2092,line2109,line2124,line2138,line2153,line2168,line2181,line2193,line2205,line2215,line2227,line2239,line2250
! eliminated_buses=1851,1866,1885,1906,1928,1951,1974,1995,2017,2038,2058,2076,2093,2110,2125,2139,2154,2169,2182,2194,2206,2216,2228,2240

New Line._virtual_line1856_line1874_line1893_line1914_line1936_line1958_line1980_line2001 bus1=2002.1.2.3.4 bus2=1843.1.2.3.4 phases=4 linecode=LC6 length=10.71944 units=m
! reduced_from=line1856,line1874,line1893,line1914,line1936,line1958,line1980,line2001
! eliminated_buses=1857,1875,1894,1915,1937,1959,1981

New Line._virtual_line1868_line1887_line1908_line1930_line1953_line1976_line1997_line2020_line2040_line2059_line2077_line2094 bus1=2095.1.2.3.4 bus2=1853.1.2.3.4 phases=4 linecode=LC1 length=7.70703 units=m
! reduced_from=line1868,line1887,line1908,line1930,line1953,line1976,line1997,line2020,line2040,line2059,line2077,line2094
! eliminated_buses=1869,1888,1909,1931,1954,1977,1998,2021,2041,2060,2078

New Line._virtual_line1869_line1888_line1909_line1931_line1954_line1977_line1998_line2021_line2041_line2060_line2078_line2095_line2113_line2127_line2141_line2156_line2171_line2184_line2196_line2208_line2219_line2231_line2243_line2254 bus1=1853.1.2.3.4 bus2=2255.1.2.3.4 phases=4 linecode=LC1 length=7.092437 units=m
! reduced_from=line1869,line1888,line1909,line1931,line1954,line1977,line1998,line2021,line2041,line2060,line2078,line2095,line2113,line2127,line2141,line2156,line2171,line2184,line2196,line2208,line2219,line2231,line2243,line2254
! eliminated_buses=1870,1889,1910,1932,1955,1978,1999,2022,2042,2061,2079,2096,2114,2128,2142,2157,2172,2185,2197,2209,2220,2232,2244

New Line._virtual_line1870_line1889_line1910_line1932 bus1=1933.1.2.3.4 bus2=1853.1.2.3.4 phases=4 linecode=LC9 length=19.98899 units=m
! reduced_from=line1870,line1889,line1910,line1932
! eliminated_buses=1871,1890,1911

New Line._virtual_line1875_line1894_line1915_line1937_line1959_line1981_line2002 bus1=1858.1.2.3.4 bus2=2003.1.2.3.4 phases=4 linecode=LC6 length=10.86985 units=m
! reduced_from=line1875,line1894,line1915,line1937,line1959,line1981,line2002
! eliminated_buses=1876,1895,1916,1938,1960,1982

New Line._virtual_line1882_line1902_line1923_line1945_line1967_line1989_line2011_line2032_line2052_line2070_line2087_line2104_line2119_line2133_line2148 bus1=1865.1.2.3.4 bus2=2149.1.2.3.4 phases=4 linecode=LC2 length=13.18642 units=m
! reduced_from=line1882,line1902,line1923,line1945,line1967,line1989,line2011,line2032,line2052,line2070,line2087,line2104,line2119,line2133,line2148
! eliminated_buses=1883,1903,1924,1946,1968,1990,2012,2033,2053,2071,2088,2105,2120,2134

New Line._virtual_line1895_line1916_line1938_line1960_line1982_line2003_line2024_line2044 bus1=2045.1.2.3.4 bus2=1877.1.2.3.4 phases=4 linecode=LC6 length=10.89479 units=m
! reduced_from=line1895,line1916,line1938,line1960,line1982,line2003,line2024,line2044
! eliminated_buses=1896,1917,1939,1961,1983,2004,2025

New Line._virtual_line1903_line1924_line1946_line1968_line1990_line2012_line2033_line2053_line2071_line2088_line2105_line2120_line2134_line2149_line2164_line2178 bus1=1884.1.2.3.4 bus2=2179.1.2.3.4 phases=4 linecode=LC2 length=11.21074 units=m
! reduced_from=line1903,line1924,line1946,line1968,line1990,line2012,line2033,line2053,line2071,line2088,line2105,line2120,line2134,line2149,line2164,line2178
! eliminated_buses=1904,1925,1947,1969,1991,2013,2034,2054,2072,2089,2106,2121,2135,2150,2165

New Line._virtual_line1904_line1926 bus1=1884.1.2.3.4 bus2=1927.1.2.3.4 phases=4 linecode=LC5 length=2.54359 units=m
! reduced_from=line1904,line1926
! eliminated_buses=1905

New Line._virtual_line1917_line1939_line1961_line1983_line2004_line2025_line2045_line2063_line2081_line2098 bus1=1897.1.2.3.4 bus2=2099.1.2.3.4 phases=4 linecode=LC6 length=14.53309 units=m
! reduced_from=line1917,line1939,line1961,line1983,line2004,line2025,line2045,line2063,line2081,line2098
! eliminated_buses=1918,1940,1962,1984,2005,2026,2046,2064,2082

New Line._virtual_line1948_line1970_line1992_line2014_line2035_line2055_line2073_line2090_line2107_line2122_line2136_line2151_line2166_line2179_line2191 bus1=1927.1.2.3.4 bus2=2192.1.2.3.4 phases=4 linecode=LC2 length=12.55276 units=m
! reduced_from=line1948,line1970,line1992,line2014,line2035,line2055,line2073,line2090,line2107,line2122,line2136,line2151,line2166,line2179,line2191
! eliminated_buses=1949,1971,1993,2015,2036,2056,2074,2091,2108,2123,2137,2152,2167,2180

New Line._virtual_line1955_line1978_line1999_line2022_line2042_line2061_line2079_line2096_line2114_line2128_line2142_line2157_line2172_line2185 bus1=1933.1.2.3.4 bus2=2186.1.2.3.4 phases=4 linecode=LC1 length=6.392765 units=m
! reduced_from=line1955,line1978,line1999,line2022,line2042,line2061,line2079,line2096,line2114,line2128,line2142,line2157,line2172,line2185
! eliminated_buses=1956,1979,2000,2023,2043,2062,2080,2097,2115,2129,2143,2158,2173

New Line._virtual_line1956_line1979_line2000_line2023_line2043_line2062_line2080_line2097_line2115_line2129_line2143_line2158_line2173_line2186_line2199_line2210_line2221_line2233_line2245_line2256 bus1=2257.1.2.3.4 bus2=1933.1.2.3.4 phases=4 linecode=LC1 length=12.82413 units=m
! reduced_from=line1956,line1979,line2000,line2023,line2043,line2062,line2080,line2097,line2115,line2129,line2143,line2158,line2173,line2186,line2199,line2210,line2221,line2233,line2245,line2256
! eliminated_buses=1957,1980,2001,2024,2044,2063,2081,2098,2116,2130,2144,2159,2174,2187,2200,2211,2222,2234,2246

New Line._virtual_line1971_line1993_line2015_line2036_line2056_line2074_line2091_line2108_line2123_line2137_line2152_line2167_line2180_line2192_line2204_line2214_line2226_line2238 bus1=1950.1.2.3.4 bus2=2239.1.2.3.4 phases=4 linecode=LC2 length=13.955425 units=m
! reduced_from=line1971,line1993,line2015,line2036,line2056,line2074,line2091,line2108,line2123,line2137,line2152,line2167,line2180,line2192,line2204,line2214,line2226,line2238
! eliminated_buses=1972,1994,2016,2037,2057,2075,2092,2109,2124,2138,2153,2168,2181,2193,2205,2215,2227

New Line._virtual_line2017_line2038_line2058_line2076_line2093_line2110_line2125_line2139_line2154_line2169_line2182_line2194_line2206_line2216_line2228_line2240_line2251 bus1=2252.1.2.3.4 bus2=1996.1.2.3.4 phases=4 linecode=LC1 length=9.37663 units=m
! reduced_from=line2017,line2038,line2058,line2076,line2093,line2110,line2125,line2139,line2154,line2169,line2182,line2194,line2206,line2216,line2228,line2240,line2251
! eliminated_buses=2018,2039,2059,2077,2094,2111,2126,2140,2155,2170,2183,2195,2207,2217,2229,2241

New Line._virtual_line2111_line2126_line2140_line2155_line2170_line2183_line2195_line2207_line2218_line2230_line2242_line2253_line2264_line2276_line2285_line2295_line2304_line2313 bus1=2095.1.2.3.4 bus2=2314.1.2.3.4 phases=4 linecode=LC1 length=12.39369 units=m
! reduced_from=line2111,line2126,line2140,line2155,line2170,line2183,line2195,line2207,line2218,line2230,line2242,line2253,line2264,line2276,line2285,line2295,line2304,line2313
! eliminated_buses=2112,2127,2141,2156,2171,2184,2196,2208,2219,2231,2243,2254,2265,2277,2286,2296,2305

New Line._virtual_line2197_line2209_line2220_line2232_line2244_line2255_line2267_line2278_line2287_line2297_line2306_line2315_line2325_line2334_line2343_line2352_line2361_line2369_line2377 bus1=2378.1.2.3.4 bus2=2186.1.2.3.4 phases=4 linecode=LC1 length=12.0757 units=m
! reduced_from=line2197,line2209,line2220,line2232,line2244,line2255,line2267,line2278,line2287,line2297,line2306,line2315,line2325,line2334,line2343,line2352,line2361,line2369,line2377
! eliminated_buses=2198,2210,2221,2233,2245,2256,2268,2279,2288,2298,2307,2316,2326,2335,2344,2353,2362,2370

New Line._virtual_line2261_line2274_line2284_line2294_line2303_line2312_line2321_line2331_line2340_line2349_line2358_line2366_line2374_line2382_line2390 bus1=2391.1.2.3.4 bus2=2252.1.2.3.4 phases=4 linecode=LC1 length=14.981979 units=m
! reduced_from=line2261,line2274,line2284,line2294,line2303,line2312,line2321,line2331,line2340,line2349,line2358,line2366,line2374,line2382,line2390
! eliminated_buses=2262,2275,2285,2295,2304,2313,2322,2332,2341,2350,2359,2367,2375,2383

New Line._virtual_line2265_line2277_line2286_line2296_line2305_line2314_line2324_line2333_line2342_line2351_line2360_line2368_line2376_line2384 bus1=2255.1.2.3.4 bus2=2385.1.2.3.4 phases=4 linecode=LC1 length=13.78724 units=m
! reduced_from=line2265,line2277,line2286,line2296,line2305,line2314,line2324,line2333,line2342,line2351,line2360,line2368,line2376,line2384
! eliminated_buses=2266,2278,2287,2297,2306,2315,2325,2334,2343,2352,2361,2369,2377

New Line._virtual_line2268_line2279_line2288_line2298_line2307_line2316_line2326_line2335_line2344_line2353_line2362_line2370_line2378 bus1=2257.1.2.3.4 bus2=2379.1.2.3.4 phases=4 linecode=LC1 length=15.11807 units=m
! reduced_from=line2268,line2279,line2288,line2298,line2307,line2316,line2326,line2335,line2344,line2353,line2362,line2370,line2378
! eliminated_buses=2269,2280,2289,2299,2308,2317,2327,2336,2345,2354,2363,2371

New Line._virtual_line2322_line2332_line2341_line2350_line2359_line2367_line2375_line2383_line2391_line2396_line2401_line2405_line2409_line2413_line2417_line2421_line2427 bus1=2428.1.2.3.4 bus2=2314.1.2.3.4 phases=4 linecode=LC1 length=16.604173 units=m
! reduced_from=line2322,line2332,line2341,line2350,line2359,line2367,line2375,line2383,line2391,line2396,line2401,line2405,line2409,line2413,line2417,line2421,line2427
! eliminated_buses=2323,2333,2342,2351,2360,2368,2376,2384,2392,2397,2402,2406,2410,2414,2418,2422

New Line._virtual_line2385_line2392_line2397_line2402_line2406_line2410_line2414_line2418_line2423_line2429_line2434_line2439_line2444_line2449_line2454_line2458 bus1=2378.1.2.3.4 bus2=2459.1.2.3.4 phases=4 linecode=LC1 length=15.06541 units=m
! reduced_from=line2385,line2392,line2397,line2402,line2406,line2410,line2414,line2418,line2423,line2429,line2434,line2439,line2444,line2449,line2454,line2458
! eliminated_buses=2386,2393,2398,2403,2407,2411,2415,2419,2424,2430,2435,2440,2445,2450,2455

New Line.LINE257 bus1=242.1.2.3.4 bus2=258.1.2.3.4 phases=4 linecode=LC6 length=3.1977 units=m

New Line.LINE293 bus1=279.1.2.3.4 bus2=294.1.2.3.4 phases=4 linecode=LC8 length=7.5495 units=m

New Line.LINE304 bus1=289.1.2.3.4 bus2=305.1.2.3.4 phases=4 linecode=LC6 length=3.4377 units=m

New Line.LINE320 bus1=303.1.2.3.4 bus2=321.1.2.3.4 phases=4 linecode=LC6 length=3.4201 units=m

New Line.LINE329 bus1=313.1.2.3.4 bus2=330.1.2.3.4 phases=4 linecode=LC5 length=1.1864 units=m

New Line.LINE349 bus1=330.1.2.3.4 bus2=350.1.2.3.4 phases=4 linecode=LC5 length=18.7531 units=m

New Line.LINE370 bus1=350.1.2.3.4 bus2=371.1.2.3.4 phases=4 linecode=LC5 length=0.38729 units=m

New Line.LINE371 bus1=350.1.2.3.4 bus2=372.1.2.3.4 phases=4 linecode=LC5 length=2.0001 units=m

New Line.LINE398 bus1=372.1.2.3.4 bus2=399.1.2.3.4 phases=4 linecode=LC5 length=12.2528 units=m

New Line.LINE452 bus1=424.1.2.3.4 bus2=453.1.2.3.4 phases=4 linecode=LC5 length=4.8137 units=m

New Line.LINE546 bus1=522.1.2.3.4 bus2=547.1.2.3.4 phases=4 linecode=LC2 length=4.885 units=m

New Line.LINE547 bus1=522.1.2.3.4 bus2=548.1.2.3.4 phases=4 linecode=LC2 length=18.3593 units=m

New Line.LINE566 bus1=543.1.2.3.4 bus2=567.1.2.3.4 phases=4 linecode=LC1 length=9.2921 units=m

New Line.LINE567 bus1=543.1.2.3.4 bus2=568.1.2.3.4 phases=4 linecode=LC1 length=9.959 units=m

New Line.LINE568 bus1=543.1.2.3.4 bus2=569.1.2.3.4 phases=4 linecode=LC1 length=11.4027 units=m

New Line.LINE569 bus1=543.1.2.3.4 bus2=570.1.2.3.4 phases=4 linecode=LC1 length=13.3739 units=m

New Line.LINE806 bus1=793.1.2.3.4 bus2=807.1.2.3.4 phases=4 linecode=LC1 length=4.29 units=m

New Line.LINE932 bus1=922.1.2.3.4 bus2=933.1.2.3.4 phases=4 linecode=LC8 length=1.1636 units=m

New Line.LINE1032 bus1=1022.1.2.3.4 bus2=1033.1.2.3.4 phases=4 linecode=LC9 length=7.3818 units=m

New Line.LINE1053 bus1=1038.1.2.3.4 bus2=1054.1.2.3.4 phases=4 linecode=LC4 length=5.3338 units=m

New Line.LINE1071 bus1=1054.1.2.3.4 bus2=1072.1.2.3.4 phases=4 linecode=LC4 length=8.2365 units=m

New Line.LINE1090 bus1=1072.1.2.3.4 bus2=1091.1.2.3.4 phases=4 linecode=LC4 length=5.0803 units=m

New Line.LINE1192 bus1=1172.1.2.3.4 bus2=1193.1.2.3.4 phases=4 linecode=LC4 length=2.3071 units=m

New Line.LINE1328 bus1=1314.1.2.3.4 bus2=1329.1.2.3.4 phases=4 linecode=LC4 length=8.2388 units=m

New Line.LINE1350 bus1=1329.1.2.3.4 bus2=1351.1.2.3.4 phases=4 linecode=LC4 length=1.4022 units=m

New Line.LINE1461 bus1=1432.1.2.3.4 bus2=1462.1.2.3.4 phases=4 linecode=LC4 length=4.0569 units=m

New Line.LINE1767 bus1=1756.1.2.3.4 bus2=1768.1.2.3.4 phases=4 linecode=LC1 length=4.3207 units=m

New Line.LINE1842 bus1=1830.1.2.3.4 bus2=1843.1.2.3.4 phases=4 linecode=LC3 length=4.2116 units=m

New Line.LINE1857 bus1=1843.1.2.3.4 bus2=1858.1.2.3.4 phases=4 linecode=LC3 length=8.773 units=m

New Line.LINE1876 bus1=1858.1.2.3.4 bus2=1877.1.2.3.4 phases=4 linecode=LC3 length=5.2159 units=m

New Line.LINE1883 bus1=1865.1.2.3.4 bus2=1884.1.2.3.4 phases=4 linecode=LC5 length=10.7802 units=m

New Line.LINE1896 bus1=1877.1.2.3.4 bus2=1897.1.2.3.4 phases=4 linecode=LC3 length=3.484 units=m

New Line.LINE1949 bus1=1927.1.2.3.4 bus2=1950.1.2.3.4 phases=4 linecode=LC5 length=4.541 units=m

New Line.LINE2018 bus1=1996.1.2.3.4 bus2=2019.1.2.3.4 phases=4 linecode=LC1 length=2.977 units=m

New Line.LINE2112 bus1=2095.1.2.3.4 bus2=2113.1.2.3.4 phases=4 linecode=LC1 length=3.3443 units=m

New Line.LINE2198 bus1=2186.1.2.3.4 bus2=2199.1.2.3.4 phases=4 linecode=LC1 length=4.0833 units=m

New Line.LINE2262 bus1=2252.1.2.3.4 bus2=2263.1.2.3.4 phases=4 linecode=LC1 length=3.2757 units=m

New Line.LINE2266 bus1=2255.1.2.3.4 bus2=2267.1.2.3.4 phases=4 linecode=LC1 length=4.1315 units=m

New Line.LINE2269 bus1=2257.1.2.3.4 bus2=2270.1.2.3.4 phases=4 linecode=LC1 length=5.6713 units=m

New Line.LINE2323 bus1=2314.1.2.3.4 bus2=2324.1.2.3.4 phases=4 linecode=LC1 length=2.4254 units=m

New Line.LINE2386 bus1=2378.1.2.3.4 bus2=2387.1.2.3.4 phases=4 linecode=LC1 length=3.1983 units=m
