! Reduced enabled lines.

New Line._virtual_line0_line1_line2_line3_line4_line5_line6_line7_line8_line9_line10_line11_line12_line13_line14_line15_line16_line17_line18_line19_line20_line21_line22_line23_line24_line25_line26_line27_line28_line29_line30_line31_line32_line33_line34_line35_line36_line37_line38_line39_line40_line41_line42_line43_line44_line45_line46_line47_line48_line49_line50_line51_line52_line53_line54_line55_line56_line57_line58_line59_line60_line61_line62_line63_line64_line65_line66_line67_line68_line69_line70_line71_line72_line73_line74_line75_line76_line77_line78_line79_line80_line81_line82_line83_line84_line85_line86_line87_line88 bus1=89.1.2.3.4 bus2=sourcebus.1.2.3.4 phases=4 linecode=LC5 length=42.183801 units=m
! reduced_from=line0,line1,line2,line3,line4,line5,line6,line7,line8,line9,line10,line11,line12,line13,line14,line15,line16,line17,line18,line19,line20,line21,line22,line23,line24,line25,line26,line27,line28,line29,line30,line31,line32,line33,line34,line35,line36,line37,line38,line39,line40,line41,line42,line43,line44,line45,line46,line47,line48,line49,line50,line51,line52,line53,line54,line55,line56,line57,line58,line59,line60,line61,line62,line63,line64,line65,line66,line67,line68,line69,line70,line71,line72,line73,line74,line75,line76,line77,line78,line79,line80,line81,line82,line83,line84,line85,line86,line87,line88
! eliminated_buses=1,2,3,4,5,6,7,8,9,10,11,12,13,14,15,16,17,18,19,20,21,22,23,24,25,26,27,28,29,30,31,32,33,34,35,36,37,38,39,40,41,42,43,44,45,46,47,48,49,50,51,52,53,54,55,56,57,58,59,60,61,62,63,64,65,66,67,68,69,70,71,72,73,74,75,76,77,78,79,80,81,82,83,84,85,86,87,88

New Line.LINE89 bus1=89.1.2.3.4 bus2=90.1.2.3.4 phases=4 linecode=LC8 length=2.4135 units=m

New Line.LINE90 bus1=90.1.2.3.4 bus2=91.1.2.3.4 phases=4 linecode=LC1 length=5.1712 units=m

New Line.LINE91 bus1=90.1.2.3.4 bus2=92.1.2.3.4 phases=4 linecode=LC1 length=4.6239 units=m

New Line.LINE92 bus1=90.1.2.3.4 bus2=93.1.2.3.4 phases=4 linecode=LC1 length=5.2498 units=m

New Line.LINE93 bus1=90.1.2.3.4 bus2=94.1.2.3.4 phases=4 linecode=LC1 length=5.2498 units=m

New Line.LINE94 bus1=90.1.2.3.4 bus2=95.1.2.3.4 phases=4 linecode=LC1 length=4.6239 units=m

New Line.LINE95 bus1=90.1.2.3.4 bus2=96.1.2.3.4 phases=4 linecode=LC1 length=5.2498 units=m

New Line.LINE96 bus1=90.1.2.3.4 bus2=97.1.2.3.4 phases=4 linecode=LC1 length=5.2498 units=m

New Line.LINE97 bus1=90.1.2.3.4 bus2=98.1.2.3.4 phases=4 linecode=LC1 length=4.6239 units=m

New Line.LINE98 bus1=90.1.2.3.4 bus2=99.1.2.3.4 phases=4 linecode=LC1 length=5.2498 units=m

New Line.LINE99 bus1=90.1.2.3.4 bus2=100.1.2.3.4 phases=4 linecode=LC1 length=5.2498 units=m

New Line.LINE100 bus1=90.1.2.3.4 bus2=101.1.2.3.4 phases=4 linecode=LC1 length=5.2498 units=m

New Line.LINE101 bus1=90.1.2.3.4 bus2=102.1.2.3.4 phases=4 linecode=LC1 length=5.2498 units=m

New Line.LINE102 bus1=90.1.2.3.4 bus2=103.1.2.3.4 phases=4 linecode=LC1 length=5.2498 units=m

New Line.LINE103 bus1=90.1.2.3.4 bus2=104.1.2.3.4 phases=4 linecode=LC1 length=5.2498 units=m

New Line.LINE104 bus1=90.1.2.3.4 bus2=105.1.2.3.4 phases=4 linecode=LC1 length=5.2498 units=m

New Line.LINE105 bus1=90.1.2.3.4 bus2=106.1.2.3.4 phases=4 linecode=LC1 length=5.2498 units=m

New Line.LINE106 bus1=90.1.2.3.4 bus2=107.1.2.3.4 phases=4 linecode=LC1 length=4.6239 units=m

New Line.LINE107 bus1=90.1.2.3.4 bus2=108.1.2.3.4 phases=4 linecode=LC1 length=5.2498 units=m

New Line.LINE108 bus1=90.1.2.3.4 bus2=109.1.2.3.4 phases=4 linecode=LC1 length=5.2498 units=m

New Line.LINE109 bus1=90.1.2.3.4 bus2=110.1.2.3.4 phases=4 linecode=LC1 length=4.6239 units=m

New Line.LINE110 bus1=90.1.2.3.4 bus2=111.1.2.3.4 phases=4 linecode=LC1 length=5.2498 units=m
