! Reduced enabled lines.

New Line._virtual_line0_line1_line2_line3_line4_line5_line6_line7_line8_line9_line10_line11_line12_line13_line14_line15_line16_line17_line18_line19_line20_line21_line22_line23_line24_line25_line26_line27_line28_line29_line30_line31_line32_line33_line34_line35_line36_line37_line38_line39_line40_line41_line42_line43_line44_line45 bus1=46.1.2.3.4 bus2=sourcebus.1.2.3.4 phases=4 linecode=LC8 length=11.450081 units=m
! reduced_from=line0,line1,line2,line3,line4,line5,line6,line7,line8,line9,line10,line11,line12,line13,line14,line15,line16,line17,line18,line19,line20,line21,line22,line23,line24,line25,line26,line27,line28,line29,line30,line31,line32,line33,line34,line35,line36,line37,line38,line39,line40,line41,line42,line43,line44,line45
! eliminated_buses=1,2,3,4,5,6,7,8,9,10,11,12,13,14,15,16,17,18,19,20,21,22,23,24,25,26,27,28,29,30,31,32,33,34,35,36,37,38,39,40,41,42,43,44,45

New Line._virtual_line46_line47_line48_line49_line50_line51_line52_line53_line54_line55_line56_line57_line58_line59_line60_line61_line62_line63_line64_line65_line66_line67_line68_line69_line70_line71_line73_line75_line77_line79_line81_line83_line85_line87_line89_line91_line93_line95_line97_line99_line101_line103_line105_line107_line109_line111_line113_line115_line117_line119_line121_line123_line125_line127_line129_line131_line133_line135_line137_line139_line141_line143_line145_line147_line149_line151_line153_line155 bus1=46.1.2.3.4 bus2=156.1.2.3.4 phases=4 linecode=LC5 length=30.516529 units=m
! reduced_from=line46,line47,line48,line49,line50,line51,line52,line53,line54,line55,line56,line57,line58,line59,line60,line61,line62,line63,line64,line65,line66,line67,line68,line69,line70,line71,line73,line75,line77,line79,line81,line83,line85,line87,line89,line91,line93,line95,line97,line99,line101,line103,line105,line107,line109,line111,line113,line115,line117,line119,line121,line123,line125,line127,line129,line131,line133,line135,line137,line139,line141,line143,line145,line147,line149,line151,line153,line155
! eliminated_buses=47,48,49,50,51,52,53,54,55,56,57,58,59,60,61,62,63,64,65,66,67,68,69,70,71,72,74,76,78,80,82,84,86,88,90,92,94,96,98,100,102,104,106,108,110,112,114,116,118,120,122,124,126,128,130,132,134,136,138,140,142,144,146,148,150,152,154

New Line.LINE157 bus1=156.1.2.3.4 bus2=158.1.2.3.4 phases=4 linecode=LC8 length=2.3161 units=m

New Line.LINE159 bus1=158.1.2.3.4 bus2=160.1.2.3.4 phases=4 linecode=LC1 length=4.8281 units=m

New Line.LINE160 bus1=158.1.2.3.4 bus2=161.1.2.3.4 phases=4 linecode=LC1 length=4.8281 units=m

New Line.LINE161 bus1=158.1.2.3.4 bus2=162.1.2.3.4 phases=4 linecode=LC1 length=4.8281 units=m

New Line.LINE162 bus1=158.1.2.3.4 bus2=163.1.2.3.4 phases=4 linecode=LC1 length=4.6379 units=m

New Line.LINE163 bus1=158.1.2.3.4 bus2=164.1.2.3.4 phases=4 linecode=LC1 length=4.6379 units=m

New Line.LINE164 bus1=158.1.2.3.4 bus2=165.1.2.3.4 phases=4 linecode=LC1 length=4.8281 units=m

New Line.LINE165 bus1=158.1.2.3.4 bus2=166.1.2.3.4 phases=4 linecode=LC1 length=4.8281 units=m

New Line.LINE166 bus1=158.1.2.3.4 bus2=167.1.2.3.4 phases=4 linecode=LC1 length=4.6379 units=m

New Line.LINE167 bus1=158.1.2.3.4 bus2=168.1.2.3.4 phases=4 linecode=LC1 length=4.8281 units=m

New Line.LINE168 bus1=158.1.2.3.4 bus2=169.1.2.3.4 phases=4 linecode=LC1 length=4.6379 units=m

New Line.LINE169 bus1=158.1.2.3.4 bus2=170.1.2.3.4 phases=4 linecode=LC1 length=4.8281 units=m

New Line.LINE170 bus1=158.1.2.3.4 bus2=171.1.2.3.4 phases=4 linecode=LC1 length=4.8281 units=m

New Line.LINE171 bus1=158.1.2.3.4 bus2=172.1.2.3.4 phases=4 linecode=LC1 length=4.8281 units=m

New Line.LINE172 bus1=158.1.2.3.4 bus2=173.1.2.3.4 phases=4 linecode=LC1 length=4.8281 units=m

New Line.LINE173 bus1=158.1.2.3.4 bus2=174.1.2.3.4 phases=4 linecode=LC1 length=4.6379 units=m

New Line.LINE174 bus1=158.1.2.3.4 bus2=175.1.2.3.4 phases=4 linecode=LC1 length=4.8281 units=m

New Line.LINE175 bus1=158.1.2.3.4 bus2=176.1.2.3.4 phases=4 linecode=LC1 length=4.8281 units=m

New Line.LINE176 bus1=158.1.2.3.4 bus2=177.1.2.3.4 phases=4 linecode=LC1 length=4.8281 units=m

New Line.LINE177 bus1=158.1.2.3.4 bus2=178.1.2.3.4 phases=4 linecode=LC1 length=4.8281 units=m

New Line.LINE178 bus1=158.1.2.3.4 bus2=179.1.2.3.4 phases=4 linecode=LC1 length=4.8281 units=m

New Line.LINE179 bus1=158.1.2.3.4 bus2=180.1.2.3.4 phases=4 linecode=LC1 length=10.5048 units=m

New Line.LINE180 bus1=158.1.2.3.4 bus2=181.1.2.3.4 phases=4 linecode=LC1 length=14.1192 units=m
